// SBML level 2 version 4
// dcterms:bibliographicCitation: urn:miriam:doi:10.1371/journal.pone.0185637
// dcterms:bibliographicCitation: urn:miriam:pubmed:29309421

function Constant_flux__irreversible(v)
  v;
end
Constant_flux__irreversible is "Constant flux (irreversible)";

function Henri_Michaelis_Menten__irreversible(substrate, Km, V)
  V*substrate/(Km + substrate);
end
Henri_Michaelis_Menten__irreversible is "Henri-Michaelis-Menten (irreversible)";

function Regulated_Synthesis(k, C, K)
  k*C/(K + C);
end

function Regulated_Synthesis_2(C1, K1, C2, K2, k)
  k*(C1/(K1 + C1))*(C2/(K2 + C2));
end

function Regulated_Decay(K, R, k, C)
  (K + R)/K*k*C;
end

function Regulated_Muchaelis_Menten(k, R, C, K)
  k*R*(C/(K + C));
end
Regulated_Muchaelis_Menten is "Regulated Muchaelis-Menten";

function Translation(k, C)
  k*C;
end

model Dong_2018()
  // Dong2018 - E2F dynamics in G1 phase
  // The length of the G1 phase in the cell cycle shows significant variability in different cell types and tissue types. To gain insights into the control of G1 length, we generated an E2F activity reporter that captures free E2F activity after dissociation from Rb sequestration and followed its kinetics of activation at the single-cell level, in real time. Our results demonstrate that its activity is precisely coordinated with S phase progression. Quantitative analysis indicates that there is a pre-S phase delay between E2F transcriptional dynamic and activity dynamics. This delay is variable among different cell types and is strongly modulated by the cyclin D/CDK4/6 complex activity through Rb phosphorylation. Our findings suggest that the main function of this complex is to regulate the appropriate timing of G1 length.
  // hasTaxon taxonomy:9606
  // hasTaxon taxonomy:10116
  // isDescribedBy pubmed:29309421
  // isDescribedBy doi:10.1371/journal.pone.0185637

  // Compartments:
  compartment Cell = 1;  // isVersionOf ncit:C12958

  // Species:
  species MYC in Cell = 0;  // isVersionOf uniprot:P01106
  species S in Cell = 10;  // hasProperty ncit:C13325
  species E2Fp in Cell = 0;  // isVersionOf uniprot:Q01094
  species E2Fm in Cell = 0;  // isVersionOf ensembl:ENST00000343380; isVersionOf ensembl:ENSG00000101412; isVersionOf ensembl:ENSP00000345571﻿
  species RB in Cell = 0;  // isVersionOf uniprot:P06400
  species RE in Cell = 0.4;  // hasPart uniprot:P06400; hasPart uniprot:Q01094; hasProperty ncit:C47881
  species R in Cell = 0;  // isVersionOf uniprot:P20248; isVersionOf uniprot:Q13309
  species CD in Cell = 0;  // isVersionOf uniprot:P30281; isVersionOf uniprot:P30279; isVersionOf uniprot:P24385
  species CE in Cell = 0;  // isVersionOf uniprot:O96020; isVersionOf uniprot:P24864
  species RP in Cell = 0.25;  // isVersionOf uniprot:P06400; hasProperty ncit:C1897

  // Parameters:
  kMC = 1;
  dMC = 0.7;
  kb = 0.15;
  kCD = 0.03;
  kCDS = 0.45;
  dCD = 1.5;
  kRBP1 = 18;
  kE2Fm = 0.4;
  dE2Fm = 0.25;
  kE2Fp = 0.4;
  dE2Fp = 0.35;
  kRBP2 = 18;
  kCE = 0.35;
  dCE = 1.5;
  kR = 0.1;
  dR = 0.1;
  kRB = 0.18;
  dRB = 0.06;
  kRE = 18;
  dRE = 0.03;
  kRBDP = 5;
  dRP = 0.06;
  KS = 0.5;
  KMC = 0.15;
  KMCI = 2.5;
  KMCCD = 0.15;
  KEF = 0.15;
  KCD = 0.92;
  KCE = 0.92;
  KRP = 0.01;
  KR = 0.1;
  KRS = 0.15;
  Initial_for_dE2Fm = dE2Fm;
  Initial_for_dE2Fp = dE2Fp;

  // Reactions:
  Serum_dependent_Myc_production: => MYC; Cell*Regulated_Synthesis(kMC, S, KS); Serum_dependent_Myc_production is "Serum-dependent Myc production";  // modifiers: S
  MYC_decay: MYC => ; Cell*dMC*MYC;
  E2Fm_synthesis_regulated_by_Myc_alone: => E2Fm; Cell*Regulated_Synthesis(kb, MYC, KMCI);  // modifiers: MYC
  E2Fm_synthesis_regulated_by_Myc_E2F_cooperation: => E2Fm; Cell*Regulated_Synthesis_2(MYC, KMC, E2Fp, KEF, kE2Fm); E2Fm_synthesis_regulated_by_Myc_E2F_cooperation is "E2Fm synthesis regulated by Myc/E2F cooperation";  // modifiers: MYC, E2Fp
  E2Fm_decay: E2Fm => ; Cell*dE2Fm*E2Fm;
  E2Fp_production_through_translation: => E2Fp; Cell*Translation(kE2Fp, E2Fm);  // modifiers: E2Fm
  Rb_E2F_complex_formation: E2Fp + RB => RE; Cell*kRE*E2Fp*RB; Rb_E2F_complex_formation is "Rb-E2F complex formation";
  R_regulated_E2Fp_decay: E2Fp => ; Cell*Regulated_Decay(KR, R, dE2Fp, E2Fp); R_regulated_E2Fp_decay is "R-regulated E2Fp decay";  // modifiers: R
  Myc_dependent_Cyclin_D_production: => CD; Cell*Regulated_Synthesis(kCD, MYC, KMCCD); Myc_dependent_Cyclin_D_production is "Myc-dependent Cyclin D production";  // modifiers: MYC
  Serum_dependent_Cyclin_D_production: => CD; Cell*Regulated_Synthesis(kCDS, S, KS); Serum_dependent_Cyclin_D_production is "Serum-dependent Cyclin D production";  // modifiers: S
  Cyclin_D_decay: CD => ; Cell*dCD*CD;
  E2F_dependent_Cyclin_E_production: => CE; Cell*Regulated_Synthesis(kCE, E2Fp, KEF); E2F_dependent_Cyclin_E_production is "E2F-dependent Cyclin E production";  // modifiers: E2Fp
  Cyclin_E_decay: CE => ; Cell*dCE*CE;
  Constitutive_Rb_synthesis: => RB; Cell*Constant_flux__irreversible(kRB);
  Rb_production_through_de_phosphorylation_of_RP: RP => RB; Cell*Henri_Michaelis_Menten__irreversible(RP, KRP, kRBDP); Rb_production_through_de_phosphorylation_of_RP is "Rb production through de-phosphorylation of RP";
  Cyclin_D_dependent_phosphorylation_of_Rb: RB => RP; Cell*Regulated_Muchaelis_Menten(kRBP1, CD, RB, KCD); Cyclin_D_dependent_phosphorylation_of_Rb is "Cyclin D-dependent phosphorylation of Rb";  // modifiers: CD
  Cyclin_E_dependent_phosphorylation_of_Rb: RB => RP; Cell*Regulated_Muchaelis_Menten(kRBP2, CE, RB, KCE); Cyclin_E_dependent_phosphorylation_of_Rb is "Cyclin E-dependent phosphorylation of Rb";  // modifiers: CE
  E2Fp_release_due_to_Cyclin_D_dependent_phosphorylation_of_RE: RE => E2Fp + RP; Cell*Regulated_Muchaelis_Menten(kRBP1, CD, RE, KCD); E2Fp_release_due_to_Cyclin_D_dependent_phosphorylation_of_RE is "E2Fp release due to Cyclin D-dependent phosphorylation of RE";  // modifiers: CD
  E2Fp_release_due_to_Cyclin_E_dependent_phosphorylation_of_RE: RE => E2Fp + RP; Cell*Regulated_Muchaelis_Menten(kRBP2, CE, RE, KCE); E2Fp_release_due_to_Cyclin_E_dependent_phosphorylation_of_RE is "E2Fp release due to Cyclin E-dependent phosphorylation of RE";  // modifiers: CE
  Rb_decay: RB => ; Cell*dRB*RB;
  RP_decay: RP => ; Cell*dRP*RP;
  RE_decay: RE => ; Cell*dRE*RE;
  E2F_dependent_R_transcription: => R; Cell*Regulated_Synthesis(kR, E2Fp, KR); E2F_dependent_R_transcription is "E2F-dependent R transcription";  // modifiers: E2Fp
  R_decay: R => ; Cell*dR*R;

  // Events:
  Pre_E2Fm_Transcription: at (time < 8): dE2Fm = 1e15, dE2Fp = 1e15;
  E2Fm_Transcription: at (time == 8): dE2Fm = Initial_for_dE2Fm, dE2Fp = Initial_for_dE2Fp;

  // Unit definitions:
  unit time = 3600 second;
  unit substance = 1e-6 mole;
end
