// SBML level 2 version 4

model Henze_2017()
  // Henze2017 - A Dynamical Model for Activating and Silencing the Mitotic Checkpoint
  // The spindle assembly checkpoint (SAC) is an evolutionarily conserved mechanism, exclusively sensitive to the states of kinetochores attached to microtubules. During metaphase, the anaphase-promoting complex/cyclosome (APC/C) is inhibited by the SAC but it rapidly switches to its active form following proper attachment of the final spindle. It had been thought that APC/C activity is an all-or-nothing response, but recent findings have demonstrated that it switches steadily. In this study, we develop a detailed mathematical model that considers all 92 human kinetochores and all major proteins involved in SAC activation and silencing. We perform deterministic and spatially-stochastic simulations and find that certain spatial properties do not play significant roles. Furthermore, we show that our model is consistent with in-vitro mutation experiments of crucial proteins as well as the recently-suggested rheostat switch behavior, measured by Securin or CyclinB concentration. Considering an autocatalytic feedback loop leads to an all-or-nothing toggle switch in the underlying core components, while the output signal of the SAC still behaves like a rheostat switch. The results of this study support the hypothesis that the SAC signal varies with increasing number of attached kinetochores, even though it might still contain toggle switches in some of its components.
  // isDescribedBy pubmed:28634351
  // hasProperty mamo:MAMO_0000003
  // biomodels.db:MODEL1812210002

  // Compartments:
  compartment compartment = 1;

  // Species:
  species KinA in compartment = 0;
  species KinU in compartment = 92;
  species APCC_Cdc20 in compartment = 0;
  species Securin in compartment = 0.1;
  species APCC in compartment = 0.09;
  species Cdc20 in compartment = 0.13;
  species CyclinB in compartment = 0;
  species APCC_MCC in compartment = 0;
  species MCC in compartment = 0;
  species C_Mad2 in compartment = 0.01875; C_Mad2 is "C-Mad2";
  species O_Mad2 in compartment = 0.15; O_Mad2 is "O-Mad2";
  species Cdc20_C_Mad2 in compartment = 0; Cdc20_C_Mad2 is "Cdc20_C-Mad2";
  species BubR1_Bub3 in compartment = 0.22;
  species Mad1_Mad2 in compartment = 0;
  species Mad1_Mad2_C_Mad2 in compartment = 0; Mad1_Mad2_C_Mad2 is "Mad1_Mad2_C-Mad2";
  species BCC in compartment = 0;
  species APCC_Cdc20_C_Mad2 in compartment = 0; APCC_Cdc20_C_Mad2 is "APCC_Cdc20_C-Mad2";
  species APCC_BCC in compartment = 0;
  species APCC_Cdc20_MCC in compartment = 0;

  // Parameters:
  kattach = 0.0035;
  k2 = 100;
  k_2 = 0.08; k_2 is "k-2";
  k_3 = 0.2; k_3 is "k-3";
  k4 = 10;
  k5 = 10;
  k_5 = 0.2; k_5 is "k-5";
  k6 = 0.001;
  k_6 = 0.01; k_6 is "k-6";
  k7 = 0.01;
  k_7 = 0.2; k_7 is "k-7";
  kT1 = 0.01;
  k_T1 = 0.02; k_T1 is "k-T1";
  kT2 = 10;
  k1 = 5;
  k_1 = 0.08; k_1 is "k-1";
  k10 = 0.2;
  kD = 0.05;
  k_4 = 0.1; k_4 is "k-4";

  // Assignment rules:
  k3 := 0.015*KinU;
  k8 := 0.014*KinA;
  k9 := 0.014*KinA;

  // Reactions:
  reaction_1: KinU => KinA; compartment*kattach*KinU;
  reaction_2: APCC + Cdc20 -> APCC_Cdc20; compartment*(k1*APCC*Cdc20 - k_1*APCC_Cdc20);
  reaction_3: APCC_Cdc20 + Securin => APCC_Cdc20; compartment*kD*APCC_Cdc20*Securin;
  reaction_4: APCC_Cdc20 + CyclinB => APCC_Cdc20; compartment*kD*APCC_Cdc20*CyclinB;
  reaction_5: APCC + MCC -> APCC_MCC; compartment*(k2*APCC*MCC - k_2*APCC_MCC);
  reaction_6: O_Mad2 -> C_Mad2; compartment*(k3*O_Mad2 - k_3*C_Mad2);
  reaction_7: Cdc20 + C_Mad2 => Cdc20_C_Mad2; compartment*k4*Cdc20*C_Mad2;
  reaction_8: Cdc20_C_Mad2 + BubR1_Bub3 -> MCC; compartment*(k5*Cdc20_C_Mad2*BubR1_Bub3 - k_5*MCC);
  reaction_9: Mad1_Mad2 + O_Mad2 -> Mad1_Mad2_C_Mad2; compartment*(kT1*Mad1_Mad2*O_Mad2 - k_T1*Mad1_Mad2_C_Mad2);
  reaction_10: Mad1_Mad2_C_Mad2 + Cdc20 => Mad1_Mad2 + Cdc20_C_Mad2; compartment*kT2*Mad1_Mad2_C_Mad2*Cdc20;
  reaction_11: O_Mad2 + Cdc20 -> Cdc20_C_Mad2; compartment*(k6*O_Mad2*Cdc20 - k_6*Cdc20_C_Mad2);
  reaction_12: Cdc20 + BubR1_Bub3 -> BCC; compartment*(k7*Cdc20*BubR1_Bub3 - k_7*BCC);
  reaction_13: O_Mad2 => ; compartment*kattach*O_Mad2;
  reaction_14: APCC_Cdc20 + C_Mad2 -> APCC_Cdc20_C_Mad2; compartment*(k4*APCC_Cdc20*C_Mad2 - k_4*APCC_Cdc20_C_Mad2);
  reaction_15: APCC_Cdc20_C_Mad2 + BubR1_Bub3 -> APCC_MCC; compartment*(k5*APCC_Cdc20_C_Mad2*BubR1_Bub3 - k_5*APCC_MCC);
  reaction_16: APCC_Cdc20 + MCC -> APCC_Cdc20_MCC; compartment*(k2*APCC_Cdc20*MCC - k_2*APCC_Cdc20_MCC);
  reaction_17: APCC_MCC => APCC_BCC + O_Mad2; compartment*k8*APCC_MCC;
  reaction_18: APCC_Cdc20_MCC => APCC_BCC + O_Mad2; compartment*k9*APCC_Cdc20_MCC;
  reaction_19: APCC_BCC => APCC_Cdc20 + BubR1_Bub3; compartment*k10*APCC_BCC;

  // Unit definitions:
  unit substance = 1e-6 mole;
end
