// SBML level 2 version 4

function Constant_flux__irreversible(v)
  v;
end
Constant_flux__irreversible is "Constant flux (irreversible)";

model Model_with_parameter_set_3114()
  // Model of budding yeast critical cell size dependence on growth rate with parameter set 3114
  // Model published in the paper Chaperone availability subordinates cell cycle entry to growth and stress by David F. Moreno1, Eva Parisi1, Galal Yahya, Federico Vaggi, Attila Csikász-Nagy, Martí Aldea

  // Compartments:
  compartment compartment = 1e-11;

  // Species:
  species Cln3F in compartment = 0;
  species Cln3U in compartment = 0;
  species Ydj1 in compartment = 0;
  species YP in compartment = 0;
  species YC in compartment = 0;
  species ProtU in compartment = 0;
  species ProtF in compartment = 0;

  // Parameters:
  ksCln3 = 0.126;
  ksProt = 0.2;
  kdCln3U = 0.0693;
  kdCln3F = 0.0385;
  kdProtU = 0.0726;
  kb = 0.891;
  kr = 0.388;
  ksYdj1 = 0.000919;
  kdProtF = 0.000726;
  kdYdj1 = 0.00577;
  var Free_Cln3__r_u_; Free_Cln3__r_u_ is "Free Cln3 (r.u.)";
  var Unfolded_Cln3__r_u_; Unfolded_Cln3__r_u_ is "Unfolded Cln3 (r.u.)";
  var Folded_Prot__r_u_; Folded_Prot__r_u_ is "Folded Prot (r.u.)";
  var Unfolded_Prot__r_u_; Unfolded_Prot__r_u_ is "Unfolded Prot (r.u.)";
  var Bound_Ydj1__r_u_; Bound_Ydj1__r_u_ is "Bound Ydj1 (r.u.)";
  var Available_Ydj1__r_u_; Available_Ydj1__r_u_ is "Available Ydj1 (r.u.)";
  quantity_to_number_factor_0 = 6.022141e20;

  // Assignment rules:
  Free_Cln3__r_u_ := Cln3F*quantity_to_number_factor_0*compartment/(Cln3F*quantity_to_number_factor_0*compartment + Cln3U*quantity_to_number_factor_0*compartment);
  Unfolded_Cln3__r_u_ := 1 - Free_Cln3__r_u_;
  Folded_Prot__r_u_ := ProtF*quantity_to_number_factor_0*compartment/(ProtF*quantity_to_number_factor_0*compartment + ProtU*quantity_to_number_factor_0*compartment);
  Unfolded_Prot__r_u_ := 1 - Folded_Prot__r_u_;
  Bound_Ydj1__r_u_ := (YC*quantity_to_number_factor_0*compartment + YP*quantity_to_number_factor_0*compartment)/(YC*quantity_to_number_factor_0*compartment + YP*quantity_to_number_factor_0*compartment + Ydj1*quantity_to_number_factor_0*compartment);
  Available_Ydj1__r_u_ := 1 - Bound_Ydj1__r_u_;

  // Reactions:
  Cln3U_synthesis: => Cln3U; compartment*Constant_flux__irreversible(ksCln3);
  ProtU_synthesis: => ProtU; compartment*Constant_flux__irreversible(ksProt);
  YP_formation: Ydj1 + ProtU => YP; compartment*kb*Ydj1*ProtU;
  YC_formation: Ydj1 + Cln3U => YC; compartment*kb*Ydj1*Cln3U;
  YP_release: YP => Ydj1 + ProtF; compartment*kr*YP;
  YC_release: YC => Ydj1 + Cln3F; compartment*kr*YC;
  Cln3U_degradation: Cln3U => ; compartment*kdCln3U*Cln3U;
  Cln3F_degradation: Cln3F => ; compartment*kdCln3F*Cln3F;
  ProtU_degradation: ProtU => ; compartment*kdProtU*ProtU;
  YC_degradation_to_Ydj1: YC => Ydj1; compartment*kdCln3U*YC;
  YP_degradation_to_Ydj1: YP => Ydj1; compartment*kdProtU*YP;
  ProtF_degradation: ProtF => ; compartment*kdProtF*ProtF;
  Ydj1_degradation: Ydj1 => ; compartment*kdYdj1*Ydj1;
  Ydj1_synthesis: => Ydj1; compartment*Constant_flux__irreversible(ksYdj1);
  YC_degradation_to_Cln3U: YC => Cln3U; compartment*kdYdj1*YC;
  YP_degradation_to_ProtU: YP => ProtU; compartment*kdYdj1*YP;

  // Unit definitions:
  unit volume = 1e-3 litre;
  unit substance = 1e-3 mole;
end
