// SBML level 2 version 4

function Constant_flux__irreversible(v)
  v;
end
Constant_flux__irreversible is "Constant flux (irreversible)";

model Protein_Aggregation()
  // Moreno2019 - Stochastic model of G1 arrest due to proteostasis decline delimits replicative lifespan in yeast
  // This model is described within the paper: A G1 arrest due to proteostasis decline delimits replicative lifespan in yeast
  // David F. Moreno, Kirsten Jenkins, Sandrine Morlot, Gilles Charvin, Attila Csikász-Nagy, Martí Aldea
  // To be implemented in Copasi.
  // Missing Event due to difficulties in SBML conversion to run model upon loading model in COPASI, create an event called Budding.
  // Set the trigger expression to: {Whi5.ParticleNumber} lt 250*({Whi5i.ParticleNumber}+{Whi5.ParticleNumber})/({Whi5.InitialParticleNumber}+{Whi5i.InitialParticleNumber}) AND {Values[Budding]} lt 1.
  // Uncheck boxes for fire at initial time if true and trigger must remain true.
  // Leave priority box blank.
  // Set delay to None.
  // There are 3 targets:
  // the value of budding which should be set to one;
  // the time at budding which should be set to the time;
  // and the unsynced generation which should be set to generation.

  // Compartments:
  compartment cell;

  // Species:
  substanceOnly species Prot in cell = 0.0001074918;
  substanceOnly species YP in cell = 1.416792e-5;
  substanceOnly species Ydj1 in cell = 8.638241e-10;
  substanceOnly species ProtF in cell = 7.556825e-6;
  substanceOnly species ProtM in cell = 5.221888e-7;
  substanceOnly species Oli in cell = 3.160193e-12;
  substanceOnly species Agg in cell = 7.879813e-19;
  substanceOnly species YOAgg in cell = 0;
  substanceOnly species YM in cell = 2.685745e-8;
  substanceOnly species YO in cell = 2.817011e-16;
  // 0.00000005+{YOAgg.ParticleNumber}/({Compartments[cell].Volume}*1000000000)
  substanceOnly species $Hsp104 in cell;
  substanceOnly species Cln3 in cell = 3.510842e-7;
  substanceOnly species YC in cell = 9.126451e-9;
  substanceOnly species Cln3F in cell = 1.299991e-8;
  substanceOnly species Whi5 in cell = 1.660539e-6;
  substanceOnly species Whi5i in cell = 0;

  // Parameters:
  Budding = 0;
  Generation = 1;
  TimeAtBudding = 0;
  TimeNotinG1 = 0;
  UnsyncedGeneration = 0;
  Timer has unit_0;
  quantity_to_number_factor = 6.022141e8;
  Metabolite_17_0 = Whi5; Metabolite_17_0 is "Initial for Whi5";

  // Assignment rules:
  Timer := time - TimeAtBudding;
  cell := 24.8 + 0.05*(time - TimeNotinG1)*(1 - Budding) + 0.05*(TimeAtBudding - TimeNotinG1)*Budding;
  Hsp104 := (5e-8 + YOAgg*quantity_to_number_factor/(cell*1000000000))*cell;

  // Reactions:
  Protein_chaperone_binding: Prot + Ydj1 => YP; Protein_chaperone_binding_k1*Prot*(Ydj1/cell);
    Protein_chaperone_binding_k1 = 1000000000;
  Protein_Chaperone_unbinding: YP => Ydj1 + ProtF; Protein_Chaperone_unbinding_k1*YP;
    Protein_Chaperone_unbinding_k1 = 3;
  Protein_Misfolding: Prot => ProtM; Protein_Misfolding_k1*Prot;
    Protein_Misfolding_k1 = 0.078;
  Oligomerisation_Fast: 2 ProtM + Oli => 2 Oli; Oligomerisation_Fast_k1*(ProtM/cell)^2*Oli;
    Oligomerisation_Fast_k1 = 10000000;
  Oligomerisation_Slow: 2 ProtM => Oli; cell*Oligomerisation_Slow_k1*(ProtM/cell)^2;
    Oligomerisation_Slow_k1 = 300000;
  Oligomerisation_With_Agg: 2 ProtM + Agg => Agg + Oli; Oligomerisation_With_Agg_k1*(ProtM/cell)^2*Agg;
    Oligomerisation_With_Agg_k1 = 1e15;
  Oligomerisation_with_YoAgg: 2 ProtM + YOAgg => YOAgg + Oli; Oligomerisation_with_YoAgg_k1*(ProtM/cell)^2*YOAgg;
    Oligomerisation_with_YoAgg_k1 = 10000000;
  YM_creation: ProtM + Ydj1 => YM; YM_creation_k1*ProtM*(Ydj1/cell);
    YM_creation_k1 = 1e10;
  YM_release: YM => Ydj1 + ProtF; YM_release_k1*YM;
    YM_release_k1 = 1;
  YO_creation: Oli + 2 Ydj1 => YO; YO_creation_k1*Oli*(Ydj1/cell)^2;
    YO_creation_k1 = 6e18;
  YO_release: YO => 2 Ydj1 + 2 ProtF; YO_release_k1*YO;
    YO_release_k1 = 0.001;
  Aggregation: 3 Oli => Agg; cell*Aggregation_k1*(Oli/cell)^3;
    Aggregation_k1 = 500000000;
  Aggregation_with_Agg: 3 Oli + Agg => 2 Agg; Aggregation_with_Agg_k1*(Oli/cell)^3*Agg;
    Aggregation_with_Agg_k1 = 1e23;
  Aggregation_with_YOagg: 3 Oli + YOAgg => Agg + YOAgg; Aggregation_with_YOagg_k1*(Oli/cell)^3*YOAgg;
    Aggregation_with_YOagg_k1 = 1e18;
  YOagg_creation_from_YO: 3 YO => YOAgg; cell*YOagg_creation_from_YO_k1*(YO/cell)^3;
    YOagg_creation_from_YO_k1 = 1e10;
  YOAgg_creation_from_Agg: Agg + 6 Ydj1 => YOAgg; YOAgg_creation_from_Agg_k1*Agg*(Ydj1/cell)^6;
    YOAgg_creation_from_Agg_k1 = 1e55;
  YOagg_refolding: YOAgg + $Hsp104 => 6 Ydj1 + 6 ProtF + $Hsp104; YOagg_refolding_k1*YOAgg*(Hsp104/cell);
    YOagg_refolding_k1 = 10000;
  Cln3_binding: Cln3 + Ydj1 => YC; Cln3_binding_k1*Cln3*(Ydj1/cell);
    Cln3_binding_k1 = 1000000000;
  Cln3_unbinding: YC => Ydj1 + Cln3F; Cln3_unbinding_k1*YC;
    Cln3_unbinding_k1 = 3;
  Creation_Prot: => Prot; cell*Constant_flux__irreversible(Creation_Prot_v);
    Creation_Prot_v = 1e-5;
  Creation_cln3: => Cln3; cell*Constant_flux__irreversible(Creation_cln3_v);
    Creation_cln3_v = 2.7e-7;
  Aggregation_degredation: Agg => ; Aggregation_degredation_k1*Agg;
    Aggregation_degredation_k1 = 0.001;
  // 3 times slower than Ydj1 degradation
  YOagg_Ydj1_degradation: YOAgg => Agg; YOagg_Ydj1_degradation_k1*YOAgg;
    YOagg_Ydj1_degradation_k1 = 1;
  YOAgg_Agg_degradation: YOAgg => 6 Ydj1; YOAgg_Agg_degradation_k1*YOAgg;
    YOAgg_Agg_degradation_k1 = 0.001;
  ProtF_degradation: ProtF => ; ProtF_degradation_k1*ProtF;
    ProtF_degradation_k1 = 1;
  Oli_degradation: Oli => ; Oli_degradation_k1*Oli;
    Oli_degradation_k1 = 0.01;
  Ydj1_degradation: Ydj1 => ; Ydj1_degradation_k1*Ydj1;
    Ydj1_degradation_k1 = 1;
  YP_ydj1_degradation: YP => Prot; YP_ydj1_degradation_k1*YP;
    YP_ydj1_degradation_k1 = 1;
  YP_prot_degradation: YP => Ydj1; YP_prot_degradation_k1*YP;
    YP_prot_degradation_k1 = 1;
  YO_Ydj1_degradation: YO => Oli; YO_Ydj1_degradation_k1*YO;
    YO_Ydj1_degradation_k1 = 1;
  YO_Oli_degradation: YO => 2 Ydj1; YO_Oli_degradation_k1*YO;
    YO_Oli_degradation_k1 = 0.1;
  YM_Ydj1_degradation: YM => ProtM; YM_Ydj1_degradation_k1*YM;
    YM_Ydj1_degradation_k1 = 1;
  YM_M_degradation: YM => Ydj1; YM_M_degradation_k1*YM;
    YM_M_degradation_k1 = 5;
  ProtM_degradation: ProtM => ; ProtM_degradation_k1*ProtM;
    ProtM_degradation_k1 = 0.1;
  Prot_degradation: Prot => ; Prot_degradation_k1*Prot;
    Prot_degradation_k1 = 1;
  YOAgg_Y_release: YOAgg => 6 Ydj1 + Agg; YOAgg_Y_release_k1*YOAgg;
    YOAgg_Y_release_k1 = 1e-5;
  Ydj1_creation: => Ydj1; cell*Constant_flux__irreversible(Ydj1_creation_v);
    Ydj1_creation_v = 9e-7;
  Cln3_degradation: Cln3 => ; Cln3_degradation_k1*Cln3;
    Cln3_degradation_k1 = 15;
  Yc_Ydj1_degradation: YC => Cln3; Yc_Ydj1_degradation_k1*YC;
    Yc_Ydj1_degradation_k1 = 1;
  YC__Cln3_degradation: YC => Ydj1; YC__Cln3_degradation_k1*YC; YC__Cln3_degradation is "YC Cln3 degradation";
    YC__Cln3_degradation_k1 = 15;
  Cln3F_degradation: Cln3F => ; Cln3F_degradation_k1*Cln3F;
    Cln3F_degradation_k1 = 1;
  Whi5_Inactivation: Whi5 + Cln3F => Whi5i + Cln3F; Whi5_Inactivation_k1*Whi5*(Cln3F/cell);
    Whi5_Inactivation_k1 = 210000000;
  Whi5_activation: Whi5i => Whi5; Whi5_activation_k1*Whi5i;
    Whi5_activation_k1 = 0.09;

  // Events:
  Division: at (5) after (Budding > 0): Cln3F = 0*cell, Budding = 0, Whi5i = 0*cell, Whi5 = Metabolite_17_0*cell, Generation = Generation + 1, TimeNotinG1 = 5*UnsyncedGeneration;

  // Unit definitions:
  unit volume = 1e-15 litre;
  unit substance = 1e-15 mole;
  unit unit_0 = second; unit_0 is "s";
end
