// SBML level 2 version 4

model Zhang_2018()
  // Zhang2018 - Cell cycle commitment in hypoxia
  // Does not reproduce publication figure 3

  // Compartments:
  compartment compartment = 1;

  // Species:
  species $Hif1a_Myc in compartment = 0; Hif1a_Myc is "Hif1a-Myc";
  species $Hif2a_Myc in compartment = 0; Hif2a_Myc is "Hif2a-Myc";
  species $E2F in compartment = 0;
  species $cycD_p_p in compartment = 0; cycD_p_p is "cycD-p/p";
  species $cycD in compartment = 0;
  species $cycE in compartment = 0;
  species $RbP in compartment = 0;
  species $Rb_nP in compartment = 0; Rb_nP is "Rb-nP";
  species $Myc in compartment = 0;
  species $E2F_RB in compartment = 0.25; E2F_RB is "E2F-RB";
  species $Rb in compartment = 0.4;
  species $p_p in compartment = 0.2; p_p is "p/p";
  species $Hif1a in compartment;
  species $Hif2a in compartment;
  species $cycE_p_p in compartment = 0; cycE_p_p is "cycE-p/p";

  // Parameters:
  M1 = 0.000414;
  b1 = 9.395;
  T1 = 10;
  M2 = 0.20497;
  b2 = 0.44863;
  kr3A = 0.15;
  kf3A = 15;
  kr3B = 0.15;
  kf3B = 15;
  T2 = 20;
  m13 = 0.4;
  k13 = 0.15;
  k_13 = 0.15; k_13 is "k'13";
  m_E2F = 0.003;
  k_E2F = 0.15;
  d_E2F = 0.25;
  kf12 = 18;
  kr6B = 0.18;
  kr12 = 0.18;
  g_cycD = 0.045;
  k_3A = 0.07;
  g_Rb = 0.06;
  g_p_p = 0.06; g_p_p is "g_p/p";
  d_p_p = 0.06; d_p_p is "d_p/p";
  d_cycD_pp = 1.5;
  d_cycE_pp = 1.5;
  d_RbP = 0.06;
  d_e2f_Rb = 0.25;
  m_E2F_RbP = 18; m_E2F_RbP is "m_E2F-RbP";
  k_E2F_RbP = 0.92; k_E2F_RbP is "k_E2F-RbP";
  k8 = 18;
  kf6B = 18;
  d_cycE = 1.5;
  k9 = 0.15;
  k5_cycD = 0.15;
  m5_cycD = 0.03;
  d_cycD = 1.5;
  d_Rb = 0.06;
  k_cycD_RB = 0.92;
  m_cycD_Rb = 18;
  k_RbP = 0.01;
  m_RbP = 5;
  k_cycE_RbP = 0.92;
  m_cycE_RbP = 18;
  k_RbnP = 0.01;
  m_RbnP = 5;
  g_myc = 1;
  d_myc = 0.7;
  k4 = 1;
  epsilon = 1;
  d_hif1_mm = 0.1;
  d_hif2_mm = 0.1;
  n_deg = 1;
  m9 = 0.35;
  O2 = 2;
  P1 = 0.5;
  P2 = 5;
  O2_TH = 10;

  // Assignment rules:
  Hif1a := M1*exp(b1*(1 - abs(P1 - O2)/T1));
  Hif2a := M2*exp(b2*(1 - abs(P2 - O2)/T2));
  DEG := exp(n_deg*(O2 - O2_TH)/O2_TH);

  // Rate rules:
  Hif1a_Myc' = -kr3A*Hif1a_Myc + kf3A*Hif1a*Myc - d_hif1_mm*Hif1a_Myc*DEG;
  Hif2a_Myc' = -kr3B*Hif2a_Myc + kf3B*Hif2a*Myc - d_hif2_mm*Hif2a_Myc*DEG;
  E2F' = m13*(Myc/(Myc + k13))*(E2F/(E2F + k_13)) + m_E2F*Myc/(Myc + k_E2F) + m13*epsilon*(Hif2a_Myc/(Hif2a_Myc + k13))*(E2F/(E2F + k_13)) + m_E2F*(Hif2a_Myc/(Hif2a_Myc + k_E2F)) + m_E2F_RbP*E2F_RB*(cycD + cycD_p_p)/(E2F_RB + k_E2F_RbP) - k8*Rb*E2F - d_E2F*E2F*DEG;
  cycD_p_p' = kf6B*p_p*cycD - kr6B*cycD_p_p - d_cycD_pp*cycD_p_p*DEG;
  cycD' = g_cycD*(1 - Hif1a/(Hif1a + k_3A)) - kf6B*p_p*cycD + kr6B*cycD_p_p + m5_cycD*epsilon*(Hif2a_Myc/(Hif2a_Myc + k5_cycD)) + m5_cycD*(Myc/(Myc + k5_cycD)) - d_cycD*cycD*DEG;
  cycE' = kr12*cycE_p_p - kf12*cycE*p_p + m9*E2F/(k9 + E2F) - d_cycE*cycE*DEG;
  RbP' = m_cycD_Rb*(cycD + cycD_p_p)*(Rb/(Rb + k_cycD_RB)) - m_cycE_RbP*cycE*RbP^3/(RbP^3 + k_cycE_RbP) - m_RbP*(RbP/(RbP + k_RbP)) + m_E2F_RbP*E2F_RB*(cycD + cycD_p_p)/(E2F_RB + k_cycE_RbP) + m_RbnP*Rb_nP^3/(Rb_nP^3 + k_RbnP) - d_RbP*RbP*DEG;
  Rb_nP' = m_cycE_RbP*cycE*RbP^3/(RbP^3 + k_cycE_RbP) - m_RbnP*Rb_nP^3/(Rb_nP^3 + k_RbnP);
  Myc' = g_myc + kr3A*Hif1a_Myc - kf3A*Hif1a*Myc + kr3B*Hif2a_Myc - kf3B*Hif2a*Myc - d_myc*Myc*DEG;
  E2F_RB' = k8*Rb*E2F - m_E2F_RbP*(E2F_RB/(E2F_RB + k_E2F_RbP))*(cycD + cycD_p_p) - d_e2f_Rb*E2F_RB*DEG;
  Rb' = g_Rb - m_cycD_Rb*(cycD + cycD_p_p)*Rb/(Rb + k_cycD_RB) + m_RbP*(RbP/(RbP + k_RbP)) - k8*Rb*E2F - d_Rb*Rb*DEG;
  p_p' = g_p_p*(1 - k4*Myc) - kf6B*p_p*cycD + kr6B*cycD_p_p - kf12*p_p*cycE + kr12*cycE_p_p - d_p_p*p_p*DEG;
  cycE_p_p' = kf12*p_p*cycE - kr12*cycE_p_p - d_cycE_pp*cycE_p_p*DEG;

  // Unit definitions:
  unit volume = 1e-3 litre;
  unit time = 3600 second;
  unit substance = 1e-3 mole;
end
