// SBML level 2 version 4

model COVID_19_immunotherapy_A_mathematical_model()
  // COVID-19 immunotherapy A mathematical model
  // We propose a within-host population (ODE) innate immunity model, whose focus is on NK cells and their relevant role in preventing COVID19 from progressing to the acute phase that may eventually lead to the patient’s death. We propose a immunotherapy treatment.
  // hasProperty mamo:MAMO_0000045

  // Compartments:
  compartment Alv_olo = 1; Alv_olo is "Alvéolo";

  // Species:
  species $A_0_tratamento in Alv_olo = 400000; A_0_tratamento is "A_0(tratamento)";
  species $A_I_tratamento in Alv_olo = 1; A_I_tratamento is "A_I(tratamento)";
  species $V_tratamento in Alv_olo = 1000; V_tratamento is "V(tratamento)";
  species $N_at_tratamento in Alv_olo = 10; N_at_tratamento is "N_at(tratamento)";
  species $N_in_tratamento in Alv_olo = 300000; N_in_tratamento is "N_in(tratamento)";
  species $M_I_tratamento in Alv_olo = 0; M_I_tratamento is "M_I(tratamento)";
  species $M_0_tratamento in Alv_olo = 1000000; M_0_tratamento is "M_0(tratamento)";
  species $A_p_tratamento in Alv_olo = 1; A_p_tratamento is "A_p(tratamento)";
  species $Vint_tratamento in Alv_olo = 10; Vint_tratamento is "Vint(tratamento)";
  species $v_int_tratamento in Alv_olo; v_int_tratamento is "v_int(tratamento)";
  species $H_tratamento in Alv_olo = 1; H_tratamento is "H(tratamento)";
  species $N_tratamento in Alv_olo; N_tratamento is "N(tratamento)";
  species $Q_tratamento in Alv_olo = 1; Q_tratamento is "Q(tratamento)";
  species $Inib_tratamento in Alv_olo; Inib_tratamento is "Inib(tratamento)";
  species $I_12_tratamento in Alv_olo = 6; I_12_tratamento is "I_12(tratamento)";
  species $I_ab_tratamento in Alv_olo = 10; I_ab_tratamento is "I_ab(tratamento)";
  species $I_g_tratamento in Alv_olo = 30; I_g_tratamento is "I_g(tratamento)";
  species $B_tratamento in Alv_olo = 1; B_tratamento is "B(tratamento)";
  species $I_tratamento in Alv_olo; I_tratamento is "I(tratamento)";
  species $M_tratamento in Alv_olo = 1; M_tratamento is "M(tratamento)";
  species $A_0 in Alv_olo = 400000;
  species $A_I in Alv_olo = 1;
  species $V in Alv_olo = 1000;
  species $N_at in Alv_olo = 10;
  species $N_in in Alv_olo = 300000;
  species $M_I in Alv_olo = 0;
  species $M_0 in Alv_olo = 1000000;
  species $A_p in Alv_olo = 1;
  species $Vint in Alv_olo = 10;
  species $v_int in Alv_olo;
  species $H in Alv_olo = 1;
  species $N in Alv_olo;
  species $Q in Alv_olo = 1;
  species $Inib in Alv_olo;
  species $I_12 in Alv_olo = 6;
  species $I_ab in Alv_olo = 10;
  species $I_g in Alv_olo = 30;
  species $VL in Alv_olo;
  species $VL_tratamento in Alv_olo; VL_tratamento is "VL(tratamento)";
  species $Inib_B in Alv_olo;

  // Parameters:
  s = 4000;
  beta_1 = 1.172276e-6;
  mu = 0.14;
  beta_2 = 3.827471e-6;
  delta = 4;
  p = 400;
  c = 10;
  kappa_1 = 0.52;
  K_1 = 75;
  kappa_2 = 0.52;
  K_2 = 75;
  mu_1 = 0.07;
  kappa_3 = 0;
  mu_2 = 0.0412;
  kappa_4 = 0.001;
  K_4 = 75;
  mu_3 = 0.05;
  kappa_0 = 0;
  mu_4 = 0.008;
  beta_12 = 0.0008;
  mu_12 = 1.188;
  beta_gamma = 0.02;
  mu_gamma = 3;
  beta_ab = 0.0029;
  mu_ab = 2.77;
  beta_4 = 2.773512e-7;
  c_12 = 0.000252;
  c_gamma = 0.031;
  c_ab = 7.2e-6;
  eta = 2;
  r = 2.5;
  epsilon = 0.02;
  k_H = 2500;
  mu_H = ln(2)/0.542;
  ro_N = 1.5e-7;
  K_Q = 3.638378;
  kappa_Q = 0.77;
  n = 2;
  m = 2;
  ro_H = 8.415945e-5;
  k_12 = 0.0008;
  k_ab = 0.0029;
  k_g = 0.02;
  K_g = 75;
  K_12 = 75;
  K_ab = 75;
  k_B = 0.6984756;
  K_B = 0.007981049;
  delta_M = ln(2)/20;
  d = 400;
  h = 2;
  kappa_5 = 0.5;
  c_4 = 0.8130013;
  kappa_6 = 0.5;
  k_d = 0.1253141; k_d is "k(d)";
  c_9 = 6990000;
  Initial_for_k_B = k_B;
  Initial_for_kappa_Q = kappa_Q;

  // Assignment rules:
  v_int_tratamento := Vint_tratamento^m/(Vint_tratamento^m + (p*A_p_tratamento)^m);
  N_tratamento := ro_N*N_at_tratamento;
  Inib_tratamento := K_Q^n/(K_Q^n + Q_tratamento^n);
  I_tratamento := piecewise(d, (time >= 2) && (time <= 3), piecewise(d, (time >= 7) && (time <= 8), piecewise(d, (time >= 16) && (time <= 17), piecewise(d, (time >= 24) && (time <= 25), piecewise(d, (time >= 30) && (time <= 31), 0)))));
  VL_tratamento := V_tratamento + Vint_tratamento;
  Inib := K_Q^n/(K_Q^n + Q^n);
  VL := V + Vint;
  v_int := Vint^m/(Vint^m + (p*A_p)^m);
  Inib_B := K_B^m/(B_tratamento^m + K_B^m);
  N := ro_N*N_at;
  p1 := p/2;

  // Rate rules:
  A_0_tratamento' = s - beta_1*A_0_tratamento*V_tratamento - mu*A_0_tratamento;
  A_I_tratamento' = beta_1*A_0_tratamento*V_tratamento - beta_2*N_at_tratamento*A_I_tratamento - delta*A_I_tratamento;
  V_tratamento' = eta*p*A_p_tratamento*v_int_tratamento - beta_4*M_0_tratamento*V_tratamento - beta_1*A_0_tratamento*V_tratamento - c*V_tratamento;
  N_at_tratamento' = N_in_tratamento*(kappa_1*(I_ab_tratamento/(K_ab + I_ab_tratamento)) + kappa_2*(I_12_tratamento/(K_12 + I_12_tratamento)))*Inib_tratamento - beta_2*N_at_tratamento*A_I_tratamento - beta_2*N_at_tratamento*A_p_tratamento - mu_1*N_at_tratamento - Initial_for_k_B*N_tratamento*M_tratamento - Initial_for_kappa_Q*N_tratamento*H_tratamento*Inib_B;
  N_in_tratamento' = kappa_3 - kappa_1*N_in_tratamento*(I_ab_tratamento/(K_ab + I_ab_tratamento))*Inib_tratamento - kappa_2*N_in_tratamento*(I_12_tratamento/(K_12 + I_12_tratamento))*Inib_tratamento - mu_2*N_in_tratamento;
  M_I_tratamento' = kappa_4*M_0_tratamento*(I_g_tratamento/(K_g + I_g_tratamento)) + beta_4*M_0_tratamento*V_tratamento - mu_3*M_I_tratamento;
  M_0_tratamento' = kappa_0 - kappa_4*M_0_tratamento*(I_g_tratamento/(K_g + I_g_tratamento)) - beta_4*M_0_tratamento*V_tratamento - mu_4*M_0_tratamento;
  A_p_tratamento' = delta*A_I_tratamento - beta_2*N_at_tratamento*A_p_tratamento - eta*A_p_tratamento;
  Vint_tratamento' = r*Vint_tratamento*(1 - v_int_tratamento) + beta_1*A_0_tratamento*V_tratamento + beta_4*M_0_tratamento*V_tratamento - eta*p*A_p_tratamento*v_int_tratamento - beta_2*(p1*A_p_tratamento*N_at_tratamento + p1*A_I_tratamento*N_at_tratamento);
  H_tratamento' = ro_H*r*Vint_tratamento*(1 - v_int_tratamento) - mu_H*H_tratamento - Initial_for_kappa_Q*N_tratamento*H_tratamento*Inib_B;
  Q_tratamento' = kappa_Q*N_tratamento*H_tratamento*Inib_B;
  I_12_tratamento' = k_12*M_I_tratamento - mu_12*I_12_tratamento;
  I_ab_tratamento' = k_ab*(A_I_tratamento + A_p_tratamento)*v_int_tratamento - mu_ab*I_ab_tratamento;
  I_g_tratamento' = k_g*N_at_tratamento - mu_gamma*I_g_tratamento;
  B_tratamento' = k_B*N_tratamento*M_tratamento;
  M_tratamento' = I_tratamento - delta_M*M_tratamento - Initial_for_k_B*N_tratamento*M_tratamento;
  A_0' = s - beta_1*A_0*V - mu*A_0;
  A_I' = beta_1*A_0*V - beta_2*N_at*A_I - delta*A_I;
  V' = eta*p*A_p*v_int - beta_4*M_0*V - beta_1*A_0*V - c*V;
  N_at' = N_in*(kappa_1*(I_ab/(K_ab + I_ab)) + kappa_2*(I_12/(K_12 + I_12)))*Inib - beta_2*N_at*A_I - beta_2*N_at*A_p - mu_1*N_at;
  N_in' = kappa_3 - kappa_1*N_in*(I_ab/(K_ab + I_ab))*Inib - kappa_2*N_in*(I_12/(K_12 + I_12))*Inib - mu_2*N_in;
  M_I' = kappa_4*M_0*(I_g/(K_g + I_g)) + beta_4*M_0*V - mu_3*M_I;
  M_0' = kappa_0 - kappa_4*M_0*(I_g/(K_g + I_g)) - beta_4*M_0*V - mu_4*M_0;
  A_p' = delta*A_I - beta_2*N_at*A_p - eta*A_p;
  Vint' = r*Vint*(1 - v_int) + beta_1*A_0*V + beta_4*M_0*V - eta*p*A_p*v_int - beta_2*(p1*A_p*N_at + p1*A_I*N_at);
  H' = ro_H*r*Vint*(1 - v_int) - mu_H*H;
  Q' = kappa_Q*N*H;
  I_12' = k_12*M_I - mu_12*I_12;
  I_ab' = k_ab*(A_I + A_p)*v_int - mu_ab*I_ab;
  I_g' = k_g*N_at - mu_gamma*I_g;

  // Events:
  Evento_para_manter_a_carga_viral_n_o_negativa: at (V_tratamento < 0): V_tratamento = 0; Evento_para_manter_a_carga_viral_n_o_negativa is "Evento para manter a carga viral não negativa";

  // Unit definitions:
  unit length = metre;
  unit area = metre^2;
  unit volume = 1e-3 litre;
  unit time = 86400 second;
  unit substance = item;
end
