// SBML level 3 version 2

model Model_based_prediction_of_SARS_CoV_2_in_Ethiopia_Extended_SEIR_model()
  // One of three models used to describe dynamics of COVID-19 spread in Ethiopia. Here the two investigated population groups healthcare workers and community members are modeled as separate but interacting groups. Results are published in https://www.thelancet.com/journals/langlo/article/PIIS2214-109X(21)00386-7/fulltext
  // hasProperty mamo:MAMO_0000028

  // Compartments:
  compartment ethiopia = 1 dimensionless;

  // Species:
  species Sus_hcw in ethiopia = 510;  // substance in dimensionless
  species Exp_hcw in ethiopia = 0;  // substance in dimensionless
  species Infc_hcw in ethiopia = 0;  // substance in dimensionless
  species Rec_hcw in ethiopia = 0;  // substance in dimensionless
  species Sus_com in ethiopia = 100000;  // substance in dimensionless
  species Exp_com in ethiopia = 0;  // substance in dimensionless
  species Infc_com in ethiopia = I_0;  // substance in dimensionless
  species Rec_com in ethiopia = 0;  // substance in dimensionless

  // Parameters:
  beta_0 = 0.13 dimensionless;
  kappa_inverse = 2.777778 dimensionless;
  I_0 = 10 dimensionless;
  gamma_inverse = 10 dimensionless;
  alpha_0 = 2 dimensionless;

  // Reactions:
  infection_hcw: Exp_hcw => Infc_hcw; 1/kappa_inverse*Exp_hcw;
  recovery_hcw: Infc_hcw => Rec_hcw; 1/gamma_inverse*Infc_hcw;
  infection_com: Exp_com => Infc_com; 1/kappa_inverse*Exp_com;
  recovery_com: Infc_com => Rec_com; 1/gamma_inverse*Infc_com;
  exposure_hcw: Sus_hcw => Exp_hcw; beta_0*(alpha_0*Infc_com + Infc_hcw)/(Sus_hcw + Exp_hcw + Infc_hcw + Rec_hcw + Sus_com + Exp_com + Infc_com + Rec_com)*Sus_hcw;  // modifiers: Infc_hcw, Rec_hcw, Sus_com, Infc_com, Exp_com, Rec_com
  exposure_com: Sus_com => Exp_com; beta_0*(Infc_com + Infc_hcw)/(Sus_hcw + Exp_hcw + Infc_hcw + Rec_hcw + Sus_com + Exp_com + Infc_com + Rec_com)*Sus_com;  // modifiers: Sus_hcw, Infc_hcw, Exp_hcw, Rec_hcw, Infc_com, Rec_com
end
