// SBML level 2 version 4

model New_Model()
  // Mukhtar2018 - Modelling the effect of bednet coverage on malaria transmission in South Sudan.

  // Compartments:
  compartment compartment = 1;

  // Species:
  species $S in compartment = 882846;
  species $E in compartment = 0;
  species $I in compartment = 300;
  species $A in compartment = 0;
  species $R in compartment = 0;
  species $X in compartment = 600;
  species $Y in compartment = 0;
  species $Z in compartment = 0;

  // Parameters:
  mu = 6.614e-5;
  sigma_a = 0.2;
  rho = 0.0071;
  delta = 0.0004;
  GAMMA = 0;
  sigma_i = 0.6792;
  b = 0.4356804;
  epsilon_j = 91.6;
  alpha_1 = 0.02169197;
  alpha_3 = 0.5882;
  Psi = 0.13;
  chi = 0;
  phi = 0.89;
  s = 0.03;
  r = 0.56;
  tau1 = 0.69;
  tau2 = 2.31;
  beta1 = 0.91;
  beta2 = 0.74;
  var Z_0;

  // Assignment rules:
  N := S + E + I + A + R;
  LAMBDA_v := (sigma_a*epsilon_j*A + sigma_i*epsilon_j*I)/N;
  W := 1 + chi*phi*(s - 1);
  alpha_2 := 1/200;
  eta := 1/12;
  M := X + Y + Z;
  LAMBDA_h := epsilon_j*Z/N*b;
  f := 1/3;
  Z_0 := phi*chi*r;
  beta := (beta1*beta2*W/(1 - Z_0*beta1))^f;
  mu_v := -ln(beta);

  // Rate rules:
  S' = GAMMA - LAMBDA_h*S + alpha_3*R - mu*S;
  E' = LAMBDA_h*S - eta*E - rho*E - mu*E;
  I' = eta*E - (alpha_1 + delta + mu)*I;
  A' = rho*E - (alpha_2 + mu)*A;
  R' = alpha_1*I + alpha_2*A - alpha_3*R - mu*R;
  X' = Psi - LAMBDA_v*X - mu_v*X;
  Y' = LAMBDA_v*X - (beta + mu_v)*Y;
  Z' = beta*Y - mu_v*Z;

  // Unit definitions:
  unit volume = 1e-3 litre;
  unit time = 86400 second;
  unit substance = 1e-3 mole;
end
