// SBML level 2 version 4

function _0_DOWN__1_UP_TF_v2(Vf, S, c1, A1, n1, ka1, Vr, P)
  Vf*S*(c1*A1^n1/(A1^n1 + ka1^n1)) - Vr*P;
end
_0_DOWN__1_UP_TF_v2 is "0 DOWN, 1 UP TF v2";

function _0_DOWN__2_UP_TF_v2(Vf, S, c1, A1, n1, ka1, c2, A2, n2, ka2, Vr, P)
  Vf*S*(c1*A1^n1/(A1^n1 + ka1^n1) + c2*A2^n2/(A2^n2 + ka2^n2)) - Vr*P;
end
_0_DOWN__2_UP_TF_v2 is "0 DOWN, 2 UP TF v2";

function _3_DOWN__2_UP_TF_v2(Vf, S, ki1, n1, I1, ki2, n2, I2, ki3, n3, I3, c1, A1, n4, ka1, c2, A2, n5, ka2, Vr, P)
  Vf*S*(ki1^n1/(I1^n1 + ki1^n1))*(ki2^n2/(I2^n2 + ki2^n2))*(ki3^n3/(I3^n3 + ki3^n3))*(c1*A1^n4/(A1^n4 + ka1^n4) + c2*A2^n5/(A2^n5 + ka2^n5)) - Vr*P;
end
_3_DOWN__2_UP_TF_v2 is "3 DOWN, 2 UP TF v2";

function _2_DOWN__1_UP_TF_v2(Vf, S, ki1, n1, I1, ki2, n2, I2, c1, A1, n3, ka1, Vr, P)
  Vf*S*(ki1^n1/(I1^n1 + ki1^n1))*(ki2^n2/(I2^n2 + ki2^n2))*(c1*A1^n3/(A1^n3 + ka1^n3)) - Vr*P;
end
_2_DOWN__1_UP_TF_v2 is "2 DOWN, 1 UP TF v2";

function foxp3_0(Vf, S, ki1, n1, I1, ki2, n2, I2, ki3, n3, I3, ki4, n4, I4, c1, A1, n5, ka1, c2, A2, n6, ka2, c3, A3, n7, ka3, c4, A4, n8, ka4, c5, A5, n9, ka5, c7, A7, n11, ka7, Vr, P)
  Vf*S*(ki1^n1/(I1^n1 + ki1^n1))*(ki2^n2/(I2^n2 + ki2^n2))*(ki3^n3/(I3^n3 + ki3^n3))*(ki4^n4/(I4^n4 + ki4^n4))*(c1*A1^n5/(A1^n5 + ka1^n5) + c2*A2^n6/(A2^n6 + ka2^n6) + c3*A3^n7/(A3^n7 + ka3^n7) + c4*A4^n8/(A4^n8 + ka4^n8) + c5*A5^n9/(A5^n9 + ka5^n9) + c7*A7^n11/(A7^n11 + ka7^n11)) - Vr*P;
end

function _2_DOWN__2_UP_TF_v2(Vf, S, ki1, n1, I1, ki2, n2, I2, c1, A1, n3, ka1, c2, A2, n4, ka2, Vr, P)
  Vf*S*(ki1^n1/(I1^n1 + ki1^n1))*(ki2^n2/(I2^n2 + ki2^n2))*(c1*A1^n3/(A1^n3 + ka1^n3) + c2*A2^n4/(A2^n4 + ka2^n4)) - Vr*P;
end
_2_DOWN__2_UP_TF_v2 is "2 DOWN, 2 UP TF v2";

function OXPHOS_fixed(d1, d2, d3, d4, d5, d6, E, kcat, Vf, H1, ADP, Km1, Vr, H2, ATP, Km2)
  0*(d1 + d2 + d3 + d4 + d5 + d6) + E*kcat*(Vf*H1*(ADP/(ADP + Km1)) - Vr*H2*(ATP/(ATP + Km2)));
end

function _1_DOWN__6_UP_TF_v2(Vf, S, ki1, n1, I1, c1, A1, n2, ka1, c2, A2, n3, ka2, c3, A3, n4, ka3, c4, A4, n5, ka4, c5, A5, n6, ka5, c6, A6, n7, ka6, Vr, P)
  Vf*S*(ki1^n1/(I1^n1 + ki1^n1))*(c1*A1^n2/(A1^n2 + ka1^n2) + c2*A2^n3/(A2^n3 + ka2^n3) + c3*A3^n4/(A3^n4 + ka3^n4) + c4*A4^n5/(A4^n5 + ka4^n5) + c5*A5^n6/(A5^n6 + ka5^n6) + c6*A6^n7/(A6^n7 + ka6^n7)) - Vr*P;
end
_1_DOWN__6_UP_TF_v2 is "1 DOWN, 6 UP TF v2";

function _1_DOWN__1_UP_TF_v2(Vf, S, ki1, n1, I1, c1, A1, n2, ka1, Vr, P)
  Vf*S*(ki1^n1/(I1^n1 + ki1^n1))*(c1*A1^n2/(A1^n2 + ka1^n2)) - Vr*P;
end
_1_DOWN__1_UP_TF_v2 is "1 DOWN, 1 UP TF v2";

function _1_DOWN__0_UP_TF_v2(Vf, S, ki1, n1, I1, Vr, P)
  Vf*S*(ki1^n1/(I1^n1 + ki1^n1))*1 - Vr*P;
end
_1_DOWN__0_UP_TF_v2 is "1 DOWN, 0 UP TF v2";

function _0_DOWN__3_UP_TF_v2(Vf, S, c1, A1, n1, ka1, c2, A2, n2, ka2, c3, A3, n3, ka3, Vr, P)
  Vf*S*(c1*A1^n1/(A1^n1 + ka1^n1) + c2*A2^n2/(A2^n2 + ka2^n2) + c3*A3^n3/(A3^n3 + ka3^n3)) - Vr*P;
end
_0_DOWN__3_UP_TF_v2 is "0 DOWN, 3 UP TF v2";

function sequential_bi_bi(kcat, E, A, B, kia, KmB, KmA)
  kcat*E*(A*B/(kia*KmB + KmB*A + KmA*B + A*B));
end

function PDH___LANCL2_BT11(kcat, E, S, Km, lancl2, n1, ka, c1)
  kcat*E*(S/(Km + S))*(1 + c1*lancl2^n1/(lancl2^n1 + ka^n1));
end
PDH___LANCL2_BT11 is "PDH - LANCL2-BT11";

function _1_DOWN__3_UP_TF_v2(Vf, S, ki1, n1, I1, c1, A1, n2, ka1, c2, A2, n3, ka2, c3, A3, n4, ka3, Vr, P)
  Vf*S*(ki1^n1/(I1^n1 + ki1^n1))*(c1*A1^n2/(A1^n2 + ka1^n2) + c2*A2^n3/(A2^n3 + ka2^n3) + c3*A3^n4/(A3^n4 + ka3^n4)) - Vr*P;
end
_1_DOWN__3_UP_TF_v2 is "1 DOWN, 3 UP TF v2";

function _1_substrate___Irreversible__oxphos(kcat, E, S, Km, S2, Km2)
  kcat*E*(S/(Km + S))*(S2/(Km2 + S2));
end
_1_substrate___Irreversible__oxphos is "1 substrate - Irreversible (oxphos)";

function Mass_Action_2_Substrate__reversible(k1, k2, product, sub1, sub2)
  k1*sub1*sub2 - k2*product;
end
Mass_Action_2_Substrate__reversible is "Mass Action 2 Substrate (reversible)";

function _1_substrate___Irreversible(kcat, E, S, Km)
  kcat*E*(S/(Km + S));
end
_1_substrate___Irreversible is "1 substrate - Irreversible";

function Pool_reaction(Vf, P, Vr)
  Vf - P*Vr;
end

function _1_DOWN__2_UP__TF_v2(Vf, S, ki1, n1, I1, n2, c1, A1, n3, ka1, c2, A2, ka2, Vr, P)
  Vf*S*(ki1^n1/(I1^n1 + ki1^n1))*(c1*A1^n2/(A1^n2 + ka1^n2) + c2*A2^n3/(A2^n3 + ka2^n3)) - Vr*P;
end
_1_DOWN__2_UP__TF_v2 is "1 DOWN, 2 UP, TF v2";

function Enzyme_Phosphorylation(Vf, S, A1, n1, ka1, Vr, P)
  Vf*S*(A1^n1/(A1^n1 + ka1^n1)) - Vr*P;
end
Enzyme_Phosphorylation is "Enzyme-Phosphorylation";

function Ping_Pong_Bi_Bi_irreversible(kcat, E, A, B, KmB, KmA)
  kcat*E*(A*B/(KmB*A + KmA*B + A*B + 1e-7));
end

function STAT5___LANCL2_2(Vf, S, c1, A1, n1, ka1, c2, lancl2, n2, ka, Vr, P)
  Vf*S*(c1*A1^n1/(A1^n1 + ka1^n1) + c2*lancl2^n2/(lancl2^n2 + ka^n2)) - Vr*P;
end
STAT5___LANCL2_2 is "STAT5 - LANCL2 2";

function _4_DOWN__4_UP_TF_v2(Vf, S, ki1, n1, I1, ki2, n2, I2, ki3, n3, I3, ki4, n4, I4, c1, A1, n5, ka1, c2, A2, n6, ka2, c3, A3, n7, ka3, c4, A4, n8, ka4, Vr, P)
  Vf*S*(ki1^n1/(I1^n1 + ki1^n1))*(ki2^n2/(I2^n2 + ki2^n2))*(ki3^n3/(I3^n3 + ki3^n3))*(ki4^n4/(I4^n4 + ki4^n4))*(c1*A1^n5/(A1^n5 + ka1^n5) + c2*A2^n6/(A2^n6 + ka2^n6) + c3*A3^n7/(A3^n7 + ka3^n7) + c4*A4^n8/(A4^n8 + ka4^n8)) - Vr*P;
end
_4_DOWN__4_UP_TF_v2 is "4 DOWN, 4 UP TF v2";

model Immunometabolism_Model()
  // Baker(2022) - Immunometabolic Model
  // Novel computational modeling of bioenergetic mechanisms that modulate CD4+ T cell effector and regulatory functions ABSTRACT We built a novel computational model of complex mechanisms at the intersection of immunity and metabolism that regulate CD4+ T cell effector and regulatory functions by using coupled ordinary differential equations. The model provides an improved understanding of how CD4+ T cells are shaping the immune response during C. difficile infection (CDI), and how they may be targeted pharmacologically to produce a more robust regulatory response, which is associated with improved disease outcomes during CDI and other diseases. LANCL2 activation during CDI decreased the effector response, increased regulatory response, and modulated metabolism to be more aligned with regulatory phenotypes. Interestingly, LANCL2 activation provided greater immune and metabolic modulation compared to the addition of exogenous IL-2. Additionally, we identified gluconeogenesis via PEPCK-M as potentially responsible for increased immunosuppressive behavior in Treg cells. The model can perturb immune signaling and metabolism within a CD4+ T cell and obtain clinically relevant results that help identify novel drug targets and pathways that can be altered for therapeutic effects.
  // hasProperty mamo:MAMO_0000045

  // Compartments:
  compartment ThCell = 1.3e-13;
  compartment Cytosol = 1e-13;
  compartment Extracellular = 1;
  compartment Mitochondria = 2e-14;
  compartment Intermembrane = 5e-15;

  // Species:
  species IFNg_ThCell in ThCell = 0;
  species IL22_ThCell in ThCell = 0;
  species IL12_IL12R in ThCell = 0; IL12_IL12R is "IL12-IL12R";
  species IL18_IL18R in ThCell = 0; IL18_IL18R is "IL18-IL18R";
  species IL23_IL23R in ThCell = 0; IL23_IL23R is "IL23-IL23R";
  species L_PPARg in ThCell = 0; L_PPARg is "L-PPARg";
  species STAT3_P in ThCell = 0; STAT3_P is "STAT3-P";
  species STAT4_P in ThCell = 0; STAT4_P is "STAT4-P";
  species Tbet_P in ThCell = 0; Tbet_P is "Tbet-P";
  species IFNg_IFNgR in ThCell = 0; IFNg_IFNgR is "IFNg-IFNgR";
  species IFNgR in ThCell = 4.36e-7;
  species SOCS1_JAKs in ThCell = 0; SOCS1_JAKs is "SOCS1-JAKs";
  species AhR_P in ThCell = 0; AhR_P is "AhR-P";
  species GATA3_P in ThCell = 0; GATA3_P is "GATA3-P";
  species IL21_IL21R in ThCell = 0; IL21_IL21R is "IL21-IL21R";
  species STAT5_P in ThCell = 0; STAT5_P is "STAT5-P";
  species IL10_IL10R in ThCell = 0; IL10_IL10R is "IL10-IL10R";
  species IL10R in ThCell = 4.4e-7;
  species IL12R in ThCell = 1.17e-7;
  species RORgt_ligand in ThCell = 0; RORgt_ligand is "RORgt-ligand";
  species IL17_IL17R in ThCell = 0; IL17_IL17R is "IL17-IL17R";
  species IL17R in ThCell = 1.3e-7;
  species IL18R in ThCell = 5.22e-9;
  species STAT6_P in ThCell = 0; STAT6_P is "STAT6-P";
  species IL21R in ThCell = 8.24e-8;
  species acetylated_FOXP3 in ThCell = 0; acetylated_FOXP3 is "acetylated-FOXP3";
  species IL2_IL2R in ThCell = 0; IL2_IL2R is "IL2-IL2R";
  species IL2R in ThCell = 6.44e-9;
  species STAT1_P in ThCell = 0; STAT1_P is "STAT1-P";
  species IL4_IL4R in ThCell = 0; IL4_IL4R is "IL4-IL4R";
  species IL4R in ThCell = 5.26e-7;
  species IL6_IL6R in ThCell = 0; IL6_IL6R is "IL6-IL6R";
  species IL6R in ThCell = 1.97e-10;
  species IL23R in ThCell = 1.24e-10;
  species IRAK1_P in ThCell = 0; IRAK1_P is "IRAK1-P";
  species TGFb_TGFbR in ThCell = 0; TGFb_TGFbR is "TGFb-TGFbR";
  species TGFbR in ThCell = 6.46e-8;
  species IL9_IL9R in ThCell = 0; IL9_IL9R is "IL9-IL9R";
  species IL9R in ThCell = 1.16e-9;
  species IL22_IL22R in ThCell = 0; IL22_IL22R is "IL22-IL22R";
  species IL22R in ThCell = 0;
  species TNFa_TNFaR in ThCell = 0; TNFa_TNFaR is "TNFa-TNFaR";
  species TNFaR in ThCell = 4.87e-8;
  species STAT4 in ThCell = 3.94e-7;
  species JAK1_P in ThCell = 0; JAK1_P is "JAK1-P";
  species STAT1 in ThCell = 3.48e-7;
  species Tbet in ThCell = 2.22e-9;
  species JAK1 in ThCell = 8.79e-7;
  species SOCS1 in ThCell = 2.55e-7;
  species GATA3 in ThCell = 1.5e-7;
  species STAT6 in ThCell = 4.69e-7;
  species STAT5 in ThCell = 4.08e-7;
  species FOXP3 in ThCell = 6.61e-9;
  species IRAK1 in ThCell = 2.07e-7;
  species STAT3 in ThCell = 8.56e-7;
  species RORgt in ThCell = 6.49e-11;
  species PPARg in ThCell = 6.79e-12;
  species $IL23_Local in Extracellular = 1e-13; IL23_Local is "IL23_pool";
  species $IL18_Local in Extracellular = 1e-13; IL18_Local is "IL18_pool";
  species $IFNg_Local in ThCell = 1e-13; IFNg_Local is "IFNg_pool";
  species $IL10_Local in Extracellular = 1e-13; IL10_Local is "IL10_pool";
  species $IL12_Local in Extracellular = 1e-13; IL12_Local is "IL12_pool";
  species $IL17_Local in Extracellular = 1e-13; IL17_Local is "IL17_pool";
  species $IL2_Local in Extracellular = 1e-13; IL2_Local is "IL2_pool";
  species $IL21_Local in Extracellular = 1e-13; IL21_Local is "IL21_pool";
  species $IL4_Local in Extracellular = 1e-13; IL4_Local is "IL4_pool";
  species $IL6_Local in Extracellular = 1e-13; IL6_Local is "IL6_pool";
  species $IL9_Local in Extracellular = 1e-13; IL9_Local is "IL9_pool";
  species $TGFb_Local in Extracellular = 1e-13; TGFb_Local is "TGFb_pool";
  species $TNFa_Local in Extracellular = 1e-13; TNFa_Local is "TNFa_pool";
  species AhR in ThCell = 1.34e-7;
  species FICZ in ThCell = 1e-13;
  species $BT11_pool in ThCell = 1e-11; BT11_pool is "ABA_pool";
  species $enz_LANCL2 in ThCell;
  species LANCL2_BT11 in ThCell = 0; LANCL2_BT11 is "LANCL2-ABA";
  species $enz_GAPDH in Cytosol;
  species $enz_LDHA in Cytosol;
  species G1_5L6P in Cytosol = 1e-6; G1_5L6P is "G1,5L6P";
  species $NADP_S in Cytosol = 1e-6;
  species $enz_PGL in Cytosol;
  species Malate_Mitochondria in Mitochondria = 1e-6;
  species Ribulose_5P in Cytosol = 1e-6; Ribulose_5P is "Ribulose-5P";
  species Gluconate_6P in Cytosol = 1e-6; Gluconate_6P is "Gluconate-6P";
  species $enz_PGAM in Cytosol;
  species $enz_PGD in Cytosol;
  species $enz_ACSL in Cytosol;
  species $NADH_S_OXPHOS in Mitochondria;
  species NADH_P_IDH in Mitochondria = 0;
  species NADH_P_MDH in Mitochondria = 0;
  species NADH_P_OGDH in Mitochondria = 0;
  species NADH_P_PDH in Mitochondria = 0;
  species NAD_P_OXPHOS in Cytosol = 0;
  species Succinyl_CoA in Mitochondria = 1e-6; Succinyl_CoA is "Succinyl-CoA";
  species $ATP_S_Mitochondria in Mitochondria = 1e-6;
  species $a_KG_Mitochondria in Mitochondria = 1e-6; a_KG_Mitochondria is "a-KG";
  species OAA_Mitochondria in Mitochondria = 1e-5;
  species Succinate in Mitochondria = 1e-6;
  species Isocitrate in Mitochondria = 1e-6;
  species Citrate_Mitochondria in Mitochondria = 1e-6;
  species $ATP_S_Cytosol in Cytosol = 1e-6;
  species $enz_G6PC in Cytosol;
  species $enz_G6PD in Cytosol;
  species $ADP_S_Cytosol in Cytosol = 1e-6;
  species Pyruvate_Mitochondria in Mitochondria = 1e-6;
  species NADPH_P_PGD in Cytosol = 0;
  species NADH_P_LDHB in Cytosol = 0;
  species NADH_P_GAPDH in Cytosol = 0;
  species FAD_P_OXPHOS in Mitochondria = 0;
  species ADP_P_PFK in Cytosol = 0;
  species NADPH_P_G6PD in Cytosol = 0;
  species $enz_LDHB in Cytosol;
  species ADP_P_HK in Cytosol = 0;
  species NAD_P_LDHA in Cytosol = 0;
  species $FADH2_S_OXPHOS in Mitochondria;
  species FADH2_P_SDH in Mitochondria = 0;
  species $NADH_S_Cytosol in Cytosol = 1e-6;
  species $ADP_S_Mitochondria in Mitochondria = 1e-6;
  species ATP_P_PGK in Cytosol = 0;
  species $FAD_S in Mitochondria = 0.001;
  species ATP_P_PK in Cytosol = 0;
  species ATP_P_SUCL in Mitochondria = 0;
  species Glucose_Cytosol in Cytosol = 1e-6;
  species F1_6_BP in Cytosol = 1e-6; F1_6_BP is "F1,6-BP";
  species G6_P in Cytosol = 1e-6; G6_P is "G6-P";
  species _2_PG in Cytosol = 1e-6; _2_PG is "2-PG";
  species Pyruvate_Cytosol in Cytosol = 1e-6;
  species Trans_enoyl_CoA in Mitochondria = 1e-6; Trans_enoyl_CoA is "Trans-enoyl-CoA";
  species _1_3_BPG in Cytosol = 1e-6; _1_3_BPG is "1,3-BPG";
  species _3_PG in Cytosol = 1e-6; _3_PG is "3-PG";
  species Acetoacetyl_CoA in Mitochondria = 1e-6; Acetoacetyl_CoA is "Acetoacetyl-CoA";
  species FA_Cytosol in Cytosol = 1e-6;
  species Acetyl_CoA_Mitochondria in Mitochondria = 2e-5; Acetyl_CoA_Mitochondria is "Acetyl-CoA";
  species PEP in Cytosol = 4.200097e-7;
  species F6_P in Cytosol = 1e-6; F6_P is "F6-P";
  species L_3_Hydroxyacyl_CoA in Mitochondria = 1e-6; L_3_Hydroxyacyl_CoA is "L-3-Hydroxyacyl-CoA";
  species $FA_Extracellular in Extracellular = 0.002;
  species $Glucose_Extracellular in Extracellular = 0.005;
  species $enz_OGDH in Cytosol;
  species Lactate_Cytosol in Cytosol = 1e-6;
  species Fumarate in Mitochondria = 1e-6;
  species $NAD_S_Mitochondria in Mitochondria = 1e-6;
  species G3_P in Cytosol = 1e-6; G3_P is "G3-P";
  species $NAD_S_Cytosol in Cytosol = 1e-6;
  species $enz_ECH in Mitochondria;
  species $enz_PFK in Cytosol;
  species $enz_HADH in Mitochondria;
  species $enz_CACT in Intermembrane;
  species $enz_CPT1a in Intermembrane;
  species $enz_CPT2 in Intermembrane;
  species $enz_ENO1 in Cytosol;
  species $enz_GLUT in Cytosol;
  species $enz_SDH in Mitochondria;
  species $enz_PDH in Mitochondria;
  species $enz_ACAA in Mitochondria;
  species $enz_HK in Cytosol;
  species $enz_FH in Mitochondria;
  species $enz_ACAD in Mitochondria;
  species $enz_PK in Cytosol;
  species $enz_ACO in Mitochondria;
  species $enz_GPI in Cytosol;
  species $enz_PGK in Cytosol;
  species $enz_IDH in Mitochondria;
  species $enz_ALDO in Cytosol;
  species $enz_SUCL in Mitochondria;
  species $enz_CS in Mitochondria;
  species Glutamine_Mitochondria in Mitochondria = 1e-6;
  species NAD_P_GAPDH in Cytosol = 0;
  species $enz_ComplexII in Mitochondria;
  species ATP_P_OXPHOS in Mitochondria = 1e-6;
  species $enz_GLUD in Intermembrane;
  species a_KG_Cytosol in Cytosol = 1e-6; a_KG_Cytosol is "a-KG";
  species $enz_GLS in Cytosol;
  species NADH_P_GLUD in Mitochondria = 1e-6;
  species $enz_MDH2 in Mitochondria;
  species SHL7P in Cytosol = 1e-6;
  species Malate_Cytosol in Cytosol = 1e-6;
  species NAD_P_GLUD in Mitochondria = 1e-6;
  species OAA_Cytosol in Cytosol = 1e-6;
  species Acyl_CoA_Mitochondria in Mitochondria = 1e-6; Acyl_CoA_Mitochondria is "Acyl-CoA";
  species Ribose_5P in Cytosol = 1e-6; Ribose_5P is "Ribose-5P";
  species E_5P in Cytosol = 1e-6; E_5P is "E-5P";
  species Glutamate_Mitochondria in Mitochondria = 1e-6;
  species ADP_P_PGK in Cytosol = 0;
  species Acyl_CoA_Cytosol in Cytosol = 1e-6; Acyl_CoA_Cytosol is "Acyl-CoA";
  species $enz_FBP in Cytosol;
  species $enz_SLC1A3 in Intermembrane;
  species $enz_GOT1 in Cytosol;
  species NAD_P_MDH1 in Cytosol = 0;
  species $Glutamine_Cytosol in Cytosol = 0.00056;
  species $enz_GOT2 in Mitochondria;
  species $enz_SLC27A1 in Cytosol;
  species $enz_MDH1 in Cytosol;
  species $enz_ASCT2 in Cytosol;
  species $enz_RPI in Cytosol;
  species $enz_TKT in Cytosol;
  species Aspartate_Mitochondria in Mitochondria = 1e-6;
  species Aspartate_Cytosol in Cytosol = 1e-6;
  species Acyl_Carnitine_Cytosol in Cytosol = 1e-6;
  species $enz_TAL in Cytosol;
  species $enz_ComplexI in Mitochondria;
  species H_Mitochondria in Mitochondria = 0.01;
  species $enz_RPE in Cytosol;
  species $enz_MPC in Cytosol;
  species Glutamate_Cytosol in Cytosol = 1e-6;
  species H_Intermembrane in Intermembrane = 0.01;
  species $enz_ATPase in Intermembrane;
  species Acyl_Carnitine_Mitochondria in Mitochondria = 1e-6;
  species X_5P in Cytosol = 1e-6; X_5P is "X-5P";
  species ADP_P_SUCL in Mitochondria = 0;
  species $enz_SLC25A11 in Intermembrane;
  species PDH_P in Cytosol = 0; PDH_P is "PDH-P";
  species $enz_PC in Mitochondria;
  species FAD_P_SDH in Mitochondria = 0;
  species $enz_MCT in Cytosol; enz_MCT is "enz_MCT4";
  species $enz_PDK in Cytosol;
  species PDK_P in Cytosol = 0; PDK_P is "PDK-P";
  species $enz_PCK1 in Cytosol;
  species $NADH_S_Mitochondria in Mitochondria = 1e-6;
  species ADP_P_PC in Mitochondria = 0;
  species $enz_ME2 in Mitochondria;
  species Lactate_Extracellular in Extracellular = 0;
  species $enz_ME1 in Mitochondria;
  species $FADH2_S in Mitochondria = 1e-6;
  species $enz_ACLY in Mitochondria;
  species Acetyl_CoA_Cytosol in Cytosol = 1e-13; Acetyl_CoA_Cytosol is "Acetyl-CoA";
  species $NADPH_tot in Cytosol;
  species Citrate_Cytosol in Cytosol = 1e-7;
  species $enz_SLC25A1 in Mitochondria;
  species Malonyl_CoA in Cytosol = 1e-7; Malonyl_CoA is "Malonyl-CoA";
  species $enz_ACACA in Cytosol;
  species Palmitoyl_CoA in Cytosol = 1e-7; Palmitoyl_CoA is "Palmitoyl-CoA";
  species $enz_FASN in Cytosol;
  species enz_PDK_A in Mitochondria = 1e-13; enz_PDK_A is "enz_PDK-A";
  species enz_PC_A in Mitochondria = 1e-13; enz_PC_A is "enz_PC-A";
  species $enz_CACT_M in Cytosol = 0; enz_CACT_M is "enz_CACT-M";
  species $enz_PDK_tot in Mitochondria;
  species $produced_IFNg in ThCell;
  species $produced_IL2 in ThCell;
  species $produced_IL4 in ThCell;
  species $produced_IL10 in ThCell;
  species $produced_IL12 in ThCell;
  species $produced_IL17 in ThCell;
  species $produced_IL21 in ThCell;
  species $produced_IL22 in ThCell;
  species $produced_IL23 in ThCell;
  species $produced_TGFb in ThCell;
  species $produced_TNFa in ThCell;
  species $enz_MCT1 in Cytosol;
  species Lactate_exported in Cytosol = 0;
  species PEP_Mitochondria in Mitochondria = 4.200097e-7;
  species $enz_PCK2 in Mitochondria;

  // Parameters:
  Th1 has unit_0;
  Th2 has unit_0;
  Th17 has unit_0;
  Th22 has unit_0;
  Treg has unit_0;
  pheno_n = 2.23649;
  pheno_1_kd = 1.653456e-10;
  pheno_2_kd = 1.890771e-8;
  pheno_17_kd = 1.283043e-11;
  pheno_22_kd = 4.684636e-8;
  pheno_treg_kd = 2.634787e-9;
  temp = 0;
  ldha_on = 0;
  g6pd_on = 0;
  slc25a1_on = 0;
  mct1_activity = 1;
  mct4_activity = 1;
  Initial_for_temp = temp;

  // Assignment rules:
  Treg_init := acetylated_FOXP3^pheno_n/(acetylated_FOXP3^pheno_n + pheno_treg_kd^pheno_n);
  Th2_init := GATA3_P^pheno_n/(GATA3_P^pheno_n + pheno_2_kd^pheno_n);
  Th17_init := RORgt_ligand^pheno_n/(RORgt_ligand^pheno_n + pheno_17_kd^pheno_n);
  Th1_init := Tbet_P^pheno_n/(Tbet_P^pheno_n + pheno_1_kd^pheno_n);
  Th22_init := AhR_P^pheno_n/(AhR_P^pheno_n + pheno_22_kd^pheno_n);
  pheno_sum := Th1_init + Th2_init + Th17_init + Th22_init + Treg_init;
  Th22 := piecewise(Th22_init, pheno_sum <= 1, Th22_init/pheno_sum);
  Naive := piecewise(1 - pheno_sum, pheno_sum < 1, 0);
  Th1 := piecewise(Th1_init, pheno_sum <= 1, Th1_init/pheno_sum);
  Th17 := piecewise(Th17_init, pheno_sum <= 1, Th17_init/pheno_sum);
  Treg := piecewise(Treg_init, pheno_sum <= 1, Treg_init/pheno_sum);
  Th2 := piecewise(Th2_init, pheno_sum <= 1, Th2_init/pheno_sum);
  enz_LANCL2 := Naive*5.73e-8 + Th1*5.66e-8 + Th2*4.9e-8 + Th17*5.16e-8 + Th22*5.42e-8 + Treg*6.71e-8 - LANCL2_BT11;
  enz_LDHA := (Naive*4.37e-7 + Th1*5.45e-7 + Th2*5.32e-7 + Th17*5.35e-7 + Th22*5.66e-7 + Treg*3.93e-7)*ldha_on + (1 - ldha_on)*temp;
  enz_GAPDH := Naive*2.24e-6 + Th1*4.03e-6 + Th2*3.95e-6 + Th17*4.6e-6 + Th22*4.64e-6 + Treg*5.57e-6;
  enz_ACSL := Naive*4.21e-8 + Th1*4.84e-8 + Th2*4.14e-8 + Th17*3.91e-8 + Th22*5e-8 + Treg*7.12e-8;
  enz_PGAM := Naive*1.54e-7 + Th1*2.86e-7 + Th2*2.85e-7 + Th17*3.34e-7 + Th22*3.15e-7 + Treg*3.37e-7;
  enz_PGD := Naive*7.65e-8 + Th1*8.06e-8 + Th2*9.18e-8 + Th17*9.14e-8 + Th22*9.21e-8 + Treg*8e-8;
  NADH_S_OXPHOS := piecewise(NADH_P_IDH + NADH_P_MDH + NADH_P_OGDH + NADH_P_PDH - NAD_P_OXPHOS, NADH_P_IDH + NADH_P_MDH + NADH_P_OGDH + NADH_P_PDH - NAD_P_OXPHOS > 0, 0);
  enz_PGL := Naive*2.22e-7 + Th1*2.27e-7 + Th2*2.53e-7 + Th17*2.58e-7 + Th22*2.24e-7 + Treg*2.81e-7;
  FADH2_S_OXPHOS := piecewise(FADH2_P_SDH - FAD_P_OXPHOS, FADH2_P_SDH - FAD_P_OXPHOS > 0, 0);
  enz_G6PC := Naive*1e-10 + Th1*1e-10 + Th2*1e-10 + Th17*1e-10 + Th22*1e-10 + Treg*1e-10;
  enz_LDHB := Naive*3.57e-6 + Th1*2.8e-6 + Th2*3.44e-6 + Th17*3.58e-6 + Th22*2.46e-6 + Treg*3.32e-6;
  enz_G6PD := (Naive*9.88e-8 + Th1*8.57e-8 + Th2*7.52e-8 + Th17*8.66e-8 + Th22*7.63e-8 + Treg*1.15e-7)*g6pd_on + (1 - g6pd_on)*Initial_for_temp;
  enz_ECH := Naive*1.03e-7 + Th1*1.31e-7 + Th2*1.29e-7 + Th17*1.33e-7 + Th22*1.34e-7 + Treg*1.97e-7;
  enz_OGDH := Naive*6.64e-8 + Th1*1.98e-7 + Th2*1.83e-7 + Th17*2.58e-7 + Th22*2.74e-7 + Treg*4.28e-7;
  enz_PFK := Naive*4.03e-7 + Th1*5.47e-7 + Th2*5.95e-7 + Th17*7.2e-7 + Th22*9.29e-7 + Treg*9.29e-7;
  enz_CACT := piecewise(1e-13, Naive*1.49e-8 + Th1*2.59e-8 + Th2*2.24e-8 + Th17*2.66e-8 + Th22*3.13e-8 + Treg*5.5e-8 - enz_CACT_M <= 1e-13, Naive*1.49e-8 + Th1*2.59e-8 + Th2*2.24e-8 + Th17*2.66e-8 + Th22*3.13e-8 + Treg*5.5e-8 - enz_CACT_M);
  enz_CPT1a := Naive*5.16e-8 + Th1*8.98e-8 + Th2*8.12e-8 + Th17*7.52e-8 + Th22*1.02e-7 + Treg*7.26e-8;
  enz_CPT2 := Naive*5.16e-8 + Th1*4.69e-8 + Th2*4.79e-8 + Th17*3.91e-8 + Th22*3.66e-8 + Treg*7.85e-8;
  enz_HADH := Naive*6.57e-8 + Th1*4.76e-8 + Th2*4.58e-8 + Th17*4.63e-8 + Th22*4.83e-8 + Treg*5.19e-8;
  enz_ENO1 := Naive*8.08e-7 + Th1*1.05e-6 + Th2*1.09e-6 + Th17*1.3e-6 + Th22*1.1e-6 + Treg*1.6e-6;
  enz_GLUT := Naive*2.34e-7 + Th1*2.36e-7 + Th2*2.51e-7 + Th17*2.38e-7 + Th22*2.25e-7 + Treg*2.19e-7;
  enz_SDH := Naive*2.69e-7 + Th1*2.87e-7 + Th2*2.34e-7 + Th17*2.32e-7 + Th22*2.45e-7 + Treg*3.21e-7;
  enz_GLUD := Naive*3.12e-7 + Th1*3.14e-7 + Th2*3.43e-7 + Th17*3.49e-7 + Th22*3.99e-7 + Treg*3.89e-7;
  enz_HK := Naive*3.07e-7 + Th1*2.41e-7 + Th2*2.84e-7 + Th17*3.27e-7 + Th22*3.67e-7 + Treg*3.29e-7;
  enz_ACAD := Naive*3.05e-8 + Th1*3.7e-8 + Th2*3.48e-8 + Th17*3.83e-8 + Th22*2.97e-8 + Treg*4.94e-8;
  enz_MDH2 := Naive*3.4e-7 + Th1*3.61e-7 + Th2*3.88e-7 + Th17*4.34e-7 + Th22*3.52e-7 + Treg*4.99e-7;
  enz_ComplexII := Naive*7.71e-8 + Th1*7.32e-8 + Th2*6.47e-8 + Th17*8.81e-8 + Th22*1.74e-8 + Treg*1.2e-7;
  enz_GPI := Naive*1.69e-7 + Th1*1.9e-7 + Th2*2.21e-7 + Th17*2.32e-7 + Th22*2.3e-7 + Treg*2.47e-7;
  enz_PK := Naive*5.52e-7 + Th1*7.61e-7 + Th2*9.91e-7 + Th17*1.07e-6 + Th22*1.21e-6 + Treg*1.15e-6;
  enz_SUCL := Naive*4.33e-8 + Th1*4.68e-8 + Th2*4.9e-8 + Th17*4.1e-8 + Th22*4.4e-8 + Treg*5.75e-8;
  enz_ACAA := Naive*2.71e-7 + Th1*1.97e-7 + Th2*2.14e-7 + Th17*2.47e-7 + Th22*2.43e-7 + Treg*3.24e-7;
  enz_FH := Naive*8.19e-8 + Th1*6.81e-8 + Th2*6e-8 + Th17*7.29e-8 + Th22*5.59e-8 + Treg*9.82e-8;
  enz_ACO := Naive*1.83e-7 + Th1*2.42e-7 + Th2*2.4e-7 + Th17*2.32e-7 + Th22*2.32e-7 + Treg*2.47e-7;
  enz_PGK := Naive*3.55e-7 + Th1*4.6e-7 + Th2*5.38e-7 + Th17*4.45e-7 + Th22*5.48e-7 + Treg*4.09e-7;
  enz_PDH := piecewise(1e-13, Naive*1.98e-7 + Th1*1.53e-7 + Th2*1.53e-7 + Th17*1.54e-7 + Th22*1.3e-7 + Treg*2.23e-7 - PDH_P <= 1e-13, Naive*1.98e-7 + Th1*1.53e-7 + Th2*1.53e-7 + Th17*1.54e-7 + Th22*1.3e-7 + Treg*2.23e-7 - PDH_P);
  enz_CS := Naive*5.33e-7 + Th1*6.05e-7 + Th2*6.34e-7 + Th17*6.97e-7 + Th22*6.49e-7 + Treg*6.45e-7;
  enz_GLS := Naive*2.26e-7 + Th1*2.48e-7 + Th2*2.29e-7 + Th17*2.58e-7 + Th22*2.97e-7 + Treg*4.03e-7;
  enz_IDH := Naive*1.85e-7 + Th1*2.47e-7 + Th2*2.36e-7 + Th17*2.13e-7 + Th22*2.11e-7 + Treg*2.29e-7;
  enz_ALDO := Naive*1.42e-6 + Th1*2.08e-6 + Th2*2.31e-6 + Th17*2.14e-6 + Th22*2.12e-6 + Treg*2.46e-6;
  enz_SLC1A3 := Naive*1e-10 + Th1*1e-10 + Th2*1e-10 + Th17*1e-10 + Th22*1e-10 + Treg*1e-10;
  enz_MDH1 := Naive*4.04e-7 + Th1*4.18e-7 + Th2*4.6e-7 + Th17*3.97e-7 + Th22*4.1e-7 + Treg*5.61e-7;
  enz_FBP := Naive*3.52e-8 + Th1*1.1e-8 + Th2*5.47e-9 + Th17*5.29e-9 + Th22*3.06e-9 + Treg*6.11e-10;
  enz_GOT1 := Naive*3.11e-8 + Th1*4.86e-8 + Th2*4.41e-8 + Th17*4.4e-8 + Th22*5.94e-8 + Treg*7.03e-8;
  enz_GOT2 := Naive*7.81e-8 + Th1*1.09e-7 + Th2*1.02e-7 + Th17*1.38e-7 + Th22*1.11e-7 + Treg*1.52e-7;
  enz_RPI := Naive*2.85e-7 + Th1*2.31e-7 + Th2*2.27e-7 + Th17*2.57e-7 + Th22*2.47e-7 + Treg*2.58e-7;
  enz_ASCT2 := Naive*2.47e-8 + Th1*6.73e-8 + Th2*8.63e-8 + Th17*6.35e-8 + Th22*9.93e-8 + Treg*8.53e-8;
  enz_TKT := Naive*3.69e-7 + Th1*2.93e-7 + Th2*3.59e-7 + Th17*3.84e-7 + Th22*3.57e-7 + Treg*4.03e-7;
  enz_SLC27A1 := Naive*1.98e-8 + Th1*1.47e-8 + Th2*1.45e-8 + Th17*1.53e-8 + Th22*1.8e-8 + Treg*1.18e-8;
  enz_PCK1 := Naive*1e-10 + Th1*1e-10 + Th2*1e-10 + Th17*1e-10 + Th22*1e-10 + Treg*1e-10;
  enz_ComplexI := Naive*5.92e-7 + Th1*8.19e-7 + Th2*8.36e-7 + Th17*8.5e-7 + Th22*7.81e-7 + Treg*1.03e-6;
  enz_TAL := Naive*1.87e-10 + Th1*1.26e-9 + Th2*3.34e-10 + Th17*3.87e-10 + Th22*1e-10 + Treg*3.13e-10;
  enz_ME2 := Naive*6.61e-8 + Th1*5.56e-8 + Th2*6.58e-8 + Th17*5.42e-8 + Th22*4.75e-8 + Treg*6.8e-8;
  NADPH_tot := NADPH_P_G6PD + NADPH_P_PGD;
  enz_MPC := Naive*7e-8 + Th1*1.29e-7 + Th2*6.89e-8 + Th17*8.85e-8 + Th22*1.19e-7 + Treg*1.91e-7;
  enz_FASN := 5.17e-7*Th1 + 5.53e-7*Th2 + 3.21e-7*Th17 + 4.08e-7*Th22 + 2.05e-7*Treg + 2.21e-7*Naive;
  produced_IFNg := 1.09e-9*Naive + 2.67e-7*Th1 + 1.55e-9*Th2 + 1.39e-9*Th17 + 1.02e-9*Th22 + 0*Treg;
  enz_ACLY := Naive*1.11e-7 + Th1*1.93e-7 + Th2*2.02e-7 + Th17*2.19e-7 + Th22*2.16e-7 + Treg*2.52e-7;
  produced_IL10 := 1.54e-10*Naive + 5.9e-10*Th1 + 0*Th2 + 0*Th17 + 2.34e-9*Th22 + 2.11e-8*Treg;
  enz_ATPase := Naive*1.07e-7 + Th1*1.53e-7 + Th2*1.25e-7 + Th17*1.02e-7 + Th22*7.93e-8 + Treg*2.25e-7;
  enz_SLC25A11 := Naive*9.28e-8 + Th1*9.36e-8 + Th2*8.56e-8 + Th17*7.8e-8 + Th22*6.5e-8 + Treg*1.01e-7;
  enz_PDK := piecewise(1e-13, Naive*8.95e-8 + Th1*6.29e-8 + Th2*6.4e-8 + Th17*9.18e-8 + Th22*3.05e-7 + Treg*1.89e-7 - PDK_P - enz_PDK_A <= 1e-13, Naive*8.95e-8 + Th1*6.29e-8 + Th2*6.4e-8 + Th17*9.18e-8 + Th22*3.05e-7 + Treg*1.89e-7 - PDK_P - enz_PDK_A);
  enz_PDK_tot := enz_PDK_A + enz_PDK + PDK_P;
  enz_ME1 := Naive*1e-10 + Th1*8.03e-10 + Th2*1e-10 + Th17*1e-10 + Th22*1e-10 + Treg*1e-10;
  enz_PC := piecewise(1e-13, Naive*1.12e-8 + Th1*4.74e-9 + Th2*7.05e-9 + Th17*5.21e-9 + Th22*4e-9 + Treg*6.19e-9 - enz_PC_A <= 1e-13, Naive*1.12e-8 + Th1*4.74e-9 + Th2*7.05e-9 + Th17*5.21e-9 + Th22*4e-9 + Treg*6.19e-9 - enz_PC_A);
  produced_IL4 := 1e-11*Naive + 0*Th1 + 1.4e-9*Th2 + 0*Th17 + 0*Th22 + 0*Treg;
  enz_SLC25A1 := (1.23e-7*Th1 + 1.23e-7*Th2 + 1.19e-7*Th17 + 1.25e-7*Th22 + 1.39e-7*Treg + 1.24e-7*Naive)*slc25a1_on + (1 - slc25a1_on)*temp;
  produced_IL2 := 1e-11*Naive + 6.15e-9*Th1 + 5.17e-8*Th2 + 4.49e-9*Th17 + 3.8e-8*Th22 + 0*Treg;
  enz_ACACA := 1.39e-8*Th1 + 1.27e-8*Th2 + 1.42e-8*Th17 + 1.42e-8*Th22 + 2.84e-8*Treg + 1.6e-8*Naive;
  produced_IL12 := 3.88e-9*Naive + 7.04e-9*Th1 + 5e-9*Th2 + 7.28e-9*Th17 + 9.32e-9*Th22 + 2.09e-8*Treg;
  enz_RPE := Naive*1.89e-8 + Th1*1.38e-8 + Th2*1.27e-8 + Th17*1.02e-8 + Th22*1.15e-8 + Treg*1.77e-8;
  enz_MCT := mct4_activity*(Naive*3.57e-8 + Th1*1.22e-7 + Th2*1.05e-7 + Th17*3.08e-8 + Th22*1.42e-7 + Treg*7.96e-8);
  produced_IL17 := 1e-11*Naive + 0*Th1 + 1.83e-9*Th2 + 2.27e-8*Th17 + 3.68e-9*Th22 + 3.64e-9*Treg;
  enz_PCK2 := Naive*1.54e-8 + Th1*2.02e-8 + Th2*2.38e-8 + Th17*2.79e-8 + Th22*2.58e-8 + Treg*4.73e-8;
  produced_TGFb := 6.34e-7*Naive + 1.64e-6*Th1 + 1.49e-6*Th2 + 1.65e-6*Th17 + 1.99e-6*Th22 + 1.71e-6*Treg;
  produced_IL22 := 1e-11*Naive + 0*Th1 + 1.63e-9*Th2 + 4.12e-9*Th17 + 3.3e-8*Th22 + 0*Treg;
  produced_TNFa := 6.74e-9*Naive + 4.11e-8*Th1 + 4.37e-8*Th2 + 2.67e-8*Th17 + 5.54e-8*Th22 + 3.16e-8*Treg;
  produced_IL21 := 1e-11*Naive + 1.01e-9*Th1 + 8.86e-10*Th2 + 4.18e-9*Th17 + 3.96e-9*Th22 + 6.94e-10*Treg;
  produced_IL23 := 3.32e-7*Naive + 4e-7*Th1 + 3.91e-7*Th2 + 4.22e-7*Th17 + 3.11e-7*Th22 + 2.11e-7*Treg;
  enz_MCT1 := mct1_activity*(Naive*3.97e-8 + Th1*4.85e-8 + Th2*6.45e-8 + Th17*7.19e-8 + Th22*7.01e-8 + Treg);

  // Reactions:
  IFNg_receptor_binding: $IFNg_Local + IFNgR -> IFNg_IFNgR; ThCell*Mass_Action_2_Substrate__reversible(IFNg_receptor_binding_k1, IFNg_receptor_binding_k2, IFNg_IFNgR, IFNg_Local, IFNgR); IFNg_receptor_binding is "(IM) IFNg receptor binding";  // modifiers: SOCS1_JAKs
    IFNg_receptor_binding_k1 = 3.6e11; IFNg_receptor_binding_k2 = 5.4;
  IL10_receptor_binding: $IL10_Local + IL10R -> IL10_IL10R; ThCell*Mass_Action_2_Substrate__reversible(IL10_receptor_binding_k1, IL10_receptor_binding_k2, IL10_IL10R, IL10_Local, IL10R); IL10_receptor_binding is "(IM) IL10 receptor binding";
    IL10_receptor_binding_k1 = 3.6e11; IL10_receptor_binding_k2 = 1.43942;
  IL12_receptor_binding: $IL12_Local + IL12R -> IL12_IL12R; ThCell*Mass_Action_2_Substrate__reversible(IL12_receptor_binding_k1, IL12_receptor_binding_k2, IL12_IL12R, IL12_Local, IL12R); IL12_receptor_binding is "(IM) IL12 receptor binding";
    IL12_receptor_binding_k1 = 3.6e11; IL12_receptor_binding_k2 = 180;
  IL17_receptor_binding: $IL17_Local + IL17R -> IL17_IL17R; ThCell*Mass_Action_2_Substrate__reversible(IL17_receptor_binding_k1, IL17_receptor_binding_k2, IL17_IL17R, IL17_Local, IL17R); IL17_receptor_binding is "(IM) IL17 receptor binding";
    IL17_receptor_binding_k1 = 3.6e11; IL17_receptor_binding_k2 = 1800;
  IL18_receptor_binding: $IL18_Local + IL18R -> IL18_IL18R; ThCell*Mass_Action_2_Substrate__reversible(IL18_receptor_binding_k1, IL18_receptor_binding_k2, IL18_IL18R, IL18_Local, IL18R); IL18_receptor_binding is "(IM) IL18 receptor binding";  // modifiers: STAT6_P
    IL18_receptor_binding_k1 = 3.6e11; IL18_receptor_binding_k2 = 5.26604;
  IL21_receptor_binding: $IL21_Local + IL21R -> IL21_IL21R; ThCell*Mass_Action_2_Substrate__reversible(IL21_receptor_binding_k1, IL21_receptor_binding_k2, IL21_IL21R, IL21_Local, IL21R); IL21_receptor_binding is "(IM) IL21 receptor binding";  // modifiers: STAT5_P, IL17_IL17R
    IL21_receptor_binding_k1 = 3.6e11; IL21_receptor_binding_k2 = 25.2;
  IL23_receptor_binding: $IL23_Local + IL23R -> IL23_IL23R; ThCell*Mass_Action_2_Substrate__reversible(IL23_receptor_binding_k1, IL23_receptor_binding_k2, IL23_IL23R, IL23_Local, IL23R); IL23_receptor_binding is "(IM) IL23 receptor binding";  // modifiers: Tbet_P
    IL23_receptor_binding_k1 = 3.6e11; IL23_receptor_binding_k2 = 1368;
  IL2_receptor_binding: $IL2_Local + IL2R -> IL2_IL2R; ThCell*Mass_Action_2_Substrate__reversible(IL2_receptor_binding_k1, IL2_receptor_binding_k2, IL2_IL2R, IL2_Local, IL2R); IL2_receptor_binding is "(IM) IL2 receptor binding";
    IL2_receptor_binding_k1 = 3.6e11; IL2_receptor_binding_k2 = 10800;
  IL4_receptor_binding: $IL4_Local + IL4R -> IL4_IL4R; ThCell*Mass_Action_2_Substrate__reversible(IL4_receptor_binding_k1, IL4_receptor_binding_k2, IL4_IL4R, IL4_Local, IL4R); IL4_receptor_binding is "(IM) IL4 receptor binding";  // modifiers: SOCS1_JAKs
    IL4_receptor_binding_k1 = 3.6e11; IL4_receptor_binding_k2 = 55.8;
  IL6_receptor_binding: $IL6_Local + IL6R -> IL6_IL6R; ThCell*Mass_Action_2_Substrate__reversible(IL6_receptor_binding_k1, IL6_receptor_binding_k2, IL6_IL6R, IL6_Local, IL6R); IL6_receptor_binding is "(IM) IL6 receptor binding";
    IL6_receptor_binding_k1 = 3.6e11; IL6_receptor_binding_k2 = 72;
  TGFb_receptor_binding: $TGFb_Local + TGFbR -> TGFb_TGFbR; ThCell*Mass_Action_2_Substrate__reversible(TGFb_receptor_binding_k1, TGFb_receptor_binding_k2, TGFb_TGFbR, TGFb_Local, TGFbR); TGFb_receptor_binding is "(IM) TGFb receptor binding";
    TGFb_receptor_binding_k1 = 3.6e11; TGFb_receptor_binding_k2 = 12.6;
  IL9_receptor_binding: $IL9_Local + IL9R -> IL9_IL9R; ThCell*Mass_Action_2_Substrate__reversible(IL9_receptor_binding_k1, IL9_receptor_binding_k2, IL9_IL9R, IL9_Local, IL9R); IL9_receptor_binding is "(IM) IL9 receptor binding";
    IL9_receptor_binding_k1 = 3.6e11; IL9_receptor_binding_k2 = 36;
  IL22_receptor_binding: IL22_ThCell + IL22R -> IL22_IL22R; ThCell*Mass_Action_2_Substrate__reversible(IL22_receptor_binding_k1, IL22_receptor_binding_k2, IL22_IL22R, IL22_ThCell, IL22R); IL22_receptor_binding is "(IM) IL22 receptor binding";
    IL22_receptor_binding_k1 = 3.6e11; IL22_receptor_binding_k2 = 0.36;
  TNFa_receptor_binding: $TNFa_Local + TNFaR -> TNFa_TNFaR; ThCell*Mass_Action_2_Substrate__reversible(TNFa_receptor_binding_k1, TNFa_receptor_binding_k2, TNFa_TNFaR, TNFa_Local, TNFaR); TNFa_receptor_binding is "(IM) TNFa receptor binding";
    TNFa_receptor_binding_k1 = 3.6e11; TNFa_receptor_binding_k2 = 14.4;
  FOXP3_activation: FOXP3 -> acetylated_FOXP3; ThCell*foxp3_0(FOXP3_activation_Vf, FOXP3, FOXP3_activation_ki1, FOXP3_activation_n1, STAT6_P, FOXP3_activation_ki2, FOXP3_activation_n2, STAT3_P, FOXP3_activation_ki3, FOXP3_activation_n3, IL6_IL6R, FOXP3_activation_ki4, FOXP3_activation_n4, STAT1_P, FOXP3_activation_c1, TGFb_TGFbR, FOXP3_activation_n5, FOXP3_activation_ka1, FOXP3_activation_c2, STAT5_P, FOXP3_activation_n6, FOXP3_activation_ka2, FOXP3_activation_c3, L_PPARg, FOXP3_activation_n7, FOXP3_activation_ka3, FOXP3_activation_c4, TNFa_TNFaR, FOXP3_activation_n8, FOXP3_activation_ka4, FOXP3_activation_c5, IL10_IL10R, n9, FOXP3_activation_ka5, c7, LANCL2_BT11, n11, ka7, FOXP3_activation_Vr, acetylated_FOXP3); FOXP3_activation is "(IM) FOXP3 activation";  // modifiers: STAT6_P, STAT3_P, IL6_IL6R, STAT1_P, TGFb_TGFbR, STAT5_P, L_PPARg, TNFa_TNFaR, IL10_IL10R, LANCL2_BT11
    FOXP3_activation_Vf = 16.1744; FOXP3_activation_ki1 = 4.94095e-7; FOXP3_activation_n1 = 0.929973; FOXP3_activation_ki2 = 1.30231e-12; FOXP3_activation_n2 = 0.883737; FOXP3_activation_ki3 = 1.4725e-10; FOXP3_activation_n3 = 1.53494; FOXP3_activation_ki4 = 5.39763e-8; FOXP3_activation_n4 = 1.19126; FOXP3_activation_c1 = 1.21256e4; FOXP3_activation_n5 = 1.30866; FOXP3_activation_ka1 = 2.44765e-5; FOXP3_activation_c2 = 1.96337e4; FOXP3_activation_n6 = 1.11051; FOXP3_activation_ka2 = 1.72076e-8; FOXP3_activation_c3 = 0.230021; FOXP3_activation_n7 = 1.35537; FOXP3_activation_ka3 = 1.29495e-5; FOXP3_activation_c4 = 7.20295; FOXP3_activation_n8 = 1.32092; FOXP3_activation_ka4 = 2.38547e-8; FOXP3_activation_c5 = 731.139; n9 = 1.64437; FOXP3_activation_ka5 = 1.83654e-5; c7 = 71562; n11 = 1.3; ka7 = 1.22462e-7; FOXP3_activation_Vr = 0.1;
  STAT4_activation: STAT4 -> STAT4_P; ThCell*_2_DOWN__2_UP_TF_v2(STAT4_activation_Vf, STAT4, STAT4_activation_ki1, STAT4_activation_n1, IL21_IL21R, STAT4_activation_ki2, STAT4_activation_n2, GATA3_P, STAT4_activation_c1, IL12_IL12R, STAT4_activation_n3, STAT4_activation_ka1, STAT4_activation_c2, IL23_IL23R, STAT4_activation_n4, STAT4_activation_ka2, STAT4_activation_Vr, STAT4_P); STAT4_activation is "(IM) STAT4 activation";  // modifiers: IL21_IL21R, GATA3_P, IL12_IL12R, IL23_IL23R
    STAT4_activation_Vf = 0.0602925; STAT4_activation_ki1 = 0.000126657; STAT4_activation_n1 = 1.06245; STAT4_activation_ki2 = 2.3043e-7; STAT4_activation_n2 = 1.37371; STAT4_activation_c1 = 259.363; STAT4_activation_n3 = 0.928568; STAT4_activation_ka1 = 4.98681e-8; STAT4_activation_c2 = 421.43; STAT4_activation_n4 = 1.24541; STAT4_activation_ka2 = 3.95743e-10; STAT4_activation_Vr = 0.1;
  Tbet_activation: Tbet -> Tbet_P; ThCell*_4_DOWN__4_UP_TF_v2(Tbet_activation_Vf, Tbet, Tbet_activation_ki1, Tbet_activation_n1, TGFb_TGFbR, Tbet_activation_ki2, Tbet_activation_n2, STAT3_P, Tbet_activation_ki3, Tbet_activation_n3, GATA3_P, Tbet_activation_ki4, Tbet_activation_n4, LANCL2_BT11, Tbet_activation_c1, STAT4_P, Tbet_activation_n5, Tbet_activation_ka1, Tbet_activation_c2, STAT1_P, Tbet_activation_n6, Tbet_activation_ka2, Tbet_activation_c3, IFNg_IFNgR, Tbet_activation_n7, Tbet_activation_ka3, Tbet_activation_c4, IL2_IL2R, Tbet_activation_n8, Tbet_activation_ka4, Tbet_activation_Vr, Tbet_P); Tbet_activation is "(IM) Tbet activation";  // modifiers: TGFb_TGFbR, STAT3_P, GATA3_P, LANCL2_BT11, STAT4_P, STAT1_P, IFNg_IFNgR, IL2_IL2R
    Tbet_activation_Vf = 8.63123e-7; Tbet_activation_ki1 = 7.20718e-7; Tbet_activation_n1 = 1.04225; Tbet_activation_ki2 = 1.062e-5; Tbet_activation_n2 = 1.15008; Tbet_activation_ki3 = 4.92265e-5; Tbet_activation_n3 = 0.989115; Tbet_activation_ki4 = 1.1695e-8; Tbet_activation_n4 = 1.00385; Tbet_activation_c1 = 2394.94; Tbet_activation_n5 = 1.10812; Tbet_activation_ka1 = 2.86903e-14; Tbet_activation_c2 = 396.411; Tbet_activation_n6 = 1.20378; Tbet_activation_ka2 = 3.20328e-5; Tbet_activation_c3 = 5.41678e4; Tbet_activation_n7 = 1.49994; Tbet_activation_ka3 = 5.90437e-7; Tbet_activation_c4 = 9451.08; Tbet_activation_n8 = 1.52672; Tbet_activation_ka4 = 1.1695e-8; Tbet_activation_Vr = 0.1;
  STAT1_activation: STAT1 -> STAT1_P; ThCell*_1_DOWN__3_UP_TF_v2(STAT1_activation_Vf, STAT1, STAT1_activation_ki1, STAT1_activation_n1, L_PPARg, STAT1_activation_c1, JAK1_P, STAT1_activation_n2, STAT1_activation_ka1, STAT1_activation_c2, IL21_IL21R, STAT1_activation_n3, STAT1_activation_ka2, STAT1_activation_c3, IFNg_IFNgR, STAT1_activation_n4, STAT1_activation_ka3, STAT1_activation_Vr, STAT1_P); STAT1_activation is "(IM) STAT1 activation";  // modifiers: L_PPARg, JAK1_P, IL21_IL21R, IFNg_IFNgR
    STAT1_activation_Vf = 5.13552e9; STAT1_activation_ki1 = 2.24345e-6; STAT1_activation_n1 = 0.979492; STAT1_activation_c1 = 42.7822; STAT1_activation_n2 = 1.49896; STAT1_activation_ka1 = 3.48554e-8; STAT1_activation_c2 = 81.8774; STAT1_activation_n3 = 0.813124; STAT1_activation_ka2 = 1.72788e-6; STAT1_activation_c3 = 17.0613; STAT1_activation_n4 = 1.10605; STAT1_activation_ka3 = 4.23525e-17; STAT1_activation_Vr = 0.1;
  JAK1_activation: JAK1 -> JAK1_P; ThCell*_2_DOWN__1_UP_TF_v2(JAK1_activation_Vf, JAK1, JAK1_activation_ki1, JAK1_activation_n1, L_PPARg, JAK1_activation_ki2, JAK1_activation_n2, SOCS1_JAKs, JAK1_activation_c1, IFNg_IFNgR, JAK1_activation_n3, JAK1_activation_ka1, JAK1_activation_Vr, JAK1_P); JAK1_activation is "(IM) JAK1 activation";  // modifiers: L_PPARg, SOCS1_JAKs, IFNg_IFNgR
    JAK1_activation_Vf = 7.86351e12; JAK1_activation_ki1 = 2.26941e-14; JAK1_activation_n1 = 1.18056; JAK1_activation_ki2 = 3.15829e-7; JAK1_activation_n2 = 1.08354; JAK1_activation_c1 = 0.0190923; JAK1_activation_n3 = 1.14687; JAK1_activation_ka1 = 3.15848e-9; JAK1_activation_Vr = 0.1;
  SOCS1_activation: SOCS1 -> SOCS1_JAKs; ThCell*_0_DOWN__2_UP_TF_v2(SOCS1_activation_Vf, SOCS1, SOCS1_activation_c1, STAT1_P, SOCS1_activation_n1, SOCS1_activation_ka1, SOCS1_activation_c2, Tbet_P, SOCS1_activation_n2, SOCS1_activation_ka2, SOCS1_activation_Vr, SOCS1_JAKs); SOCS1_activation is "(IM) SOCS1 activation";  // modifiers: STAT1_P, Tbet_P
    SOCS1_activation_Vf = 0.0191372; SOCS1_activation_c1 = 746.941; SOCS1_activation_n1 = 0.883939; SOCS1_activation_ka1 = 8.77361e-11; SOCS1_activation_c2 = 5.86786; SOCS1_activation_n2 = 1.1648; SOCS1_activation_ka2 = 1.3694e-6; SOCS1_activation_Vr = 0.1;
  GATA3_activation: GATA3 -> GATA3_P; ThCell*_3_DOWN__2_UP_TF_v2(GATA3_activation_Vf, GATA3, GATA3_activation_ki1, GATA3_activation_n1, Tbet_P, GATA3_activation_ki2, GATA3_activation_n2, STAT3_P, GATA3_activation_ki3, GATA3_activation_n3, TGFb_TGFbR, GATA3_activation_c1, STAT6_P, GATA3_activation_n4, GATA3_activation_ka1, GATA3_activation_c2, L_PPARg, GATA3_activation_n5, GATA3_activation_ka2, GATA3_activation_Vr, GATA3_P); GATA3_activation is "(IM) GATA3 activation";  // modifiers: Tbet_P, STAT3_P, TGFb_TGFbR, STAT6_P, L_PPARg
    GATA3_activation_Vf = 5.28906e9; GATA3_activation_ki1 = 3.41038e-12; GATA3_activation_n1 = 0.949808; GATA3_activation_ki2 = 1.53803e-11; GATA3_activation_n2 = 1.19523; GATA3_activation_ki3 = 1.35974e-12; GATA3_activation_n3 = 1.05095; GATA3_activation_c1 = 695.245; GATA3_activation_n4 = 3.20855; GATA3_activation_ka1 = 1.28748e-6; GATA3_activation_c2 = 3.2717; GATA3_activation_n5 = 1.37212; GATA3_activation_ka2 = 0.000398629; GATA3_activation_Vr = 0.1;
  STAT6_activation: STAT6 -> STAT6_P; ThCell*_1_DOWN__1_UP_TF_v2(STAT6_activation_Vf, STAT6, STAT6_activation_ki1, STAT6_activation_n1, IFNg_IFNgR, STAT6_activation_c1, IL4_IL4R, STAT6_activation_n2, STAT6_activation_ka1, STAT6_activation_Vr, STAT6_P); STAT6_activation is "(IM) STAT6 activation";  // modifiers: IFNg_IFNgR, IL4_IL4R
    STAT6_activation_Vf = 0.174954; STAT6_activation_ki1 = 6.48108e-6; STAT6_activation_n1 = 0.81557; STAT6_activation_c1 = 135.169; STAT6_activation_n2 = 1.75296; STAT6_activation_ka1 = 6.73906e-8; STAT6_activation_Vr = 0.1;
  STAT5_activation: STAT5 -> STAT5_P; ThCell*STAT5___LANCL2_2(STAT5_activation_Vf, STAT5, STAT5_activation_c1, IL2_IL2R, STAT5_activation_n1, STAT5_activation_ka1, STAT5_activation_c2, LANCL2_BT11, STAT5_activation_n2, STAT5_activation_ka, STAT5_activation_Vr, STAT5_P); STAT5_activation is "(IM) STAT5 activation";  // modifiers: IL2_IL2R, LANCL2_BT11
    STAT5_activation_Vf = 4.52465; STAT5_activation_c1 = 3.71748; STAT5_activation_n1 = 1.16886; STAT5_activation_ka1 = 7.38902e-7; STAT5_activation_c2 = 2.96752; STAT5_activation_n2 = 1.07; STAT5_activation_ka = 1.41e-7; STAT5_activation_Vr = 0.1;
  IRAK1_activation: IRAK1 -> IRAK1_P; ThCell*_0_DOWN__1_UP_TF_v2(IRAK1_activation_Vf, IRAK1, IRAK1_activation_c1, IL18_IL18R, IRAK1_activation_n1, IRAK1_activation_ka1, IRAK1_activation_Vr, IRAK1_P); IRAK1_activation is "(IM) IRAK1 activation";  // modifiers: IL18_IL18R
    IRAK1_activation_Vf = 1.77444; IRAK1_activation_c1 = 1724.36; IRAK1_activation_n1 = 0.764031; IRAK1_activation_ka1 = 6.67565e-8; IRAK1_activation_Vr = 0.1;
  STAT3_activation: STAT3 -> STAT3_P; ThCell*_1_DOWN__6_UP_TF_v2(STAT3_activation_Vf, STAT3, STAT3_activation_ki1, STAT3_activation_n1, L_PPARg, STAT3_activation_c1, IL21_IL21R, STAT3_activation_n2, STAT3_activation_ka1, STAT3_activation_c2, IL23_IL23R, STAT3_activation_n3, STAT3_activation_ka2, STAT3_activation_c3, Lactate_Cytosol, STAT3_activation_n4, STAT3_activation_ka3, STAT3_activation_c4, IL6_IL6R, STAT3_activation_n5, STAT3_activation_ka4, STAT3_activation_c5, IL22_IL22R, STAT3_activation_n6, STAT3_activation_ka5, c6, NADPH_tot, STAT3_activation_n7, ka6, STAT3_activation_Vr, STAT3_P); STAT3_activation is "(IM) STAT3 activation";  // modifiers: L_PPARg, IL21_IL21R, IL23_IL23R, Lactate_Cytosol, IL6_IL6R, IL22_IL22R, NADPH_tot
    STAT3_activation_Vf = 0.000722176; STAT3_activation_ki1 = 3.09351e-6; STAT3_activation_n1 = 1.17345; STAT3_activation_c1 = 60.4147; STAT3_activation_n2 = 0.758459; STAT3_activation_ka1 = 1.71856e-6; STAT3_activation_c2 = 141.503; STAT3_activation_n3 = 0.771254; STAT3_activation_ka2 = 9.40051e-12; STAT3_activation_c3 = 470.372; STAT3_activation_n4 = 4.36602; STAT3_activation_ka3 = 3.33041e-6; STAT3_activation_c4 = 135.787; STAT3_activation_n5 = 1.49931; STAT3_activation_ka4 = 9.49816e-7; STAT3_activation_c5 = 101.776; STAT3_activation_n6 = 1.08064; STAT3_activation_ka5 = 9.28214e-6; c6 = 106.695; STAT3_activation_n7 = 1.34844; ka6 = 7.03519e-6; STAT3_activation_Vr = 0.1;
  RORgt_activation: RORgt -> RORgt_ligand; ThCell*_1_DOWN__2_UP__TF_v2(RORgt_activation_Vf, RORgt, RORgt_activation_ki1, RORgt_activation_n1, acetylated_FOXP3, RORgt_activation_n2, RORgt_activation_c1, STAT3_P, RORgt_activation_n3, RORgt_activation_ka1, RORgt_activation_c2, TGFb_TGFbR, RORgt_activation_ka2, RORgt_activation_Vr, RORgt_ligand); RORgt_activation is "(IM) RORgt activation";  // modifiers: acetylated_FOXP3, STAT3_P, TGFb_TGFbR
    RORgt_activation_Vf = 3.29615e-7; RORgt_activation_ki1 = 1.64926e-9; RORgt_activation_n1 = 3.1424; RORgt_activation_n2 = 1.43967; RORgt_activation_c1 = 257.509; RORgt_activation_n3 = 0.884071; RORgt_activation_ka1 = 9.30387e-7; RORgt_activation_c2 = 260287; RORgt_activation_ka2 = 2.88804e-9; RORgt_activation_Vr = 0.1;
  PPARg_activation: PPARg -> L_PPARg; ThCell*_1_DOWN__0_UP_TF_v2(PPARg_activation_Vf, PPARg, PPARg_activation_ki1, PPARg_activation_n1, IFNg_IFNgR, PPARg_activation_Vr, L_PPARg); PPARg_activation is "(IM) PPARg activation";  // modifiers: IFNg_IFNgR
    PPARg_activation_Vf = 7612290; PPARg_activation_ki1 = 4.4663e-8; PPARg_activation_n1 = 1.24178; PPARg_activation_Vr = 0.1;
  AhR_activation: AhR -> AhR_P; ThCell*_0_DOWN__3_UP_TF_v2(AhR_activation_Vf, AhR, AhR_activation_c1, TNFa_TNFaR, AhR_activation_n1, AhR_activation_ka1, AhR_activation_c2, IL6_IL6R, AhR_activation_n2, AhR_activation_ka2, AhR_activation_c3, FICZ, AhR_activation_n3, AhR_activation_ka3, AhR_activation_Vr, AhR_P); AhR_activation is "(IM) AhR activation";  // modifiers: TNFa_TNFaR, IL6_IL6R, FICZ
    AhR_activation_Vf = 1.17163; AhR_activation_c1 = 0.0788843; AhR_activation_n1 = 0.858008; AhR_activation_ka1 = 1.60766e-8; AhR_activation_c2 = 0.000562569; AhR_activation_n2 = 0.885623; AhR_activation_ka2 = 1.07723e-5; AhR_activation_c3 = 3.82843e4; AhR_activation_n3 = 1.19294; AhR_activation_ka3 = 4.29011e-8; AhR_activation_Vr = 0.1;
  _IM__LANCL2_binding: $BT11_pool + $enz_LANCL2 -> LANCL2_BT11; ThCell*Mass_Action_2_Substrate__reversible(_IM__LANCL2_binding_k1, _IM__LANCL2_binding_k2, LANCL2_BT11, BT11_pool, enz_LANCL2); _IM__LANCL2_binding is "(IM) LANCL2 binding";
    _IM__LANCL2_binding_k1 = 100000000; _IM__LANCL2_binding_k2 = 230.5;
  _GLY__ALDO_F_merge: F1_6_BP => 2 G3_P; Cytosol*_1_substrate___Irreversible(_GLY__ALDO_F_merge_kcat, enz_ALDO, F1_6_BP, _GLY__ALDO_F_merge_Km); _GLY__ALDO_F_merge is "(GLY) ALDO_F";  // modifiers: enz_ALDO
    _GLY__ALDO_F_merge_kcat = 19680; _GLY__ALDO_F_merge_Km = 1.3e-5;
  _GLY__PK_merge: PEP + $ADP_S_Cytosol => Pyruvate_Cytosol + ATP_P_PK; Cytosol*PDH___LANCL2_BT11(_GLY__PK_merge_kcat, enz_PK, PEP, _GLY__PK_merge_Km, LANCL2_BT11, _GLY__PK_merge_n1, _GLY__PK_merge_ka, _GLY__PK_merge_c1); _GLY__PK_merge is "(GLY) PK";  // modifiers: enz_PK, LANCL2_BT11
    _GLY__PK_merge_kcat = 1138680; _GLY__PK_merge_Km = 7e-5; _GLY__PK_merge_n1 = 0.872727; _GLY__PK_merge_ka = 8.183e-10; _GLY__PK_merge_c1 = 0.25;
  _FAO__ACAA_merge: Acetoacetyl_CoA => Acetyl_CoA_Mitochondria; Mitochondria*_1_substrate___Irreversible(_FAO__ACAA_merge_kcat, enz_ACAA, Acetoacetyl_CoA, _FAO__ACAA_merge_Km); _FAO__ACAA_merge is "(FAO) ACAA";  // modifiers: enz_ACAA
    _FAO__ACAA_merge_kcat = 1000; _FAO__ACAA_merge_Km = 8e-6;
  _FAO__ACSL_merge: FA_Cytosol => Acyl_CoA_Cytosol; Cytosol*_1_substrate___Irreversible(_FAO__ACSL_merge_kcat, enz_ACSL, FA_Cytosol, _FAO__ACSL_merge_Km); _FAO__ACSL_merge is "(FAO) ACSL";  // modifiers: enz_ACSL
    _FAO__ACSL_merge_kcat = 8064; _FAO__ACSL_merge_Km = 0.000666;
  _GLY__PFK_merge: F6_P + $ATP_S_Cytosol => F1_6_BP + ADP_P_PFK; Cytosol*_1_substrate___Irreversible(_GLY__PFK_merge_kcat, enz_PFK, F6_P, _GLY__PFK_merge_Km); _GLY__PFK_merge is "(GLY) PFK";  // modifiers: enz_PFK
    _GLY__PFK_merge_kcat = 1.12205e4; _GLY__PFK_merge_Km = 0.000438;
  _GLY__ENO_F_merge: _2_PG => PEP; Cytosol*_1_substrate___Irreversible(_GLY__ENO_F_merge_kcat, enz_ENO1, _2_PG, _GLY__ENO_F_merge_Km); _GLY__ENO_F_merge is "(GLY) ENO_F";  // modifiers: enz_ENO1
    _GLY__ENO_F_merge_kcat = 27360; _GLY__ENO_F_merge_Km = 4.3e-5;
  _GLY__GAPDH_F_merge: G3_P + $NAD_S_Cytosol => _1_3_BPG + NADH_P_GAPDH; Cytosol*Ping_Pong_Bi_Bi_irreversible(_GLY__GAPDH_F_merge_kcat, enz_GAPDH, G3_P, NAD_S_Cytosol, _GLY__GAPDH_F_merge_KmB, _GLY__GAPDH_F_merge_KmA); _GLY__GAPDH_F_merge is "(GLY) GAPDH_F";  // modifiers: enz_GAPDH
    _GLY__GAPDH_F_merge_kcat = 68760; _GLY__GAPDH_F_merge_KmB = 1; _GLY__GAPDH_F_merge_KmA = 495;
  _GLY__PGK_F_merge: _1_3_BPG + $ADP_S_Cytosol => _3_PG + ATP_P_PGK; Cytosol*_1_substrate___Irreversible(_GLY__PGK_F_merge_kcat, enz_PGK, _1_3_BPG, _GLY__PGK_F_merge_Km); _GLY__PGK_F_merge is "(GLY) PGK_F";  // modifiers: enz_PGK
    _GLY__PGK_F_merge_kcat = 307800; _GLY__PGK_F_merge_Km = 0.0064;
  _GLY__GLUT_merge: $Glucose_Extracellular => Glucose_Cytosol; Cytosol*_1_substrate___Irreversible(_GLY__GLUT_merge_kcat, enz_GLUT, Glucose_Extracellular, _GLY__GLUT_merge_Km); _GLY__GLUT_merge is "(GLY) GLUT";  // modifiers: enz_GLUT
    _GLY__GLUT_merge_kcat = 543600; _GLY__GLUT_merge_Km = 0.002;
  _GLY__PGAM_F_merge: _3_PG => _2_PG; Cytosol*_1_substrate___Irreversible(_GLY__PGAM_F_merge_kcat, enz_PGAM, _3_PG, _GLY__PGAM_F_merge_Km); _GLY__PGAM_F_merge is "(GLY) PGAM_F";  // modifiers: enz_PGAM
    _GLY__PGAM_F_merge_kcat = 2268000; _GLY__PGAM_F_merge_Km = 0.00038;
  _GLY__GPI_F_merge: G6_P => F6_P; Cytosol*_1_substrate___Irreversible(_GLY__GPI_F_merge_kcat, enz_GPI, G6_P, _GLY__GPI_F_merge_Km); _GLY__GPI_F_merge is "(GLY) GPI_F";  // modifiers: enz_GPI
    _GLY__GPI_F_merge_kcat = 5076000; _GLY__GPI_F_merge_Km = 0.00165;
  _GLY__HK_merge: Glucose_Cytosol + $ATP_S_Cytosol => G6_P + ADP_P_HK; Cytosol*_1_substrate___Irreversible(_GLY__HK_merge_kcat, enz_HK, Glucose_Cytosol, _GLY__HK_merge_Km); _GLY__HK_merge is "(GLY) HK";  // modifiers: enz_HK
    _GLY__HK_merge_kcat = 240120; _GLY__HK_merge_Km = 0.006;
  _GLY__LDHA_merge: Pyruvate_Cytosol + $NADH_S_Cytosol => Lactate_Cytosol + NAD_P_LDHA; Cytosol*_1_substrate___Irreversible(_GLY__LDHA_merge_kcat, enz_LDHA, Pyruvate_Cytosol, _GLY__LDHA_merge_Km); _GLY__LDHA_merge is "(GLY) LDHA";  // modifiers: enz_LDHA
    _GLY__LDHA_merge_kcat = 1620000; _GLY__LDHA_merge_Km = 3e-5;
  _FAO__ECH_merge: Trans_enoyl_CoA => L_3_Hydroxyacyl_CoA; Mitochondria*_1_substrate___Irreversible(_FAO__ECH_merge_kcat, enz_ECH, Trans_enoyl_CoA, _FAO__ECH_merge_Km); _FAO__ECH_merge is "(FAO) ECH";  // modifiers: enz_ECH
    _FAO__ECH_merge_kcat = 138000; _FAO__ECH_merge_Km = 0.0005;
  _FAO__FATP_merge: $FA_Extracellular => FA_Cytosol; Cytosol*_1_substrate___Irreversible(_FAO__FATP_merge_kcat, enz_SLC27A1, FA_Extracellular, _FAO__FATP_merge_Km); _FAO__FATP_merge is "(FAO) FATP";  // modifiers: enz_SLC27A1
    _FAO__FATP_merge_kcat = 108000; _FAO__FATP_merge_Km = 9.45e-5;
  _FAO__CPT2_merge: Acyl_Carnitine_Mitochondria => Acyl_CoA_Mitochondria; Cytosol*_1_substrate___Irreversible(_FAO__CPT2_merge_kcat, enz_CPT2, Acyl_Carnitine_Mitochondria, _FAO__CPT2_merge_Km); _FAO__CPT2_merge is "(FAO) CPT2";  // modifiers: enz_CPT2
    _FAO__CPT2_merge_kcat = 1566; _FAO__CPT2_merge_Km = 4.31e-5;
  _FAO__HADH_merge: L_3_Hydroxyacyl_CoA => Acetoacetyl_CoA; Mitochondria*_1_substrate___Irreversible(_FAO__HADH_merge_kcat, enz_HADH, L_3_Hydroxyacyl_CoA, _FAO__HADH_merge_Km); _FAO__HADH_merge is "(FAO) HADH";  // modifiers: enz_HADH
    _FAO__HADH_merge_kcat = 69840; _FAO__HADH_merge_Km = 1.9e-5;
  _FAO__ACAD_merge: Acyl_CoA_Mitochondria => Trans_enoyl_CoA; Mitochondria*_1_substrate___Irreversible(_FAO__ACAD_merge_kcat, enz_ACAD, Acyl_CoA_Mitochondria, _FAO__ACAD_merge_Km); _FAO__ACAD_merge is "(FAO) ACAD";  // modifiers: enz_ACAD
    _FAO__ACAD_merge_kcat = 7200; _FAO__ACAD_merge_Km = 2.8e-6;
  _TCA__MDH2_merge: Malate_Mitochondria + $NAD_S_Mitochondria => OAA_Mitochondria + NADH_P_MDH; Mitochondria*Ping_Pong_Bi_Bi_irreversible(_TCA__MDH2_merge_kcat, enz_MDH2, Malate_Mitochondria, NAD_S_Mitochondria, _TCA__MDH2_merge_KmB, _TCA__MDH2_merge_KmA); _TCA__MDH2_merge is "(TCA) MDH2";  // modifiers: enz_MDH2
    _TCA__MDH2_merge_kcat = 2.83738e11; _TCA__MDH2_merge_KmB = 1; _TCA__MDH2_merge_KmA = 3530;
  _FAO__CPT1a_merge: Acyl_CoA_Cytosol => Acyl_Carnitine_Cytosol; Cytosol*_1_substrate___Irreversible(_FAO__CPT1a_merge_kcat, enz_CPT1a, Acyl_CoA_Cytosol, _FAO__CPT1a_merge_Km); _FAO__CPT1a_merge is "(FAO) CPT1a";  // modifiers: enz_CPT1a
    _FAO__CPT1a_merge_kcat = 1566.1; _FAO__CPT1a_merge_Km = 4.31e-5;
  _TCA__IDH_merge: Isocitrate + $NAD_S_Mitochondria => $a_KG_Mitochondria + NADH_P_IDH; Mitochondria*Ping_Pong_Bi_Bi_irreversible(_TCA__IDH_merge_kcat, enz_IDH, Isocitrate, NAD_S_Mitochondria, _TCA__IDH_merge_KmB, _TCA__IDH_merge_KmA); _TCA__IDH_merge is "(TCA) IDH";  // modifiers: enz_IDH
    _TCA__IDH_merge_kcat = 1.05336e11; _TCA__IDH_merge_KmB = 1; _TCA__IDH_merge_KmA = 2200;
  _TCA__FH_F_merge: Fumarate => Malate_Mitochondria; Mitochondria*_1_substrate___Irreversible(_TCA__FH_F_merge_kcat, enz_FH, Fumarate, _TCA__FH_F_merge_Km); _TCA__FH_F_merge is "(TCA) FH_F";  // modifiers: enz_FH
    _TCA__FH_F_merge_kcat = 1548000; _TCA__FH_F_merge_Km = 0.00038;
  _FAO__CACT_merge: Acyl_Carnitine_Cytosol => Acyl_Carnitine_Mitochondria; Cytosol*_1_substrate___Irreversible(_FAO__CACT_merge_kcat, enz_CACT, Acyl_Carnitine_Cytosol, _FAO__CACT_merge_Km); _FAO__CACT_merge is "(FAO) CACT";  // modifiers: enz_CACT
    _FAO__CACT_merge_kcat = 10800; _FAO__CACT_merge_Km = 0.0005;
  _PPP__G6PD_merge: G6_P + $NADP_S => G1_5L6P + NADPH_P_G6PD; Cytosol*_1_substrate___Irreversible(_PPP__G6PD_merge_kcat, enz_G6PD, G6_P, _PPP__G6PD_merge_Km); _PPP__G6PD_merge is "(PPP) G6PD";  // modifiers: enz_G6PD
    _PPP__G6PD_merge_kcat = 727200; _PPP__G6PD_merge_Km = 4.57e-5;
  _TCA__PDH_merge: Pyruvate_Mitochondria + $NAD_S_Mitochondria => Acetyl_CoA_Mitochondria + NADH_P_PDH; Mitochondria*PDH___LANCL2_BT11(_TCA__PDH_merge_kcat, enz_PDH, Pyruvate_Mitochondria, _TCA__PDH_merge_Km, LANCL2_BT11, _TCA__PDH_merge_n1, _TCA__PDH_merge_ka, _TCA__PDH_merge_c1); _TCA__PDH_merge is "(TCA) PDH";  // modifiers: enz_PDH, LANCL2_BT11
    _TCA__PDH_merge_kcat = 10800; _TCA__PDH_merge_Km = 3e-5; _TCA__PDH_merge_n1 = 2; _TCA__PDH_merge_ka = 1.38402e-9; _TCA__PDH_merge_c1 = 1.40838;
  _TCA__SDH_F_merge: Succinate + $FAD_S => Fumarate + FADH2_P_SDH; Cytosol*_1_substrate___Irreversible(_TCA__SDH_F_merge_kcat, enz_SDH, Succinate, _TCA__SDH_F_merge_Km); _TCA__SDH_F_merge is "(TCA) SDH_F";  // modifiers: enz_SDH
    _TCA__SDH_F_merge_kcat = 2520; _TCA__SDH_F_merge_Km = 0.0008;
  _PPP__RPI_merge: Ribulose_5P => Ribose_5P; Cytosol*_1_substrate___Irreversible(_PPP__RPI_merge_kcat, enz_RPI, Ribulose_5P, _PPP__RPI_merge_Km); _PPP__RPI_merge is "(PPP) RPI";  // modifiers: enz_RPI
    _PPP__RPI_merge_kcat = 248400; _PPP__RPI_merge_Km = 0.00123;
  _TCA__OGDH_merge: $a_KG_Mitochondria + $NAD_S_Mitochondria => Succinyl_CoA + NADH_P_OGDH; Cytosol*Ping_Pong_Bi_Bi_irreversible(_TCA__OGDH_merge_kcat, enz_OGDH, a_KG_Mitochondria, NAD_S_Mitochondria, _TCA__OGDH_merge_KmB, _TCA__OGDH_merge_KmA); _TCA__OGDH_merge is "(TCA) OGDH";  // modifiers: enz_OGDH
    _TCA__OGDH_merge_kcat = 1.08e11; _TCA__OGDH_merge_KmB = 1; _TCA__OGDH_merge_KmA = 150;
  _TCA__CS_merge: OAA_Mitochondria + Acetyl_CoA_Mitochondria => Citrate_Mitochondria; Mitochondria*Ping_Pong_Bi_Bi_irreversible(_TCA__CS_merge_kcat, enz_CS, OAA_Mitochondria, Acetyl_CoA_Mitochondria, _TCA__CS_merge_KmB, _TCA__CS_merge_KmA); _TCA__CS_merge is "(TCA) CS";  // modifiers: enz_CS
    _TCA__CS_merge_kcat = 64800; _TCA__CS_merge_KmB = 1.99998e-5; _TCA__CS_merge_KmA = 7e-6;
  _TCA__ACO_merge: Citrate_Mitochondria => Isocitrate; Mitochondria*_1_substrate___Irreversible(_TCA__ACO_merge_kcat, enz_ACO, Citrate_Mitochondria, _TCA__ACO_merge_Km); _TCA__ACO_merge is "(TCA) ACO";  // modifiers: enz_ACO
    _TCA__ACO_merge_kcat = 3070.8; _TCA__ACO_merge_Km = 0.00017;
  _GLU__LDHB_merge: Lactate_Cytosol + $NAD_S_Cytosol => Pyruvate_Cytosol + NADH_P_LDHB; Cytosol*Ping_Pong_Bi_Bi_irreversible(_GLU__LDHB_merge_kcat, enz_LDHB, Lactate_Cytosol, NAD_S_Cytosol, _GLU__LDHB_merge_KmB, _GLU__LDHB_merge_KmA); _GLU__LDHB_merge is "(GLU) LDHB";  // modifiers: enz_LDHB
    _GLU__LDHB_merge_kcat = 7.79998e11; _GLU__LDHB_merge_KmB = 1; _GLU__LDHB_merge_KmA = 55;
  _GLU__G6PC_merge: G6_P => Glucose_Cytosol; Cytosol*_1_substrate___Irreversible(_GLU__G6PC_merge_kcat, enz_G6PC, G6_P, _GLU__G6PC_merge_Km); _GLU__G6PC_merge is "(GLU) G6PC";  // modifiers: enz_G6PC
    _GLU__G6PC_merge_kcat = 36000; _GLU__G6PC_merge_Km = 0.001288;
  _Mito_Transport__MPC_F_merge: Pyruvate_Cytosol => Pyruvate_Mitochondria; Cytosol*_1_substrate___Irreversible(_Mito_Transport__MPC_F_merge_kcat, enz_MPC, Pyruvate_Cytosol, _Mito_Transport__MPC_F_merge_Km); _Mito_Transport__MPC_F_merge is "(Mito Transport) MPC_F";  // modifiers: enz_MPC
    _Mito_Transport__MPC_F_merge_kcat = 10000; _Mito_Transport__MPC_F_merge_Km = 5e-5;
  _TCA__SUCL_F_merge: Succinyl_CoA + $ADP_S_Mitochondria => Succinate + ATP_P_SUCL; Mitochondria*_1_substrate___Irreversible(_TCA__SUCL_F_merge_kcat, enz_SUCL, Succinyl_CoA, _TCA__SUCL_F_merge_Km); _TCA__SUCL_F_merge is "(TCA) SUCL_F";  // modifiers: enz_SUCL
    _TCA__SUCL_F_merge_kcat = 723600; _TCA__SUCL_F_merge_Km = 2.21e-5;
  _GLU__PEPCK_merge: OAA_Cytosol => PEP; Cytosol*_1_substrate___Irreversible(_GLU__PEPCK_merge_kcat, enz_PCK1, OAA_Cytosol, _GLU__PEPCK_merge_Km); _GLU__PEPCK_merge is "(GLU) PEPCK";  // modifiers: enz_PCK1
    _GLU__PEPCK_merge_kcat = 133200; _GLU__PEPCK_merge_Km = 1.2e-5;
  _PPP__RPE_merge: Ribulose_5P => X_5P; Cytosol*_1_substrate___Irreversible(_PPP__RPE_merge_kcat, enz_RPE, Ribulose_5P, _PPP__RPE_merge_Km); _PPP__RPE_merge is "(PPP) RPE";  // modifiers: enz_RPE
    _PPP__RPE_merge_kcat = 1008000; _PPP__RPE_merge_Km = 0.0002;
  _PPP__PGD_merge: Gluconate_6P + $NADP_S => Ribulose_5P + NADPH_P_PGD; Cytosol*_1_substrate___Irreversible(_PPP__PGD_merge_kcat, enz_PGD, Gluconate_6P, _PPP__PGD_merge_Km); _PPP__PGD_merge is "(PPP) PGD";  // modifiers: enz_PGD
    _PPP__PGD_merge_kcat = 1.04161e4; _PPP__PGD_merge_Km = 2.6e-5;
  _PPP__PGL_merge: G1_5L6P => Gluconate_6P; Cytosol*_1_substrate___Irreversible(_PPP__PGL_merge_kcat, enz_PGL, G1_5L6P, _PPP__PGL_merge_Km); _PPP__PGL_merge is "(PPP) PGL";  // modifiers: enz_PGL
    _PPP__PGL_merge_kcat = 51480; _PPP__PGL_merge_Km = 0.00083;
  _PPP__TKT_SHL7P_merge: Ribose_5P + X_5P => SHL7P + G3_P; Cytosol*Ping_Pong_Bi_Bi_irreversible(_PPP__TKT_SHL7P_merge_kcat, enz_TKT, Ribose_5P, X_5P, _PPP__TKT_SHL7P_merge_KmB, _PPP__TKT_SHL7P_merge_KmA); _PPP__TKT_SHL7P_merge is "(PPP) TKT_SHL7P";  // modifiers: enz_TKT
    _PPP__TKT_SHL7P_merge_kcat = 203760; _PPP__TKT_SHL7P_merge_KmB = 2.6e-5; _PPP__TKT_SHL7P_merge_KmA = 2.6e-5;
  _PPP__TKT_F6_P_merge: X_5P + E_5P => F6_P + G3_P; Cytosol*Ping_Pong_Bi_Bi_irreversible(_PPP__TKT_F6_P_merge_kcat, enz_TKT, X_5P, E_5P, _PPP__TKT_F6_P_merge_KmB, _PPP__TKT_F6_P_merge_KmA); _PPP__TKT_F6_P_merge is "(PPP) TKT_F6-P";  // modifiers: enz_TKT
    _PPP__TKT_F6_P_merge_kcat = 610914; _PPP__TKT_F6_P_merge_KmB = 0.15; _PPP__TKT_F6_P_merge_KmA = 0.15;
  _GLY__ALDO_R_merge: 2 G3_P => F1_6_BP; Cytosol*_1_substrate___Irreversible(_GLY__ALDO_R_merge_kcat, enz_ALDO, G3_P, _GLY__ALDO_R_merge_Km); _GLY__ALDO_R_merge is "(GLY) ALDO_R";  // modifiers: enz_ALDO
    _GLY__ALDO_R_merge_kcat = 37020; _GLY__ALDO_R_merge_Km = 7.5e-5;
  _GLY__GAPDH_R_merge: _1_3_BPG + $NADH_S_Cytosol => G3_P + NAD_P_GAPDH; Cytosol*_1_substrate___Irreversible(_GLY__GAPDH_R_merge_kcat, enz_GAPDH, _1_3_BPG, _GLY__GAPDH_R_merge_Km); _GLY__GAPDH_R_merge is "(GLY) GAPDH_R";  // modifiers: enz_GAPDH
    _GLY__GAPDH_R_merge_kcat = 264816; _GLY__GAPDH_R_merge_Km = 3.6e-5;
  _GLU__FBP_merge: F1_6_BP => F6_P; Cytosol*_1_substrate___Irreversible(_GLU__FBP_merge_kcat, enz_FBP, F1_6_BP, _GLU__FBP_merge_Km); _GLU__FBP_merge is "(GLU) FBP";  // modifiers: enz_FBP
    _GLU__FBP_merge_kcat = 7488; _GLU__FBP_merge_Km = 2.1e-6;
  _TCA__ME_merge: Malate_Mitochondria => Pyruvate_Mitochondria; Mitochondria*_1_substrate___Irreversible(_TCA__ME_merge_kcat, enz_ME2, Malate_Mitochondria, _TCA__ME_merge_Km); _TCA__ME_merge is "(TCA) ME";  // modifiers: enz_ME2
    _TCA__ME_merge_kcat = 748440; _TCA__ME_merge_Km = 0.00309;
  _PPP__TAL_merge: SHL7P + G3_P => F6_P + E_5P; Cytosol*Ping_Pong_Bi_Bi_irreversible(_PPP__TAL_merge_kcat, enz_TAL, SHL7P, G3_P, _PPP__TAL_merge_KmB, _PPP__TAL_merge_KmA); _PPP__TAL_merge is "(PPP) TAL";  // modifiers: enz_TAL
    _PPP__TAL_merge_kcat = 4.88731e4; _PPP__TAL_merge_KmB = 0.004; _PPP__TAL_merge_KmA = 0.004;
  _GLY__GPI_R_merge: F6_P => G6_P; Cytosol*_1_substrate___Irreversible(_GLY__GPI_R_merge_kcat, enz_GPI, F6_P, _GLY__GPI_R_merge_Km); _GLY__GPI_R_merge is "(GLY) GPI_R";  // modifiers: enz_GPI
    _GLY__GPI_R_merge_kcat = 10008000; _GLY__GPI_R_merge_Km = 0.00262;
  _GLY__PGK_R_merge: _3_PG + $ATP_S_Cytosol => _1_3_BPG + ADP_P_PGK; Cytosol*_1_substrate___Irreversible(_GLY__PGK_R_merge_kcat, enz_PGK, _3_PG, _GLY__PGK_R_merge_Km); _GLY__PGK_R_merge is "(GLY) PGK_R";  // modifiers: enz_PGK
    _GLY__PGK_R_merge_kcat = 2160000; _GLY__PGK_R_merge_Km = 0.005;
  _Glutaminolysis__ASCT2_F_merge: $Glutamine_Cytosol => Glutamine_Mitochondria; Cytosol*_1_substrate___Irreversible(_Glutaminolysis__ASCT2_F_merge_kcat, enz_ASCT2, Glutamine_Cytosol, _Glutaminolysis__ASCT2_F_merge_Km); _Glutaminolysis__ASCT2_F_merge is "(Glutaminolysis) ASCT2_F";  // modifiers: enz_ASCT2
    _Glutaminolysis__ASCT2_F_merge_kcat = 108000; _Glutaminolysis__ASCT2_F_merge_Km = 0.0004;
  _TCA__SUCL_R_merge: Succinate + $ATP_S_Mitochondria => Succinyl_CoA + ADP_P_SUCL; Mitochondria*_1_substrate___Irreversible(_TCA__SUCL_R_merge_kcat, enz_SUCL, Succinate, _TCA__SUCL_R_merge_Km); _TCA__SUCL_R_merge is "(TCA) SUCL_R";  // modifiers: enz_SUCL
    _TCA__SUCL_R_merge_kcat = 255600; _TCA__SUCL_R_merge_Km = 0.0009;
  _MAS__GOT2_merge: OAA_Mitochondria + Glutamate_Mitochondria => Aspartate_Mitochondria + $a_KG_Mitochondria; Mitochondria*Ping_Pong_Bi_Bi_irreversible(_MAS__GOT2_merge_kcat, enz_GOT2, OAA_Mitochondria, Glutamate_Mitochondria, _MAS__GOT2_merge_KmB, _MAS__GOT2_merge_KmA); _MAS__GOT2_merge is "(MAS) GOT2";  // modifiers: enz_GOT2
    _MAS__GOT2_merge_kcat = 14400; _MAS__GOT2_merge_KmB = 0.00116; _MAS__GOT2_merge_KmA = 7e-5;
  _GLY__PGAM_R_merge: _2_PG => _3_PG; Cytosol*_1_substrate___Irreversible(_GLY__PGAM_R_merge_kcat, enz_PGAM, _2_PG, _GLY__PGAM_R_merge_Km); _GLY__PGAM_R_merge is "(GLY) PGAM_R";  // modifiers: enz_PGAM
    _GLY__PGAM_R_merge_kcat = 1440000; _GLY__PGAM_R_merge_Km = 0.00141;
  _GLY__ENO_R_merge: PEP => _2_PG; Cytosol*_1_substrate___Irreversible(_GLY__ENO_R_merge_kcat, enz_ENO1, PEP, _GLY__ENO_R_merge_Km); _GLY__ENO_R_merge is "(GLY) ENO_R";  // modifiers: enz_ENO1
    _GLY__ENO_R_merge_kcat = 198000; _GLY__ENO_R_merge_Km = 0.000102;
  _MAS__GOT1_merge: Aspartate_Cytosol + a_KG_Cytosol => OAA_Cytosol + Glutamate_Cytosol; Cytosol*Ping_Pong_Bi_Bi_irreversible(_MAS__GOT1_merge_kcat, enz_GOT1, Aspartate_Cytosol, a_KG_Cytosol, _MAS__GOT1_merge_KmB, _MAS__GOT1_merge_KmA); _MAS__GOT1_merge is "(MAS) GOT1";  // modifiers: enz_GOT1
    _MAS__GOT1_merge_kcat = 297360; _MAS__GOT1_merge_KmB = 0.0001; _MAS__GOT1_merge_KmA = 0.0025;
  _TCA__FH_R_merge: Malate_Mitochondria => Fumarate; Mitochondria*_1_substrate___Irreversible(_TCA__FH_R_merge_kcat, enz_FH, Malate_Mitochondria, _TCA__FH_R_merge_Km); _TCA__FH_R_merge is "(TCA) FH_R";  // modifiers: enz_FH
    _TCA__FH_R_merge_kcat = 1044000; _TCA__FH_R_merge_Km = 0.005;
  _TCA__SDH_R_merge: Fumarate + $FADH2_S => Succinate + FAD_P_SDH; Cytosol*_1_substrate___Irreversible(_TCA__SDH_R_merge_kcat, enz_SDH, Fumarate, _TCA__SDH_R_merge_Km); _TCA__SDH_R_merge is "(TCA) SDH_R";  // modifiers: enz_SDH
    _TCA__SDH_R_merge_kcat = 2368800; _TCA__SDH_R_merge_Km = 4.3e-5;
  _MAS__MDH1_merge: OAA_Cytosol + $NADH_S_Cytosol => Malate_Cytosol + NAD_P_MDH1; Cytosol*_1_substrate___Irreversible(_MAS__MDH1_merge_kcat, enz_MDH1, OAA_Cytosol, _MAS__MDH1_merge_Km); _MAS__MDH1_merge is "(MAS) MDH1";  // modifiers: enz_MDH1
    _MAS__MDH1_merge_kcat = 446.4; _MAS__MDH1_merge_Km = 0.0044;
  _MAS__M_aKG_Transport_merge: Malate_Cytosol + $a_KG_Mitochondria => Malate_Mitochondria + a_KG_Cytosol; Cytosol*Ping_Pong_Bi_Bi_irreversible(_MAS__M_aKG_Transport_merge_kcat, enz_SLC25A11, Malate_Cytosol, a_KG_Mitochondria, _MAS__M_aKG_Transport_merge_KmB, _MAS__M_aKG_Transport_merge_KmA); _MAS__M_aKG_Transport_merge is "(MAS) M-aKG Transport";  // modifiers: enz_SLC25A11
    _MAS__M_aKG_Transport_merge_kcat = 108000; _MAS__M_aKG_Transport_merge_KmB = 0.0005; _MAS__M_aKG_Transport_merge_KmA = 0.0005;
  _MAS__A_G_Transport_merge: Aspartate_Mitochondria + Glutamate_Cytosol => Aspartate_Cytosol + Glutamate_Mitochondria; Mitochondria*Ping_Pong_Bi_Bi_irreversible(_MAS__A_G_Transport_merge_kcat, enz_SLC1A3, Aspartate_Mitochondria, Glutamate_Cytosol, _MAS__A_G_Transport_merge_KmB, _MAS__A_G_Transport_merge_KmA); _MAS__A_G_Transport_merge is "(MAS) A-G Transport";  // modifiers: enz_SLC1A3
    _MAS__A_G_Transport_merge_kcat = 108000; _MAS__A_G_Transport_merge_KmB = 0.0005; _MAS__A_G_Transport_merge_KmA = 0.0005;
  _Glutaminolysis__GLS_F_merge: Glutamine_Mitochondria => Glutamate_Mitochondria; Cytosol*_1_substrate___Irreversible(_Glutaminolysis__GLS_F_merge_kcat, enz_GLS, Glutamine_Mitochondria, _Glutaminolysis__GLS_F_merge_Km); _Glutaminolysis__GLS_F_merge is "(Glutaminolysis) GLS_F";  // modifiers: enz_GLS
    _Glutaminolysis__GLS_F_merge_kcat = 72000; _Glutaminolysis__GLS_F_merge_Km = 0.0004;
  _Glutaminolysis__GLS_R_merge: Glutamate_Mitochondria => Glutamine_Mitochondria; Cytosol*_1_substrate___Irreversible(_Glutaminolysis__GLS_R_merge_kcat, enz_GLS, Glutamate_Mitochondria, _Glutaminolysis__GLS_R_merge_Km); _Glutaminolysis__GLS_R_merge is "(Glutaminolysis) GLS_R";  // modifiers: enz_GLS
    _Glutaminolysis__GLS_R_merge_kcat = 72000; _Glutaminolysis__GLS_R_merge_Km = 0.0004;
  _Glutaminolysis__GLUD_R_merge: $a_KG_Mitochondria + $NADH_S_Mitochondria => Glutamate_Mitochondria + NAD_P_GLUD; Mitochondria*_1_substrate___Irreversible(_Glutaminolysis__GLUD_R_merge_kcat, enz_GLUD, a_KG_Mitochondria, _Glutaminolysis__GLUD_R_merge_Km); _Glutaminolysis__GLUD_R_merge is "(Glutaminolysis) GLUD_R";  // modifiers: enz_GLUD
    _Glutaminolysis__GLUD_R_merge_kcat = 374400; _Glutaminolysis__GLUD_R_merge_Km = 0.00674;
  _Glutaminolysis__GLUD_F_merge: Glutamate_Mitochondria + $NAD_S_Mitochondria => $a_KG_Mitochondria + NADH_P_GLUD; Mitochondria*Ping_Pong_Bi_Bi_irreversible(_Glutaminolysis__GLUD_F_merge_kcat, enz_GLUD, Glutamate_Mitochondria, NAD_S_Mitochondria, _Glutaminolysis__GLUD_F_merge_KmB, _Glutaminolysis__GLUD_F_merge_KmA); _Glutaminolysis__GLUD_F_merge is "(Glutaminolysis) GLUD_F";  // modifiers: enz_GLUD
    _Glutaminolysis__GLUD_F_merge_kcat = 2.34e11; _Glutaminolysis__GLUD_F_merge_KmB = 1; _Glutaminolysis__GLUD_F_merge_KmA = 3000;
  _OXPHOS__II_IV_merge: 6 H_Mitochondria + $FADH2_S_OXPHOS => 6 H_Intermembrane + FAD_P_OXPHOS; Mitochondria*_1_substrate___Irreversible__oxphos(_OXPHOS__II_IV_merge_kcat, enz_ComplexII, FADH2_S_OXPHOS, _OXPHOS__II_IV_merge_Km, H_Mitochondria, _OXPHOS__II_IV_merge_Km2); _OXPHOS__II_IV_merge is "(OXPHOS) II-IV";  // modifiers: enz_ComplexII
    _OXPHOS__II_IV_merge_kcat = 700; _OXPHOS__II_IV_merge_Km = 4.3e-5; _OXPHOS__II_IV_merge_Km2 = 1e-8;
  _OXPHOS__H_pool_merge: -> H_Mitochondria; Mitochondria*Pool_reaction(_OXPHOS__H_pool_merge_Vf, H_Mitochondria, _OXPHOS__H_pool_merge_Vr); _OXPHOS__H_pool_merge is "(OXPHOS) H pool";
    _OXPHOS__H_pool_merge_Vf = 1; _OXPHOS__H_pool_merge_Vr = 1000;
  _Glutaminolysis__ME_merge: Malate_Cytosol => Pyruvate_Cytosol; Mitochondria*_1_substrate___Irreversible(_Glutaminolysis__ME_merge_kcat, enz_ME1, Malate_Cytosol, _Glutaminolysis__ME_merge_Km); _Glutaminolysis__ME_merge is "(Glutaminolysis) ME";  // modifiers: enz_ME1
    _Glutaminolysis__ME_merge_kcat = 748440; _Glutaminolysis__ME_merge_Km = 0.00309;
  _TCA__PC_merge: Pyruvate_Mitochondria + $ATP_S_Mitochondria => OAA_Mitochondria + ADP_P_PC; Mitochondria*_1_substrate___Irreversible(_TCA__PC_merge_kcat, enz_PC, Pyruvate_Mitochondria, _TCA__PC_merge_Km); _TCA__PC_merge is "(TCA) PC";  // modifiers: enz_PC
    _TCA__PC_merge_kcat = 214200; _TCA__PC_merge_Km = 0.0005;
  _GLY__GLUT_R_merge: Glucose_Cytosol => $Glucose_Extracellular; Cytosol*_1_substrate___Irreversible(_GLY__GLUT_R_merge_kcat, enz_GLUT, Glucose_Cytosol, _GLY__GLUT_R_merge_Km); _GLY__GLUT_R_merge is "(GLY) GLUT_R";  // modifiers: enz_GLUT
    _GLY__GLUT_R_merge_kcat = 543600; _GLY__GLUT_R_merge_Km = 0.002;
  _Glutaminolysis__ASCT2_R_merge: Glutamine_Mitochondria => $Glutamine_Cytosol; Cytosol*_1_substrate___Irreversible(_Glutaminolysis__ASCT2_R_merge_kcat, enz_ASCT2, Glutamine_Mitochondria, _Glutaminolysis__ASCT2_R_merge_Km); _Glutaminolysis__ASCT2_R_merge is "(Glutaminolysis) ASCT2_R";  // modifiers: enz_ASCT2
    _Glutaminolysis__ASCT2_R_merge_kcat = 108000; _Glutaminolysis__ASCT2_R_merge_Km = 0.0004;
  _FAO__FATP_R_merge: FA_Cytosol => $FA_Extracellular; Cytosol*_1_substrate___Irreversible(_FAO__FATP_R_merge_kcat, enz_SLC27A1, FA_Cytosol, _FAO__FATP_R_merge_Km); _FAO__FATP_R_merge is "(FAO) FATP_R";  // modifiers: enz_SLC27A1
    _FAO__FATP_R_merge_kcat = 108000; _FAO__FATP_R_merge_Km = 9.45e-5;
  _OXPHOS__I_IV_merge: $NADH_S_OXPHOS + 10 H_Mitochondria => 10 H_Intermembrane + NAD_P_OXPHOS; Mitochondria*_1_substrate___Irreversible__oxphos(_OXPHOS__I_IV_merge_kcat, enz_ComplexI, NADH_S_OXPHOS, _OXPHOS__I_IV_merge_Km, H_Mitochondria, _OXPHOS__I_IV_merge_Km2); _OXPHOS__I_IV_merge is "(OXPHOS) I-IV";  // modifiers: enz_ComplexI
    _OXPHOS__I_IV_merge_kcat = 700; _OXPHOS__I_IV_merge_Km = 9e-6; _OXPHOS__I_IV_merge_Km2 = 1e-8;
  _OXPHOS__V_merge: 4 H_Intermembrane + $ADP_S_Mitochondria -> 4 H_Mitochondria + ATP_P_OXPHOS; Intermembrane*OXPHOS_fixed(H_Intermembrane, H_Intermembrane, H_Intermembrane, H_Mitochondria, H_Mitochondria, H_Mitochondria, enz_ATPase, _OXPHOS__V_merge_kcat, _OXPHOS__V_merge_Vf, H_Intermembrane, ADP_S_Mitochondria, Km1, _OXPHOS__V_merge_Vr, H_Mitochondria, ATP_P_OXPHOS, _OXPHOS__V_merge_Km2); _OXPHOS__V_merge is "(OXPHOS) V";  // modifiers: enz_ATPase
    _OXPHOS__V_merge_kcat = 5000; _OXPHOS__V_merge_Vf = 10; Km1 = 1e-7; _OXPHOS__V_merge_Vr = 1; _OXPHOS__V_merge_Km2 = 1e-7;
  _GLY__MCT_merge: Lactate_Cytosol => Lactate_Extracellular + Lactate_exported; Cytosol*_1_substrate___Irreversible(_GLY__MCT_merge_kcat, enz_MCT, Lactate_Cytosol, _GLY__MCT_merge_Km); _GLY__MCT_merge is "(GLY) MCT4";  // modifiers: enz_MCT
    _GLY__MCT_merge_kcat = 8820; _GLY__MCT_merge_Km = 0.0007;
  _IM__NADPH_G6PD_deg: NADPH_P_G6PD => ; Cytosol*_IM__NADPH_G6PD_deg_k1*NADPH_P_G6PD; _IM__NADPH_G6PD_deg is "(IM) NADPH_G6PD_deg";
    _IM__NADPH_G6PD_deg_k1 = 0.1;
  _IM__NADPH_P6D_deg: NADPH_P_PGD => ; Cytosol*_IM__NADPH_P6D_deg_k1*NADPH_P_PGD; _IM__NADPH_P6D_deg is "(IM) NADPH_P6D_deg";
    _IM__NADPH_P6D_deg_k1 = 0.1;
  _FAS__SLC25A1_F: Citrate_Mitochondria => Citrate_Cytosol; Mitochondria*_1_substrate___Irreversible(_FAS__SLC25A1_F_kcat, enz_SLC25A1, Citrate_Mitochondria, _FAS__SLC25A1_F_Km); _FAS__SLC25A1_F is "(FAS) SLC25A1_F";  // modifiers: enz_SLC25A1
    _FAS__SLC25A1_F_kcat = 4897.25; _FAS__SLC25A1_F_Km = 3.65646e-6;
  _FAS__ACLY_F: Citrate_Cytosol => Acetyl_CoA_Cytosol + OAA_Cytosol; Cytosol*_1_substrate___Irreversible(_FAS__ACLY_F_kcat, enz_ACLY, Citrate_Cytosol, _FAS__ACLY_F_Km); _FAS__ACLY_F is "(FAS) ACLY_F";  // modifiers: enz_ACLY
    _FAS__ACLY_F_kcat = 1771.2; _FAS__ACLY_F_Km = 1.1e-5;
  _FAS__ACACA: Acetyl_CoA_Cytosol => Malonyl_CoA; Cytosol*_1_substrate___Irreversible(_FAS__ACACA_kcat, enz_ACACA, Acetyl_CoA_Cytosol, _FAS__ACACA_Km); _FAS__ACACA is "(FAS) ACACA";  // modifiers: enz_ACACA
    _FAS__ACACA_kcat = 6459.29; _FAS__ACACA_Km = 0.000173551;
  _FAS__FASN: Malonyl_CoA => Palmitoyl_CoA; Cytosol*_1_substrate___Irreversible(_FAS__FASN_kcat, enz_FASN, Malonyl_CoA, _FAS__FASN_Km); _FAS__FASN is "(FAS) FASN";  // modifiers: enz_FASN
    _FAS__FASN_kcat = 36.4; _FAS__FASN_Km = 2.6e-5;
  _FAS__ACLY_R: Acetyl_CoA_Cytosol + OAA_Cytosol => Citrate_Cytosol; Cytosol*sequential_bi_bi(_FAS__ACLY_R_kcat, enz_ACLY, Acetyl_CoA_Cytosol, OAA_Cytosol, kia, _FAS__ACLY_R_KmB, _FAS__ACLY_R_KmA); _FAS__ACLY_R is "(FAS) ACLY_R";  // modifiers: enz_ACLY
    _FAS__ACLY_R_kcat = 108; kia = 0.14; _FAS__ACLY_R_KmB = 1.3e-6; _FAS__ACLY_R_KmA = 0.0255;
  _FAS__SLC25A1_R: Citrate_Cytosol => Citrate_Mitochondria; Mitochondria*_1_substrate___Irreversible(_FAS__SLC25A1_R_kcat, enz_SLC25A1, Citrate_Cytosol, _FAS__SLC25A1_R_Km); _FAS__SLC25A1_R is "(FAS) SLC25A1_R";  // modifiers: enz_SLC25A1
    _FAS__SLC25A1_R_kcat = 1931.76; _FAS__SLC25A1_R_Km = 7.5e-6;
  _AL__PDK_activation: Acetyl_CoA_Mitochondria + $enz_PDK -> enz_PDK_A; Mitochondria*Mass_Action_2_Substrate__reversible(_AL__PDK_activation_k1, _AL__PDK_activation_k2, enz_PDK_A, Acetyl_CoA_Mitochondria, enz_PDK); _AL__PDK_activation is "(AL) PDK activation";
    _AL__PDK_activation_k1 = 3.6e11; _AL__PDK_activation_k2 = 7000000;
  _AL__PC_activation: Acetyl_CoA_Mitochondria + $enz_PC -> enz_PC_A; Mitochondria*Mass_Action_2_Substrate__reversible(_AL__PC_activation_k1, _AL__PC_activation_k2, enz_PC_A, Acetyl_CoA_Mitochondria, enz_PC); _AL__PC_activation is "(AL) PC activation";
    _AL__PC_activation_k1 = 3.6e11; _AL__PC_activation_k2 = 600000000;
  _TCA__PC_A: Pyruvate_Mitochondria + $ATP_S_Mitochondria => OAA_Mitochondria + ADP_P_PC; Mitochondria*_1_substrate___Irreversible(_TCA__PC_A_kcat, enz_PC_A, Pyruvate_Mitochondria, _TCA__PC_A_Km); _TCA__PC_A is "(TCA) PC-A";  // modifiers: enz_PC_A
    _TCA__PC_A_kcat = 2112610; _TCA__PC_A_Km = 0.0005;
  _AL__CACT_inhibition: Malonyl_CoA + $enz_CACT -> $enz_CACT_M; Cytosol*Mass_Action_2_Substrate__reversible(_AL__CACT_inhibition_k1, _AL__CACT_inhibition_k2, enz_CACT_M, Malonyl_CoA, enz_CACT); _AL__CACT_inhibition is "(AL) CACT inhibition";
    _AL__CACT_inhibition_k1 = 3.6e11; _AL__CACT_inhibition_k2 = 10;
  PDH_phosphorylation_A: $enz_PDH -> PDH_P; Mitochondria*Enzyme_Phosphorylation(PDH_phosphorylation_A_Vf, enz_PDH, enz_PDK_A, PDH_phosphorylation_A_n1, PDH_phosphorylation_A_ka1, PDH_phosphorylation_A_Vr, PDH_P); PDH_phosphorylation_A is "PDH phosphorylation-A";  // modifiers: enz_PDK_A
    PDH_phosphorylation_A_Vf = 986.279; PDH_phosphorylation_A_n1 = 1.53858; PDH_phosphorylation_A_ka1 = 5.06956e-7; PDH_phosphorylation_A_Vr = 0.986279;
  _GLY__MCT1: Lactate_Extracellular + Lactate_exported => Lactate_Cytosol; Cytosol*_1_substrate___Irreversible(_GLY__MCT1_kcat, enz_MCT1, Lactate_Extracellular, _GLY__MCT1_Km); _GLY__MCT1 is "(GLY) MCT1";  // modifiers: enz_MCT1
    _GLY__MCT1_kcat = 183600; _GLY__MCT1_Km = 0.00454;
  _GLU__PEPCK_M: OAA_Mitochondria => PEP_Mitochondria; Mitochondria*_1_substrate___Irreversible(_GLU__PEPCK_M_kcat, enz_PCK2, OAA_Mitochondria, _GLU__PEPCK_M_Km); _GLU__PEPCK_M is "(GLU) PEPCK_M";  // modifiers: enz_PCK2
    _GLU__PEPCK_M_kcat = 133200; _GLU__PEPCK_M_Km = 1.2e-5;

  // Unit definitions:
  unit length = metre;
  unit area = metre^2;
  unit volume = litre;
  unit time = 3600 second;
  unit substance = mole;
  unit unit_0 = mole / litre; unit_0 is "mol/l";
end
