// SBML level 2 version 4
// dcterms:bibliographicCitation: Immunotherapy with interleukin-2: A study based on mathematical modeling urn:miriam:doi:10.2478/v10006-008-0035-6

function Function_for_formation_of_effector_cell(c, y, p1, x, z, g1, s1)
  c*y + p1*x*z/(g1 + z) + s1;
end

function Function_for_removal_of_tumor_cell_by_the_action_of_effector_cell_and_interleukin(a, x, y, g2)
  a*x*y/(g2 + y);
end

function Function_for_dissociation_of_effector_cell_from_tumor_surrounding(mu_2, x)
  mu_2*x;
end

function Function_for_induction_of_tumor_cell(r2, b, y)
  r2*(1 - b*y)*y;
end

function Function_for_increase_in_the_concentration_of_interleukin_at_the_site_of_tumor(p2, x, y, g3, s2)
  p2*x*y/(g3 + y) + s2;
end

function Function_for_removal_of_interleukin_production(mu_3, z)
  mu_3*z;
end

model New_Model()
  // Banerjee2008 - Immunotherapy with interleukin-2: A study based on mathematical modeling
  // IMMUNOTHERAPY WITH INTERLEUKIN-2: A STUDY BASED ON
  // MATHEMATICAL MODELING
  // S ANDIP B ANERJEE
  // Indian Institute of Technology and Science Rooorkee (IITR)
  // Roorkee 247667, Uttarakhand, India
  // e-mail: sandofma@iitr.ernet.in
  // The role of interleukin-2 (IL-2) in tumor dynamics is illustrated through mathematical modeling, using delay differential
  // equations with a discrete time delay (a modified version of the Kirshner-Panetta model). Theoretical analysis gives an
  // expression for the discrete time delay and the length of the time delay to preserve stability. Numerical analysis shows that
  // interleukin-2 alone can cause the tumor cell population to regress.
  // Keywords: effector cells, tumor cells, interleukin-2, discrete time delay.
  // isDerivedFrom mamo:MAMO_0000047 taxonomy:9606 biomodels.db:BIOMD0000000732
  // isDescribedBy biomodels.db:BIOMD0000000732 doi:10.2478/v10006-008-0035-6
  // hasTaxon taxonomy:9606
  // hasProperty mamo:MAMO_0000089

  // Compartments:
  compartment compartment = 1;

  // Species:
  species x in compartment = 0;
  species y in compartment = 0.05;
  species z in compartment = 0.005;

  // Parameters:
  c = 0.0056;
  s1 = 0;
  s2 = 0.05;
  p1 = 0.69167;
  g1 = 0.02;
  mu_2 = 0.1667;
  r2 = 1;
  b = 1;
  a = 5.5556;
  g2 = 0.0001;
  mu_3 = 55.556;
  p2 = 27.778;
  g3 = 1e-6;

  // Reactions:
  Formartion_of_effector_cell: => x; compartment*Function_for_formation_of_effector_cell(c, y, p1, x, z, g1, s1);  // modifiers: y, z
  Induction_for_the_formation_of_tumor_cell: => y; compartment*Function_for_induction_of_tumor_cell(r2, b, y);
  Removal_of_tumor_cell_by_the_action_of_effector_cell_and_interleukin: y => ; compartment*Function_for_removal_of_tumor_cell_by_the_action_of_effector_cell_and_interleukin(a, x, y, g2);  // modifiers: x
  Increase_in_the_concentration_of_IL_2_at_the_site_of_tumor: => z; compartment*Function_for_increase_in_the_concentration_of_interleukin_at_the_site_of_tumor(p2, x, y, g3, s2); Increase_in_the_concentration_of_IL_2_at_the_site_of_tumor is "Increase in the concentration of IL-2 at the site of tumor";  // modifiers: x, y
  Removal_of_the_interleukin_production: z => ; compartment*Function_for_removal_of_interleukin_production(mu_3, z);
  Dissociation_of_effector_celln_from_tumor_surrounding: x => ; compartment*Function_for_dissociation_of_effector_cell_from_tumor_surrounding(mu_2, x);

  // Unit definitions:
  unit volume = 1e-3 litre;
  unit time = 86400 second;
  unit substance = 1e-3 mole;
end
