// SBML level 2 version 4
// dcterms:bibliographicCitation: A mathematical model to elucidate brain tumor abrogation by immunotherapy with T11 target structure. urn:miriam:pubmed:25955428

function Function_for_Eradication_of_glioma_cell(e_1, alpha_1, M, alpha_2, CT, G, k_1, TB)
  1/(TB + e_1)*(alpha_1*M + alpha_2*CT)*(G/(G + k_1));
end

function Function_for_removal_of_Macrophage(alpha_3, G, k_2, M)
  alpha_3*(G/(G + k_2))*M;
end

function Function_for_formation_of_glioma_cell(r_1, G, G_max)
  r_1*G*(1 - G/G_max);
end

function Function_for_Production_of_CD8__T_cell(a_2, G, k_5, TB)
  a_2*G/(k_5 + TB);
end
Function_for_Production_of_CD8__T_cell is "Function for Production of CD8+ T cell";

function Function_for_Production_of_macrophage_cell(r_2, M, M_max, a_1, IG, k_4, e_2, TB)
  r_2*M*(1 - M/M_max) + a_1*(IG/(k_4 + IG))*(1/(TB + e_2));
end

function Function_for_removal_of_cytokine_INF_gamma(mu_3, IG)
  mu_3*IG;
end
Function_for_removal_of_cytokine_INF_gamma is "Function for removal of cytokine INF-gamma";

function Function_for_Cytokine_INF_gamma_production(b2, CT)
  b2*CT;
end
Function_for_Cytokine_INF_gamma_production is "Function for Cytokine INF-gamma production";

function Function_for_Cytokine_TGF_B_production(s_1, b_1, G)
  s_1 + b_1*G;
end
Function_for_Cytokine_TGF_B_production is "Function for Cytokine TGF-B production";

function Function_for_Removal_of_CD8__T_cell(mu_1, CT, alpha_4, G, k_3)
  mu_1*CT + alpha_4*(G/(G + k_3))*CT;
end
Function_for_Removal_of_CD8__T_cell is "Function for Removal of CD8+ T cell";

function Function_for_Cytokine_TGF_beta_removal(mu_2, TB)
  mu_2*TB;
end
Function_for_Cytokine_TGF_beta_removal is "Function for Cytokine TGF-beta removal";

model New_Model()
  // Banerjee2015 - A Mathematical Model to Elucidate BrainTumor Abrogation by Immunotherapywith T11 Target Structure
  // T11 Target structure (T11TS), a membrane glycoprotein isolated from sheep erythrocytes, reverses the immune suppressed state of brain tumor induced animals by boosting the functional status of the immune cells. This study aims at aiding in the design of more efficacious brain tumor therapies with T11 target structure. We propose a mathematical model for brain tumor (glioma) and the immune system interactions, which aims in designing efficacious brain tumor therapy. The model encompasses considerations of the interactive dynamics of glioma cells, macrophages, cytotoxic T-lymphocytes (CD8(+) T-cells), TGF-β, IFN-γ and the T11TS. The system undergoes sensitivity analysis, that determines which state variables are sensitive to the given parameters and the parameters are estimated from the published data. Computer simulations were used for model verification and validation, which highlight the importance of T11 target structure in brain tumor therapy.
  // isDescribedBy pubmed:25955428

  // Compartments:
  compartment compartment = 1;

  // Species:
  species G in compartment = 857419;
  species M in compartment = 943092;
  species CT in compartment = 303.397;
  species TB in compartment = 9134.33;
  species IG in compartment = 0.303397;

  // Parameters:
  r_1 = 0.01;
  G_max = 882650;
  e_1 = 10000;
  alpha_1 = 1.5;
  alpha_2 = 0.12;
  k_1 = 27000;
  r_2 = 0.3307;
  M_max = 1000000;
  a_1 = 0.1163;
  k_4 = 10500;
  e_2 = 10000;
  alpha_3 = 0.0194;
  k_2 = 27000;
  a_2 = 0;
  k_5 = 2000;
  mu_1 = 0.0074;
  alpha_4 = 0.1694;
  k_3 = 334452;
  s_1 = 63305;
  b_1 = 5.7e-6;
  mu_2 = 6.93;
  b_2 = 0.000102;
  mu_3 = 0.102;

  // Reactions:
  Formation_of_glioma_cell: => G; compartment*Function_for_formation_of_glioma_cell(r_1, G, G_max);
  Eradication_of_glioma_cell: G => ; compartment*Function_for_Eradication_of_glioma_cell(e_1, alpha_1, M, alpha_2, CT, G, k_1, TB);  // modifiers: M, CT, TB
  Production_of_macrophage_cell: => M; compartment*Function_for_Production_of_macrophage_cell(r_2, M, M_max, a_1, IG, k_4, e_2, TB);  // modifiers: IG, TB
  Removal_of_macrophage_cell: M => ; compartment*Function_for_removal_of_Macrophage(alpha_3, G, k_2, M);  // modifiers: G
  Production_of_CD8__T_cell: => CT; compartment*Function_for_Production_of_CD8__T_cell(a_2, G, k_5, TB); Production_of_CD8__T_cell is "Production of CD8+ T cell";  // modifiers: G, TB
  Removal_of_CD8__T_cell: CT => ; compartment*Function_for_Removal_of_CD8__T_cell(mu_1, CT, alpha_4, G, k_3); Removal_of_CD8__T_cell is "Removal of CD8+ T cell";  // modifiers: G
  Cytokine_TGF_B_production: => TB; compartment*Function_for_Cytokine_TGF_B_production(s_1, b_1, G); Cytokine_TGF_B_production is "Cytokine TGF-B production";  // modifiers: G
  Cytokine_TGF_beta_removal: TB => ; compartment*Function_for_Cytokine_TGF_beta_removal(mu_2, TB); Cytokine_TGF_beta_removal is "Cytokine TGF-beta removal";
  Cytokine_INF_gamma_production: => IG; compartment*Function_for_Cytokine_INF_gamma_production(b_2, CT); Cytokine_INF_gamma_production is "Cytokine INF-gamma production";  // modifiers: CT
  Removal_of_cytokine_INF_gamma: IG => ; compartment*Function_for_removal_of_cytokine_INF_gamma(mu_3, IG); Removal_of_cytokine_INF_gamma is "Removal of cytokine INF-gamma";

  // Unit definitions:
  unit volume = 1e-3 litre;
  unit time = 86400 second;
  unit substance = 1e-3 mole;
end
