// SBML level 2 version 4

function Constant_flux__irreversible(v)
  v;
end
Constant_flux__irreversible is "Constant flux (irreversible)";

function Function_for_TH_Activation(gamma_40, APC)
  gamma_40*APC;
end

function Function_for_TH_Stimulation_IL12(alpha, IL, s, TH)
  alpha*(IL/(IL + s))*TH;
end

function Function_for_TC_Priming(gamma_91, VC)
  gamma_91*VC;
end

function Function_for_TC_Stimulation_IL2(alpha_96, IL2, s_96, TC)
  alpha_96*(IL2/(IL2 + s_96))*TC;
end

function Function_for_IL12_Release_VC(gamma_51, alpha_19, TC, alpha_17, AB, mu_1, VC)
  gamma_51*(alpha_19*TC + alpha_17*AB + mu_1)*VC;
end

function Function_for_TAA_Phagocytosis_APC(alpha_20, APC, TAA)
  alpha_20*APC*TAA;
end

function Function_for_IL2_Release_TH(gamma_64, TH)
  gamma_64*TH;
end

function Function_for_IL2_Absorption_B(alpha_63, B, IL2)
  alpha_63*B*IL2;
end

function Function_for_AB_Release_B(gamma_73, B)
  gamma_73*B;
end

function Function_for_CC_Growth(CC, c_max, k, alpha_88)
  ((1 - CC/c_max)*k - alpha_88)*CC;
end

function Function_for_TAA_Release_CC(gamma_28, alpha_88, alpha_89, TC, alpha_87, AB, CC)
  gamma_28*(alpha_88 + alpha_89*TC + alpha_87*AB)*CC;
end

function Function_for_IL12_Absorption_TC(alpha_59, TC, IL12)
  alpha_59*TC*IL12;
end

function Function_for_CC_Death_TC(alpha_89, TC, CC)
  alpha_89*TC*CC;
end

function Function_for_IL12_Absorption_TH(alpha_54, TH, IL12)
  alpha_54*TH*IL12;
end

function Function_for_AB_Binding(alpha, AB, mod)
  alpha*AB*mod;
end

function Function_for_TAA_Release_VC(gamma_21, alpha_19, TC, alpha_17, AB, mu_1, VC)
  gamma_21*(alpha_19*TC + alpha_17*AB + mu_1)*VC;
end

function Function_for_VC_CTC_Inhibition(alpha_19, TC, VC)
  alpha_19*TC*VC;
end

function Function_for_IL2_Absorption_TC(alpha_69, TC, IL2)
  alpha_69*TC*IL2;
end

function Function_for_CC_Death_AB(alpha_87, AB, CC)
  alpha_87*AB*CC;
end

function Function_for_VC_Injection(q, trigger1, trigger2, trigger3, trigger4)
  q*(trigger1 - trigger2 + trigger3 - trigger4);
end

function Function_for_APC_Formation(gamma_02, TAA)
  gamma_02*TAA;
end

model New_Model()
  // Bianca2012 - Mathematical modeling of the immune system recognition to mammary carcinoma antigen
  // This model describes the humoral and cellular response of the immune system to a tumor associate antigen and the recognition process between B cells, T cells and antigen presenting cells. The model is used to analyze and investigate the competition between immune system cells and mammary carcinoma cells under the action of a vaccine.

  // Compartments:
  compartment compartment = 0.001;

  // Species:
  species VC in compartment = 0;
  species TAA in compartment = 0;
  species B in compartment = 0;
  species TH in compartment = 0;
  species IL12 in compartment = 0;
  species IL2 in compartment = 0;
  species AB in compartment = 0;
  species CC in compartment = 0;
  species TC in compartment = 0;
  species APC in compartment = 0;
  species TA in compartment = 0;

  // Parameters:
  mu_1 = 0.693147;
  alpha_19 = 0.001;
  alpha_17 = 0.001;
  q = 0;
  gamma_21 = 3;
  gamma_28 = 3;
  mu_2 = 0.693147;
  alpha_20 = 0.0005;
  alpha_27 = 1e-5;
  gamma_34 = 0.05;
  alpha_36 = 0.0035;
  s_3 = 400;
  mu_3 = 0.693147;
  gamma_40 = 0.15;
  alpha_46 = 0.009;
  s_1 = 1000;
  alpha_45 = 0.009;
  s_2 = 1000;
  mu_4 = 0.693147;
  gamma_51 = 10;
  alpha_54 = 9e-5;
  alpha_59 = 0.001;
  mu_5 = 0.693147;
  gamma_64 = 5;
  alpha_63 = 0.0001;
  alpha_69 = 0.0001;
  mu_6 = 0.693147;
  gamma_73 = 3;
  alpha_78 = 0.0001;
  alpha_71 = 0.001;
  alpha_72 = 0.001;
  mu_7 = 0.693147;
  c_max = 10000000;
  k = 0.0226;
  p = 3;
  alpha_88 = 1.176e-7;
  alpha_89 = 4e-5;
  alpha_87 = 4e-5;
  gamma_91 = 0.2;
  alpha_96 = 0.05;
  s_96 = 400;
  mu_9 = 0.693147;
  gamma_02 = 0.07;
  mu_0 = 0.0462098;
  TriggerIO_1_1 = 0;
  startTime = 42;
  TriggerIO_1_2 = 0;
  TriggerIO_2_1 = 0;
  TriggerIO_2_2 = 0;
  Initial_for_startTime = startTime;

  // Reactions:
  VC_Natural_Death: VC => ; compartment*mu_1*VC;
  VC_CTC_Inhibition: VC => ; compartment*Function_for_VC_CTC_Inhibition(alpha_19, TC, VC);  // modifiers: TC
  VC_Killing_Antibodies: VC => ; compartment*Function_for_VC_CTC_Inhibition(alpha_17, AB, VC);  // modifiers: AB
  TAA_Release_VC: => TAA; compartment*Function_for_TAA_Release_VC(gamma_21, alpha_19, TC, alpha_17, AB, mu_1, VC);  // modifiers: TC, AB, VC
  TAA_Release_CC: => TAA; compartment*Function_for_TAA_Release_CC(gamma_28, alpha_88, alpha_89, TC, alpha_87, AB, CC);  // modifiers: TC, AB, CC
  TAA_Natural_Degradation: TAA => ; compartment*mu_2*TAA;
  TAA_Phagocytosis_APC: TAA => ; compartment*Function_for_TAA_Phagocytosis_APC(alpha_20, APC, TAA);  // modifiers: APC
  TAA_Elimination_AB: TAA => ; compartment*Function_for_TAA_Phagocytosis_APC(alpha_27, APC, TAA);  // modifiers: APC
  TH_Activation: => TH; compartment*Function_for_TH_Activation(gamma_40, APC);  // modifiers: APC
  TH_Stimulation_IL12: => TH; compartment*Function_for_TH_Stimulation_IL12(alpha_45, IL12, s_2, TH);  // modifiers: IL12
  TH_Stimulation_IL2: => TH; compartment*Function_for_TH_Stimulation_IL12(alpha_46, IL2, s_1, TH);  // modifiers: IL2
  TH_Death: TH => ; compartment*mu_4*TH;
  B_Activation_TH: => B; compartment*Function_for_TH_Activation(gamma_34, TH);  // modifiers: TH
  B_Simulation_IL2: => B; compartment*Function_for_TH_Stimulation_IL12(alpha_36, IL2, s_3, B);  // modifiers: IL2
  B_Death: B => ; compartment*mu_3*B;
  IL12_Release_VC: IL12 => ; compartment*Function_for_IL12_Release_VC(gamma_51, alpha_19, TC, alpha_17, AB, mu_1, VC);  // modifiers: TC, AB, VC
  IL12_Degradation: IL12 => ; compartment*mu_6*IL12;
  IL12_Absorption_TC: IL12 => ; compartment*Function_for_IL12_Absorption_TC(alpha_59, TC, IL12);  // modifiers: TC
  IL12_Absorption_TH: IL12 => ; compartment*Function_for_IL12_Absorption_TH(alpha_54, TH, IL12);  // modifiers: TH
  IL2_Release_TH: => IL2; compartment*Function_for_IL2_Release_TH(gamma_64, TH);  // modifiers: TH
  IL2_Degradation: IL2 => ; compartment*mu_6*IL2;
  IL2_Absorption_TC: IL2 => ; compartment*Function_for_IL2_Absorption_TC(alpha_69, TC, IL2);  // modifiers: TC
  IL2_Absorption_B: IL2 => ; compartment*Function_for_IL2_Absorption_B(alpha_63, B, IL2);  // modifiers: B
  AB_Release_B: => AB; compartment*Function_for_AB_Release_B(gamma_73, B);  // modifiers: B
  AB_Degradation: AB => ; compartment*mu_7*AB;
  AB_Binding_TAA: AB => ; compartment*Function_for_AB_Binding(alpha_72, AB, TAA);  // modifiers: TAA
  AB_Binding_VC: AB => ; compartment*Function_for_AB_Binding(alpha_71, AB, VC);  // modifiers: VC
  AB_Binding_CC: AB => ; compartment*Function_for_AB_Binding(alpha_78, AB, CC);  // modifiers: CC
  CC_Growth: => CC; compartment*Function_for_CC_Growth(CC, c_max, k, alpha_88);
  CC_Production: => CC; compartment*Constant_flux__irreversible(p);
  CC_Death_AB: CC => ; compartment*Function_for_CC_Death_AB(alpha_87, AB, CC);  // modifiers: AB
  CC_Death_TC: CC => ; compartment*Function_for_CC_Death_TC(alpha_89, TC, CC);  // modifiers: TC
  TC_Priming: => TC; compartment*Function_for_TC_Priming(gamma_91, VC);  // modifiers: VC
  TC_Stimulation_IL2: => TC; compartment*Function_for_TC_Stimulation_IL2(alpha_96, IL2, s_96, TC);  // modifiers: IL2
  TC_Natural_Death: TC => ; compartment*mu_9*TC;
  APC_Formation: => APC; compartment*Function_for_APC_Formation(gamma_02, TAA);  // modifiers: TAA
  APC_Death: APC => ; compartment*mu_0*APC;
  VC_Injection: => VC; compartment*Function_for_VC_Injection(q, TriggerIO_1_1, TriggerIO_1_2, TriggerIO_2_1, TriggerIO_2_2);

  // Events:
  Injection_Tuesday_1_On: at (Initial_for_startTime + 1 <= time): TriggerIO_1_1 = 1;
  Injection_Tuesday_1_Off: at (Initial_for_startTime + 2 <= time): TriggerIO_1_2 = 1;
  Injection_Friday_1_On: at (Initial_for_startTime + 5 <= time): TriggerIO_2_1 = 1;
  Injection_Friday_1_Off: at (Initial_for_startTime + 6 <= time): TriggerIO_2_2 = 0;

  // Unit definitions:
  unit volume = 1e-6 litre;
  unit time = 86400 second;
  unit substance = 1e-6 mole;
end
