// SBML level 2 version 4
// dcterms:bibliographicCitation: urn:miriam:pubmed:3156189

function function_for_Debris_formation(D, Tumor)
  D*Tumor;
end

function function_for_IL1_production(MPH, Angry, HTL, KMH, Tumor, KMT)
  (MPH + Angry)*(HTL/(KMH + HTL))*(Tumor/(KMT + Tumor));
end

function function_for_production(I, M)
  I + I*M;
end

function function_for_CTL_HTL(R, CTL, Factor, KMF)
  R*CTL*Factor/(KMF + Factor);
end
function_for_CTL_HTL is "function for CTL/HTL";

function function_for_tumor_proliferation(R, Tumor, KR)
  R*Tumor/(1 + Tumor/KR);
end

function function_for_utilization(A, X, Y)
  A*X*Y;
end

function function_for_tumor_killing(Kill, Angry, CTL, Tumor, KNK)
  Kill*(Angry + CTL)*Tumor/(KNK + Tumor);
end

model Boer1985___Macrophage_T_cell_interaction_in_anti_tumor_response()
  // Boer1985 - Macrophage T cell interaction in anti-tumor response
  // In this paper we present a model of the macrophage
  // T lymphocyte interactions that generate an
  // anti-tumor immune response. The modseple cifies i)
  // induction of cytotoxic T lymphocytes, ii) antigen
  // presentation by macrophages, which leads to iii)
  // activation of helper T cells, and iv) production of
  // lymphoid factors, which induce a) cytotoxic macrophages,
  // b) T lymphocyte proliferation, and c) an
  // inflammation reaction. Tumor escape mechanisms
  // (suppression, antigenic heterogeneity) have been
  // deliberately omitted from the model.
  // isDescribedBy pubmed:3156189

  // Compartments:
  compartment Tumor_Microenvr = 1;

  // Species:
  species CTLP in Tumor_Microenvr = 25;
  species CTL in Tumor_Microenvr = 0;
  species Tumor in Tumor_Microenvr = 0;
  species HTLP in Tumor_Microenvr = 15;
  species HTL in Tumor_Microenvr = 0;
  species MPH in Tumor_Microenvr = 0;
  species Angry in Tumor_Microenvr = 0;
  species Debris in Tumor_Microenvr = 0;
  species PCTLP in Tumor_Microenvr = 0;
  species IL1 in Tumor_Microenvr = 0;

  // Parameters:
  KMD = 10000000;
  KMT = 1000;
  KMF = 50;
  H = 9;
  Model1 = 0;
  Model2 = 0;
  KMI = 500;
  I3 = 125000;
  // range: 0.5 or 10
  I1 = 0.5;
  // range: 0.01 to 100
  I2 = 0.3;
  A = 0.001 unit_0;
  EL = 0.02;
  R = 1;
  DM = 1;
  Kill = 10;
  KMK = 100000;
  KR = 1000000000;
  ED = 2;
  D = 0.001;
  KMH = 50;
  EM = 0.05;
  Initial_for_H = H;
  Initial_for_KMD = KMD;
  Initial_for_KMF = KMF;
  Initial_for_KMT = KMT;

  // Assignment rules:
  APC := (MPH + Angry)*Debris/(Initial_for_KMD + Debris);
  Factor := HTL*Tumor/(Initial_for_KMT + Tumor);
  INFLAM := Initial_for_H*Factor/(Initial_for_KMF + Factor);
  Factor1 := HTL*IL1/(KMI + IL1);
  TUMOR := Tumor;

  // Reactions:
  CTLP_production: => CTLP; Tumor_Microenvr*function_for_production(I1, INFLAM);
  CTLP_to_CTL_production: CTLP => CTL; Tumor_Microenvr*function_for_utilization(A, CTLP, TUMOR);  // modifiers: Tumor
  HTLP_to_HTL_production: HTLP => HTL; Tumor_Microenvr*function_for_utilization(A, HTLP, APC);
  HTL_elimination: HTL => ; Tumor_Microenvr*EL*HTL;
  MPH_production: => MPH; Tumor_Microenvr*function_for_production(I3, INFLAM);
  MPH_to_Angry_production: MPH => Angry; Tumor_Microenvr*function_for_utilization(A, MPH, Factor);
  Angry_elimination: Angry => ; Tumor_Microenvr*DM*Angry;
  tumor_proliferation: => Tumor; Tumor_Microenvr*function_for_tumor_proliferation(R, Tumor, KR);
  Tumor_Killing: Tumor => Debris; Tumor_Microenvr*function_for_tumor_killing(Kill, Angry, CTL, Tumor, KMK);  // modifiers: Angry, CTL
  Debris_elimination: Debris => ; Tumor_Microenvr*ED*Debris;
  CTLP_elimination: CTLP => ; Tumor_Microenvr*EL*CTLP;
  CTL_elimination: CTL => ; Tumor_Microenvr*EL*CTL;
  HTLP_production: => HTLP; Tumor_Microenvr*function_for_production(I2, INFLAM);
  HTLP_elimination: HTLP => ; Tumor_Microenvr*EL*HTLP;
  CTL_autoproduction: => CTL; Tumor_Microenvr*function_for_CTL_HTL(R, CTL, Factor, KMF);
  HTL_autoproduction: => HTL; Tumor_Microenvr*function_for_CTL_HTL(R, HTL, Factor, KMF);
  CTLP_to_PCTLP_production: CTLP => PCTLP; Tumor_Microenvr*function_for_utilization(A, CTLP, TUMOR);  // modifiers: Tumor
  PCTLP_to_CTL_production: PCTLP => CTLP; Tumor_Microenvr*function_for_utilization(A, PCTLP, Factor);
  Debris_production_1: => Debris; Tumor_Microenvr*function_for_Debris_formation(D, TUMOR);  // modifiers: Tumor
  IL1_production: => IL1; Tumor_Microenvr*function_for_IL1_production(MPH, Angry, HTL, ED, Tumor, KMT);  // modifiers: MPH, Angry, HTL, Tumor
  MPH_elimination: MPH => ; Tumor_Microenvr*EM*MPH;
  PCTLP_elimination: PCTLP => ; Tumor_Microenvr*EL*PCTLP;

  // Unit definitions:
  unit time = 86400 second;
  unit unit_0 = 1 / (8640 second); unit_0 is "1/d";
end
