// SBML level 2 version 4
// dcterms:bibliographicCitation: urn:miriam:pubmed:30292801

function Function_for_Global_Status_Degradation_Lack_Androgens(alpha_pa, a, p)
  alpha_pa*(1 - a)*p;
end

function Function_for_PSA_Decrease_LHRH_Analog_Treatment(delta_aL, a, L)
  delta_aL*a*L;
end

function Function_for_Global_Status_Decrease_Anti_Androgenic_Drugs(delta_pB, p, B)
  delta_pB*p*B;
end

function Function_for_PSA_Production_Hormone_Dependent_Tumor_Cells(rho_d, t_d)
  rho_d*t_d;
end

function Function_for_Recovery(rho_p, p)
  rho_p*p*(1 - p);
end

function Function_for_Testosterone_Natural_Increase(rho_a, a)
  rho_a*a*(1 - a);
end

function Function_for_PSA_Decrease_Mutation(epsilon, a, t_d)
  epsilon*(1 - a)*t_d;
end

function Function_for_PSA_Decrease_Hormone_Dependent_Tumor_Cells(alpha_dp, t_d, p)
  alpha_dp*t_d*p;
end

function Function_for_PSA_Decrease_Hormone_Independent_Tumor_Cells(alpha_ip, t_i, p)
  alpha_ip*t_i*p;
end

function Function_for_PSA_Decrease_Lack_Androgens(t_d, delta_da, delta_db, B)
  t_d^2*(delta_da + delta_db*B);
end

function Function_for_PSA_Production_Hormone_Independent_Tumor_Cells(rho_i, t_i)
  rho_i*t_i;
end

model Draghi2019___Parameter_identification_of_a_model_for_prostate_cancer_treated_by_intermittent_therapy()
  // Draghi2019 - Parameter identification of a model for prostate cancer treated by intermittent therapy
  // This is a mathematical describing the interaction between the prostate adenocarcinoma tumor environment, the prostate specific antigen (PSA) produced by hormone-dependent and hormone-independent tumor cells, respectively, and the level of androgens.
  // hasProperty ncit:C2919
  // hasProperty mamo:MAMO_0000046
  // hasProperty ncit:C17525
  // isDescribedBy pubmed:30292801

  // Compartments:
  compartment compartment = 1;

  // Species:
  species p in compartment = 1;
  species a in compartment = 1;
  species t_d in compartment = 0.1;
  species t_i in compartment = 0;

  // Parameters:
  rho_p = 1.56;
  alpha_pa = 1.68;
  rho_a = 18.36;
  rho_d = 3.36;
  alpha_dp = 2.4;
  rho_i = 1.68;
  alpha_ip = 2.64;
  epsilon = 0.0042;
  delta_aL = 36;
  delta_pB = 0;
  delta_dB = 0;
  B = 0;

  // Assignment rules:
  delta_da := piecewise(19.08, a <= 0.05, 0);
  L := piecewise(1, (time >= 4 + 1/12) && (time <= 4 + 8/12), piecewise(1, (time >= 5 + 1/12) && (time <= 5 + 5/12), piecewise(1, (time >= 5 + 8/12) && (time <= 7 + 4/12), piecewise(1, time >= 8 + 6/12, 0))));
  rho_PSA := t_d + t_i;

  // Reactions:
  Global_Status_Recovery: => p; compartment*Function_for_Recovery(rho_p, p);
  Global_Status_Degradation_Lack_Androgens: p => ; compartment*Function_for_Global_Status_Degradation_Lack_Androgens(alpha_pa, a, p);  // modifiers: a
  Global_Status_Decrease_Anti_Androgenic_Drugs: p => ; compartment*Function_for_Global_Status_Decrease_Anti_Androgenic_Drugs(delta_pB, p, B);
  Testosterone_Natural_Increase: => a; compartment*Function_for_Testosterone_Natural_Increase(rho_a, a);
  PSA_Decrease_LHRH_Analog_Treatment: a => ; compartment*Function_for_PSA_Decrease_LHRH_Analog_Treatment(delta_aL, a, L);
  PSA_Production_Hormone_Dependent_Tumor_Cells: => t_d; compartment*Function_for_PSA_Production_Hormone_Dependent_Tumor_Cells(rho_d, t_d);
  PSA_Decrease_Lack_Androgens: t_d => ; compartment*Function_for_PSA_Decrease_Lack_Androgens(t_d, delta_da, delta_dB, B);
  PSA_Decrease_Hormone_Dependent_Tumor_Cells: t_d => ; compartment*Function_for_PSA_Decrease_Hormone_Dependent_Tumor_Cells(alpha_dp, t_d, p);  // modifiers: p
  PSA_Decrease_Mutation: t_d => t_i; compartment*Function_for_PSA_Decrease_Mutation(epsilon, a, t_d);  // modifiers: a
  PSA_Production_Hormone_Independent_Tumor_Cells: => t_i; compartment*Function_for_PSA_Production_Hormone_Independent_Tumor_Cells(rho_i, t_i);
  PSA_Decrease_Hormone_Independent_Tumor_Cells: t_i => ; compartment*Function_for_PSA_Decrease_Hormone_Independent_Tumor_Cells(alpha_ip, t_i, p);  // modifiers: p

  // Unit definitions:
  unit volume = 1e-3 litre;
  unit substance = item;
end
