// SBML level 3 version 2

// This function calculates the bacterial growth rate from the following arguments: x (size of commensial bacteria population), y (size of wild-type Yersinia population), z (size of mutant Yersinia population), a (factor for the growth rate), c (carrying capacity)
function bacterialGrowthRate(x, y, z, a, c)
  a*(1 - (x + y + z)/c);
end
// sbo:0000610

// This is the relative activation function of x (commensial bacteria), y (wild-type Yersinia), z (mutant Yersinia), a (factor of spill-over rate), c (carrying capacity)
function spillOverRate(x, y, z, a, c)
  a*(x + y + z)/c;
end

model yersinia()
  // Geißert2020 - Yersinia enterocolitica co-infection in mice
  // This model simulates the colonization of the mouse gut with different strains of Yersinia enterocolitica. Thereby it takes the host-immune repsone into account. The parameters are calibrated based on experimentally obtained data (faces of different mice).
  // hasProperty mamo:MAMO_0000046
  // model units - time: hour, volume: mL

  // Compartments:
  compartment mucosa = NaN; mucosa has mL; mucosa is "Mucosa";
  compartment lumen = NaN; lumen has mL; lumen is "Lumen";

  // Species:
  substanceOnly species Commensal_bacteria_in_mucosa in mucosa = b4;  // substance in item; sbo:0000236
  substanceOnly species x2 in mucosa = 10; x2 is "Wild-type Yersinia enterocolitica in mucosa";  // substance in item; sbo:0000236; hasTaxon taxonomy:559292
  substanceOnly species x3 in mucosa = x2; x3 is "Mutant Yersinia enterocolitica in mucosa";  // substance in item; sbo:0000236; hasTaxon taxonomy:559292
  substanceOnly species Commensal_bacteria_in_lumen in lumen = b5;  // substance in item; sbo:0000236
  substanceOnly species x5 in lumen = 1000; x5 is "Wild-type Yersinia enterocolitica in lumen";  // substance in item; sbo:0000236; hasTaxon taxonomy:559292
  substanceOnly species x6 in lumen = Commensal_bacteria_in_lumen; x6 is "Mutant Yersnia enterocolitica in lumen";  // substance in item; sbo:0000236; hasTaxon taxonomy:559292

  // Parameters:
  b1 = 10000000*4.8925576e-8 per_time; b1 has per_time; b1 is "Maximum growth rate of intestinal bacteria";
  b2 = 10000000*4.4428614e-8 per_time; b2 has per_time; b2 is "Maximum growth rate of wilt-type Yersinia enterocolitica";
  b3 = b2; b3 has per_time; b3 is "Maximum growth rate of mutant Yersinia enterocolitica";
  b4 = 10000000 item*0.01762206; b4 has item; b4 is "Carrying capacity of the mucosa";
  b5 = 10000000 item*2.142478; b5 has item; b5 is "Carrying capacity of the lumen";
  b6 = 10000000*3.963648e-9; b6 has dimensionless; b6 is "Immunity adjustment factor for wild-type Yersinia enterocolitica";
  b7 = 10000000*1.9453365e-8; b7 has dimensionless; b7 is "Immunity adjustment factor for mutant Yersinia enterocolitica";
  b8 = 10000000*7.8300719e-8 per_time; b8 has per_time; b8 is "Maximum rate of immune growth";
  Maximum_immunity_action = 1 per_time;
  c2 = 1 per_time/4; c2 has per_time; c2 is "Rate at which intestines are discharged";
  c3 = 1 item; c3 is "Maximum capacity of the immune system";
  Strength_of_immune_reaction = 0 dimensionless;  // sbo:0000170

  // Rate rules:
  Commensal_bacteria_in_mucosa' = bacterialGrowthRate(Commensal_bacteria_in_mucosa, x2, x3, b1, b4)*Commensal_bacteria_in_mucosa - Maximum_immunity_action*Strength_of_immune_reaction*Commensal_bacteria_in_mucosa;
  x2' = bacterialGrowthRate(Commensal_bacteria_in_mucosa, x2, x3, b2, b4)*x2 - Maximum_immunity_action*b6*Strength_of_immune_reaction*x2;
  x3' = bacterialGrowthRate(Commensal_bacteria_in_mucosa, x2, x3, b3, b4)*x3 - Maximum_immunity_action*b7*Strength_of_immune_reaction*x3;
  Commensal_bacteria_in_lumen' = bacterialGrowthRate(Commensal_bacteria_in_lumen, x5, x6, b1, b5)*Commensal_bacteria_in_lumen - c2*Commensal_bacteria_in_lumen;
  x5' = bacterialGrowthRate(Commensal_bacteria_in_lumen, x5, x6, b2, b5)*x5 - c2*x5 + spillOverRate(Commensal_bacteria_in_mucosa, x2, x3, b2, b4)*x2;
  x6' = bacterialGrowthRate(Commensal_bacteria_in_lumen, x5, x6, b3, b5)*x6 - c2*x6 + spillOverRate(Commensal_bacteria_in_mucosa, x2, x3, b3, b4)*x3;
  Strength_of_immune_reaction' = b8*(x2 + x3)*(c3/(1 item) - Strength_of_immune_reaction)/c3;

  // Unit definitions:
  unit hour = 3600 second;  // uo:0000032
  unit mL = 1e-3 litre; mL is "milliliters";  // uo:0000098
  unit items_per_time = item / (3600 second);
  unit per_time = 1 / (3600 second);
end
