// SBML level 2 version 1

model Immunological_Healthy_State_Model_of_Sphingolipids_with_IL_6_IL_17_IL_23_immune_axis_in_L_major_infection()
  // Immunological Healthy State Model of Sphingolipids with IL-6/IL-17/IL-23 immune axis in L.major infection
  // In Healthy State, we demonstrated the controlled expression of sphingolipids and the controlled IL-6,IL-17,IL-23 cytokines signalling via SOCS3 mediated regulation.
  // hasProperty mamo:MAMO_0000003

  // Compartments:
  compartment Infected_cell = 1;
  compartment CD4_to_Th17 = 1; CD4_to_Th17 is "CD4+to Th17";
  compartment Macrophage = 1;
  compartment NUCLEUS in Macrophage = 1;
  compartment ENDOPLASMIC_RETICULUM in Macrophage = 1;
  compartment GOLGI_COMPLEX in Macrophage = 1;

  // Species:
  substanceOnly species $LPG_Infected_cell in Infected_cell = 1000;  // substance in MWBUILTINUNIT_molecule
  substanceOnly species $TLR in Infected_cell = 1000;  // substance in MWBUILTINUNIT_molecule
  substanceOnly species LPG_TLR_complex_Infected_cell in Infected_cell = 1000; LPG_TLR_complex_Infected_cell is "LPG-TLR complex";  // substance in MWBUILTINUNIT_molecule
  substanceOnly species MyD88_Infected_cell in Infected_cell = 3980;  // substance in MWBUILTINUNIT_molecule
  substanceOnly species IRAK1_4_Infected_cell in Infected_cell = 2000; IRAK1_4_Infected_cell is "IRAK1/4";  // substance in MWBUILTINUNIT_molecule
  substanceOnly species TRAF6_Infected_cell in Infected_cell = 2000;  // substance in MWBUILTINUNIT_molecule
  substanceOnly species TAK1_Infected_cell in Infected_cell = 2000;  // substance in MWBUILTINUNIT_molecule
  substanceOnly species NEMO_complex_Infected_cell in Infected_cell = 2000;  // substance in MWBUILTINUNIT_molecule
  substanceOnly species NF_kB in Infected_cell = 0; NF_kB is "NF-kB";  // substance in MWBUILTINUNIT_molecule
  substanceOnly species Inflammatory_cytokine_genes in Infected_cell = 6000;  // substance in MWBUILTINUNIT_molecule
  substanceOnly species $IL6 in Infected_cell = 3980;  // substance in MWBUILTINUNIT_molecule
  substanceOnly species $IL1B in Infected_cell = 3980;  // substance in MWBUILTINUNIT_molecule
  substanceOnly species $IL23 in Infected_cell = 3980;  // substance in MWBUILTINUNIT_molecule
  substanceOnly species $IL_1R in Infected_cell = 3980; IL_1R is "IL-1R";  // substance in MWBUILTINUNIT_molecule
  substanceOnly species IL_1_complex in Infected_cell = 3980; IL_1_complex is "IL-1 complex";  // substance in MWBUILTINUNIT_molecule
  substanceOnly species $IL23R_IL12RB in CD4_to_Th17 = 3980; IL23R_IL12RB is "IL23R-IL12RB";  // substance in MWBUILTINUNIT_molecule
  substanceOnly species IL23_complex_CD4_to_Th17 in CD4_to_Th17 = 3980;  // substance in MWBUILTINUNIT_molecule
  substanceOnly species JAK2_TYK2_CD4_to_Th17 in CD4_to_Th17 = 3980; JAK2_TYK2_CD4_to_Th17 is "JAK2/TYK2";  // substance in MWBUILTINUNIT_molecule
  substanceOnly species $ILR_GP130 in CD4_to_Th17 = 3980; ILR_GP130 is "ILR-GP130";  // substance in MWBUILTINUNIT_molecule
  substanceOnly species IL6_complex_CD4_to_Th17 in CD4_to_Th17 = 3980;  // substance in MWBUILTINUNIT_molecule
  substanceOnly species JAK1_2_CD4_to_Th17 in CD4_to_Th17 = 3980; JAK1_2_CD4_to_Th17 is "JAK1/2";  // substance in MWBUILTINUNIT_molecule
  substanceOnly species STAT3_CD4_to_Th17 in CD4_to_Th17 = 3989;  // substance in MWBUILTINUNIT_molecule
  substanceOnly species rorgt_Gene in CD4_to_Th17 = 3989;  // substance in MWBUILTINUNIT_molecule
  substanceOnly species RORgt in CD4_to_Th17 = 3989;  // substance in MWBUILTINUNIT_molecule
  substanceOnly species IL17_gene in CD4_to_Th17 = 3989;  // substance in MWBUILTINUNIT_molecule
  substanceOnly species $IL_17A_F in CD4_to_Th17 = 3989; IL_17A_F is "IL-17A/F";  // substance in MWBUILTINUNIT_molecule
  substanceOnly species SATB1_CD4_to_Th17 in CD4_to_Th17 = 4000;  // substance in MWBUILTINUNIT_molecule
  substanceOnly species BHLEHE40_CD4_to_Th17 in CD4_to_Th17 = 4000;  // substance in MWBUILTINUNIT_molecule
  substanceOnly species GMCSF_CD4_to_Th17 in CD4_to_Th17 = 4001;  // substance in MWBUILTINUNIT_molecule
  substanceOnly species $IL6R_GP130 in Macrophage = 3980; IL6R_GP130 is "IL6R-GP130";  // substance in MWBUILTINUNIT_molecule
  substanceOnly species IL6_complex_Macrophage in Macrophage = 3980;  // substance in MWBUILTINUNIT_molecule
  substanceOnly species $IL_17RA_C in Macrophage = 3989; IL_17RA_C is "IL-17RA/C";  // substance in MWBUILTINUNIT_molecule
  substanceOnly species IL_17_complex in Macrophage = 4009; IL_17_complex is "IL-17 complex";  // substance in MWBUILTINUNIT_molecule
  substanceOnly species ACT1 in Macrophage = 4009;  // substance in MWBUILTINUNIT_molecule
  substanceOnly species TRAF6_Macrophage in Macrophage = 6009;  // substance in MWBUILTINUNIT_molecule
  substanceOnly species TAK1_Macrophage in Macrophage = 4009;  // substance in MWBUILTINUNIT_molecule
  substanceOnly species NEMO_complex_Macrophage in Macrophage = 4009;  // substance in MWBUILTINUNIT_molecule
  substanceOnly species MAPKK3 in Macrophage = 4009;  // substance in MWBUILTINUNIT_molecule
  substanceOnly species MEK1_2 in Macrophage = 4009; MEK1_2 is "MEK1/2";  // substance in MWBUILTINUNIT_molecule
  substanceOnly species ERK in Macrophage = 4009;  // substance in MWBUILTINUNIT_molecule
  substanceOnly species SPHK in Macrophage = 1000;  // substance in MWBUILTINUNIT_molecule
  substanceOnly species JAK1_2_Macrophage in Macrophage = 0; JAK1_2_Macrophage is "JAK1/2";  // substance in MWBUILTINUNIT_molecule
  substanceOnly species STAT3_Macrophage in Macrophage = 3980;  // substance in MWBUILTINUNIT_molecule
  substanceOnly species S1PRS in Macrophage = 1000;  // substance in MWBUILTINUNIT_molecule
  substanceOnly species GMCSF_Macrophage in Macrophage = 2000;  // substance in MWBUILTINUNIT_molecule
  substanceOnly species IL_1B in Macrophage = 1000; IL_1B is "IL-1B";  // substance in MWBUILTINUNIT_molecule
  substanceOnly species IL_6 in Macrophage = 1000; IL_6 is "IL-6";  // substance in MWBUILTINUNIT_molecule
  substanceOnly species CXCL in Macrophage = 1000;  // substance in MWBUILTINUNIT_molecule
  substanceOnly species $IL_23R in Macrophage = 3980; IL_23R is "IL-23R";  // substance in MWBUILTINUNIT_molecule
  substanceOnly species IL23_complex_Macrophage in Macrophage = 3980; IL23_complex_Macrophage is "IL23-complex";  // substance in MWBUILTINUNIT_molecule
  substanceOnly species $JAK2_TYK2_Macrophage in Macrophage = 3980; JAK2_TYK2_Macrophage is "JAK2/TYK2";  // substance in MWBUILTINUNIT_molecule
  substanceOnly species SATB1_Macrophage in Macrophage = 3980;  // substance in MWBUILTINUNIT_molecule
  substanceOnly species Sphingosine_Macrophage in Macrophage = 1005;  // substance in MWBUILTINUNIT_molecule
  substanceOnly species Sphingosine_1_phosphate in Macrophage = 1004; Sphingosine_1_phosphate is "Sphingosine-1-phosphate";  // substance in MWBUILTINUNIT_molecule
  substanceOnly species $LPG_Macrophage in Macrophage = 1000;  // substance in MWBUILTINUNIT_molecule
  substanceOnly species $TLR4_6 in Macrophage = 1000; TLR4_6 is "TLR4/6";  // substance in MWBUILTINUNIT_molecule
  substanceOnly species LPG_TLR_complex_Macrophage in Macrophage = 1000; LPG_TLR_complex_Macrophage is "LPG-TLR complex";  // substance in MWBUILTINUNIT_molecule
  substanceOnly species MyD88_Macrophage in Macrophage = 1004;  // substance in MWBUILTINUNIT_molecule
  substanceOnly species IRAK1_4_Macrophage in Macrophage = 2000; IRAK1_4_Macrophage is "IRAK1/4";  // substance in MWBUILTINUNIT_molecule
  substanceOnly species SOCS3 in Macrophage = 10000;  // substance in MWBUILTINUNIT_molecule
  substanceOnly species $Controlled_cytokine_signaling in Macrophage = 10000;  // substance in MWBUILTINUNIT_molecule
  substanceOnly species NF_KB in NUCLEUS = 4008; NF_KB is "NF-KB";  // substance in MWBUILTINUNIT_molecule
  substanceOnly species AP1 in NUCLEUS = 4010;  // substance in MWBUILTINUNIT_molecule
  substanceOnly species C_EBP_BETA in NUCLEUS = 4009; C_EBP_BETA is "C/EBP BETA";  // substance in MWBUILTINUNIT_molecule
  substanceOnly species SPHK_gene in NUCLEUS = 1000;  // substance in MWBUILTINUNIT_molecule
  substanceOnly species STAT3_NUCLEUS in NUCLEUS = 3980;  // substance in MWBUILTINUNIT_molecule
  substanceOnly species S1PR_Gene in NUCLEUS = 1000;  // substance in MWBUILTINUNIT_molecule
  substanceOnly species Inflammatory_Cytokine_Gene in NUCLEUS = 1000;  // substance in MWBUILTINUNIT_molecule
  substanceOnly species SATB1_NUCLEUS in NUCLEUS = 3980;  // substance in MWBUILTINUNIT_molecule
  substanceOnly species BHLEHE40_NUCLEUS in NUCLEUS = 1000;  // substance in MWBUILTINUNIT_molecule
  substanceOnly species SOCS3_gene in NUCLEUS = 10000;  // substance in MWBUILTINUNIT_molecule
  substanceOnly species Serine_palmitoyl_Co_A in ENDOPLASMIC_RETICULUM = 1000; Serine_palmitoyl_Co_A is "Serine+palmitoyl-Co-A";  // substance in MWBUILTINUNIT_molecule
  species SPT in ENDOPLASMIC_RETICULUM = 1000/ENDOPLASMIC_RETICULUM;
  substanceOnly species _3_Ketosphinganine in ENDOPLASMIC_RETICULUM = 1000; _3_Ketosphinganine is "3-Ketosphinganine";  // substance in MWBUILTINUNIT_molecule
  substanceOnly species Sphinganine in ENDOPLASMIC_RETICULUM = 1000;  // substance in MWBUILTINUNIT_molecule
  substanceOnly species KDSR in ENDOPLASMIC_RETICULUM = 1000;  // substance in MWBUILTINUNIT_molecule
  substanceOnly species Dihydroceremide in ENDOPLASMIC_RETICULUM = 1000;  // substance in MWBUILTINUNIT_molecule
  species DEGS in ENDOPLASMIC_RETICULUM = 1000/ENDOPLASMIC_RETICULUM;
  substanceOnly species Ceremide_ENDOPLASMIC_RETICULUM in ENDOPLASMIC_RETICULUM = 1000;  // substance in MWBUILTINUNIT_molecule
  substanceOnly species CS in ENDOPLASMIC_RETICULUM = 1000;  // substance in MWBUILTINUNIT_molecule
  substanceOnly species Ceremide_GOLGI_COMPLEX in GOLGI_COMPLEX = 1000;  // substance in MWBUILTINUNIT_molecule
  substanceOnly species Sphingosine_GOLGI_COMPLEX in GOLGI_COMPLEX = 1005;  // substance in MWBUILTINUNIT_molecule
  substanceOnly species CDase in GOLGI_COMPLEX = 1000;  // substance in MWBUILTINUNIT_molecule

  // Reactions:
  reaction_1: $LPG_Infected_cell + $TLR => LPG_TLR_complex_Infected_cell; reaction_1_kForward1*LPG_Infected_cell*TLR;
    reaction_1_kForward1 = 1e-5 MWDERIVEDUNIT_1__molecule_second;
  reaction_5: TRAF6_Infected_cell => TAK1_Infected_cell; reaction_5_Vm*TRAF6_Infected_cell/(reaction_5_Km + TRAF6_Infected_cell);
    reaction_5_Vm = 20.1 MWDERIVEDUNIT_molecule__second; reaction_5_Km = 10.05 MWBUILTINUNIT_molecule;
  reaction_6: TAK1_Infected_cell => NEMO_complex_Infected_cell; reaction_6_Vm*TAK1_Infected_cell/(reaction_6_Km + TAK1_Infected_cell);
    reaction_6_Vm = 20.1 MWDERIVEDUNIT_molecule__second; reaction_6_Km = 10.05 MWBUILTINUNIT_molecule;
  reaction_8: Inflammatory_cytokine_genes + NF_kB => $IL6 + $IL23 + $IL1B + NF_kB; reaction_8_Vm*Inflammatory_cytokine_genes^reaction_8_n1/(reaction_8_Km + Inflammatory_cytokine_genes^reaction_8_n1);
    reaction_8_Vm = 40 MWDERIVEDUNIT_molecule__second; reaction_8_n1 = 1; reaction_8_Km = 20 MWBUILTINUNIT_molecule;
  reaction_9: $IL_1R + $IL1B => IL_1_complex; reaction_9_kForward1*IL_1R*IL1B;
    reaction_9_kForward1 = 2.51e-6 MWDERIVEDUNIT_1__molecule_second;
  reaction_11: $IL23 + $IL23R_IL12RB => IL23_complex_CD4_to_Th17; reaction_11_kForward1*IL23*IL23R_IL12RB;
    reaction_11_kForward1 = 2.51e-6 MWDERIVEDUNIT_1__molecule_second;
  reaction_12: IL23_complex_CD4_to_Th17 => JAK2_TYK2_CD4_to_Th17; reaction_12_Vm1*IL23_complex_CD4_to_Th17/(reaction_12_Km1 + IL23_complex_CD4_to_Th17);
    reaction_12_Vm1 = 40 MWDERIVEDUNIT_molecule__second; reaction_12_Km1 = 20 MWBUILTINUNIT_molecule;
  reaction_13: $IL6 + $ILR_GP130 => IL6_complex_CD4_to_Th17; reaction_13_kForward1*IL6*ILR_GP130;
    reaction_13_kForward1 = 2.51e-6 MWDERIVEDUNIT_1__molecule_second;
  reaction_14: $IL6R_GP130 + $IL6 => IL6_complex_Macrophage; reaction_14_kForward1*IL6R_GP130*IL6;
    reaction_14_kForward1 = 2.51e-6 MWDERIVEDUNIT_1__molecule_second;
  reaction_15: IL6_complex_CD4_to_Th17 => JAK1_2_CD4_to_Th17; reaction_15_Vm1*IL6_complex_CD4_to_Th17/(reaction_15_Km1 + IL6_complex_CD4_to_Th17);
    reaction_15_Vm1 = 40 MWDERIVEDUNIT_molecule__second; reaction_15_Km1 = 10 MWBUILTINUNIT_molecule;
  reaction_16: JAK2_TYK2_CD4_to_Th17 => STAT3_CD4_to_Th17; reaction_16_Vm1*JAK2_TYK2_CD4_to_Th17/(reaction_16_Km1 + JAK2_TYK2_CD4_to_Th17);
    reaction_16_Vm1 = 40.1 MWDERIVEDUNIT_molecule__second; reaction_16_Km1 = 20 MWBUILTINUNIT_molecule;
  reaction_17: JAK1_2_CD4_to_Th17 => STAT3_CD4_to_Th17; reaction_17_Vm1*JAK1_2_CD4_to_Th17/(reaction_17_Km1 + JAK1_2_CD4_to_Th17);
    reaction_17_Vm1 = 40.1 MWDERIVEDUNIT_molecule__second; reaction_17_Km1 = 20 MWBUILTINUNIT_molecule;
  reaction_18: STAT3_CD4_to_Th17 + rorgt_Gene => RORgt + STAT3_CD4_to_Th17; reaction_18_Vm1*rorgt_Gene^reaction_18_n1/(reaction_18_Kp1 + rorgt_Gene^reaction_18_n1);
    reaction_18_Vm1 = 45.2 MWDERIVEDUNIT_molecule__second; reaction_18_n1 = 1; reaction_18_Kp1 = 22.5 MWBUILTINUNIT_molecule;
  reaction_19: RORgt + IL17_gene => $IL_17A_F + RORgt; reaction_19_Vm1*IL17_gene^reaction_19_n1/(reaction_19_Kp1 + IL17_gene^reaction_19_n1);
    reaction_19_Vm1 = 45 MWDERIVEDUNIT_molecule__second; reaction_19_n1 = 1; reaction_19_Kp1 = 22.5 MWBUILTINUNIT_molecule;
  reaction_20: $IL_17A_F + $IL_17RA_C => IL_17_complex; reaction_20_kForward1*IL_17A_F*IL_17RA_C;
    reaction_20_kForward1 = 2.5e-6 MWDERIVEDUNIT_1__molecule_second;
  reaction_21: IL_17_complex => ACT1; reaction_21_Vm1*IL_17_complex/(reaction_21_Km1 + IL_17_complex);
    reaction_21_Vm1 = 40.3 MWDERIVEDUNIT_molecule__second; reaction_21_Km1 = 20 MWBUILTINUNIT_molecule;
  reaction_22: ACT1 => TRAF6_Macrophage; reaction_22_Vm1*ACT1/(reaction_22_Km1 + ACT1);
    reaction_22_Vm1 = 40.3 MWDERIVEDUNIT_molecule__second; reaction_22_Km1 = 20.1 MWBUILTINUNIT_molecule;
  reaction_23: TRAF6_Macrophage => TAK1_Macrophage; reaction_23_Vm1*TRAF6_Macrophage/(reaction_23_Km1 + TRAF6_Macrophage);
    reaction_23_Vm1 = 40.3 MWDERIVEDUNIT_molecule__second; reaction_23_Km1 = 20.1 MWBUILTINUNIT_molecule;
  reaction_24: TAK1_Macrophage => NEMO_complex_Macrophage; reaction_24_Vm1*TAK1_Macrophage/(reaction_24_Km1 + TAK1_Macrophage);
    reaction_24_Vm1 = 40.3 MWDERIVEDUNIT_molecule__second; reaction_24_Km1 = 20.1 MWBUILTINUNIT_molecule;
  reaction_26: TRAF6_Macrophage => MAPKK3; reaction_26_Vm1*TRAF6_Macrophage/(reaction_26_Km1 + TRAF6_Macrophage);
    reaction_26_Vm1 = 40.3 MWDERIVEDUNIT_molecule__second; reaction_26_Km1 = 20 MWBUILTINUNIT_molecule;
  reaction_27: MAPKK3 => MEK1_2; reaction_27_Vm1*MAPKK3/(reaction_27_Km1 + MAPKK3);
    reaction_27_Vm1 = 40 MWDERIVEDUNIT_molecule__second; reaction_27_Km1 = 20 MWBUILTINUNIT_molecule;
  reaction_28: MEK1_2 => ERK; reaction_28_Vm1*MEK1_2/(reaction_28_Km1 + MEK1_2);
    reaction_28_Vm1 = 40.3 MWDERIVEDUNIT_molecule__second; reaction_28_Km1 = 20 MWBUILTINUNIT_molecule;
  reaction_29: ERK => AP1; reaction_29_Vm1*ERK^reaction_29_n1/(reaction_29_Kp1 + ERK^reaction_29_n1);
    reaction_29_Vm1 = 40.3 MWDERIVEDUNIT_molecule__second; reaction_29_n1 = 1; reaction_29_Kp1 = 20 MWBUILTINUNIT_molecule;
  reaction_30: TAK1_Macrophage => C_EBP_BETA; reaction_30_Vm1*TAK1_Macrophage^reaction_30_n1/(reaction_30_Kp1 + TAK1_Macrophage^reaction_30_n1);
    reaction_30_Vm1 = 40.3 MWDERIVEDUNIT_molecule__second; reaction_30_n1 = 1; reaction_30_Kp1 = 20.1 MWBUILTINUNIT_molecule;
  reaction_31: NF_KB + SPHK_gene => SPHK + NF_KB; reaction_31_Vm1*SPHK_gene^reaction_31_n1/(reaction_31_Kp1 + SPHK_gene^reaction_31_n1);
    reaction_31_Vm1 = 12 MWDERIVEDUNIT_molecule__second; reaction_31_n1 = 1; reaction_31_Kp1 = 6 MWBUILTINUNIT_molecule;
  reaction_32: IL6_complex_Macrophage => JAK1_2_Macrophage; reaction_32_Vm1*IL6_complex_Macrophage/(reaction_32_Km1 + IL6_complex_Macrophage);
    reaction_32_Vm1 = 40 MWDERIVEDUNIT_molecule__second; reaction_32_Km1 = 20 MWBUILTINUNIT_molecule;
  reaction_33: JAK1_2_Macrophage => STAT3_Macrophage; reaction_33_Vm1*JAK1_2_Macrophage/(reaction_33_Km1 + JAK1_2_Macrophage);
    reaction_33_Vm1 = 40 MWDERIVEDUNIT_molecule__second; reaction_33_Km1 = 20 MWBUILTINUNIT_molecule;
  reaction_34: STAT3_Macrophage => STAT3_NUCLEUS; reaction_34_kForward1*STAT3_Macrophage;
    reaction_34_kForward1 = 0.01 MWDERIVEDUNIT_1__second;
  reaction_35: STAT3_NUCLEUS + S1PR_Gene => S1PRS + STAT3_NUCLEUS; reaction_35_Vm1*S1PR_Gene^reaction_35_n1/(reaction_35_Kp1 + S1PR_Gene^reaction_35_n1);
    reaction_35_Vm1 = 12 MWDERIVEDUNIT_molecule__second; reaction_35_n1 = 1; reaction_35_Kp1 = 6 MWBUILTINUNIT_molecule;
  reaction_36: Inflammatory_Cytokine_Gene + NF_KB + AP1 + C_EBP_BETA => GMCSF_Macrophage + IL_1B + IL_6 + CXCL + NF_KB + AP1 + C_EBP_BETA; reaction_36_Vm*Inflammatory_Cytokine_Gene^n/(reaction_36_Km + Inflammatory_Cytokine_Gene^n);
    reaction_36_Vm = 12 MWDERIVEDUNIT_molecule__second; n = 1; reaction_36_Km = 6 MWBUILTINUNIT_molecule;
  reaction_37: $IL23 + $IL_23R => IL23_complex_Macrophage; kforward*IL23*IL_23R;
    kforward = 2.51e-6 MWDERIVEDUNIT_1__molecule_second;
  reaction_38: IL23_complex_Macrophage => $JAK2_TYK2_Macrophage; reaction_38_Vm1*IL23_complex_Macrophage/(reaction_38_Km1 + IL23_complex_Macrophage);
    reaction_38_Vm1 = 40 MWDERIVEDUNIT_molecule__second; reaction_38_Km1 = 20 MWBUILTINUNIT_molecule;
  reaction_39: JAK2_TYK2_CD4_to_Th17 => SATB1_CD4_to_Th17; reaction_39_Vm1*JAK2_TYK2_CD4_to_Th17/(reaction_39_Km1 + JAK2_TYK2_CD4_to_Th17);
    reaction_39_Vm1 = 41 MWDERIVEDUNIT_molecule__second; reaction_39_Km1 = 20 MWBUILTINUNIT_molecule;
  reaction_40: SATB1_CD4_to_Th17 + BHLEHE40_CD4_to_Th17 => GMCSF_CD4_to_Th17 + SATB1_CD4_to_Th17; reaction_40_Vm1*BHLEHE40_CD4_to_Th17^reaction_40_n1/(reaction_40_Kp1 + BHLEHE40_CD4_to_Th17^reaction_40_n1);
    reaction_40_Vm1 = 40 MWDERIVEDUNIT_molecule__second; reaction_40_n1 = 0; reaction_40_Kp1 = 20 MWBUILTINUNIT_molecule;
  reaction_42: $JAK2_TYK2_Macrophage => SATB1_Macrophage; reaction_42_Vm1*SATB1_CD4_to_Th17/(reaction_42_Km1 + SATB1_CD4_to_Th17);
    reaction_42_Vm1 = 40 MWDERIVEDUNIT_molecule__second; reaction_42_Km1 = 20 MWBUILTINUNIT_molecule;
  reaction_41: SATB1_Macrophage => SATB1_NUCLEUS; reaction_41_kForward1*SATB1_Macrophage;
    reaction_41_kForward1 = 0.01 MWDERIVEDUNIT_1__second;
  reaction_43: SATB1_NUCLEUS + BHLEHE40_NUCLEUS => GMCSF_Macrophage + SATB1_NUCLEUS; reaction_43_Vm1*BHLEHE40_NUCLEUS^reaction_43_n1/(reaction_43_Kp1 + BHLEHE40_NUCLEUS^reaction_43_n1);
    reaction_43_Vm1 = 12 MWDERIVEDUNIT_molecule__second; reaction_43_n1 = 1; reaction_43_Kp1 = 6 MWBUILTINUNIT_molecule;
  reaction_44: Serine_palmitoyl_Co_A + SPT => _3_Ketosphinganine + SPT; reaction_44_Vm1*Serine_palmitoyl_Co_A/(reaction_44_Km1 + Serine_palmitoyl_Co_A);
    reaction_44_Vm1 = 11.1 MWDERIVEDUNIT_molecule__second; reaction_44_Km1 = 5.5 MWBUILTINUNIT_molecule;
  reaction_45: _3_Ketosphinganine + KDSR => Sphinganine + KDSR; reaction_45_Vm1*_3_Ketosphinganine/(reaction_45_Km1 + _3_Ketosphinganine);
    reaction_45_Vm1 = 10 MWDERIVEDUNIT_molecule__second; reaction_45_Km1 = 5 MWBUILTINUNIT_molecule;
  reaction_46: Sphinganine + CS => Dihydroceremide + CS; reaction_46_Vm1*Sphinganine/(reaction_46_Km1 + Sphinganine);
    reaction_46_Vm1 = 10 MWDERIVEDUNIT_molecule__second; reaction_46_Km1 = 5 MWBUILTINUNIT_molecule;
  reaction_47: Dihydroceremide + DEGS => Ceremide_ENDOPLASMIC_RETICULUM + DEGS; reaction_47_Vm1*Dihydroceremide/(reaction_47_Km1 + Dihydroceremide);
    reaction_47_Vm1 = 10 MWDERIVEDUNIT_molecule__second; reaction_47_Km1 = 5 MWBUILTINUNIT_molecule;
  reaction_48: Ceremide_ENDOPLASMIC_RETICULUM => Ceremide_GOLGI_COMPLEX; reaction_48_kForward1*Ceremide_ENDOPLASMIC_RETICULUM;
    reaction_48_kForward1 = 0.01 MWDERIVEDUNIT_1__second;
  reaction_49: Ceremide_GOLGI_COMPLEX + CDase => Sphingosine_GOLGI_COMPLEX + CDase; reaction_49_Vm1*Ceremide_GOLGI_COMPLEX/(reaction_49_Km1 + Ceremide_GOLGI_COMPLEX);
    reaction_49_Vm1 = 10.1 MWDERIVEDUNIT_molecule__second; reaction_49_Km1 = 5 MWBUILTINUNIT_molecule;
  reaction_50: Sphingosine_GOLGI_COMPLEX => Sphingosine_Macrophage; reaction_50_kForward1*Sphingosine_GOLGI_COMPLEX;
    reaction_50_kForward1 = 0.01 MWDERIVEDUNIT_1__second;
  reaction_51: Sphingosine_Macrophage + SPHK => Sphingosine_1_phosphate + SPHK; reaction_51_Vm1*Sphingosine_Macrophage/(reaction_51_Km1 + Sphingosine_Macrophage);
    reaction_51_Vm1 = 10.1 MWDERIVEDUNIT_molecule__second; reaction_51_Km1 = 5 MWBUILTINUNIT_molecule;
  reaction_52: $LPG_Macrophage + $TLR4_6 => LPG_TLR_complex_Macrophage; reaction_52_kForward1*LPG_Macrophage*TLR4_6;
    reaction_52_kForward1 = 1e-5 MWDERIVEDUNIT_1__molecule_second;
  reaction_53: LPG_TLR_complex_Macrophage => MyD88_Macrophage; reaction_53_Vm1*LPG_TLR_complex_Macrophage/(reaction_53_Km1 + LPG_TLR_complex_Macrophage);
    reaction_53_Vm1 = 10.1 MWDERIVEDUNIT_molecule__second; reaction_53_Km1 = 5 MWBUILTINUNIT_molecule;
  reaction_2: LPG_TLR_complex_Infected_cell => MyD88_Infected_cell; reaction_2_Vm1*LPG_TLR_complex_Infected_cell/(reaction_2_Km1 + LPG_TLR_complex_Infected_cell);
    reaction_2_Vm1 = 50.5 MWDERIVEDUNIT_molecule__second; reaction_2_Km1 = 25.25 MWBUILTINUNIT_molecule;
  reaction_3: MyD88_Infected_cell => IRAK1_4_Infected_cell; reaction_3_Vm1*MyD88_Infected_cell/(reaction_3_Km1 + MyD88_Infected_cell);
    reaction_3_Vm1 = 50.5 MWDERIVEDUNIT_molecule__second; reaction_3_Km1 = 25.25 MWBUILTINUNIT_molecule;
  reaction_4: IRAK1_4_Infected_cell => TRAF6_Infected_cell; reaction_4_Vm1*IRAK1_4_Infected_cell/(reaction_4_Km1 + IRAK1_4_Infected_cell);
    reaction_4_Vm1 = 20.1 MWDERIVEDUNIT_molecule__second; reaction_4_Km1 = 10.5 MWBUILTINUNIT_molecule;
  reaction_7: NEMO_complex_Infected_cell => NF_kB; reaction_7_Vm1*NEMO_complex_Infected_cell/(reaction_7_Km1 + NEMO_complex_Infected_cell);
    reaction_7_Vm1 = 20 MWDERIVEDUNIT_molecule__second; reaction_7_Km1 = 10 MWBUILTINUNIT_molecule;
  reaction_10: IL_1_complex => MyD88_Infected_cell; reaction_10_kForward1*IL_1_complex;
    reaction_10_kForward1 = 0.01 MWDERIVEDUNIT_1__second;
  reaction_25: NEMO_complex_Macrophage => NF_KB; reaction_25_Vm1*NEMO_complex_Macrophage/(reaction_25_Km1 + NEMO_complex_Macrophage);
    reaction_25_Vm1 = 40 MWDERIVEDUNIT_molecule__second; reaction_25_Km1 = 20 MWBUILTINUNIT_molecule;
  reaction_54: MyD88_Macrophage => IRAK1_4_Macrophage; reaction_54_Vm1*MyD88_Macrophage/(reaction_54_Km1 + MyD88_Macrophage);
    reaction_54_Vm1 = 50 MWDERIVEDUNIT_molecule__second; reaction_54_Km1 = 25 MWBUILTINUNIT_molecule;
  reaction_55: IRAK1_4_Macrophage => TRAF6_Macrophage; reaction_55_Vm1*IRAK1_4_Macrophage/(reaction_55_Km1 + IRAK1_4_Macrophage);
    reaction_55_Vm1 = 20 MWDERIVEDUNIT_molecule__second; reaction_55_Km1 = 10 MWBUILTINUNIT_molecule;
  reaction_56: STAT3_NUCLEUS + SOCS3_gene => SOCS3 + STAT3_NUCLEUS; reaction_56_Vm1*SOCS3_gene^reaction_56_n1/(reaction_56_Kp1 + SOCS3_gene^reaction_56_n1);
    reaction_56_Vm1 = 106 MWDERIVEDUNIT_molecule__second; reaction_56_n1 = 1; reaction_56_Kp1 = 53 dimensionless;
  reaction_57: SOCS3 + JAK1_2_Macrophage => $Controlled_cytokine_signaling + SOCS3; reaction_57_Vm1*JAK1_2_Macrophage/((Ks1 + JAK1_2_Macrophage)*(1 + SOCS3/Ki1));
    reaction_57_Vm1 = 100 MWDERIVEDUNIT_molecule__second; Ks1 = 10 MWBUILTINUNIT_molecule; Ki1 = 5 MWBUILTINUNIT_molecule;

  // Unit definitions:
  unit MWBUILTINUNIT_molecule = 1.660539e-24 mole;
  unit MWDERIVEDUNIT_1__molecule_second = 6.022142e23 dimensionless / (mole * second); MWDERIVEDUNIT_1__molecule_second is "1/(molecule*second)";
  unit MWDERIVEDUNIT_molecule__second = mole * 1.660539e-24 dimensionless / second; MWDERIVEDUNIT_molecule__second is "molecule/second";
  unit MWDERIVEDUNIT_1__second = dimensionless / second; MWDERIVEDUNIT_1__second is "1/second";
end
