// SBML level 2 version 1

model Khandibharad2022_IL_12_regulation_by_IL_10_in_Leishmaniasis()
  // Khandibharad2022 - IL-12 regulation by IL-10 in Leishmaniasis
  // In this model, TLR2-TLR6 mediates MyD88 pathway gets activated, which activates IL-12 production and induces iNOS expression when the Macrophage is infected with Leishmania parasite. The early induction of IL-10 takes place which leads to the induction of NFIL3, HDAC3, and SHP-1. They inhibit IL-12 production and thus hamper IL-12 induced IFN-gamma mediated; Nitric oxide production. A key transcription factor NFAT5 connects IL-12 and IL-10 pathways. It upregulates IL-12 and downregulates IL-10. In this model, NFAT5 is downregulated which is also inhibiting IL-12.
  // hasProperty mamo:MAMO_0000046

  // Compartments:
  compartment cytoplasm = 1;
  compartment PM = 1;
  compartment PM_PM = 1;
  compartment nucleus in cytoplasm = 1;

  // Species:
  substanceOnly species IRAK4 in cytoplasm = 1000;  // substance in MWBUILTINUNIT_molecule
  substanceOnly species P_IRAK1 in cytoplasm = 2000; P_IRAK1 is "P-IRAK1";  // substance in MWBUILTINUNIT_molecule
  substanceOnly species Activated_TRAF6 in cytoplasm = 3000;  // substance in MWBUILTINUNIT_molecule
  substanceOnly species TAB1 in cytoplasm = 1200;  // substance in MWBUILTINUNIT_molecule
  substanceOnly species TAB2 in cytoplasm = 1200;  // substance in MWBUILTINUNIT_molecule
  substanceOnly species Uev1A in cytoplasm = 1200;  // substance in MWBUILTINUNIT_molecule
  substanceOnly species UBC13 in cytoplasm = 1200;  // substance in MWBUILTINUNIT_molecule
  substanceOnly species IKB_Kinase in cytoplasm = 100;  // substance in MWBUILTINUNIT_molecule
  substanceOnly species $IKB_p65_p50 in cytoplasm = 4500;  // substance in MWBUILTINUNIT_molecule
  substanceOnly species Active_p65_p50 in cytoplasm = 100;  // substance in MWBUILTINUNIT_molecule
  substanceOnly species MyD88 in cytoplasm = 3000;  // substance in MWBUILTINUNIT_molecule
  species species_2_cytoplasm in cytoplasm = 0;
  substanceOnly species JAK1 in cytoplasm = 10;  // substance in MWBUILTINUNIT_molecule
  substanceOnly species JAK_2 in cytoplasm = 10;  // substance in MWBUILTINUNIT_molecule
  substanceOnly species _2_STAT4_cytoplasm_19 in cytoplasm = 40; _2_STAT4_cytoplasm_19 is "2- STAT4";  // substance in MWBUILTINUNIT_molecule
  substanceOnly species _2_STAT1_cytoplasm in cytoplasm = 25; _2_STAT1_cytoplasm is "2- STAT1";  // substance in MWBUILTINUNIT_molecule
  substanceOnly species Tyk2 in cytoplasm = 800;  // substance in MWBUILTINUNIT_molecule
  substanceOnly species Jak2 in cytoplasm = 800;  // substance in MWBUILTINUNIT_molecule
  substanceOnly species _2_STAT_3_cytoplasm in cytoplasm = 3200; _2_STAT_3_cytoplasm is "2-STAT 3";  // substance in MWBUILTINUNIT_molecule
  substanceOnly species NFIL3_cytoplasm in cytoplasm = 5000;  // substance in MWBUILTINUNIT_molecule
  substanceOnly species HDAC3_cytoplasm in cytoplasm = 3000;  // substance in MWBUILTINUNIT_molecule
  substanceOnly species NFAT5_cytoplasm in cytoplasm = 10;  // substance in MWBUILTINUNIT_molecule
  substanceOnly species IKK_activation_complex in cytoplasm = 1000;  // substance in MWBUILTINUNIT_molecule
  substanceOnly species IFN_gamma_cytoplasm in cytoplasm = 60;  // substance in MWBUILTINUNIT_molecule
  substanceOnly species TPL2 in cytoplasm = 1000;  // substance in MWBUILTINUNIT_molecule
  substanceOnly species MEK1_2 in cytoplasm = 1000; MEK1_2 is "MEK1/2";  // substance in MWBUILTINUNIT_molecule
  substanceOnly species ERK1_2 in cytoplasm = 500; ERK1_2 is "ERK1/2";  // substance in MWBUILTINUNIT_molecule
  substanceOnly species IL_10_cytoplasm in cytoplasm = 2000; IL_10_cytoplasm is "IL-10";  // substance in MWBUILTINUNIT_molecule
  substanceOnly species IL_12_cytoplasm in cytoplasm = 0; IL_12_cytoplasm is "IL-12";  // substance in MWBUILTINUNIT_molecule
  substanceOnly species JAK2 in cytoplasm = 1;  // substance in MWBUILTINUNIT_molecule
  substanceOnly species TYk2 in cytoplasm = 1;  // substance in MWBUILTINUNIT_molecule
  substanceOnly species _2_STAT4_cytoplasm_36 in cytoplasm = 0;  // substance in MWBUILTINUNIT_molecule
  substanceOnly species IFN_g in cytoplasm = 60;  // substance in MWBUILTINUNIT_molecule
  substanceOnly species SHP_1 in cytoplasm = 3000; SHP_1 is "SHP-1";  // substance in MWBUILTINUNIT_molecule
  substanceOnly species $LPG in PM = 1000;  // substance in MWBUILTINUNIT_molecule
  substanceOnly species $TLR2 in PM = 1000;  // substance in MWBUILTINUNIT_molecule
  substanceOnly species $TLR6 in PM = 1000;  // substance in MWBUILTINUNIT_molecule
  substanceOnly species TLR_LPGcomplex in PM = 2000; TLR_LPGcomplex is "TLR-LPGcomplex";  // substance in MWBUILTINUNIT_molecule
  substanceOnly species Il_12RB1 in PM = 1000; Il_12RB1 is "Il-12RB1";  // substance in MWBUILTINUNIT_molecule
  species species_1 in PM = 0;
  species species_2_PM in PM = 0;
  substanceOnly species $IFNgR in PM = 2000;  // substance in MWBUILTINUNIT_molecule
  substanceOnly species $IFNg_R_complex in PM = 200; IFNg_R_complex is "IFNg/R complex";  // substance in MWBUILTINUNIT_molecule
  species species_3 in PM = 0;
  species species_5 in PM = 0;
  substanceOnly species PM_IL_12 in PM = 6; PM_IL_12 is "PM IL-12";  // substance in MWBUILTINUNIT_molecule
  substanceOnly species $PM_IFN_g in PM = 1000;  // substance in MWBUILTINUNIT_molecule
  substanceOnly species $IL_10R in PM = 1000; IL_10R is "IL-10R";  // substance in MWBUILTINUNIT_molecule
  substanceOnly species $IL_10_PM in PM = 1000; IL_10_PM is "IL-10";  // substance in MWBUILTINUNIT_molecule
  substanceOnly species IL_10_R_complex in PM = 1700; IL_10_R_complex is "IL-10/R complex";  // substance in MWBUILTINUNIT_molecule
  substanceOnly species $TLR4 in PM = 1000;  // substance in MWBUILTINUNIT_molecule
  substanceOnly species LPG_TLR4_complex in PM = 1000; LPG_TLR4_complex is "LPG/TLR4 complex";  // substance in MWBUILTINUNIT_molecule
  substanceOnly species IL_12_PM in PM = 0; IL_12_PM is "IL-12";  // substance in MWBUILTINUNIT_molecule
  substanceOnly species $IL_12_R_PM_58 in PM = 0; IL_12_R_PM_58 is "IL-12 R";  // substance in MWBUILTINUNIT_molecule
  substanceOnly species IL_12_R_PM_59 in PM = 0; IL_12_R_PM_59 is "IL-12/R";  // substance in MWBUILTINUNIT_molecule
  species IL_12_PM_PM in PM_PM = 0; IL_12_PM_PM is "IL-12";
  species NFKB in nucleus = 0;
  species species_2_nucleus in nucleus = 0;
  substanceOnly species NF_KB in nucleus = 1000;  // substance in MWBUILTINUNIT_molecule
  substanceOnly species IL_12_nucleus in nucleus = 3000; IL_12_nucleus is "IL-12";  // substance in MWBUILTINUNIT_molecule
  substanceOnly species _2_STAT1_nucleus in nucleus = 20;  // substance in MWBUILTINUNIT_molecule
  substanceOnly species iNOS in nucleus = 10;  // substance in MWBUILTINUNIT_molecule
  substanceOnly species NFAT5_nucleus in nucleus = 5;  // substance in MWBUILTINUNIT_molecule
  substanceOnly species _2_STAT_3_nucleus in nucleus = 3200; _2_STAT_3_nucleus is "2-STAT 3";  // substance in MWBUILTINUNIT_molecule
  substanceOnly species NFIL3_nucleus in nucleus = 2000;  // substance in MWBUILTINUNIT_molecule
  substanceOnly species HDAC3_nucleus in nucleus = 3000;  // substance in MWBUILTINUNIT_molecule
  substanceOnly species SP_1 in nucleus = 4000; SP_1 is "SP-1";  // substance in MWBUILTINUNIT_molecule
  substanceOnly species IL_10_nucleus in nucleus = 2000; IL_10_nucleus is "IL-10";  // substance in MWBUILTINUNIT_molecule
  substanceOnly species _2_STAT4_nucleus in nucleus = 0;  // substance in MWBUILTINUNIT_molecule
  substanceOnly species IFN_gamma_nucleus in nucleus = 50;  // substance in MWBUILTINUNIT_molecule
  substanceOnly species NLRP3 in nucleus = 15;  // substance in MWBUILTINUNIT_molecule

  // Reactions:
  reaction_1: $LPG + $TLR2 + $TLR6 => TLR_LPGcomplex; reaction_1_kForward1*LPG*TLR2*TLR6;
    reaction_1_kForward1 = 9e-9 MWDERIVEDUNIT_1__molecule_molecule_second;
  reaction_2: TLR_LPGcomplex => MyD88; reaction_2_kForward1*TLR_LPGcomplex;
    reaction_2_kForward1 = 1e-9 MWDERIVEDUNIT_1__second;
  reaction_3: IRAK4 + MyD88 => IRAK4 + P_IRAK1; reaction_3_Vm1*MyD88/(reaction_3_Km1 + MyD88);
    reaction_3_Vm1 = 30 MWDERIVEDUNIT_molecule__second; reaction_3_Km1 = 10 MWBUILTINUNIT_molecule;
  reaction_4: P_IRAK1 => Activated_TRAF6; reaction_4_Vm1*P_IRAK1/(reaction_4_Km1 + P_IRAK1);
    reaction_4_Km1 = 10 MWBUILTINUNIT_molecule; reaction_4_Vm1 = 15 MWDERIVEDUNIT_molecule__second;
  reaction_5: Activated_TRAF6 => IKK_activation_complex; reaction_5_kForward1*Activated_TRAF6;
    reaction_5_kForward1 = 0.01 MWDERIVEDUNIT_1__second;
  reaction_6: IKB_Kinase => Active_p65_p50 + IKB_Kinase; reaction_6_Vm1*IKB_Kinase/(reaction_6_Km1 + IKB_Kinase);
    reaction_6_Km1 = 8 MWBUILTINUNIT_molecule; reaction_6_Vm1 = 10 MWDERIVEDUNIT_molecule__second;
  reaction_7: Active_p65_p50 => NF_KB; reaction_7_kForward1*Active_p65_p50;
    reaction_7_kForward1 = 0.1 MWDERIVEDUNIT_1__second;
  reaction_13: $IFNgR + $PM_IFN_g => $IFNg_R_complex; reaction_13_kForward1*IFNgR*PM_IFN_g;
    reaction_13_kForward1 = 1e-5 MWDERIVEDUNIT_1__molecule_second;
  reaction_14: $IFNg_R_complex + JAK1 + JAK_2 => JAK1 + JAK_2 + _2_STAT1_cytoplasm; reaction_14_Vm1*IFNg_R_complex/(reaction_14_Km1 + IFNg_R_complex);
    reaction_14_Vm1 = 50 MWDERIVEDUNIT_molecule__second; reaction_14_Km1 = 10 MWBUILTINUNIT_molecule;
  reaction_16: _2_STAT1_nucleus => iNOS + NFAT5_nucleus; reaction_16_Vm1*_2_STAT1_nucleus^reaction_16_n1/(reaction_16_Kp1 + _2_STAT1_nucleus^reaction_16_n1);
    reaction_16_Vm1 = 1 MWDERIVEDUNIT_molecule__second; reaction_16_n1 = 1; reaction_16_Kp1 = 1 MWBUILTINUNIT_molecule;
  reaction_17: NFAT5_cytoplasm => IL_12_nucleus; reaction_17_Vm1*NFAT5_cytoplasm^reaction_17_n1/(reaction_17_Kp1 + NFAT5_cytoplasm^reaction_17_n1);
    reaction_17_Vm1 = 1 MWDERIVEDUNIT_molecule__second; reaction_17_n1 = 1; reaction_17_Kp1 = 1 MWBUILTINUNIT_molecule;
  reaction_23: _2_STAT1_cytoplasm => _2_STAT1_nucleus; reaction_23_kForward1*_2_STAT1_cytoplasm;
    reaction_23_kForward1 = 0.01 MWDERIVEDUNIT_1__second;
  reaction_24: $IL_10_PM + $IL_10R => IL_10_R_complex; reaction_24_kForward1*IL_10_PM*IL_10R;
    reaction_24_kForward1 = 1e-7 MWDERIVEDUNIT_1__molecule_second;
  reaction_25: IL_10_R_complex + Jak2 + Tyk2 => Tyk2 + Jak2 + _2_STAT_3_cytoplasm; reaction_25_Vm1*IL_10_R_complex/(reaction_25_Km1 + IL_10_R_complex);
    reaction_25_Vm1 = 10 MWDERIVEDUNIT_molecule__second; reaction_25_Km1 = 10 MWBUILTINUNIT_molecule;
  reaction_27: _2_STAT_3_cytoplasm => _2_STAT_3_nucleus; reaction_27_kForward1*_2_STAT_3_cytoplasm;
    reaction_27_kForward1 = 0.1 MWDERIVEDUNIT_1__second;
  reaction_28: _2_STAT_3_nucleus => NFIL3_nucleus + HDAC3_nucleus; reaction_28_Vm1*_2_STAT_3_nucleus^reaction_28_n1/(reaction_28_Kp1 + _2_STAT_3_nucleus^reaction_28_n1);
    reaction_28_Vm1 = 120 MWDERIVEDUNIT_molecule__second; reaction_28_Kp1 = 1 MWBUILTINUNIT_molecule; reaction_28_n1 = 1;
  reaction_29: NFIL3_nucleus => NFIL3_cytoplasm; reaction_29_kForward1*NFIL3_nucleus;
    reaction_29_kForward1 = 0.5 MWDERIVEDUNIT_1__second;
  reaction_30: NFIL3_cytoplasm + IL_12_nucleus => NFIL3_cytoplasm; reaction_30_Vm2*IL_12_nucleus/(reaction_30_Km1*(1 + NFIL3_cytoplasm/reaction_30_Ki1) + IL_12_nucleus);
    reaction_30_Vm2 = 200 MWDERIVEDUNIT_molecule__second; reaction_30_Km1 = 1 MWBUILTINUNIT_molecule; reaction_30_Ki1 = 10 MWBUILTINUNIT_molecule;
  reaction_31: HDAC3_nucleus => HDAC3_cytoplasm; reaction_31_kForward1*HDAC3_nucleus;
    reaction_31_kForward1 = 0.5 MWDERIVEDUNIT_1__second;
  reaction_32: HDAC3_cytoplasm + IL_12_nucleus => HDAC3_cytoplasm; reaction_32_Vm2*IL_12_nucleus/(reaction_32_Km1*(1 + HDAC3_cytoplasm/Ki2) + IL_12_nucleus);
    reaction_32_Vm2 = 80 MWDERIVEDUNIT_molecule__second; reaction_32_Km1 = 1 MWBUILTINUNIT_molecule; Ki2 = 10 MWBUILTINUNIT_molecule;
  reaction_35: NFAT5_nucleus => NFAT5_cytoplasm; reaction_35_kForward1*NFAT5_nucleus;
    reaction_35_kForward1 = 0.01 MWDERIVEDUNIT_1__second;
  reaction_37: NFAT5_cytoplasm => iNOS; reaction_37_Vm1*NFAT5_cytoplasm^reaction_37_n1/(reaction_37_Kp1 + NFAT5_cytoplasm^reaction_37_n1);
    reaction_37_Vm1 = 10 MWDERIVEDUNIT_molecule__second; reaction_37_n1 = 1; reaction_37_Kp1 = 1 MWBUILTINUNIT_molecule;
  reaction_38: IKK_activation_complex => IKB_Kinase; reaction_38_kForward1*IKK_activation_complex;
    reaction_38_kForward1 = 0.001 MWDERIVEDUNIT_1__second;
  reaction_9: $LPG + $TLR4 => LPG_TLR4_complex; reaction_9_kForward1*LPG*TLR4;
    reaction_9_kForward1 = 5e-7 MWDERIVEDUNIT_1__molecule_second;
  reaction_10: LPG_TLR4_complex => TPL2; reaction_10_kForward1*LPG_TLR4_complex;
    reaction_10_kForward1 = 0.001 MWDERIVEDUNIT_1__second;
  reaction_11: TPL2 => MEK1_2 + TPL2; reaction_11_Vm1*TPL2/(reaction_11_Km1 + TPL2);
    reaction_11_Vm1 = 10 MWDERIVEDUNIT_molecule__second; reaction_11_Km1 = 5 MWBUILTINUNIT_molecule;
  reaction_12: MEK1_2 => ERK1_2 + MEK1_2; reaction_12_Vm1*MEK1_2/(reaction_12_Km1 + MEK1_2);
    reaction_12_Vm1 = 10 MWDERIVEDUNIT_molecule__second; reaction_12_Km1 = 5 MWBUILTINUNIT_molecule;
  reaction_18: ERK1_2 => SP_1; reaction_18_Vm1*ERK1_2/(reaction_18_Km1 + ERK1_2);
    reaction_18_Vm1 = 50 MWDERIVEDUNIT_molecule__second; reaction_18_Km1 = 30 MWBUILTINUNIT_molecule;
  reaction_19: SP_1 => IL_10_nucleus; reaction_19_Vm1*SP_1^reaction_19_n1/(reaction_19_Kp1 + SP_1^reaction_19_n1);
    reaction_19_Vm1 = 50 MWDERIVEDUNIT_molecule__second; reaction_19_n1 = 1; reaction_19_Kp1 = 25 MWBUILTINUNIT_molecule;
  reaction_20: IL_10_nucleus => IL_10_cytoplasm; reaction_20_kForward1*IL_10_nucleus;
    reaction_20_kForward1 = 0.0001 MWDERIVEDUNIT_1__second;
  reaction_21: IL_10_cytoplasm => $IL_10_PM; reaction_21_kForward1*IL_10_cytoplasm;
    reaction_21_kForward1 = 0.001 MWDERIVEDUNIT_1__second;
  reaction_22: IL_12_nucleus => IL_12_cytoplasm; reaction_22_kForward1*IL_12_nucleus;
    reaction_22_kForward1 = 1e-7 MWDERIVEDUNIT_1__second;
  reaction_39: IL_12_cytoplasm => IL_12_PM; reaction_39_kForward1*IL_12_cytoplasm;
    reaction_39_kForward1 = 0 MWDERIVEDUNIT_1__second;
  reaction_40: $IL_12_R_PM_58 + IL_12_PM => IL_12_R_PM_59; reaction_40_kForward1*IL_12_R_PM_58*IL_12_PM;
    reaction_40_kForward1 = 0 MWDERIVEDUNIT_1__molecule_second;
  reaction_41: TYk2 + JAK2 + IL_12_R_PM_59 => TYk2 + JAK2 + _2_STAT4_cytoplasm_36; reaction_41_Vm1*IL_12_R_PM_59/(reaction_41_Km1 + IL_12_R_PM_59);
    reaction_41_Vm1 = 1 MWDERIVEDUNIT_molecule__second; reaction_41_Km1 = 1 MWBUILTINUNIT_molecule;
  reaction_42: _2_STAT4_cytoplasm_36 => _2_STAT4_nucleus; reaction_42_kForward1*_2_STAT4_cytoplasm_36;
    reaction_42_kForward1 = 0 MWDERIVEDUNIT_1__second;
  reaction_43: _2_STAT4_nucleus => IFN_gamma_nucleus; reaction_43_Vm1*_2_STAT4_nucleus^reaction_43_n1/(reaction_43_Kp1 + _2_STAT4_nucleus^reaction_43_n1);
    reaction_43_Vm1 = 1 MWDERIVEDUNIT_molecule__second; reaction_43_n1 = 1; reaction_43_Kp1 = 1 MWDERIVEDUNIT_molecule__second;
  reaction_44: IFN_gamma_nucleus => IFN_g; reaction_44_kForward1*IFN_gamma_nucleus;
    reaction_44_kForward1 = 0.2 MWDERIVEDUNIT_1__second;
  reaction_45: IFN_g => $PM_IFN_g; reaction_45_kForward1*IFN_g;
    reaction_45_kForward1 = 0.1 MWDERIVEDUNIT_1__second;
  reaction_15: _2_STAT1_nucleus => IL_12_nucleus; reaction_15_Vm1*_2_STAT1_nucleus^reaction_15_n1/(reaction_15_Kp1 + _2_STAT1_nucleus^reaction_15_n1);
    reaction_15_Vm1 = 1 MWDERIVEDUNIT_molecule__second; reaction_15_n1 = 1; reaction_15_Kp1 = 1 MWBUILTINUNIT_molecule;
  reaction_8: NF_KB => IL_12_nucleus + NLRP3; reaction_8_Vm1*NF_KB^reaction_8_n1/(reaction_8_Kp1 + NF_KB^reaction_8_n1);
    reaction_8_Vm1 = 100 MWDERIVEDUNIT_molecule__second; reaction_8_n1 = 1; reaction_8_Kp1 = 50 MWBUILTINUNIT_molecule;
  reaction_26: IL_10_cytoplasm => SHP_1; reaction_26_kForward1*IL_10_cytoplasm;
    reaction_26_kForward1 = 1 MWDERIVEDUNIT_1__second;
  reaction_33: SHP_1 + NFAT5_cytoplasm => SHP_1; reaction_33_Vm1*NFAT5_cytoplasm/((reaction_33_Ks1 + NFAT5_cytoplasm)*(1 + SHP_1/reaction_33_Ki1));
    reaction_33_Vm1 = 0 MWDERIVEDUNIT_molecule__second; reaction_33_Ks1 = 0 MWBUILTINUNIT_molecule; reaction_33_Ki1 = 1 MWBUILTINUNIT_molecule;
  reaction_34: SHP_1 + Active_p65_p50 => SHP_1; reaction_34_Vm1*Active_p65_p50/(reaction_34_Km1*(1 + SHP_1/reaction_34_Ki1) + Active_p65_p50);
    reaction_34_Vm1 = 10 MWDERIVEDUNIT_molecule__second; reaction_34_Km1 = 1 MWBUILTINUNIT_molecule; reaction_34_Ki1 = 10 MWBUILTINUNIT_molecule;
  reaction_36: NFAT5_cytoplasm => NLRP3; reaction_36_Vm1*NFAT5_cytoplasm^reaction_36_n1/(reaction_36_Kp1 + NFAT5_cytoplasm^reaction_36_n1);
    reaction_36_Vm1 = 1 MWDERIVEDUNIT_molecule__second; reaction_36_n1 = 1; reaction_36_Kp1 = 1 MWBUILTINUNIT_molecule;
  reaction_46: _2_STAT_3_nucleus + NLRP3 => _2_STAT_3_nucleus; reaction_46_Vm1*NLRP3/((reaction_46_Ks1 + NLRP3)*(1 + _2_STAT_3_nucleus/reaction_46_Ki1));
    reaction_46_Vm1 = 1 MWDERIVEDUNIT_molecule__second; reaction_46_Ks1 = 1 MWBUILTINUNIT_molecule; reaction_46_Ki1 = 1 MWBUILTINUNIT_molecule;

  // Unit definitions:
  unit MWBUILTINUNIT_molecule = 1.660539e-24 mole;
  unit MWDERIVEDUNIT_1__molecule_molecule_second = 3.626619e47 dimensionless / (mole^2 * second); MWDERIVEDUNIT_1__molecule_molecule_second is "1/(molecule*molecule*second)";
  unit MWDERIVEDUNIT_1__second = dimensionless / second; MWDERIVEDUNIT_1__second is "1/second";
  unit MWDERIVEDUNIT_molecule__second = mole * 1.660539e-24 dimensionless / second; MWDERIVEDUNIT_molecule__second is "molecule/second";
  unit MWDERIVEDUNIT_1__molecule_second = 6.022142e23 dimensionless / (mole * second); MWDERIVEDUNIT_1__molecule_second is "1/(molecule*second)";
end
