// SBML level 2 version 4
// dcterms:bibliographicCitation: http://identifiers.org/pubmed/38914538

function Constant_flux__irreversible(v)
  v;
end
Constant_flux__irreversible is "Constant flux (irreversible)";

function cell_production_without_factor_1(Epi, k_turnE)
  k_turnE*Epi;
end

function Cell_degradation_2(Mac, k_turnM)
  1/k_turnM*Mac;
end

function Cell_degradation_4(Tcell, k_turnT)
  1/k_turnT*Tcell;
end

function Cell_degradation_1(Bcell, k_turnB)
  1/k_turnB*Bcell;
end

function cell_degradation_with_factor_1(Cue, Epi, k_turnE)
  1/k_turnE*Cue*Epi;
end

function Cell_production_3(Cue, Neutr, k_turnN)
  k_turnN*Cue*Neutr;
end

function heal_with__1_order_factor_2(Resolution, k_res)
  1/k_res*Resolution;
end
heal_with__1_order_factor_2 is "heal with -1 order factor_2";

function heal_with__1_order_factor_1(ActiveIBD, k_act)
  1/k_act*ActiveIBD;
end
heal_with__1_order_factor_1 is "heal with -1 order factor_1";

function Cell_production_1(Bcell, Resolution, k_turnB)
  k_turnB*Resolution*Bcell;
end

function Cell_production_4(ActiveIBD, Tcell, k_turnT)
  k_turnT*ActiveIBD*Tcell;
end

function Cell_production_2(ActiveIBD, Mac, k_turnM)
  k_turnM*ActiveIBD*Mac;
end

function Cell_degradation_3(Neutr, k_turnN)
  1/k_turnN*Neutr;
end

model Kilian2024___Immune_cell_dynamics_in_Cue_Induced_Extended_Human_Colitis_Model()
  // Kilian2024 - Immune cell dynamics in Cue-Induced Extended Human Colitis Model
  // Single-cell technologies such as scRNA-seq and flow cytometry provide critical insights into immune cell behavior in inflammatory bowel disease (IBD). However, integrating these datasets into computational models for dynamic analysis remains challenging. Here, Kilian et al., (2024) developed a deterministic ODE-based model that incorporates these technologies to study immune cell population changes in murine colitis. The model parameters were optimized to fit experimental data, ensuring an accurate representation of immune cell behavior over time. It was then validated by comparing simulations with experimental data using Pearson’s correlation and further tested on independent datasets to confirm its robustness. Additionally, the model was applied to clinical bulk RNA-seq data from human IBD patients, providing valuable insights into immune system dynamics and potential therapeutic strategies.
  // Figure 4c, obtained from the simulation of human colitis model is highlighted here.
  // This model is described in the article:
  // Kilian, C., Ulrich, H., Zouboulis, V.A. et al. Longitudinal single-cell data informs deterministic modelling of inflammatory bowel disease. npj Syst Biol Appl 10, 69 (2024). https://doi.org/10.1038/s41540-024-00395-9
  // Abstract:
  // Single-cell-based methods such as flow cytometry or single-cell mRNA sequencing (scRNA-seq) allow deep molecular and cellular profiling of immunological processes. Despite their high throughput, however, these measurements represent only a snapshot in time. Here, we explore how longitudinal single-cell-based datasets can be used for deterministic ordinary differential equation (ODE)-based modelling to mechanistically describe immune dynamics. We derived longitudinal changes in cell numbers of colonic cell types during inflammatory bowel disease (IBD) from flow cytometry and scRNA-seq data of murine colitis using ODE-based models. Our mathematical model generalised well across different protocols and experimental techniques, and we hypothesised that the estimated model parameters reflect biological processes. We validated this prediction of cellular turnover rates with KI-67 staining and with gene expression information from the scRNA-seq data not used for model fitting. Finally, we tested the translational relevance of the mathematical model by deconvolution of longitudinal bulk mRNA-sequencing data from a cohort of human IBD patients treated with olamkicept. We found that neutrophil depletion may contribute to IBD patients entering remission. The predictive power of IBD deterministic modelling highlights its potential to advance our understanding of immune dynamics in health and disease.
  // This model was curated during the Hackathon hosted by BioMed X GmbH in 2024.
  // isDescribedBy pubmed:38914538
  // hasVersion DOID:0050589
  // hasProperty mamo:MAMO_0000046
  // hasTaxon taxonomy:9606
  // isDescribedBy pubmed:38914538
  // biomodels.db:MODEL2502180001

  // Compartments:
  compartment Comp1 = 1; Comp1 is "Colon mucosal";  // isPartOf BTO:0000269; isVersionOf UBERON:0000317

  // Species:
  species Mac in Comp1 = exp(-2.799484);  // CL:0000235
  species Bcell in Comp1 = exp(-3.06002);  // CL:0000236; isVersionOf GO:0042100; isDescribedBy pubmed:38914538
  species Neutr in Comp1 = exp(-3.03311);  // CL:0000775
  species Tcell in Comp1 = exp(-3.838512);  // CL:0000084
  species Epi in Comp1 = exp(-1.200719);  // CL:0000066
  species Cue in Comp1 = exp(-2.647496);  // isVersionOf GO:0043065; isVersionOf GO:0007165; isVersionOf GO:0090022
  species ActiveIBD in Comp1 = exp(1.877373);  // hasVersion DOID:0050589
  species Resolution in Comp1 = exp(0.08890932);  // isVersionOf ncit:C25655

  // Parameters:
  k_turnB = exp(0.07099958); k_turnB has unit_0;
  k_turnM = exp(-0.9564683); k_turnM has unit_0;
  k_turnN = exp(1.328134); k_turnN has unit_0;
  k_turnT = exp(-0.9539863); k_turnT has unit_0;
  k_turnE = exp(-1.332903); k_turnE has unit_0;
  k_cue = exp(-7.849804); k_cue has unit_0;
  k_act = exp(0.9577615); k_act has unit_0;
  k_res = exp(-0.07030369); k_res has unit_0;

  // Reactions:
  R4_Bcell_degradation: Bcell => ; Comp1*Cell_degradation_1(Bcell, k_turnB); R4_Bcell_degradation is "R7 Bcell degradation";
  R6_Mac_degradation: Mac => ; Comp1*Cell_degradation_2(Mac, k_turnM); R6_Mac_degradation is "R9 Mac degradation";
  R8_Neutr_degradation: Neutr => ; Comp1*Cell_degradation_3(Neutr, k_turnN); R8_Neutr_degradation is "R11 Neutr degradation";
  R10_Tcell_degradation: Tcell => ; Comp1*Cell_degradation_4(Tcell, k_turnT); R10_Tcell_degradation is "R13 Tcell degradation";
  R14_Epi_cell_production: => Epi; Comp1*cell_production_without_factor_1(Epi, k_turnE);
  R1_Cue_decay: Cue => ; Comp1*k_cue*Cue;
  R2_ActiveIBD_develop: => ActiveIBD; Comp1*Constant_flux__irreversible(k_act);
  R3_ActiveIBD_heal: ActiveIBD => ; Comp1*heal_with__1_order_factor_1(ActiveIBD, k_act);
  R4_Resolution_develop: => Resolution; Comp1*Constant_flux__irreversible(k_res);
  R5_Resolution_decay: Resolution => ; Comp1*heal_with__1_order_factor_2(Resolution, k_res);
  R6_Bcell_production: => Bcell; Comp1*Cell_production_1(Bcell, Resolution, k_turnB);  // modifiers: Resolution
  R8_Mac_production: => Mac; Comp1*Cell_production_2(ActiveIBD, Mac, k_turnM);  // modifiers: ActiveIBD
  R10_Neutr_production: => Neutr; Comp1*Cell_production_3(Cue, Neutr, k_turnN);  // modifiers: Cue
  R12_Tcell_production: => Tcell; Comp1*Cell_production_4(ActiveIBD, Tcell, k_turnT);  // modifiers: ActiveIBD
  R15_Epi_cell_degradation: Epi => ; Comp1*cell_degradation_with_factor_1(Cue, Epi, k_turnE);  // modifiers: Cue

  // Unit definitions:
  unit length = metre;
  unit area = metre^2;
  unit volume = litre;
  unit time = 86400 second;
  unit substance = item;
  unit unit_0 = 1 / (86400 second); unit_0 is "1/d";
end
