// SBML level 2 version 4
// dcterms:bibliographicCitation: urn:miriam:pubmed:25140193

function Constant_flux__irreversible(v)
  v;
end
Constant_flux__irreversible is "Constant flux (irreversible)";

function function_for_IL2_production(a4, Ht, I10, i2, S, s4)
  a4*Ht/((1 + I10/i2)*(1 + S/s4));
end

function function_for_CD8_Tcells_proliferation(a1, I2, Dl, mE, S, s2, i1, d1)
  a1*I2*Dl*mE/((1 + S/s2)*(i1 + I2)*(d1 + Dl));
end

function function_for_indirect_production(a, M)
  a*M;
end

function function_for_Treg_proliferation(a3, I2, Dl, mG, i1, d1)
  a3*I2*Dl*mG/((i1 + I2)*(d1 + Dl));
end

function function_for_CD4_T_cells_proliferation(a2, I2, Dl, Du, mH, S, s2, i1, d1)
  a2*I2*(Dl + Du)*mH/((1 + S/s2)*(i1 + I2)*(d1 + Dl + Du));
end

function function_for_CD4_to_Treg_conversion(g2, Ht, S, s3)
  g2*Ht*S/(s3 + S);
end

function function_for_DC_licensing(r1, Du, mH)
  r1*Du/(1 + Du/mH);
end

function function_for_Chemo_induced_tumor_death(kT, M, T)
  kT*(1 - exp(-M))*T;
end

function function_for_induced_mass_action(c, T, N)
  c*T*N;
end

function function_for_unlicensed_DC_production(p, T, I10, i2, Gt, g2)
  p*T/((1 + I10/i2)*(1 + Gt/g2));
end

function function_for_tumor_growth(a, T, b)
  a*T*(1 - b*T);
end

function function_for_IL2_NKcells_induction(pN, N, I2, qN)
  pN*N*I2/(qN + I2);
end

function function_for_CD8_tumor_death(d, T, Et, e, g1, Gt, S, s1)
  d*T*Et/(Et + e*T)*(1/(1 + g1*(Gt/Et)*(1 + S/s1)));
end

model Kim2014___tumor_model_under_immune_suppression()
  // Kim2014 - Tumor model under immune suppression
  // its a mathematical model explaining the impact of chemotherapy and immunotherpay together on Tumor cells involving cytokines like Il2, IL10 and TGFbeta, immune cells like CD4+ T cells, CD8+ T cells, Memory T cells, NK cells, dendrtic cells. This model is based on the previous model published by Robertson-Tessi M 2012 (PMID:22051568).
  // isDescribedBy pubmed:25140193

  // Compartments:
  compartment Tumor_Microenvironment = 1;

  // Species:
  species Tumor_cells in Tumor_Microenvironment = 1;
  species NK_cells in Tumor_Microenvironment = 250000000;
  species CD8_Tcells in Tumor_Microenvironment = 526800;
  species IL2 in Tumor_Microenvironment = 1173;
  species Un_Dendritic_cells in Tumor_Microenvironment = 47250000;
  species l_Dendritic_cells in Tumor_Microenvironment = 10;
  species CD4_Tcells in Tumor_Microenvironment = 1053600;
  species TGFb in Tumor_Microenvironment = 0;
  species Treg in Tumor_Microenvironment = 179500;
  species IL10 in Tumor_Microenvironment = 0;
  species M in Tumor_Microenvironment = 0;
  species Chemo in Tumor_Microenvironment = 1;

  // Parameters:
  a = 0.431 unit_0;
  b = 1.02e-9 unit_1;
  a1 = 16 unit_0;
  mH = 1053600 unit_1;
  dDU = 0.14 unit_0;
  kDU = 0.05 unit_0;
  dDL = 0.5 unit_0;
  a2 = 1.9 unit_0;
  r2 = 0.022 unit_0;
  s3 = 34000 unit_1;
  c1 = 3.177e-13 unit_2;
  e = 1.2 unit_1;
  g1 = 1.2 unit_1;
  kT = 0.9 unit_0;
  b1 = 3121875 unit_0;
  dN = 0.0125 unit_0;
  c2 = 3.177e-13 unit_2;
  pN = 0.0668 unit_0;
  kN = 0.6 unit_0;
  qN = 250360 unit_1;
  s2 = 580000 unit_1;
  i1 = 4909 unit_1;
  d1 = 579579 unit_1;
  c3 = 3.42e-10 unit_2;
  mE = 526800 unit_1;
  kET = 0.6 unit_0;
  p = 0.1 unit_0;
  i2 = 1200 unit_1;
  g2 = 20000000 unit_3;
  r1 = 0.5 unit_0;
  d = 0.9 unit_0;
  dHT = 0.1 unit_0;
  kHT = 0.6 unit_1;
  p3 = 4.2e-5 unit_2;
  p4 = 3.9e-7 unit_2;
  dI10 = 20 unit_0;
  dM = 0.9 unit_0;
  p1 = 0.00036 unit_2;
  p2 = 0.0022 unit_2;
  dS = 14.3 unit_0;
  a4 = 0.278 unit_2;
  i3 = 2250 unit_1;
  s4 = 18000 unit_1;
  dI2 = 14.3 unit_0;
  s1 = 0 unit_1;
  kGT = 0.6 unit_1;
  a3 = 3.6 unit_0;
  mG = 175900 unit_1;
  dGT = 0.1 unit_0;
  vE = 1 unit_1;
  w1 = 3500000 unit_1;
  vM = 1 unit_1;
  w2 = 0.5 unit_1;

  // Reactions:
  Tumor_growth: => Tumor_cells; Tumor_Microenvironment*function_for_tumor_growth(a, Tumor_cells, b);
  NK_induced_tumor_death: Tumor_cells => ; Tumor_Microenvironment*function_for_induced_mass_action(c1, Tumor_cells, NK_cells);  // modifiers: NK_cells
  CD8__induced_tumor_death: Tumor_cells => ; Tumor_Microenvironment*function_for_CD8_tumor_death(d, Tumor_cells, CD8_Tcells, e, g1, Treg, TGFb, s1); CD8__induced_tumor_death is "CD8+_induced_tumor_death";  // modifiers: CD8_Tcells, Treg, TGFb
  Chemotherapy_Tumor_death: Tumor_cells => ; Tumor_Microenvironment*function_for_Chemo_induced_tumor_death(kT, Chemo, Tumor_cells);  // modifiers: Chemo
  NK_Cells_Production: => NK_cells; Tumor_Microenvironment*Constant_flux__irreversible(b1);
  NK_Cells_Turnover: NK_cells => ; Tumor_Microenvironment*dN*NK_cells;
  NK_Cells_death: NK_cells => ; Tumor_Microenvironment*function_for_induced_mass_action(c2, NK_cells, Tumor_cells);  // modifiers: Tumor_cells
  IL2_NK_Cells_Stimulation: => NK_cells; Tumor_Microenvironment*function_for_IL2_NKcells_induction(pN, NK_cells, IL2, qN);  // modifiers: IL2
  Chemo_NK_cells_death: NK_cells => ; Tumor_Microenvironment*function_for_Chemo_induced_tumor_death(kT, Chemo, NK_cells);  // modifiers: Chemo
  CD8_Tcells_proliferation: => CD8_Tcells; Tumor_Microenvironment*function_for_CD8_Tcells_proliferation(a1, IL2, l_Dendritic_cells, mE, TGFb, s2, i1, d1); CD8_Tcells_proliferation is "CD8+Tcells_proliferation";  // modifiers: IL2, l_Dendritic_cells, TGFb
  CD8_Tcells_death: CD8_Tcells => ; Tumor_Microenvironment*function_for_induced_mass_action(c3, CD8_Tcells, Tumor_cells); CD8_Tcells_death is "CD8+Tcells_death";  // modifiers: Tumor_cells
  CD4_Tcells_Proliferation: => CD4_Tcells; Tumor_Microenvironment*function_for_CD4_T_cells_proliferation(a2, IL2, l_Dendritic_cells, Un_Dendritic_cells, mH, TGFb, s2, i1, d1);  // modifiers: IL2, l_Dendritic_cells, Un_Dendritic_cells, TGFb
  CD4_Treg_conversion: CD4_Tcells => Treg; Tumor_Microenvironment*function_for_CD4_to_Treg_conversion(r2, CD4_Tcells, TGFb, s3);  // modifiers: TGFb
  CD4_Tcells_Turnover: CD4_Tcells => ; Tumor_Microenvironment*dHT*CD4_Tcells;
  Chemo_CD4_Tcells_death: CD4_Tcells => ; Tumor_Microenvironment*function_for_Chemo_induced_tumor_death(kGT, Chemo, CD4_Tcells);  // modifiers: Chemo
  Treg_Proliferation: => Treg; Tumor_Microenvironment*function_for_Treg_proliferation(a3, IL2, l_Dendritic_cells, mG, i1, d1);  // modifiers: IL2, l_Dendritic_cells
  Treg_Turnover: Treg => ; Tumor_Microenvironment*dGT*Treg;
  Chemo_Treg_death: Treg => ; Tumor_Microenvironment*function_for_Chemo_induced_tumor_death(kGT, Chemo, Treg);  // modifiers: Chemo
  TGFb_production_Treg: => TGFb; Tumor_Microenvironment*function_for_indirect_production(p1, Treg);  // modifiers: Treg
  Chemo_induced_CD8_Tcells_death: CD8_Tcells => ; Tumor_Microenvironment*function_for_Chemo_induced_tumor_death(kET, Chemo, CD8_Tcells); Chemo_induced_CD8_Tcells_death is "Chemo_induced_CD8+Tcells_death";  // modifiers: Chemo
  Un_Dendritic_cells_proliferation: => Un_Dendritic_cells; Tumor_Microenvironment*function_for_unlicensed_DC_production(p, Tumor_cells, IL10, i2, Treg, g2);  // modifiers: Tumor_cells, IL10, Treg
  Dendritic_cell_licensing: Un_Dendritic_cells => l_Dendritic_cells; Tumor_Microenvironment*function_for_DC_licensing(r1, Un_Dendritic_cells, mH);
  Un_Dendritic_cells_Turnover: Un_Dendritic_cells => ; Tumor_Microenvironment*dDU*Un_Dendritic_cells;
  Chemo_induced_Un_Dendritic_cells_death: Un_Dendritic_cells => ; Tumor_Microenvironment*function_for_Chemo_induced_tumor_death(kDU, Chemo, Un_Dendritic_cells);  // modifiers: Chemo
  l_Dendritic_cells_Turnover: l_Dendritic_cells => ; Tumor_Microenvironment*dDL*l_Dendritic_cells;
  TGFb_Turnover: TGFb => ; Tumor_Microenvironment*dS*TGFb;
  TGFb_production_Tumor: => TGFb; Tumor_Microenvironment*function_for_indirect_production(p2, Tumor_cells);  // modifiers: Tumor_cells
  IL2_production: => IL2; Tumor_Microenvironment*function_for_IL2_production(a4, CD4_Tcells, IL10, i3, TGFb, s4);  // modifiers: CD4_Tcells, IL10, TGFb
  IL2_Turnover: IL2 => ; Tumor_Microenvironment*dI2*IL2;
  IL10_production_Treg: => IL10; Tumor_Microenvironment*function_for_indirect_production(p3, Treg);  // modifiers: Treg
  IL10_production_Tumor: => IL10; Tumor_Microenvironment*function_for_indirect_production(p4, Tumor_cells);  // modifiers: Tumor_cells
  IL10_Turnover: IL10 => ; Tumor_Microenvironment*dI10*IL10;
  Excretion_Drug_toxicity: M => ; Tumor_Microenvironment*dM*M;

  // Unit definitions:
  unit time = 86400 second;
  unit unit_0 = 1 / (8640 second); unit_0 is "1/d";
  unit unit_1 = dimensionless^0; unit_1 is "dimensionless";
  unit unit_2 = 1 / (8640 second); unit_2 is "1/(Cells*d)";
  unit unit_3 = dimensionless^0; unit_3 is "Cells";
end
