// SBML level 2 version 4

function _1sub_1_activator_1_parameter_1(parameter_7, HP_Lumen, E)
  E*(HP_Lumen + 1)*parameter_7;
end

function _1sub_1_activator_1_parameter_2(parameter_7, HP_Lumen, species_5)
  HP_Lumen*species_5*parameter_7;
end

function _1sub_2_activators_2_parameters_1(parameter_24, s17, s21, tDC_Lamina_Propia)
  s17*(parameter_24*s21 + parameter_24*tDC_Lamina_Propia);
end

function _1sub_2_activators_2_parameters_2(parameter_104, parameter_29, s26, nT, species_20)
  nT*(parameter_29*s26 + parameter_104*species_20);
end

function _1sub_1_activator_1_parameter_3(parameter_30, s27, nT)
  nT*s27*parameter_30;
end

function bact_repo_1(parameter_20, parameter_93, HP_Lamina_Propia)
  parameter_20*HP_Lamina_Propia/(parameter_93 + HP_Lamina_Propia);
end

function bact_repo_2(parameter_20, parameter_93, HP_Lumen)
  parameter_20*HP_Lumen/(parameter_93 + HP_Lumen);
end

function _1_sub_3_activators_3_parameters_1(parameter_100, parameter_23, s17, s19, eDC_Lamina_Propia, species_18)
  s17*(parameter_23*s19 + parameter_23*eDC_Lamina_Propia + parameter_100*species_18);
end

function _1_sub_3_activators_3_parameters_2(parameter_22, parameter_99, s17, s19, eDC_Lamina_Propia, species_18)
  s17*(parameter_22*s19 + parameter_22*eDC_Lamina_Propia + parameter_99*species_18);
end

function Constant_Flux__1_activator_1(parameter_33, parameter_35, parameter_63, parameter_86, s26)
  parameter_35 + parameter_33*(s26^parameter_63/(s26^parameter_63 + parameter_86^parameter_63));
end
Constant_Flux__1_activator_1 is "Constant Flux, 1 activator_1";

function _1sub_4_activators_4_parameters(s44, parameter_044, s02, parameter_045, s03, parameter_046, s04, parameter_047, s05)
  s44*(parameter_044*s02 + parameter_045*s03 + parameter_046*s04 + parameter_047*s05);
end

function _1sub_2_activators_1_inhibitor_3_parameters(s55, parameter_125, parameter_126, species_20, parameter_127, s56, species_30)
  s55*(parameter_125*s56 + parameter_126*species_20 - parameter_127*species_30);
end

function Rate_Law_for_Differentiation_of_nT_into_Th1(HP_Lumen, species_5, parameter_7, i1, p2)
  HP_Lumen*(species_5*parameter_7 - i1*p2);
end

function Rate_Law_for_IFNg_production(nT, parameter_29, s26, parameter_104, species_20)
  nT*parameter_104*species_20/(parameter_29 + s26);
end

function Rate_Law_for_Tr1_production_1(m2, parameter_7, m1, p2)
  m2*parameter_7*(m1*p2 + 1);
end

model MODEL1611160002()
  // Leber2016 - Host immune response - H.pylori infection
  // The model is first model of tissue level cellular immune responses to H. pylori in the publication, "Modeling the role of lanthionine synthetase C-like 2 (LANCL2) in the modulation of immune responses to Helicobacter pylori infection" in PlosOne by Leber, Bassaganya-Riera, Tubau-Juni, Zoccoli-Rodriguez, Viladomiu, Abedi, Lu, and Hontecillas.
  // Abstract:
  // Immune responses to Helicobacter pylori are orchestrated through complex balances of host-bacterial interactions, including inflammatory and regulatory immune responses across scales that can lead to the development of the gastric disease or the promotion of beneficial systemic effects. While inflammation in response to the bacterium has been reasonably characterized, the regulatory pathways that contribute to preventing inflammatory events during H. pylori infection are incompletely understood. To aid in this effort, we have generated a computational model incorporating recent developments in the understanding of H. pylori-host interactions. Sensitivity analysis of this model reveals that a regulatory macrophage population is critical in maintaining high H. pylori colonization without the generation of an inflammatory response. To address how this myeloid cell subset arises, we developed a second model describing an intracellular signaling network for the differentiation of macrophages. Modeling studies predicted that LANCL2 is a central regulator of inflammatory and effector pathways and its activation promotes regulatory responses characterized by IL-10 production while suppressing effector responses. The predicted impairment of regulatory macrophage differentiation by the loss of LANCL2 was simulated based on multiscale linkages between the tissue-level gastric mucosa and the intracellular models. The simulated deletion of LANCL2 resulted in a greater clearance of H. pylori, but also greater IFNγ responses and damage to the epithelium. The model predictions were validated within a mouse model of H. pylori colonization in wild-type (WT), LANCL2 whole body KO and myeloid-specific LANCL2-/- (LANCL2Myeloid) mice, which displayed similar decreases in H. pylori burden, CX3CR1+ IL-10-producing macrophages, and type 1 regulatory (Tr1) T cells. This study shows the importance of LANCL2 in the induction of regulatory responses in macrophages and T cells during H. pylori infection.
  // biomodels.db:MODEL1611160002

  // Compartments:
  compartment Lumen = 1;
  compartment Lamina_Propia = 1;
  compartment Epithelium = 1;
  compartment Gastric_Lymph_Node = 1;

  // Species:
  // Helicobacter pylori is a gram-negative, microaerophilic bacterium within the class of Epsilonproteobacteria and the dominant member of the gastric microbiota that has already colonized the stomach mucosa early in human evolution. H. pylori usually does not cause illness, but colonization with strains bearing the Cag (cytotoxin-associated gene) pathogenicity island is associated with increased risk of non-cardiac gastric adenocarcinoma and peptic ulcer disease. PMID: 21813645 PMID: 21853141
  species HP_Lumen in Lumen = 100000000;
  species HPlumdead in Lumen = 0;
  species TolB_Lumen in Lumen = 0;
  species $Total_T in Lumen;
  // Effector dendritic cells are professional antigen presenting cells with a role in inducing T cell-dependent effector responses such as T helper 1 (Th1) and Th17 responses. PMID: 10544185
  species eDC_Lamina_Propia in Lamina_Propia = 260000;
  // T helper 1 cells represent an effector subset of CD4+ T cells involved in the cellular immune response and host defense against intracellular pathogens. They are centrally involved in cell-mediated immunity and the production of complement fixing antibodies. Moreover, they are characterized by the production of pro-inflammatory cytokines like interferon-γ (IFN-γ) and interleukin-2 (IL-2), which stimulate the phagocytosis and destruction of intracellular microbial pathogens by macrophages and other lymphocytes. Th1 responses predominate in the gut of patients with Crohn's disease. PMID: 10441214 PMID: 9529145
  species Th1_Lamina_Propia in Lamina_Propia = 450000;
  // T helper 17 cells are a subset of effector T helper cells that produce interleukin-17 (IL-17) and exhibit effector functions such as clearance of pathogens. Macrophages and dendritic cells infected with Helicobacter pylori enhance the secretion of IL-17 and favor Th17 responses. The presence of IL-17-producing cells in the gut is associated with immune-mediated disorders such as inflammatory bowel disease. PMID: 19132915 PMID: 21112468
  species Th17_Lamina_Propia in Lamina_Propia = 160000;
  // Tolerogenic dendritic cells are a subset of dendritic cells (DC) that mediate mechanisms of antigen-specific tolerance induction in the periphery. They are critical for the prevention of autoimmunity or excessive inflammation during infection. tDC elicit immunoregulatory responses by capturing and transporting "self" and "non-self" antigens to secondary lymphoid organs and by regulating T cell function through cognate interactions. PMID: 12225384
  species tDC_Lamina_Propia in Lamina_Propia = 300000;
  // Helicobacter pylori is a gram-negative, microaerophilic bacterium within the class of Epsilonproteobacteria and the dominant member of the gastric microbiota that has already colonized the stomach mucosa early in human evolution. H. pylori usually does not cause illness, but colonization with strains bearing the Cag (cytotoxin-associated gene) pathogenicity island is associated with increased risk of non-cardiac gastric adenocarcinoma and peptic ulcer disease. PMID: 21813645 PMID: 21853141
  species HP_Lamina_Propia in Lamina_Propia = 0;
  species HPlpdead in Lamina_Propia = 0;
  species iDCdead in Lamina_Propia = 0;
  species Monocytesdead in Lamina_Propia = 0;
  species eDClpdead in Lamina_Propia = 0;
  species Th17dead in Lamina_Propia = 0;
  species Th1dead in Lamina_Propia = 0;
  species Tregdead in Lamina_Propia = 0;
  // Dendritic cells are located at sites of pathogen entry in the gastrointestinal mucosa and recognize two signals that lead to the activation of both DC- and T helper 1 cell (Th1)-mediated immunity: 1. pathogen-associated molecular patterns from bacteria and 2. the inflammatory signals derived from inflamed epithelial cells. Immature DC are professional antigen-presenting cells with the capacity to internalize and process pathogens. They present antigens via the MHC-class II pathway but cannot prime immune responses. PMID: 17378762 PMID: 11773610 PMID: 16691244
  species $iDC_Lamina_Propia in Lamina_Propia = 1000000;
  species TolB_Lamina_Propia in Lamina_Propia = 0;
  species M_regdead in Lamina_Propia = 0;
  species tDClpdead in Lamina_Propia = 0;
  species IL10 in Lamina_Propia = 25000;
  species IFNg in Lamina_Propia = 10000;
  // M2 macrophages, also known as "alternatively activated macrophages", are induced in response to T helper 2 (Th2) cytokine profiles and are involved in initiating and maintaining anti-inflammatory and regulatory responses. M2 macrophages counteract inflammatory responses and promote angiogenesis and tissue remodeling. PMID: 16543403 PMID: 10878379 PMID: 21112468
  species M_reg in Lamina_Propia = 45000;
  // Undifferentiated macrophages initiate the innate immune response against microbes following recognition of pathogen-associate molecular patterns through pattern-recognition receptors. After the phagocytosis of pathogens, macrophages present the antigens to T cells and produce different molecules, thus leading to the expansion and differentiation of lymphocytes. Depending on the environmental signals macrophages can differentiate at least into two different subsets, M1 ("classic" activation) and M2 ("alternative" activation). PMID: 17681149 PMID: 16920488
  species Monocytes in Lamina_Propia = 125000;
  // PMID: 23133752 ..."it is demonstrated that Tr1 cells cannot express FoxP3 constitutively, but following activation, they upregulate FoxP3 expression to levels like those expressed in activated T cells [61]. This observation is correlated with a fact that Tr1 cells do not need to have FoxP3 for exertion of their suppressor function, because it is reported that Tr1 cells can suppress the conventional T cells independently from FoxP3 expression. Moreover, it is showed that Tr1 cells can differentiate from naive T cells of patients with IPEX disease which lack FoxP3 transcription factor [34]. On the other hand, Veldman et al. identified two subpopulations of Tr1 cells where one of them expresses FoxP3 in pemphigus vulgaris disease [62]. In another study, same group showed that inhibition of FoxP3 expression leads to Tr1 conversion to Th2-like phenotype and loss of suppressive function [63]."
  species iTreg_Lamina_Propia in Lamina_Propia = 480000;
  species Tr1 in Lamina_Propia = 100000;
  species $pIL10 in Lamina_Propia = 1;
  species $pIFNg in Lamina_Propia = 1;
  // Epithelial cells that have been in contact with Helicobacter pylori. Epithelial cells are the organism first line of defense by preventing the entry of potentially dangerous microorganisms. PMID: 15821737
  species E in Epithelium = 1000000;
  species iDC_Epithelium in Epithelium = 450000;
  species Edead in Epithelium = 0;
  // Epithelial cells are the organism's first line of defense by preventing the entry of potentially dangerous microorganisms. Intestinal epithelial cells are continuously exposed to large numbers of commensal bacteria but are relatively insensitive to them. However, following contact with pathogens they produce inflammatory mediators. PMID: 15821737
  species Edamaged in Epithelium = 0;
  species Edamageddead in Epithelium = 0;
  species eDC_Gastric_Lymph_Node in Gastric_Lymph_Node = 25000;
  species tDC_Gastric_Lymph_Node in Gastric_Lymph_Node = 54000;
  // Naïve T cells are CD4+ T cells that have not been entered in contact with their cognate antigen and can differentiate into distinct effector or regulatory subsets when activated by antigen presenting cells. PMID: 10441214 PMID 19935802
  species $nT in Gastric_Lymph_Node = 10000000;
  species Th1_Gastric_Lymph_Node in Gastric_Lymph_Node = 78000;
  species iTreg_Gastric_Lymph_Node in Gastric_Lymph_Node = 300000;
  species nTdead in Gastric_Lymph_Node = 0;
  species eDCglndead in Gastric_Lymph_Node = 0;
  species tDCglndead in Gastric_Lymph_Node = 0;
  species Th17_Gastric_Lymph_Node in Gastric_Lymph_Node = 38000;

  // Assignment rules:
  Total_T := Th17_Lamina_Propia + Th1_Lamina_Propia + iTreg_Lamina_Propia;

  // Reactions:
  E_damage: E => Edamaged; Epithelium*_1sub_2_activators_1_inhibitor_3_parameters(E, parameter_125, parameter_126, HP_Lumen, parameter_127, Th1_Lamina_Propia, IL10);  // modifiers: HP_Lumen, Th1_Lamina_Propia, IL10
    parameter_125 = 2.5e-9; parameter_126 = 2.5e-10; parameter_127 = 5e-8;
  HP_migration: HP_Lumen => HP_Lamina_Propia; _1sub_1_activator_1_parameter_1(HP_migration_parameter_7, Edamaged, HP_Lumen);  // modifiers: Edamaged
    HP_migration_parameter_7 = 1.7375e-7;
  HP_lp_death: HP_Lamina_Propia => HPlpdead; Lamina_Propia*_1sub_2_activators_2_parameters_2(HP_lp_death_parameter_104, HP_lp_death_parameter_29, Edamaged, HP_Lamina_Propia, IFNg);  // modifiers: Edamaged, IFNg
    HP_lp_death_parameter_104 = 5.5e-6; HP_lp_death_parameter_29 = 1.25e-6;
  Monocytes_death: Monocytes => Monocytesdead; Lamina_Propia*_1sub_2_activators_2_parameters_2(Monocytes_death_parameter_104, Monocytes_death_parameter_29, Edamaged, Monocytes, eDC_Lamina_Propia);  // modifiers: Edamaged, eDC_Lamina_Propia
    Monocytes_death_parameter_104 = 7.457083e-14; Monocytes_death_parameter_29 = 7.4625e-12;
  M_reg_death: M_reg => M_regdead; Lamina_Propia*_1_sub_3_activators_3_parameters_1(parameter_100, parameter_23, M_reg, iTreg_Lamina_Propia, M_reg, Monocytes);  // modifiers: iTreg_Lamina_Propia, Monocytes
    parameter_100 = 7.5e-9; parameter_23 = 2.1e-8;
  Treg_to_Th17_lp: iTreg_Lamina_Propia => Th17_Lamina_Propia; Lamina_Propia*_1sub_4_activators_4_parameters(iTreg_Lamina_Propia, parameter_044, Th17_Lamina_Propia, parameter_045, Th1_Lamina_Propia, parameter_046, Edamaged, parameter_047, eDC_Lamina_Propia);  // modifiers: Th1_Lamina_Propia, Edamaged, eDC_Lamina_Propia
    parameter_044 = 0.2634353; parameter_045 = 7.925895e-5; parameter_046 = 0.0001849185; parameter_047 = 0.0007430537;
  Treg_to_Th17_gln: iTreg_Gastric_Lymph_Node => Th17_Gastric_Lymph_Node; Gastric_Lymph_Node*_1_sub_3_activators_3_parameters_2(parameter_22, parameter_99, iTreg_Gastric_Lymph_Node, Th1_Gastric_Lymph_Node, eDC_Gastric_Lymph_Node, Th17_Gastric_Lymph_Node);  // modifiers: Th1_Gastric_Lymph_Node, eDC_Gastric_Lymph_Node
    parameter_22 = 3.357303e-6; parameter_99 = 9.154032e-8;
  Th17_to_Treg_gln: Th17_Gastric_Lymph_Node => iTreg_Gastric_Lymph_Node; Gastric_Lymph_Node*_1sub_2_activators_2_parameters_1(Th17_to_Treg_gln_parameter_24, Th17_Gastric_Lymph_Node, tDC_Gastric_Lymph_Node, iTreg_Gastric_Lymph_Node);  // modifiers: tDC_Gastric_Lymph_Node
    Th17_to_Treg_gln_parameter_24 = 5e-8;
  Th17_to_Treg_lp: Th17_Lamina_Propia => iTreg_Lamina_Propia; Lamina_Propia*_1sub_2_activators_2_parameters_1(Th17_to_Treg_lp_parameter_24, Th17_Lamina_Propia, iTreg_Lamina_Propia, tDC_Lamina_Propia);  // modifiers: tDC_Lamina_Propia
    Th17_to_Treg_lp_parameter_24 = 0.04087595;
  eDC_lp_death: eDC_Lamina_Propia => eDClpdead; Lamina_Propia*_1sub_1_activator_1_parameter_1(eDC_lp_death_parameter_7, iTreg_Lamina_Propia, eDC_Lamina_Propia);  // modifiers: iTreg_Lamina_Propia
    eDC_lp_death_parameter_7 = 4.39e-7;
  tDC_gln_death: tDC_Gastric_Lymph_Node => tDCglndead; Gastric_Lymph_Node*tDC_gln_death_k1*tDC_Gastric_Lymph_Node;
    tDC_gln_death_k1 = 0.009681307;
  iDC_migration: iDC_Epithelium -> $iDC_Lamina_Propia; iDC_migration_k1*iDC_Epithelium - iDC_migration_k2*iDC_Lamina_Propia;
    iDC_migration_k1 = 0.1; iDC_migration_k2 = 0.1;
  TolB_migration: TolB_Lumen => TolB_Lamina_Propia; _1sub_1_activator_1_parameter_1(TolB_migration_parameter_7, Edamaged, TolB_Lumen);  // modifiers: Edamaged
    TolB_migration_parameter_7 = 0.1;
  TolB_monocytes_uptake: Monocytes + TolB_Lamina_Propia => M_reg; Lamina_Propia*TolB_monocytes_uptake_k1*Monocytes*TolB_Lamina_Propia;  // modifiers: IL10
    TolB_monocytes_uptake_k1 = 0.1;
  E_production: E => 2 E; Epithelium*bact_repo_1(E_production_parameter_20, E_production_parameter_93, E);
    E_production_parameter_20 = 4.00001e4; E_production_parameter_93 = 100;
  HP_lum_production: HP_Lumen => 2 HP_Lumen; Lumen*bact_repo_2(HP_lum_production_parameter_20, HP_lum_production_parameter_93, HP_Lumen);
    HP_lum_production_parameter_20 = 100550; HP_lum_production_parameter_93 = 100;
  HP_lp_production: HP_Lamina_Propia => 2 HP_Lamina_Propia; Lamina_Propia*bact_repo_2(HP_lp_production_parameter_20, HP_lp_production_parameter_93, HP_Lamina_Propia);
    HP_lp_production_parameter_20 = 5.87319e4; HP_lp_production_parameter_93 = 100.55;
  HP_lum_death: HP_Lumen => HPlumdead; Lumen*_1sub_2_activators_2_parameters_2(HP_lum_death_parameter_104, HP_lum_death_parameter_29, Edamaged, HP_Lumen, IFNg);  // modifiers: Edamaged, IFNg
    HP_lum_death_parameter_104 = 5.55e-7; HP_lum_death_parameter_29 = 8.1057e-9;
  TolB_DC_uptake: TolB_Lumen + iDC_Epithelium => tDC_Lamina_Propia; TolB_DC_uptake_k1*TolB_Lumen*iDC_Epithelium;
    TolB_DC_uptake_k1 = 0.1;
  HP_monocyte_uptake: HP_Lamina_Propia + Monocytes => M_reg; Lamina_Propia*HP_monocyte_uptake_k1*HP_Lamina_Propia*Monocytes;
    HP_monocyte_uptake_k1 = 1.2702e-8;
  tDC_lp_death: tDC_Lamina_Propia => tDClpdead; Lamina_Propia*tDC_lp_death_k1*tDC_Lamina_Propia;
    tDC_lp_death_k1 = 0.02111158;
  // Naïve CD4+ T cells can differentiate into different effector CD4+ T cell subsets (i.e. Th1 or Th17) or induced regulatory T cells (iTreg) depending on the cytokine environment when they are stimulated by antigen presenting cells. CD4+ T cells need two signals for activation: 1. the interaction of the antigenic peptide-MHC class II complex with the TCR-CD3 complex, 2. a non-specific co-stimulatory signal provided by the interaction of CD28 or CTLA-4 on T cells with B7 molecules on APCs. A naïve CD4+ T cell will differentiate into a T helper 1 (Th1) phenotype when stimulated with interferon-γ (INF-γ) and interleukin-12 (IL-12). PMID: 15961574 PMID: 12932290 PMID: 10441214 PMID: 9529145
  Differentiation_of_nT_into_Th1: $nT => Th1_Gastric_Lymph_Node; Gastric_Lymph_Node*Rate_Law_for_Differentiation_of_nT_into_Th1(nT, eDC_Gastric_Lymph_Node, Differentiation_of_nT_into_Th1_parameter_7, IL10, Differentiation_of_nT_into_Th1_p2);  // modifiers: eDC_Gastric_Lymph_Node, IL10
    Differentiation_of_nT_into_Th1_parameter_7 = 3.62196e-5; Differentiation_of_nT_into_Th1_p2 = 3e-5;
  // Naïve CD4+ T cells can differentiate into different effector CD4+ T cell subsets (i.e. Th1 or Th17) or induced regulatory T cells (iTreg) depending on the cytokine environment when they are stimulated by antigen presenting cells. CD4+ T cells need two signals for activation: 1. the interaction of the antigenic peptide-MHC class II complex with the TCR-CD3 complex, 2. a non-specific co-stimulatory signal provided by the interaction of CD28 or CTLA-4 on T cells with B7 molecules on APCs. A naïve CD4+ T cell will differentiate into a T helper 17 (Th17) phenotype when stimulated with transforming growth factorβ (TGF-β) and interleukin-6 (IL-6). PMID: 17569825 PMID: 21831771
  Differentiation_of_nT_into_Th17: $nT => Th17_Gastric_Lymph_Node; Gastric_Lymph_Node*_1sub_1_activator_1_parameter_1(Differentiation_of_nT_into_Th17_parameter_7, eDC_Gastric_Lymph_Node, nT);  // modifiers: eDC_Gastric_Lymph_Node
    Differentiation_of_nT_into_Th17_parameter_7 = 5.981707e-6;
  // Naïve CD4+ T cells can differentiate into different effector CD4+ T cell subsets (i.e. Th1 or Th17) or induced regulatory T cells (iTreg) depending on the cytokine environment after being activated by antigen presenting cells. CD4+ T cells need two signals for activation: 1. the interaction of the antigenic peptide-MHC class II complex with the TCR-CD3 complex, 2. a non-specific co-stimulatory signal provided by the interaction of CD28 or CTLA-4 on T cells with B7 molecules on APCs. A naïve CD4+ T cell will differentiate into an iTreg phenotype when stimulated with transforming growth factor β (TGF-β) and interleukin-2 (IL-2). PMID: 17569825 PMID: 12612578 PMID: 12522256
  Differentiation_of_nT_into_iTreg: $nT => iTreg_Gastric_Lymph_Node; Gastric_Lymph_Node*_1sub_1_activator_1_parameter_3(parameter_30, tDC_Gastric_Lymph_Node, nT);  // modifiers: tDC_Gastric_Lymph_Node
    parameter_30 = 1.510112e-6;
  // Immune cells are no longer stimulated once the antigenic stimulus is eliminated and the inflammatory process ceases. The sustained exposure to Helicobacter pylori (i.e. chronic infection) impairs eDC function and inhibits the Th1 response reducing the amount of cytokine production. PMID: 10544185 PMID: 17101659
  Degradation_of_eDC: eDC_Gastric_Lymph_Node => eDCglndead; Gastric_Lymph_Node*Degradation_of_eDC_k1*eDC_Gastric_Lymph_Node;  // modifiers: iTreg_Gastric_Lymph_Node
    Degradation_of_eDC_k1 = 0.005276095;
  // T helper 1 cells stimulated by either M1 ("classically activated") macrophages or effector dendritic cells (eDC) migrate to the site of infection, where they act synergistically with M1 and DC to recruit more monocytes. PMID: 20362587
  re88: Th1_Gastric_Lymph_Node => Th1_Lamina_Propia; re88_k1*Th1_Gastric_Lymph_Node; re88 is "Migration of Th1 cells from the GLN to the LP";
    re88_k1 = 12.76239;
  // T helper 17 cells stimulated by either M1 ("classically activated") macrophages or effector dendritic cells (eDC) migrate from the draining lymph nodes to the site of the infection (LP), where they act synergistically with M1 and DC to recruit more monocytes. PMID: 20362587
  re87: Th17_Gastric_Lymph_Node => Th17_Lamina_Propia; re87_k1*Th17_Gastric_Lymph_Node; re87 is "Migration of Th17 cells from the GLN to the LP";
    re87_k1 = 0.006754777;
  // Immature dendritic cells become activated and acquire their full functionality in response to danger signals such as pathogen associated molecular patterns. This maturation process leads to de novo or increased expression of surface markers involved in activation, maturation and co-stimulation. Furthermore, mature dendritic cells (mDC) migrate to the gastric lymph node where they present antigens to T cells and thus induce effector immune responses. PMID: 10544185
  re78: eDC_Lamina_Propia => eDC_Gastric_Lymph_Node; re78_k1*eDC_Lamina_Propia; re78 is "Migration of eDC from the LP to the GLN";
    re78_k1 = 0.0921188;
  // Regulatory T cells stimulated by either M2 macrophages ("alternatively activated") or tolerogenic dendritic cells (tDC) migrate to the site of infection, where they act synergistically with M2 and tDC to suppress excessive inflammatory and effector responses. PMID: 20362587
  re89: iTreg_Gastric_Lymph_Node => iTreg_Lamina_Propia; re89_k1*iTreg_Gastric_Lymph_Node; re89 is "Migration of iTreg from the GLN to LP";
    re89_k1 = 0.2809247;
  // Tolerogenic dendritic cells take up antigens from the stomach lumen and migrate to the gastric lymph nodes inducing the differentiation of naive or resting CD4+ T cells into regulatory CD4+ T cells. In the absence of inflammation tDC mainly function as inducers of tolerance towards self and commensal antigens. PMID: 12225384
  re79: tDC_Lamina_Propia => tDC_Gastric_Lymph_Node; re79_k1*tDC_Lamina_Propia; re79 is "Migration of tDC from the LP to the GLN";
    re79_k1 = 0.01;
  re130: HP_Lumen + iDC_Epithelium => eDC_Lamina_Propia; re130_k1*HP_Lumen*iDC_Epithelium; re130 is "Stimulation of eDC by <i>H. pylori</i>";
    re130_k1 = 5.805497e-10;
  re131: HP_Lumen + iDC_Epithelium => tDC_Lamina_Propia; re131_k1*HP_Lumen*iDC_Epithelium; re131 is "Stimulation of tDC by <i>H. pylori</i>";
    re131_k1 = 7.860864e-9;
  // One mechanism used by T cells to maintain the homeostasis activation-induced cell death (AICD) is an important mechanism of apoptosis. PMID: 20362587 PMID: 18566384
  Th1_cell_apoptosis: Th1_Lamina_Propia => Th1dead; Lamina_Propia*Th1_cell_apoptosis_k1*Th1_Lamina_Propia;
    Th1_cell_apoptosis_k1 = 53.80549;
  // One mechanism used by T cells to maintain the homeostasis activation-induced cell death (AICD) is an important mechanism of apoptosis. PMID: 20362587 PMID: 18566384
  Th17_cell_apoptosis: Th17_Lamina_Propia => Th17dead; Lamina_Propia*Th17_cell_apoptosis_k1*Th17_Lamina_Propia;
    Th17_cell_apoptosis_k1 = 4.283944;
  // One mechanism used by T cells to maintain the homeostasis activation-induced cell death (AICD) is an important mechanism of apoptosis. PMID: 20362587 PMID: 18566384
  iTreg_apoptosis: iTreg_Lamina_Propia => Tregdead; Lamina_Propia*iTreg_apoptosis_k1*iTreg_Lamina_Propia;
    iTreg_apoptosis_k1 = 0.003244184;
  IL10_production: $pIL10 => IL10; Lamina_Propia*_1sub_2_activators_2_parameters_1(IL10_production_parameter_24, pIL10, M_reg, Tr1);  // modifiers: M_reg, Tr1
    IL10_production_parameter_24 = 0.024;
  IFNg_production: $pIFNg => IFNg; Lamina_Propia*Rate_Law_for_IFNg_production(pIFNg, IFNg_production_parameter_29, IL10, IFNg_production_parameter_104, Th1_Lamina_Propia);  // modifiers: IL10, Th1_Lamina_Propia
    IFNg_production_parameter_29 = 1000; IFNg_production_parameter_104 = 5.0702465;
  E_death: E => Edead; Epithelium*E_death_k1*E;
    E_death_k1 = 0.05;
  tDC_production_TolB: $iDC_Lamina_Propia => tDC_Lamina_Propia; Lamina_Propia*_1sub_1_activator_1_parameter_1(tDC_production_TolB_parameter_7, TolB_Lamina_Propia, iDC_Lamina_Propia);  // modifiers: TolB_Lamina_Propia
    tDC_production_TolB_parameter_7 = 0.1;
  tDC_production_HP: $iDC_Lamina_Propia => tDC_Lamina_Propia; Lamina_Propia*_1sub_1_activator_1_parameter_1(tDC_production_HP_parameter_7, HP_Lamina_Propia, iDC_Lamina_Propia);  // modifiers: HP_Lamina_Propia
    tDC_production_HP_parameter_7 = 1.836214e-8;
  eDC_production_HP: $iDC_Lamina_Propia => eDC_Lamina_Propia; Lamina_Propia*_1sub_1_activator_1_parameter_2(eDC_production_HP_parameter_7, iDC_Lamina_Propia, HP_Lamina_Propia);  // modifiers: HP_Lamina_Propia
    eDC_production_HP_parameter_7 = 1e-8;
  iDC_death: $iDC_Lamina_Propia -> iDCdead; Lamina_Propia*(iDC_death_k1*iDC_Lamina_Propia - iDC_death_k2*iDCdead);  // modifiers: eDC_Lamina_Propia, Edamaged
    iDC_death_k1 = 0.1; iDC_death_k2 = 0.1;
  Tr1_production: $nT => Tr1; Rate_Law_for_Tr1_production_1(M_reg, Tr1_production_parameter_7, IL10, Tr1_production_p2);  // modifiers: M_reg, IL10
    Tr1_production_parameter_7 = 0.047568; Tr1_production_p2 = 1e-6;
  Edamaged_death: Edamaged => Edamageddead; Epithelium*Edamaged_death_k1*Edamaged;
    Edamaged_death_k1 = 0.04983755;
  nT_generation: => $nT; Gastric_Lymph_Node*Constant_Flux__1_activator_1(nT_generation_parameter_33, nT_generation_parameter_35, nT_generation_parameter_63, nT_generation_parameter_86, eDC_Gastric_Lymph_Node);  // modifiers: eDC_Gastric_Lymph_Node
    nT_generation_parameter_33 = 10; nT_generation_parameter_35 = 3.3e7; nT_generation_parameter_63 = 1; nT_generation_parameter_86 = 0.1;
  Monocytes_production: => Monocytes; Lamina_Propia*Constant_Flux__1_activator_1(Monocytes_production_parameter_33, Monocytes_production_parameter_35, Monocytes_production_parameter_63, Monocytes_production_parameter_86, Edamaged);  // modifiers: Edamaged
    Monocytes_production_parameter_33 = 68855.33; Monocytes_production_parameter_35 = 350; Monocytes_production_parameter_63 = 1.099999; Monocytes_production_parameter_86 = 440600;
  Tr1_death: Tr1 => ; Lamina_Propia*Tr1_death_k1*Tr1;
    Tr1_death_k1 = 0.1;
  Th1_GLN_death: Th1_Gastric_Lymph_Node => ; Gastric_Lymph_Node*Th1_GLN_death_k1*Th1_Gastric_Lymph_Node;
    Th1_GLN_death_k1 = 0.167387;
  Th17_GLN_death: Th17_Gastric_Lymph_Node => ; Gastric_Lymph_Node*Th17_GLN_death_k1*Th17_Gastric_Lymph_Node;
    Th17_GLN_death_k1 = 19.6785;
  iTreg_GLN_death: iTreg_Gastric_Lymph_Node => ; Gastric_Lymph_Node*iTreg_GLN_death_k1*iTreg_Gastric_Lymph_Node;
    iTreg_GLN_death_k1 = 0.03775344;
  IL10_degradation: IL10 => ; Lamina_Propia*IL10_degradation_k1*IL10;
    IL10_degradation_k1 = 0.1;
  IFNg_degradation: IFNg => ; Lamina_Propia*IFNg_degradation_k1*IFNg;
    IFNg_degradation_k1 = 0.11825;

  // Unit definitions:
  unit time = 86400 second;
  unit substance = item;
end
