// SBML level 2 version 4

model MODEL1406230000()
  // Lee2009 - Adaptive immune response to Influenza A Virus infection
  // biomodels.db:MODEL1406230000
  // hasTaxon taxonomy:10090 taxonomy:197911
  // isVersionOf GO:0046718

  // Compartments:
  compartment default = 1 volume;

  // Species:
  substanceOnly species A in default = 110.2;
  species BA in default = 0;
  substanceOnly species BN in default = 1000;
  substanceOnly species D in default = 1000;
  species DM in default = 0;
  species Ds in default = 0;
  substanceOnly species EP in default = 500000;
  species EPs in default = 0;
  species HE in default = 0;
  substanceOnly species HN in default = 1000;
  species PL in default = 0;
  species PS in default = 0;
  species TE in default = 0;
  substanceOnly species TN in default = 1000;
  substanceOnly species V in default = 10;
  species s16 in default = 0;
  species s17 in default = 0;
  species s18 in default = 0;
  species s19 in default = 0;
  species s20 in default = 0;
  species s21 in default = 0;
  species s22 in default = 0;
  species s23 in default = 0;
  species s24 in default = 0;
  species s25 in default = 0;
  species s26 in default = 0;
  species s27 in default = 0;
  species s28 in default = 0;
  species s29 in default = 0;
  species s30 in default = 0;
  species s31 in default = 0;
  species s32 in default = 0;
  species s33 in default = 0;
  species s34 in default = 0;
  species s35 in default = 0;
  species s36 in default = 0;
  species s37 in default = 0;
  species s38 in default = 0;
  species s39 in default = 0;
  species s40 in default = 0;

  // Parameters:
  delta_E = 0.001 substance;
  beta_E = 7e-5 substance;
  k_E = 0.0012 substance;
  gamma = 0.15 substance;
  tau_T = 0.5 substance;
  delta_Es = 1.2 substance;
  pi_V = 1.9 substance;
  // virus clearance rate per day
  c_V = 1 substance;
  // rate constant of IAV neutralization by unit anti-IAV antibody per day
  k_V = 0.004 substance;
  // death rate of infected dendritic cells per day
  delta_D = 0.001 substance;
  // infection rate of dendritic cells by unit IAV per day
  beta_D = 0.01 substance;
  // death rate of infected dendritic cells per day
  delta_Ds = 2.9 substance;
  // antigen processing rate per day
  k_D = 200 substance;
  // virus-loaded DC migration delay from lung to spleen (day)
  tau_D = 1 substance;
  // death rate of mature dendritic cells per day
  delta_DM = 0.5 substance;
  // death rate of naive CD4+ T cells per day
  delta_HN = 0.002 substance;
  // death rate of naive CD8+ T cells per day
  delta_TN = 0.002 substance;
  // death rate of naive B cells per day
  delta_B = 0.002 substance;
  // clearance rate of activated B cells per day
  delta_BA = 0.9 substance;
  // differentiation rate of activated B cells into short-lived antibody secreting plasma cells per day
  pi_S = 0.001 substance;
  // differentiation rate of activated B cells into long-lived antibody secreting plasma cells per day
  pi_L = 8e-9 substance;
  // death rate of short-lived antibody secreting plasma cells per day
  delta_S = 0.1 substance;
  // death rate of long-lived antibody secreting plasma cells per day
  delta_L = 0.03 substance;
  // secretion rate of antibody titer by short lived plasma cells per day
  pi_AS = 0.06 substance;
  // secretion rate of antibody titer by long lived plasma cells per day
  pi_AL = 0.8 substance;
  // clearance rate of antibody per day
  delta_A = 0.04 substance;
  // maximum activation rate of naive CD4+ T cells per day
  pi_H1 = 1.5 substance;
  // number of mature dendritic cells for half maximal activation of naive CD4+ T cells per day
  pi_H2 = 100 substance;
  // maximum proliferation rate of effector CD4+ T cells per day
  rho_HE1 = 1.51 substance;
  // number of mature dendritic cells for half maximal proliferation of effector CD4+ T cells
  rho_HE2 = 4000 substance;
  // maximum clearance rate of effector CD4+ T cells per day
  delta_HE1 = 0.4 substance;
  // number of mature dendritic cells for half maximal clearance of effector CD4+ T cells
  delta_HE2 = 1 substance;
  // maximum activation rate of CD8+ T cells from naive CD8+ T cells per day
  pi_T1 = 3 substance;
  // number of mature dendritic cells for half maximal activation of naive CD8+ T cells per day
  pi_T2 = 100 substance;
  // maximum proliferation rate of effector CD8+ T cells per day
  rho_TE1 = 2.6 substance;
  // number of mature dendritic cells fo half maximal proliferation of effector CD8+ T cells
  rho_TE2 = 4000 substance;
  // maximum clearance rate of effector CD8+ T cells per day
  delta_TE1 = 0.75 substance;
  // number of mature dendritic cells for half maximal clearance of effector CD8+ T cells
  delta_TE2 = 1 substance;
  // maximum activation rate of naive B cells per day
  pi_B1 = 3 substance;
  // number of mature dendritic cells for the half maximal activation of naive B cells
  pi_B2 = 10000 substance;
  // maximum proliferation rate of activated B cells per day
  rho_BA1 = 2.6 substance;
  // number of mature dendritic cells for half maximal proliferation of activated B cells
  rho_BA2 = 4000 substance;
  // factor for B cell activation by CD4+ T cells
  h = 0 substance;
  BA_BN has substance;
  TE_TN has substance;
  delta_HE_DM has substance;
  delta_TE_DM has substance;
  pi_B_DM has substance;
  pi_H_DM has substance;
  pi_T_DM has substance;
  rho_BA_DM_h_HE has substance;
  rho_HE_DM has substance;
  rho_TE_DM has substance;
  t_E_lung has substance;
  EP0 = 500000 substance;
  HE_HN has substance;
  TN0 = 1000 substance;
  BN0 = 1000 substance;
  D0 = 1000 substance;
  HN_0 = 1000 substance;

  // Assignment rules:
  BA_BN := BA + BN;
  HE_HN := HE + HN;
  TE_TN := TE + TN;
  delta_HE_DM := delta_HE1*DM/(DM + delta_HE2);
  delta_TE_DM := delta_TE1*DM/(DM + delta_TE2);
  pi_B_DM := pi_B1*DM/(DM + pi_B2);
  pi_H_DM := pi_H1*DM/(DM + pi_H2);
  rho_BA_DM_h_HE := rho_BA1*(DM + h*HE)/(DM + h*HE + rho_BA2);
  rho_HE_DM := rho_HE1*DM/(DM + rho_HE2);
  rho_TE_DM := rho_TE1*DM/(DM + rho_TE2);
  t_E_lung := gamma*delay(TE, tau_T);
  pi_T_DM := pi_T1*DM/(DM + pi_T2);

  // Reactions:
  re1: EP => EPs; beta_E*EP*V;  // modifiers: V
  re2: EPs => s17; k_E*EPs*gamma*delay(TE, tau_T) + delta_Es*EPs;  // modifiers: TE
  re4: V => s19; c_V*V + k_V*V*A;  // modifiers: A
  re5: s16 => D; delta_D*D0;
  re6: D => s20; delta_D*D;
  re7: s21 => V; pi_V*EPs;  // modifiers: EPs
  re8: D => Ds; beta_D*D*V;  // modifiers: V
  re9: Ds => s22; delta_Ds*Ds;
  re10: s23 => DM; k_D*delay(Ds, tau_D);  // modifiers: Ds
  re11: DM => s24; delta_DM*DM;
  re12: HN => HE; pi_H_DM*HN;
  re13: s25 => HN; delta_HN*HN_0;
  re14: HN => s26; delta_HN*HN;
  re15: TN => TE; pi_T_DM*TN;
  re16: TN => s27; delta_TN*TN;
  re17: s28 => TN; delta_TN*TN0;
  re19: TE => s30; delta_TE_DM*TE;  // modifiers: DM
  re20: s29 => TE; rho_TE_DM*TE;  // modifiers: DM
  re21: BN => BA; pi_B_DM*BN;  // modifiers: DM
  re22: BN => s31; delta_B*BN;
  re23: s32 => BN; delta_B*BN0;
  re24: BA => PS; pi_S*BA;
  re25: BA => PL; pi_L*HE*BA;  // modifiers: HE
  re26: BA => s33; delta_BA*BA;
  re27: s34 => BA; rho_BA_DM_h_HE*BA;  // modifiers: HE, D
  re28: PS => s35; delta_S*PS;
  re29: PL => s36; delta_L*PL;
  re30: s37 => A; pi_AS*PS + pi_AL*PL;  // modifiers: PL, PS
  re31: A => s38; delta_A*A;
  re32: s18 => EP; delta_E*(EP0 - EP);
  re33: HE => s39; delta_HE_DM*HE;
  re34: s40 => HE; rho_HE_DM*HE;

  // Unit definitions:
  unit substance = mole;
  unit volume = litre;
  unit area = metre^2;
  unit length = metre;
  unit time = second;
end
