// SBML level 2 version 4

model Stochastic_Dynamics_of_Type_I_Interferon_Responses()
  // Maier2022 - Stochastic Dynamics of Type I Interferon Responses
  // Our study aims to determine whether and how biochemical noise affects the information transduced in the JAK-STAT signaling pathway and investigate the transition between basal and activated state. To this end, we studied the stochastic responses of MxA and IFIT1 expression in Huh7.5 cells stimulated with IFN-$\alpha$. Using fluorescent reporters under the control of the authentic promoter/enhancer region of IFIT1 and MxA we collected data displaying the differences between expressing and non-expressing cells for the marker genes in a time-course experiment. We hypothesize that the JAK-STAT signaling pathway efficiently transmits information under stochastic environments. To test our working hypothesis, we developed a detailed mathematical model using the obtained time-resolved flow cytometry data to describe the elements in the JAK-STAT signaling pathway at single-cell resolution. This model allowed us to systematically test the influence of intrinsic and extrinsic noise in the IFN response.
  // The developed model consists of 42 species and 62 reactions (reactions m1 to m62). To name the variables in the model we used the following conventions: 1) variables referring to mRNA are denoted by $m$ prefix. 2) Variables in phosphorylated use $p$ as prefix. 3) Gene promoters are represented by the gene's name in lowercase. 4) R1, R2, IR, AR and RC, represent the IFN receptor subunits, inactive, active and complex forms, respectively. 5) The compartment is superscripted to the species if the species exist in multiple compartments. A graphical representation of the interaction between variables in the model is given in Maier et. al 2022 (Fig. 1) and all reactions are listed in the Supplementary Information, Section S2.1.
  // Note that we publish the SBML model without the observables (e.g. exp_IRF9_n) as the change in the number of particles is defined in relation to the starting value in the COPASI model which is not supported in SBML format. In order to reproduce the parameter estimation without any extra worj, we recommend the direct download of the provided copasi model linked in the article.
  // This model is described in the article:
  // Stochastic Dynamics of Type I Interferon Responses
  // Benjamin D. Maier(*), Luis U. Aguilera(*), Sven Sahle, Pascal Mutz, Priyata Kalra, Christopher Dächert, Ralf Bartenschlager, Marco Binder, Ursula Kummer
  // PLOS Computational Biology, 2022
  // (*) Equally contributing authors
  // Abstract:
  // Interferon (IFN) activates the transcription of several hundred of IFN stimulated genes (ISGs) that constitute a highly effective antiviral defense program. Cell-to-cell variability in the induction of ISGs is well documented, but its source and effects are not completely understood. The molecular mechanisms behind this heterogeneity have been related to randomness in molecular events taking place during the JAK-STAT signaling pathway. Here, we study the sources of variability in the induction of the IFN-alpha response by using MxA and IFIT1 activation as read-out. To this end, we integrate time-resolved flow cytometry data and stochastic modeling of the JAK-STAT signaling pathway. The complexity of the IFN response was matched by fitting probability distributions to time-course flow cytometry snapshots. Both, experimental data and simulations confirmed that the MxA and IFIT1 induction circuits generate graded responses rather than all-or-none responses. Subsequently, we quantify the size of the intrinsic variability at different steps in the pathway. We found that stochastic effects are transiently strong during the ligand-receptor activation steps and the formation of the ISGF3 complex, but negligible for the final induction of the studied ISGs. We conclude that the JAK-STAT signaling pathway is a robust biological circuit that efficiently transmits information under stochastic environments.
  // hasProperty mamo:MAMO_0000046

  // Compartments:
  compartment Cytoplasm = 0.865;
  compartment Nucleus = 0.135;

  // Species:
  species IFN in Cytoplasm = 11560.69;
  species R2 in Cytoplasm = 1156.069;
  species RC in Cytoplasm = 0;
  species AR in Cytoplasm = 0;
  species R1 in Cytoplasm = 1156.069;
  species STAT1_c in Cytoplasm = 983430.1;
  species pSTAT1 in Cytoplasm = 0;
  species STAT2_c in Cytoplasm = 10780.35;
  species pSTAT2 in Cytoplasm = 0;
  species dimerSTAT in Cytoplasm = 0;
  species IRF9_c in Cytoplasm = 11.56069;
  species STAT2_IRF9_c in Cytoplasm = 231.2139; STAT2_IRF9_c is "STAT2-IRF9_c";
  species ISGF3_c in Cytoplasm = 0;
  species ISGF3_n in Nucleus = 0;
  species STAT2_IRF9_n in Nucleus = 2407.407; STAT2_IRF9_n is "STAT2-IRF9_n";
  species I_irf9 in Nucleus = 7.407407;
  species irf9 in Nucleus = 0;
  species I_mxa in Nucleus = 7.407407;
  species mxa in Nucleus = 0;
  species I_ifit1 in Nucleus = 7.407407;
  species ifit1 in Nucleus = 0;
  species I_socs in Nucleus = 7.407407;
  species socs in Nucleus = 0;
  species irf9_0 in Nucleus = 0; irf9_0 is "irf9*";
  species socs_0 in Nucleus = 0; socs_0 is "socs*";
  species mxa_0 in Nucleus = 0; mxa_0 is "mxa*";
  species ifit1_0 in Nucleus = 0; ifit1_0 is "ifit1*";
  species mIRF9_n in Nucleus = 0;
  species mSOCS_n in Nucleus = 0;
  species mMXA_n in Nucleus = 0;
  species mIFIT1_n in Nucleus = 0;
  species mIRF9_c in Cytoplasm = 16.18497;
  species mSOCS_c in Cytoplasm = 0;
  species mMXA_c in Cytoplasm = 0;
  species mIFIT1_c in Cytoplasm = 0;
  species SOCS in Cytoplasm = 0;
  species MXA in Cytoplasm = MXA_0*Cytoplasm/(sf4*Cytoplasm);
  species IFIT1 in Cytoplasm = IFIT1_0*Cytoplasm/(sf5*Cytoplasm);
  species IRF9_n in Nucleus = 444.4444;
  species STAT1_n in Nucleus = 0;
  species STAT2_n in Nucleus = 1111.111;
  species IR in Cytoplasm = 0;
  species MXA_0 in Cytoplasm = 9323.699;
  species IFIT1_0 in Cytoplasm = 24142.2;

  // Parameters:
  sf1 = 0.00113574;
  sf2 = 5.43e-5;
  sf3 = 0.00107;
  sf4 = 5.099;
  sf5 = 29.62;
  k_1 = 7.5e-6;
  k_2 = 1.32091;
  k_3 = 1.75e-5;
  k_4 = 1.34375e-5;
  k_5 = 1;
  k_6 = 2.25589;
  k_7 = 0.000988;
  k_8 = 0.000758808;
  k_9 = 0.869596;
  k__10 = 0.000262909;
  k__11_1 = 0.219977; k__11_1 is "k__11.1";
  k__11_2 = 0.25; k__11_2 is "k__11.2";
  k__12 = 0.00125;
  k__13_1 = 0.00225; k__13_1 is "k__13.1";
  k__13_2 = 2; k__13_2 is "k__13.2";
  k__14 = 0.000996924;
  k__15_1 = 1.486343; k__15_1 is "k__15.1";
  k__15_2 = 107.5; k__15_2 is "k__15.2";
  k__16 = 0.00061;
  k__17_1 = 1.95; k__17_1 is "k__17.1";
  k__17_2 = 22.8; k__17_2 is "k__17.2";
  k__18 = 0.0007;
  k__19_1 = 0.871; k__19_1 is "k__19.1";
  k__19_2 = 10.6; k__19_2 is "k__19.2";
  k__20 = 0.328289;
  k__21 = 0.147106;
  k__22 = 0.0134;
  k__23 = 0.014;
  k__24 = 0.875665;
  k__25 = 4.88824;
  k__26 = 1.38;
  k__27 = 0.104;
  k__28__fixed = 0.0139; k__28__fixed is "k__28 (fixed)";
  k__29__fixed = 0.0436; k__29__fixed is "k__29 (fixed)";
  k__30_fixed = 0.00238; k__30_fixed is "k__30(fixed)";
  k__31_fixed = 0.00737; k__31_fixed is "k__31(fixed)";
  k__32 = 0.864133;
  k__33 = 0.626289;
  k__34 = 1.516;
  k__35 = 4.02;
  k__36 = 0.17286;
  k__37__fixed = 0.025; k__37__fixed is "k__37 (fixed)";
  k__38_fixed = 0.000351; k__38_fixed is "k__38(fixed)";
  k__39_fixed = 0.00195; k__39_fixed is "k__39(fixed)";
  k__40__fixed = 0.0185; k__40__fixed is "k__40 (fixed)";
  k__41 = 0.01178;
  k__42 = 0.00508801;
  k__43 = 0.01425;
  k__44 = 0.0005049058;
  k__45 = 0.002936236;
  k__46__fixed = 0.0012; k__46__fixed is "k__46 (fixed)";
  k__47 = 0.04769;

  // Assignment rules:
  IRF9_ges := IRF9_c*Cytoplasm + IRF9_n*Nucleus + ISGF3_c*Cytoplasm + ISGF3_n*Nucleus + STAT2_IRF9_c*Cytoplasm + STAT2_IRF9_n*Nucleus;
  ISGF3_ges := ISGF3_c*Cytoplasm + ISGF3_n*Nucleus;
  mSOCS_ges := mSOCS_c*Cytoplasm + mSOCS_n*Nucleus;
  exp_MXA := MXA*Cytoplasm*sf4;
  exp_IFIT1 := (IFIT1*Cytoplasm + 65)*sf5;
  mIRF9_ges := mIRF9_c*Cytoplasm + mIRF9_n*Nucleus;

  // Reactions:
  R_1_Receptor_Complex: IFN + R2 => RC; Cytoplasm*k_1*IFN*R2;
  R_2_Receptor_Activation: RC + R1 => AR; Cytoplasm*k_2*RC*R1;
  R_3_stat1_phos: AR + STAT1_c => AR + pSTAT1; Cytoplasm*k_3*AR*STAT1_c; R_3_stat1_phos is "R_3 stat1-phos";
  R_4_stat2_phos: AR + STAT2_c => AR + pSTAT2; Cytoplasm*k_4*AR*STAT2_c; R_4_stat2_phos is "R_4 stat2-phos";
  R_5_stat1_dephos: pSTAT1 => STAT1_c; Cytoplasm*k_5*pSTAT1; R_5_stat1_dephos is "R_5 stat1-dephos";
  R_6_stat2_dephos: pSTAT2 => STAT2_c; Cytoplasm*k_6*pSTAT2;
  R_7_stat_dimerization: pSTAT1 + pSTAT2 => dimerSTAT; Cytoplasm*k_7*pSTAT1*pSTAT2;
  R_8_ISGF3_formation: dimerSTAT + IRF9_c => ISGF3_c; Cytoplasm*k_8*dimerSTAT*IRF9_c;
  R_9_ISGF3_translocation: ISGF3_c => ISGF3_n; k_9*ISGF3_c;
  R__10_STAT2_IRF9_dimerization: STAT2_c + IRF9_c => STAT2_IRF9_c; Cytoplasm*k__10*STAT2_c*IRF9_c; R__10_STAT2_IRF9_dimerization is "R__10 STAT2-IRF9 dimerization";
  R__11_STAT2_IRF9_translocalization: STAT2_IRF9_c => STAT2_IRF9_n; k__11_1*STAT2_IRF9_c; R__11_STAT2_IRF9_translocalization is "R__11 STAT2-IRF9 translocalization";
  R__11_2_STAT2_IRF9_translocalization: STAT2_IRF9_n => STAT2_IRF9_c; k__43*STAT2_IRF9_n; R__11_2_STAT2_IRF9_translocalization is "R__11.2 STAT2-IRF9 translocalization";
  R__12_irf9_activation: ISGF3_n + I_irf9 => irf9; Nucleus*k__12*ISGF3_n*I_irf9;
  R__12_2: STAT2_IRF9_n + I_irf9 => irf9_0; Nucleus*k__12*STAT2_IRF9_n*I_irf9; R__12_2 is "R__12.2";
  R__13_irf9_deactivation: irf9 => ISGF3_n + I_irf9; Nucleus*k__13_1*irf9;
  R__13_2: irf9_0 => STAT2_IRF9_n + I_irf9; Nucleus*k__13_2*irf9_0; R__13_2 is "R__13.2";
  R__14_2: STAT2_IRF9_n + I_socs => socs_0; Nucleus*k__14*STAT2_IRF9_n*I_socs; R__14_2 is "R__14.2";
  R__14_socs_activation: ISGF3_n + I_socs => socs; Nucleus*k__14*ISGF3_n*I_socs;
  R__15_socs_deactivation: socs => ISGF3_n + I_socs; Nucleus*k__15_1*socs;
  R__15_2: socs_0 => STAT2_IRF9_n + I_socs; Nucleus*k__15_2*socs_0; R__15_2 is "R__15.2";
  R__16_2: STAT2_IRF9_n + I_mxa => STAT2_IRF9_n + mxa_0; Nucleus*k__16*STAT2_IRF9_n*I_mxa; R__16_2 is "R__16.2";
  R__16_mxa_activation: ISGF3_n + I_mxa => ISGF3_n + mxa; Nucleus*k__16*ISGF3_n*I_mxa;
  R__17_mxa_deactivation: mxa => I_mxa; Nucleus*k__17_1*mxa;
  R__17_2: mxa_0 => I_mxa; Nucleus*k__17_2*mxa_0; R__17_2 is "R__17.2";
  R__18_ifit1_activation: ISGF3_n + I_ifit1 => ISGF3_n + ifit1; Nucleus*k__18*ISGF3_n*I_ifit1;
  R__18_2: STAT2_IRF9_n + I_ifit1 => STAT2_IRF9_n + ifit1_0; Nucleus*k__18*STAT2_IRF9_n*I_ifit1; R__18_2 is "R__18.2";
  R__19_ifit1_deactivation: ifit1 => I_ifit1; Nucleus*k__19_1*ifit1;
  R__19_2: ifit1_0 => I_ifit1; Nucleus*k__19_2*ifit1_0; R__19_2 is "R__19.2";
  R__20_irf9_transcription: irf9 => irf9 + mIRF9_n; Nucleus*k__20*irf9;
  R__20_2: irf9_0 => irf9_0 + mIRF9_n; Nucleus*k__20*irf9_0; R__20_2 is "R__20.2";
  R__21_socs_transcription: socs => socs + mSOCS_n; Nucleus*k__21*socs;
  R__21_2: socs_0 => socs_0 + mSOCS_n; Nucleus*k__21*socs_0; R__21_2 is "R__21.2";
  R__22_mxa_transcription: mxa => mxa + mMXA_n; Nucleus*k__22*mxa;
  R__22_2: mxa_0 => mxa_0 + mMXA_n; Nucleus*k__22*mxa_0; R__22_2 is "R__22.2";
  R__23_ifit1_transcription: ifit1 => ifit1 + mIFIT1_n; Nucleus*k__23*ifit1;
  R__23_2: ifit1_0 => ifit1_0 + mIFIT1_n; Nucleus*k__23*ifit1_0; R__23_2 is "R__23.2";
  R__24_mIRF9_translocalization: mIRF9_n => mIRF9_c; k__24*mIRF9_n;
  R__25_mSOCS_translocalization: mSOCS_n => mSOCS_c; k__25*mSOCS_n;
  R__26_mMXA_translocalization: mMXA_n => mMXA_c; k__26*mMXA_n;
  R__27_mIFIT1_translocalization: mIFIT1_n => mIFIT1_c; k__27*mIFIT1_n;
  R__28_mIRF9_out: mIRF9_c => ; Cytoplasm*k__28__fixed*mIRF9_c;
  R__29_mSOCS_out: mSOCS_c => ; Cytoplasm*k__29__fixed*mSOCS_c;
  R__30_mMXA_out: mMXA_c => ; Cytoplasm*k__30_fixed*mMXA_c;
  R__31_mIFIT1_out: mIFIT1_c => ; Cytoplasm*k__31_fixed*mIFIT1_c;
  R__32_mIRF9_translation: mIRF9_c => mIRF9_c + IRF9_c; Cytoplasm*k__32*mIRF9_c;
  R__33_mSOCS_translation: mSOCS_c => mSOCS_c + SOCS; Cytoplasm*k__33*mSOCS_c;
  R__34_mMXA_translation: mMXA_c => mMXA_c + MXA; Cytoplasm*k__34*mMXA_c;
  R__35_mIFIT1_translation: mIFIT1_c => mIFIT1_c + IFIT1; Cytoplasm*k__35*mIFIT1_c;
  R__36_IRF9_c_out: IRF9_c => ; Cytoplasm*k__36*IRF9_c;
  R__36_2_IRF9_n_out: IRF9_n => ; Nucleus*k__36*IRF9_n; R__36_2_IRF9_n_out is "R__36.2 IRF9_n out";
  R__37_SOCS_out: SOCS => ; Cytoplasm*k__37__fixed*SOCS;
  R__38_MXA_out: MXA => ; Cytoplasm*k__38_fixed*MXA;
  R__39_IFIT1_out: IFIT1 => ; Cytoplasm*k__39_fixed*IFIT1;
  R__40_ISGF3_release: ISGF3_n => IRF9_n + STAT1_n + STAT2_n; Nucleus*k__40__fixed*ISGF3_n;
  R__41_IRF9_translocalization: IRF9_n => IRF9_c; k__41*IRF9_n;
  R__42_STAT1_translocalization: STAT1_n => STAT1_c; k__42*STAT1_n;
  R__43_STAT2_translocalization: STAT2_n => STAT2_c; k__43*STAT2_n;
  R__44_receptor_inactivation: AR + SOCS => IR + SOCS; Cytoplasm*k__44*AR*SOCS;
  R__45_receptor_release: IR => R1 + R2; Cytoplasm*k__45*IR;
  R__46_IFN_out: IFN => ; Cytoplasm*k__46__fixed*IFN;
  R__47_STAT2_IRF9_release: STAT2_IRF9_n => STAT2_n + IRF9_n; Nucleus*k__47*STAT2_IRF9_n; R__47_STAT2_IRF9_release is "R__47 STAT2-IRF9 release";
  R__47_2_STAT2_IRF9_release: STAT2_IRF9_c => STAT2_c + IRF9_c; Cytoplasm*k__47*STAT2_IRF9_c; R__47_2_STAT2_IRF9_release is "R__47.2 STAT2-IRF9 release";

  // Unit definitions:
  unit length = metre;
  unit area = metre^2;
  unit volume = dimensionless^0;
  unit time = 0.06 second;
  unit substance = item;
end
