// SBML level 2 version 4
// dcterms:bibliographicCitation: urn:miriam:doi:10.1007/s12064-019-00305-2

function Function_for_Hepatocyte_Growth(r, H, K)
  r*H*(1 - H/K);
end

function Function_for_Hepatocyte_Infection(beta, H, H_B)
  beta*H*H_B;
end

function Function_for_Infected_Hepatocytes_Death(I_H, mu, delta, a_c, T_c, I_gamma, c_gamma, c, I_10)
  I_H*(mu + delta + a_c*T_c*(I_gamma/(I_gamma + c_gamma))*(c/(I_10 + c)));
end

function Function_for_IL_4_Production_Th2(K_4, T_2, c_2)
  K_4*T_2/(T_2 + c_2);
end
Function_for_IL_4_Production_Th2 is "Function_for_IL-4_Production_Th2";

function Function_for_Th2_Activation(alpha_2, T_4_0, H_B, I_4, c_4)
  alpha_2*T_4_0*H_B*(I_4/(I_4 + c_4));
end

function Function_for_IL_2_Production_Th1(K_2, T_1, c_1)
  K_2*T_1/(T_1 + c_1);
end
Function_for_IL_2_Production_Th1 is "Function_for_IL-2_Production_Th1";

function Function_for_IFN_gamma_Production_Th1(K_gamma1, T_1, c_1)
  K_gamma1*T_1/(T_1 + c_1);
end

function Function_for_HBV_Budding(delta, N, I_H)
  delta*N*I_H;
end

function Function_for_IL_12_Production_Th1(K_12, T_1, c_1)
  K_12*T_1/(T_1*c_1);
end
Function_for_IL_12_Production_Th1 is "Function_for_IL-12_Production_Th1";

function Function_for_CTL_Activation(gamma_c, T_8_0, I_2, c_I2)
  gamma_c*T_8_0*I_2/(I_2 + c_I2);
end

function Function_for_Th_Activation(alpha_1, T_4_0, H_B, I_12, c_12, I_gamma, c_gamma, c, I_10)
  alpha_1*T_4_0*H_B*(I_12/(I_12 + c_12))*(I_gamma/(I_gamma + c_gamma))*(c/(c + I_10));
end

function Function_for_IFN_gamma_Production_CTL(K_gammac, T_c, c_c)
  K_gammac*T_c/(T_c + c_c);
end

function Function_for_IL_10_Production_Th2(K_10, T_2, c_2)
  K_10*T_2/(T_2 + c_2);
end
Function_for_IL_10_Production_Th2 is "Function_for_IL-10_Production_Th2";

model Manda2019___Acute_hepatitis_B_virus_infection_model_within_the_host_incorporating_immune_cells_and_cytokine_response()
  // Manda2019 - Acute hepatitis B virus infection model within the host incorporating immune cells and cytokine response
  // This is a within-host hepatitis B viral mathematical model for hepatitis B in the acute phase of infection. The model incorporates hepatocytes, hepatitis B virus, immune system cells and cytokine dynamics using a system of ordinary differential equations.
  // hasProperty CL:0000912
  // hasProperty CL:0000910
  // hasProperty ncit:C20464
  // hasProperty ncit:C12588
  // hasProperty ncit:C14215
  // hasProperty mamo:MAMO_0000046

  // Compartments:
  compartment compartment = 1;

  // Species:
  species H in compartment = 9600000;
  species I_H in compartment = 0;
  species T_c in compartment = 1000;
  species T_1 in compartment = 1000;
  species T_2 in compartment = 1000;
  species I_gamma in compartment = 2.638;
  species I_2 in compartment = 0.5;
  species I_12 in compartment = 0.001;
  species I_4 in compartment = 0.0006;
  species I_10 in compartment = 0.012;
  species H_B in compartment = 0.33;

  // Parameters:
  r = 0.00145;
  K = 9600000;
  beta = 9.9e-10;
  mu = 0.4;
  mu_v = 0.83;
  delta = 0.3043;
  alpha_c = 0.001;
  N = 500;
  T_4_0 = 1000;
  c = 10;
  c_gamma = 6;
  c_4 = 5;
  c_I2 = 100;
  c_c = 150;
  c_1 = 200;
  c_2 = 300;
  c_12 = 150;
  T_8_0 = 1000;
  K_gamma1 = 5;
  K_gammac = 4;
  K_2 = 40;
  K_4 = 20;
  K_10 = 40;
  K_12 = 50;
  mu_c = 0.5;
  mu_I2 = 10;
  mu_1 = 0.5;
  mu_2 = 0.5;
  mu_4 = 10;
  mu_10 = 5;
  mu_12 = 1.188;
  mu_gamma = 2.16;
  gamma_c = 0.1;
  alpha_1 = 0.4;
  alpha_2 = 0.6;
  H_tot = 9600000;

  // Assignment rules:
  H_B_e7 := H_B/10000000;
  I_H_e4 := I_H/10000;
  H_e6 := H/1000000;

  // Reactions:
  Hepatocyte_Growth: => H; compartment*Function_for_Hepatocyte_Growth(r, H, K);
  Hepatocyte_Infection: H => I_H; compartment*Function_for_Hepatocyte_Infection(beta, H, H_B);  // modifiers: H_B
  Infected_Hepatocytes_Death: I_H => ; compartment*Function_for_Infected_Hepatocytes_Death(I_H, mu, delta, alpha_c, T_c, I_gamma, c_gamma, c, I_10);  // modifiers: T_c, I_gamma, I_10
  HBV_Budding: => H_B; compartment*Function_for_HBV_Budding(delta, N, I_H);  // modifiers: I_H
  HBV_Decay: H_B => ; compartment*mu_v*H_B;
  CTL_Activation: => T_c; compartment*Function_for_CTL_Activation(gamma_c, T_8_0, I_2, c_I2);  // modifiers: I_2
  CTL_Death: T_c => ; compartment*mu_c*T_c;
  Th1_Activation: => T_1; compartment*Function_for_Th_Activation(alpha_1, T_4_0, H_B, I_12, c_12, I_10, c_gamma, c, I_10);  // modifiers: H_B, I_12, I_10
  Th1_Death: T_1 => ; compartment*mu_1*T_1;
  Th2_Activation: => T_2; compartment*Function_for_Th2_Activation(alpha_2, T_4_0, H_B, I_4, c_4);  // modifiers: H_B, I_4
  Th2_Death: T_2 => ; compartment*mu_2*T_2;
  IFN_gamma_Production_Th1: => I_gamma; compartment*Function_for_IFN_gamma_Production_Th1(K_gamma1, T_1, c_1);  // modifiers: T_1
  IFN_gamma_Production_CTL: => I_gamma; compartment*Function_for_IFN_gamma_Production_CTL(K_gammac, T_c, c_c);  // modifiers: T_c
  IFN_gamma_Decay: I_gamma => ; compartment*mu_gamma*I_gamma;
  IL_2_Production_Th1: => I_2; compartment*Function_for_IL_2_Production_Th1(K_2, T_1, c_1); IL_2_Production_Th1 is "IL-2_Production_Th1";  // modifiers: T_1
  IL_2_Decay: I_2 => ; compartment*mu_I2*I_2; IL_2_Decay is "IL-2_Decay";
  IL_12_Production_Th1: => I_12; compartment*Function_for_IL_12_Production_Th1(K_12, T_1, c_1); IL_12_Production_Th1 is "IL-12_Production_Th1";  // modifiers: T_1
  IL_12_Decay: I_12 => ; compartment*mu_12*I_12; IL_12_Decay is "IL-12_Decay";
  IL_4_Production_Th2: => I_4; compartment*Function_for_IL_4_Production_Th2(K_4, T_2, c_2); IL_4_Production_Th2 is "IL-4_Production_Th2";  // modifiers: T_2
  IL_4_Decay: I_4 => ; compartment*mu_4*I_4; IL_4_Decay is "IL-4_Decay";
  IL_10_Production_Th2: => I_10; compartment*Function_for_IL_10_Production_Th2(K_10, T_2, c_2); IL_10_Production_Th2 is "IL-10_Production_Th2";  // modifiers: T_2
  IL_10_Decay: I_10 => ; compartment*mu_10*I_10; IL_10_Decay is "IL-10_Decay";

  // Unit definitions:
  unit volume = 1e-3 litre;
  unit time = 86400 second;
  unit substance = item;
end
