// SBML level 2 version 4
// dcterms:bibliographicCitation: urn:miriam:pubmed:31337782

function Function_for_reaction_1(E1, TCR, kc1, km1, rootCompartment)
  kc1*E1*TCR*rootCompartment/(km1 + TCR*rootCompartment)/rootCompartment;
end

function Function_for_reaction_2(CTLA4, kc2, km2, pTCR, rootCompartment)
  kc2*CTLA4*rootCompartment*pTCR*rootCompartment/(km2 + pTCR*rootCompartment)/rootCompartment;
end

function Function_for_reaction_5(CN, kc5, km5, pTCR, rootCompartment)
  kc5*pTCR*rootCompartment*CN*rootCompartment/(km5 + CN*rootCompartment)/rootCompartment;
end

function Function_for_reaction_7(RCAN, aCN, aCNRCAN, ka7, kd7, rootCompartment)
  (ka7*aCN*rootCompartment*RCAN*rootCompartment - kd7*aCNRCAN*rootCompartment)/rootCompartment;
end

function Function_for_reaction_6(aCN, km6, rootCompartment, v6)
  v6*aCN*rootCompartment/(km6 + aCN*rootCompartment)/rootCompartment;
end

function Function_for_reaction_8(aCN, aCNpRCAN, ka8, kd8, pRCAN, rootCompartment)
  (ka8*aCN*rootCompartment*pRCAN*rootCompartment - kd8*aCNpRCAN*rootCompartment)/rootCompartment;
end

function Function_for_reaction_3(km3, pTCR, rootCompartment, v3)
  v3*pTCR*rootCompartment/(km3 + pTCR*rootCompartment)/rootCompartment;
end

function Function_for_reaction_9(Carabin, aCN, aCNCarabin, ka9, kd9, rootCompartment)
  (ka9*aCN*rootCompartment*Carabin*rootCompartment - kd9*aCNCarabin*rootCompartment)/rootCompartment;
end

function Function_for_reaction_11(GSK3, NFAT, kc11, km11, rootCompartment, v11)
  (v11 + kc11*GSK3*rootCompartment)*NFAT*rootCompartment/(km11 + NFAT*rootCompartment)/rootCompartment;
end

function Function_for_reaction_13(NFAT, km12, rootCompartment, v12)
  v12*NFAT*rootCompartment/(km12 + NFAT*rootCompartment)/rootCompartment;
end

function Function_for_reaction_4(iTCR, km4, rootCompartment, v4)
  v4*iTCR*rootCompartment/(km4 + iTCR*rootCompartment)/rootCompartment;
end

function Function_for_reaction_14(kdeg12, mNFAT, rootCompartment)
  kdeg12*mNFAT*rootCompartment/rootCompartment;
end

function Function_for_reaction_10(aCN, aCNpRCAN, kc10, km10, pNFAT, rootCompartment)
  kc10*(aCN*rootCompartment + aCNpRCAN*rootCompartment)*pNFAT*rootCompartment/(km10 + pNFAT*rootCompartment)/rootCompartment;
end

function Function_for_reaction_15(km13, mNFAT, rootCompartment, v13)
  v13*mNFAT*rootCompartment/(km13 + mNFAT*rootCompartment)/rootCompartment;
end

function Function_for_reaction_16(NFAT, kdeg13, rootCompartment)
  kdeg13*NFAT*rootCompartment/rootCompartment;
end

function Function_for_reaction_17(kdeg13, pNFAT, rootCompartment)
  kdeg13*pNFAT*rootCompartment/rootCompartment;
end

function Function_for_reaction_12(rootCompartment, vs12)
  vs12/rootCompartment;
end

function Function_for_reaction_38(NFAT, km24, rootCompartment, v24)
  v24*(NFAT*rootCompartment)^2/(km24^2 + (NFAT*rootCompartment)^2)/rootCompartment;
end

function Function_for_reaction_28(km19, mCarabin, rootCompartment, v19)
  v19*mCarabin*rootCompartment/(km19 + mCarabin*rootCompartment)/rootCompartment;
end

function Function_for_reaction_34(TNFa, kdeg21, rootCompartment)
  kdeg21*TNFa*rootCompartment/rootCompartment;
end

function Function_for_reaction_25(rootCompartment, vs18)
  vs18/rootCompartment;
end

function Function_for_reaction_31(NFAT, km20, rootCompartment, v20)
  v20*(NFAT*rootCompartment)^2/(km20^2 + (NFAT*rootCompartment)^2)/rootCompartment;
end

function Function_for_reaction_37(rootCompartment, vs24)
  vs24/rootCompartment;
end

function Function_for_reaction_43(NFAT, km26, km26b, pERK, rootCompartment, v26a, v26b)
  v26a*(1 + v26b*pERK*rootCompartment/(km26b + pERK*rootCompartment))*(NFAT*rootCompartment)^2/(km26^2 + (NFAT*rootCompartment)^2)/rootCompartment;
end

function Function_for_reaction_24(km17, pRCAN, rootCompartment, v17)
  v17*pRCAN*rootCompartment/(km17 + pRCAN*rootCompartment)/rootCompartment;
end

function Function_for_reaction_27(kdeg18, mCarabin, rootCompartment)
  kdeg18*mCarabin*rootCompartment/rootCompartment;
end

function Function_for_reaction_32(kdeg20, mTNFa, rootCompartment)
  kdeg20*mTNFa*rootCompartment/rootCompartment;
end

function Function_for_reaction_19(NFAT, km14, rootCompartment, v14)
  v14*(NFAT*rootCompartment)^2/(km14^2 + (NFAT*rootCompartment)^2)/rootCompartment;
end

function Function_for_reaction_33(km21, mTNFa, rootCompartment, v21)
  v21*mTNFa*rootCompartment/(km21 + mTNFa*rootCompartment)/rootCompartment;
end

function Function_for_reaction_36(kc23, km23, pTAK1, rootCompartment)
  kc23*pTAK1*rootCompartment/(km23 + pTAK1*rootCompartment)/rootCompartment;
end

function Function_for_reaction_56(km34, pMEK, rootCompartment, v34)
  v34*pMEK*rootCompartment/(km34 + pMEK*rootCompartment)/rootCompartment;
end

function Function_for_reaction_45(km27, mIL2, rootCompartment, v27)
  v27*mIL2*rootCompartment/(km27 + mIL2*rootCompartment)/rootCompartment;
end

function Function_for_reaction_22(RCAN, kdeg15, rootCompartment)
  kdeg15*RCAN*rootCompartment/rootCompartment;
end

function Function_for_reaction_30(rootCompartment, vs20)
  vs20/rootCompartment;
end

function Function_for_reaction_41(CTLA4, kdeg25, rootCompartment)
  kdeg25*CTLA4*rootCompartment/rootCompartment;
end

function Function_for_reaction_29(Carabin, kdeg19, rootCompartment)
  kdeg19*Carabin*rootCompartment/rootCompartment;
end

function Function_for_reaction_51(FasL, kdeg29, rootCompartment)
  kdeg29*FasL*rootCompartment/rootCompartment;
end

function Function_for_reaction_21(km15, mRCAN, rootCompartment, v15)
  v15*mRCAN*rootCompartment/(km15 + mRCAN*rootCompartment)/rootCompartment;
end

function Function_for_reaction_18(rootCompartment, vs14)
  vs14/rootCompartment;
end

function Function_for_reaction_20(kdeg14, mRCAN, rootCompartment)
  kdeg14*mRCAN*rootCompartment/rootCompartment;
end

function Function_for_reaction_26(NFAT, km18, rootCompartment, v18)
  v18*(NFAT*rootCompartment)^2/(km18^2 + (NFAT*rootCompartment)^2)/rootCompartment;
end

function Function_for_reaction_35(TAK1, TNFa, kc22, km22, rootCompartment)
  kc22*TNFa*rootCompartment*TAK1*rootCompartment/(km22 + TAK1*rootCompartment)/rootCompartment;
end

function Function_for_reaction_23(RCAN, kc16, km16, pTAK1, rootCompartment)
  kc16*pTAK1*rootCompartment*RCAN*rootCompartment/(km16 + RCAN*rootCompartment)/rootCompartment;
end

function Function_for_reaction_39(kdeg24, mCTLA4, rootCompartment)
  kdeg24*mCTLA4*rootCompartment/rootCompartment;
end

function Function_for_reaction_48(NFAT, km28, km28b, pERK, rootCompartment, v28a, v28b)
  v28a*(1 + v28b*pERK*rootCompartment/(km28b + pERK*rootCompartment))*(NFAT*rootCompartment)^5/(km28^5 + (NFAT*rootCompartment)^5)/rootCompartment;
end

function Function_for_reaction_42(rootCompartment, vs26)
  vs26/rootCompartment;
end

function Function_for_reaction_47(rootCompartment, vs28)
  vs28/rootCompartment;
end

function Function_for_reaction_49(kdeg28, mFasL, rootCompartment)
  kdeg28*mFasL*rootCompartment/rootCompartment;
end

function Function_for_reaction_40(km25, mCTLA4, rootCompartment, v25)
  v25*mCTLA4*rootCompartment/(km25 + mCTLA4*rootCompartment)/rootCompartment;
end

function Function_for_reaction_44(kdeg26, mIL2, rootCompartment)
  kdeg26*mIL2*rootCompartment/rootCompartment;
end

function Function_for_reaction_46(IL2, kdeg27, rootCompartment)
  kdeg27*IL2*rootCompartment/rootCompartment;
end

function Function_for_reaction_50(km29, mFasL, rootCompartment, v29)
  v29*mFasL*rootCompartment/(km29 + mFasL*rootCompartment)/rootCompartment;
end

function Function_for_reaction_52(Ras, kc30, ki30, km30, pERK, pTCR, rootCompartment)
  kc30*pTCR*rootCompartment*Ras*rootCompartment/(km30 + Ras*rootCompartment)/(1 + pERK*rootCompartment/ki30)/rootCompartment;
end

function Function_for_reaction_53(aRas, km31, rootCompartment, v31)
  v31*aRas*rootCompartment/(km31 + aRas*rootCompartment)/rootCompartment;
end

function Function_for_reaction_54(Carabin, aRas, aRasCarabin, ka32, kd32, rootCompartment)
  (ka32*aRas*rootCompartment*Carabin*rootCompartment - kd32*aRasCarabin*rootCompartment)/rootCompartment;
end

function Function_for_reaction_55(MEK, Rac1GTP, aRas, kc33a, kc33b, km33, rootCompartment)
  (kc33a*aRas*rootCompartment + kc33b*Rac1GTP*rootCompartment)*MEK*rootCompartment/(km33 + MEK*rootCompartment)/rootCompartment;
end

function Function_for_reaction_57(ERK, kc35, km35, pMEK, rootCompartment)
  kc35*pMEK*rootCompartment*ERK*rootCompartment/(km35 + ERK*rootCompartment)/rootCompartment;
end

function Function_for_reaction_65(GSK3, kc43, km43, pAkt, rootCompartment)
  kc43*pAkt*rootCompartment*GSK3*rootCompartment/(km43 + GSK3*rootCompartment)/rootCompartment;
end

function Function_for_reaction_59(PI3K, kc37a, kc37b, km37, pIL2R, pTCR, rootCompartment)
  (kc37a*pIL2R*rootCompartment + kc37b*pTCR*rootCompartment)*PI3K*rootCompartment/(km37 + PI3K*rootCompartment)/rootCompartment;
end

function Function_for_reaction_63(Akt, aPI3K, kc41, km41, rootCompartment)
  kc41*aPI3K*rootCompartment*Akt*rootCompartment/(km41 + Akt*rootCompartment)/rootCompartment;
end

function Function_for_reaction_64(aPP2A, kc42, km42, pAkt, rootCompartment)
  kc42*aPP2A*rootCompartment*pAkt*rootCompartment/(km42 + pAkt*rootCompartment)/rootCompartment;
end

function Function_for_reaction_66(km44, pGSK3, rootCompartment, vs44)
  vs44*pGSK3*rootCompartment/(km44 + pGSK3*rootCompartment)/rootCompartment;
end

function Function_for_reaction_67(Rac1GDP, aPI3K, kc45, km45, rootCompartment)
  kc45*aPI3K*rootCompartment*Rac1GDP*rootCompartment/(km45 + Rac1GDP*rootCompartment)/rootCompartment;
end

function Function_for_reaction_58(km36, pERK, rootCompartment, v36)
  v36*pERK*rootCompartment/(km36 + pERK*rootCompartment)/rootCompartment;
end

function Function_for_reaction_68(Rac1GTP, km46, rootCompartment, v46)
  v46*Rac1GTP*rootCompartment/(km46 + Rac1GTP*rootCompartment)/rootCompartment;
end

function Function_for_reaction_60(aPI3K, km38, rootCompartment, v38)
  v38*aPI3K*rootCompartment/(km38 + aPI3K*rootCompartment)/rootCompartment;
end

function Function_for_reaction_69(CnI, aCN, aCNCnI, ka47, kd47, rootCompartment)
  (ka47*aCN*rootCompartment*CnI - kd47*aCNCnI*rootCompartment)/rootCompartment;
end

function Function_for_reaction_61(CTLA4, PP2A, kc39, km39, rootCompartment)
  kc39*CTLA4*rootCompartment*PP2A*rootCompartment/(km39 + PP2A*rootCompartment)/rootCompartment;
end

function Function_for_reaction_62(aPP2A, km40, rootCompartment, v40)
  v40*aPP2A*rootCompartment/(km40 + aPP2A*rootCompartment)/rootCompartment;
end

function Function_for_reaction_70(IL2, IL2R, kc48, km48, rootCompartment)
  kc48*IL2*rootCompartment*IL2R*rootCompartment/(km48 + IL2R*rootCompartment)/rootCompartment;
end

function Function_for_reaction_71(kc49, km49, pIL2R, rootCompartment)
  kc49*pIL2R*rootCompartment/(km49 + pIL2R*rootCompartment)/rootCompartment;
end

function Function_for_reaction_72(km50, pIL2R, rootCompartment, v50)
  v50*pIL2R*rootCompartment/(km50 + pIL2R*rootCompartment)/rootCompartment;
end

function Function_for_reaction_73(iIL2R, km51, rootCompartment, v51)
  v51*iIL2R*rootCompartment/(km51 + iIL2R*rootCompartment)/rootCompartment;
end

model Shin2019__Regulation_of_nuclear_factor_of_activated_T_cells__NFAT()
  // Shin2019- Regulation of nuclear factor of activated T-cells (NFAT)
  // A properly functioning immune system is vital for an organism's wellbeing. Immune tolerance is a critical feature of the immune system that allows immune cells to mount effective responses against exogenous pathogens such as viruses and bacteria, while preventing attack to self-tissues. Activation-induced cell death (AICD) in T lymphocytes, in which repeated stimulations of the T-cell receptor (TCR) lead to activation and then apoptosis of T cells, is a major mechanism for T cell homeostasis and helps maintain peripheral immune tolerance. Defects in AICD can lead to development of autoimmune diseases. Despite its importance, the regulatory mechanisms that underlie AICD remain poorly understood, particularly at an integrative network level. Here, we develop a dynamic multi-pathway model of the integrated TCR signalling network and perform model-based analysis to characterize the network-level properties of AICD. Model simulation and analysis show that amplified activation of the transcriptional factor NFAT in response to repeated TCR stimulations, a phenomenon central to AICD, is tightly modulated by a coupled positive-negative feedback mechanism. NFAT amplification is predominantly enabled by a positive feedback self-regulated by NFAT, while opposed by a NFAT-induced negative feedback via Carabin. Furthermore, model analysis predicts an optimal therapeutic window for drugs that help minimize proliferation while maximize AICD of T cells. Overall, our study provides a comprehensive mathematical model of TCR signalling and model-based analysis offers new network-level insights into the regulation of activation-induced cell death in T cells
  // Model is encoded by Johannes and submitted to BioModels by Ahmad Zyoud.
  // occursIn BTO:0000782
  // hasTaxon taxonomy:9606
  // isDescribedBy pubmed:31337782
  // hasProperty ncit:C12735 mamo:MAMO_0000089

  // Compartments:
  compartment rootCompartment = 1;

  // Species:
  species TCR in rootCompartment = 10;
  species pTCR in rootCompartment = 4.384e-22;
  species iTCR in rootCompartment = 1.937e-23;
  species CN in rootCompartment = 10;
  species aCN in rootCompartment = 2.262e-18;
  species aCNRCAN in rootCompartment = 2.209e-20;
  species aCNpRCAN in rootCompartment = 2.416e-19;
  species aCNCarabin in rootCompartment = 4.286e-17;
  species NFAT in rootCompartment = 0.001283;
  species pNFAT in rootCompartment = 9.906;
  species mNFAT in rootCompartment = 0.1955;
  species mRCAN in rootCompartment = 0.1;
  species RCAN in rootCompartment = 0.1;
  species pRCAN in rootCompartment = 0.0129;
  species mCarabin in rootCompartment = 0.1;
  species Carabin in rootCompartment = 0.1;
  species mTNFa in rootCompartment = 0.12;
  species TNFa in rootCompartment = 0.12;
  species TAK1 in rootCompartment = 9.239;
  species pTAK1 in rootCompartment = 0.7611;
  species mCTLA4 in rootCompartment = 0.1;
  species CTLA4 in rootCompartment = 0.1;
  species mIL2 in rootCompartment = 0.1;
  species IL2 in rootCompartment = 0.1;
  species mFasL in rootCompartment = 0.1;
  species FasL in rootCompartment = 0.1;
  species Ras in rootCompartment = 10;
  species aRas in rootCompartment = 8.375e-25;
  species aRasCarabin in rootCompartment = 8.472e-31;
  species MEK in rootCompartment = 9.999;
  species pMEK in rootCompartment = 0.0009077;
  species ERK in rootCompartment = 10;
  species pERK in rootCompartment = 0.0004769;
  species PI3K in rootCompartment = 10;
  species aPI3K in rootCompartment = 5.945e-5;
  species PP2A in rootCompartment = 9.996;
  species aPP2A in rootCompartment = 0.003959;
  species Akt in rootCompartment = 8.853;
  species pAkt in rootCompartment = 1.147;
  species GSK3 in rootCompartment = 4.507;
  species pGSK3 in rootCompartment = 5.493;
  species Rac1GDP in rootCompartment = 9.892;
  species Rac1GTP in rootCompartment = 0.1078;
  species aCNCnI in rootCompartment = 0;
  species IL2R in rootCompartment = 0.5258;
  species pIL2R in rootCompartment = 9.442;
  species iIL2R in rootCompartment = 0.03187;

  // Parameters:
  kc1 = 32.8852;
  km1 = 0.148252;
  kc2 = 11.995;
  km2 = 11.3763;
  v3 = 116.145;
  km3 = 100000;
  v4 = 0.635331;
  km4 = 2910.72;
  kc5 = 6.01174e4;
  km5 = 12.8233;
  v6 = 3.99945;
  km6 = 90.3649;
  ka7 = 0.0924698;
  kd7 = 2.13796;
  ka8 = 2582.26;
  kd8 = 315.5;
  ka9 = 1.45546;
  kd9 = 0.121899;
  kc10 = 276.694;
  km10 = 1870.68;
  v11 = 49.7737;
  kc11 = 44.7713;
  km11 = 23.1739;
  km46 = 8590.14;
  v12 = 95.9401;
  km12 = 0.0494311;
  kdeg12 = 25.4097;
  v13 = 1.79061;
  km13 = 24.9459;
  kdeg13 = 0.00140281;
  v46 = 135.207;
  v14 = 4.81948;
  km14 = 5.4325;
  kdeg14 = 1.36144;
  km45 = 209.894;
  km15 = 2.11349e4;
  kdeg15 = 82.7942;
  kc16 = 5046.61;
  km16 = 5.44503e4;
  v17 = 52.723;
  km17 = 96.3829;
  kc45 = 633.87;
  v18 = 0.0671429;
  km18 = 3.65595;
  kdeg18 = 0.0190546;
  km44 = 0.609537;
  km19 = 98.6279;
  kdeg19 = 217.27;
  vs44 = 1887.99;
  v20 = 0.0897429;
  km20 = 0.0342768;
  kdeg20 = 0.00628058;
  km43 = 26.5461;
  km21 = 5.99791e4;
  kdeg21 = 0.0601174;
  kc22 = 20.1837;
  km22 = 38.9045;
  kc23 = 15.4525;
  km23 = 24.5471;
  kc43 = 1.02094e4;
  v24 = 7.07946;
  km24 = 30.9742;
  kdeg24 = 10.2802;
  km40 = 0.049545;
  km25 = 586.138;
  kdeg25 = 3.03389e4;
  km42 = 4325.14;
  v26a = 4.15911e4;
  v26b = 0.25;
  km26 = 304.789;
  kdeg26 = 0.088308;
  kc42 = 1.11944e4;
  km27 = 37.8443;
  kdeg27 = 0.00297852;
  km41 = 232.274;
  v28a = 302.691;
  v28b = 0.25;
  v40 = 5.14044;
  kdeg28 = 0.00642688;
  kc41 = 5382.7;
  km29 = 4.05509e4;
  kdeg29 = 1.8578;
  kc30 = 5.37032;
  km30 = 112.98;
  ki30 = 2703.96;
  v31 = 54.5758;
  km31 = 0.238781;
  ka32 = 0.937562;
  kd32 = 92683;
  kc33a = 1.22744e4;
  kc33b = 25.1768;
  km33 = 905.733;
  v34 = 45.3942;
  km34 = 1.38995;
  kc35 = 33266;
  km35 = 32.5837;
  v36 = 1749.85;
  km36 = 0.11722;
  kc37a = 0.00198153;
  kc37b = 792.501;
  km37 = 1106.62;
  v38 = 33.1894;
  km38 = 11.7761;
  kc39 = 144.212;
  km39 = 368.978;
  ka47 = 204.174;
  kd47 = 1.48594;
  kc48 = 1.48594;
  km48 = 1.48594;
  kc49 = 9.22571;
  km49 = 2233.57;
  v50 = 26.0615;
  km50 = 8.72971;
  v51 = 25.8821;
  km51 = 0.0290402;
  km26b = 0.00244906;
  km28b = 701.455;
  km28 = 105.196;
  vs12 = 2.54097;
  vs14 = 0.136144;
  v15 = 1749850;
  vs18 = 0.00190546;
  v19 = 2.14506e4;
  vs20 = 0.000628058;
  v21 = 3605.79;
  vs24 = 1.02802;
  v25 = 17785800;
  vs26 = 0.0088308;
  v27 = 0.113018;
  vs28 = 0.000642688;
  v29 = 7.53357e4;
  stim = 100;
  ton = 0;
  toff = 2;
  CnI = 0;

  // Assignment rules:
  E1 := piecewise(0, time <= ton, piecewise(stim, time <= toff, 0));

  // Reactions:
  reaction_1: TCR => pTCR; rootCompartment*Function_for_reaction_1(E1, TCR, kc1, km1, rootCompartment);
  reaction_2: pTCR => TCR; rootCompartment*Function_for_reaction_2(CTLA4, kc2, km2, pTCR, rootCompartment);  // modifiers: CTLA4
  reaction_3: pTCR => iTCR; rootCompartment*Function_for_reaction_3(km3, pTCR, rootCompartment, v3);
  reaction_4: iTCR => TCR; rootCompartment*Function_for_reaction_4(iTCR, km4, rootCompartment, v4);
  reaction_5: CN => aCN; rootCompartment*Function_for_reaction_5(CN, kc5, km5, pTCR, rootCompartment);  // modifiers: pTCR
  reaction_6: aCN => CN; rootCompartment*Function_for_reaction_6(aCN, km6, rootCompartment, v6);
  reaction_7: aCN + RCAN => aCNRCAN; rootCompartment*Function_for_reaction_7(RCAN, aCN, aCNRCAN, ka7, kd7, rootCompartment);
  reaction_8: aCN + pRCAN => aCNpRCAN; rootCompartment*Function_for_reaction_8(aCN, aCNpRCAN, ka8, kd8, pRCAN, rootCompartment);
  reaction_9: aCN + Carabin => aCNCarabin; rootCompartment*Function_for_reaction_9(Carabin, aCN, aCNCarabin, ka9, kd9, rootCompartment);
  reaction_10: pNFAT => NFAT; rootCompartment*Function_for_reaction_10(aCN, aCNpRCAN, kc10, km10, pNFAT, rootCompartment);  // modifiers: aCN, aCNpRCAN
  reaction_11: NFAT => pNFAT; rootCompartment*Function_for_reaction_11(GSK3, NFAT, kc11, km11, rootCompartment, v11);  // modifiers: GSK3
  reaction_12: => mNFAT; rootCompartment*Function_for_reaction_12(rootCompartment, vs12);
  reaction_13: => mNFAT; rootCompartment*Function_for_reaction_13(NFAT, km12, rootCompartment, v12);  // modifiers: NFAT
  reaction_14: mNFAT => ; rootCompartment*Function_for_reaction_14(kdeg12, mNFAT, rootCompartment);
  reaction_15: => NFAT; rootCompartment*Function_for_reaction_15(km13, mNFAT, rootCompartment, v13);  // modifiers: mNFAT
  reaction_16: NFAT => ; rootCompartment*Function_for_reaction_16(NFAT, kdeg13, rootCompartment);
  reaction_17: pNFAT => ; rootCompartment*Function_for_reaction_17(kdeg13, pNFAT, rootCompartment);
  reaction_18: => mRCAN; rootCompartment*Function_for_reaction_18(rootCompartment, vs14);
  reaction_19: => mRCAN; rootCompartment*Function_for_reaction_19(NFAT, km14, rootCompartment, v14);  // modifiers: NFAT
  reaction_20: mRCAN => ; rootCompartment*Function_for_reaction_20(kdeg14, mRCAN, rootCompartment);
  reaction_21: => RCAN; rootCompartment*Function_for_reaction_21(km15, mRCAN, rootCompartment, v15);  // modifiers: mRCAN
  reaction_22: RCAN => ; rootCompartment*Function_for_reaction_22(RCAN, kdeg15, rootCompartment);
  reaction_23: RCAN => pRCAN; rootCompartment*Function_for_reaction_23(RCAN, kc16, km16, pTAK1, rootCompartment);  // modifiers: pTAK1
  reaction_24: pRCAN => RCAN; rootCompartment*Function_for_reaction_24(km17, pRCAN, rootCompartment, v17);
  reaction_25: => mCarabin; rootCompartment*Function_for_reaction_25(rootCompartment, vs18);
  reaction_26: => mCarabin; rootCompartment*Function_for_reaction_26(NFAT, km18, rootCompartment, v18);  // modifiers: NFAT
  reaction_27: mCarabin => ; rootCompartment*Function_for_reaction_27(kdeg18, mCarabin, rootCompartment);
  reaction_28: => Carabin; rootCompartment*Function_for_reaction_28(km19, mCarabin, rootCompartment, v19);  // modifiers: mCarabin
  reaction_29: Carabin => ; rootCompartment*Function_for_reaction_29(Carabin, kdeg19, rootCompartment);
  reaction_30: => mTNFa; rootCompartment*Function_for_reaction_30(rootCompartment, vs20);
  reaction_31: => mTNFa; rootCompartment*Function_for_reaction_31(NFAT, km20, rootCompartment, v20);  // modifiers: NFAT
  reaction_32: mTNFa => ; rootCompartment*Function_for_reaction_32(kdeg20, mTNFa, rootCompartment);
  reaction_33: => TNFa; rootCompartment*Function_for_reaction_33(km21, mTNFa, rootCompartment, v21);  // modifiers: mTNFa
  reaction_34: TNFa => ; rootCompartment*Function_for_reaction_34(TNFa, kdeg21, rootCompartment);
  reaction_35: TAK1 => pTAK1; rootCompartment*Function_for_reaction_35(TAK1, TNFa, kc22, km22, rootCompartment);  // modifiers: TNFa
  reaction_36: pTAK1 => TAK1; rootCompartment*Function_for_reaction_36(kc23, km23, pTAK1, rootCompartment);
  reaction_37: => mCTLA4; rootCompartment*Function_for_reaction_37(rootCompartment, vs24);
  reaction_38: => mCTLA4; rootCompartment*Function_for_reaction_38(NFAT, km24, rootCompartment, v24);  // modifiers: NFAT
  reaction_39: mCTLA4 => ; rootCompartment*Function_for_reaction_39(kdeg24, mCTLA4, rootCompartment);
  reaction_40: => CTLA4; rootCompartment*Function_for_reaction_40(km25, mCTLA4, rootCompartment, v25);  // modifiers: mCTLA4
  reaction_41: CTLA4 => ; rootCompartment*Function_for_reaction_41(CTLA4, kdeg25, rootCompartment);
  reaction_42: => mIL2; rootCompartment*Function_for_reaction_42(rootCompartment, vs26);
  reaction_43: => mIL2; rootCompartment*Function_for_reaction_43(NFAT, km26, km26b, pERK, rootCompartment, v26a, v26b);  // modifiers: NFAT, pERK
  reaction_44: mIL2 => ; rootCompartment*Function_for_reaction_44(kdeg26, mIL2, rootCompartment);
  reaction_45: => IL2; rootCompartment*Function_for_reaction_45(km27, mIL2, rootCompartment, v27);  // modifiers: mIL2
  reaction_46: IL2 => ; rootCompartment*Function_for_reaction_46(IL2, kdeg27, rootCompartment);
  reaction_47: => mFasL; rootCompartment*Function_for_reaction_47(rootCompartment, vs28);
  reaction_48: => mFasL; rootCompartment*Function_for_reaction_48(NFAT, km28, km28b, pERK, rootCompartment, v28a, v28b);  // modifiers: NFAT, pERK
  reaction_49: mFasL => ; rootCompartment*Function_for_reaction_49(kdeg28, mFasL, rootCompartment);
  reaction_50: => FasL; rootCompartment*Function_for_reaction_50(km29, mFasL, rootCompartment, v29);  // modifiers: mFasL
  reaction_51: FasL => ; rootCompartment*Function_for_reaction_51(FasL, kdeg29, rootCompartment);
  reaction_52: Ras => aRas; rootCompartment*Function_for_reaction_52(Ras, kc30, ki30, km30, pERK, pTCR, rootCompartment);  // modifiers: pERK, pTCR
  reaction_53: aRas => Ras; rootCompartment*Function_for_reaction_53(aRas, km31, rootCompartment, v31);
  reaction_54: Carabin + aRas => aRasCarabin; rootCompartment*Function_for_reaction_54(Carabin, aRas, aRasCarabin, ka32, kd32, rootCompartment);
  reaction_55: MEK => pMEK; rootCompartment*Function_for_reaction_55(MEK, Rac1GTP, aRas, kc33a, kc33b, km33, rootCompartment);  // modifiers: Rac1GTP, aRas
  reaction_56: pMEK => MEK; rootCompartment*Function_for_reaction_56(km34, pMEK, rootCompartment, v34);
  reaction_57: ERK => pERK; rootCompartment*Function_for_reaction_57(ERK, kc35, km35, pMEK, rootCompartment);  // modifiers: pMEK
  reaction_58: pERK => ERK; rootCompartment*Function_for_reaction_58(km36, pERK, rootCompartment, v36);
  reaction_59: PI3K => aPI3K; rootCompartment*Function_for_reaction_59(PI3K, kc37a, kc37b, km37, pIL2R, pTCR, rootCompartment);  // modifiers: pIL2R, pTCR
  reaction_60: aPI3K => PI3K; rootCompartment*Function_for_reaction_60(aPI3K, km38, rootCompartment, v38);
  reaction_61: PP2A => aPP2A; rootCompartment*Function_for_reaction_61(CTLA4, PP2A, kc39, km39, rootCompartment);  // modifiers: CTLA4
  reaction_62: aPP2A => PP2A; rootCompartment*Function_for_reaction_62(aPP2A, km40, rootCompartment, v40);
  reaction_63: Akt => pAkt; rootCompartment*Function_for_reaction_63(Akt, aPI3K, kc41, km41, rootCompartment);  // modifiers: aPI3K
  reaction_64: pAkt => Akt; rootCompartment*Function_for_reaction_64(aPP2A, kc42, km42, pAkt, rootCompartment);  // modifiers: aPP2A
  reaction_65: GSK3 => pGSK3; rootCompartment*Function_for_reaction_65(GSK3, kc43, km43, pAkt, rootCompartment);  // modifiers: pAkt
  reaction_66: pGSK3 => GSK3; rootCompartment*Function_for_reaction_66(km44, pGSK3, rootCompartment, vs44);
  reaction_67: Rac1GDP => Rac1GTP; rootCompartment*Function_for_reaction_67(Rac1GDP, aPI3K, kc45, km45, rootCompartment);  // modifiers: aPI3K
  reaction_68: Rac1GTP => Rac1GDP; rootCompartment*Function_for_reaction_68(Rac1GTP, km46, rootCompartment, v46);
  reaction_69: aCN => aCNCnI; rootCompartment*Function_for_reaction_69(CnI, aCN, aCNCnI, ka47, kd47, rootCompartment);
  reaction_70: IL2R => pIL2R; rootCompartment*Function_for_reaction_70(IL2, IL2R, kc48, km48, rootCompartment);  // modifiers: IL2
  reaction_71: pIL2R => IL2R; rootCompartment*Function_for_reaction_71(kc49, km49, pIL2R, rootCompartment);
  reaction_72: pIL2R => iIL2R; rootCompartment*Function_for_reaction_72(km50, pIL2R, rootCompartment, v50);
  reaction_73: iIL2R => pIL2R; rootCompartment*Function_for_reaction_73(iIL2R, km51, rootCompartment, v51);
end
