// SBML level 2 version 4

model MODEL1504160000()
  // Wu2011 - Influenza-specific CD8+ T cells
  // biomodels.db:MODEL1504160000

  // Compartments:
  compartment default = 1 volume;
  compartment Spleen in default = 1 volume;
  compartment Lung in default = 1 volume;
  compartment MLN in default = 1 volume;

  // Species:
  species cd8_in_spleen in Spleen = 36400/Spleen;
  species cd8_in_lung in Lung = 1310/Lung;
  substanceOnly species cd8_in_mln in MLN = 3960;
  species s6 in default = 0;
  species s7 in default = 0;
  species s8 in default = 0;

  // Parameters:
  rho_m = 1.66e-5 substance;
  delta_m = 0 substance;
  gamma_ms = 0.157 substance;
  gamma_ml = 0 substance;
  rho_s = 4.48e-5 substance;
  delta_s = 0 substance;
  gamma_sl = 0.495 substance;
  delta_l = 3.96 substance;
  tau = 3.08 substance;
  D_m = 1 substance;
  D_s = 1 substance;

  // Reactions:
  re1: cd8_in_mln => cd8_in_spleen; gamma_ms*cd8_in_mln;
  re4: cd8_in_lung => s6; delta_l*cd8_in_lung;
  re5: s7 => cd8_in_mln; (rho_m*D_m - delta_m)*cd8_in_mln;
  re6: cd8_in_spleen => cd8_in_lung; gamma_sl*cd8_in_spleen;
  re7: cd8_in_mln => cd8_in_lung; gamma_ml*cd8_in_mln;
  re8: s8 => cd8_in_spleen; (rho_s*D_m - delta_s)*cd8_in_spleen;

  // Unit definitions:
  unit substance = mole;
  unit volume = litre;
  unit area = metre^2;
  unit length = metre;
  unit time = second;
end
