// SBML level 3 version 2

model Babaev2024___CYP2C9_variants()
  // Babaev2024 - CYP2C9 variants
  // Modified model of losartan metabolism (Karatza and Karalis, 2020) incorporating different allelic variants of CYP2C9
  // hasProperty mamo:MAMO_0000089
  // biomodels.db:MODEL2412180002

  // Compartments:
  compartment default = 1; default is "Babaev2024 - CYP2C9 variants";
  compartment central_compartment = 1;
  compartment intestine = 1;
  compartment peripherial_compartment = 1;
  compartment stomach = 1;

  // Species:
  species E3174_out in default = 0;
  species E3174_cc in central_compartment = 0;
  species losartan_cc in central_compartment = 0;
  species losartan_int in intestine = 0;
  species losartan_out in default = 0;
  species losartan_pc in peripherial_compartment = 0;
  species losartan_stm in stomach = oral_dose/(1000*461.01)*1000000000000;

  // Parameters:
  // nmol*h/L
  AUC_E3174 = 0;
  // nmol*h/L
  AUC_Losartan = 0;
  // L/h
  CL_m = 16.45676;
  // L/h
  CL_p = 30.40196;
  // L/h
  Q = 217.1036;
  // 1/h
  T = 0.8192144;
  // L
  Vm = 57.59837;
  // L
  Vp_1 = 56.17541;
  // L
  Vp_2 = 135.6355;
  // 1/h
  a = 6.645292;
  // unitless
  b = 3.95;
  // 1/h
  k_a = 5.127392;
  // 1/h
  k_m = 1.056306;
  // mg
  oral_dose = 50;
  // unitless
  start_CYP2C9 = 0;

  // Assignment rules:
  C_p := losartan_cc/(Vp_1*1000);
  C_m := E3174_cc/(Vm*1000);
  AUC_ratio := piecewise(0, C_m == 0, AUC_Losartan/AUC_E3174);
  k_12 := Q/Vp_1;
  k_21 := Q/Vp_2;
  k_elp := CL_p/Vp_1;
  k_elm := CL_m/Vm;

  // Rate rules:
  AUC_Losartan' = C_p;
  AUC_E3174' = C_m;

  // Reactions:
  Reaction_1: losartan_stm => losartan_int; max(0, a*sin(2*pi/b*time))*losartan_stm; Reaction_1 is "stomach/losartan_stm -> intestine/losartan_int";
  Reaction_2: losartan_int => losartan_cc; k_a*losartan_int; Reaction_2 is "intestine/losartan_int -> central_compartment/losartan_cc";
  Reaction_3: losartan_cc => losartan_out; k_elp*losartan_cc; Reaction_3 is "central_compartment/losartan_cc -> losartan_out";
  Reaction_5: losartan_cc => losartan_pc; k_12*losartan_cc; Reaction_5 is "central_compartment/losartan_cc -> peripherial_compartment/losartan_pc";
  Reaction_6: losartan_pc => losartan_cc; k_21*losartan_pc; Reaction_6 is "peripherial_compartment/losartan_pc -> central_compartment/losartan_cc";
  Reaction_7: E3174_cc => E3174_out; k_elm*E3174_cc; Reaction_7 is "central_compartment/E3174_cc -> E3174_out";
  Reaction_4: losartan_cc => E3174_cc; k_m*losartan_cc*start_CYP2C9; Reaction_4 is "central_compartment/losartan_cc -> central_compartment/E3174_cc";

  // Events:
  CYP2C9_delay: at (time > T), t0=false: start_CYP2C9 = 1; CYP2C9_delay is "losartan metabolism delay";
end
