// SBML level 3 version 2

model Final_model()
  // Babaev2025 - CYP2C9 and ABCB1 losartan metabolism model
  // The model can simultaneously predict the profiles of both losartan and its active metabolite, E-3174, based on a given patient's CYP2C9 and ABCB1 genotypes. The CYP2C9 alleles considered are CYP2C9*1 and CYP2C9*3; the ABCB1 alleles considered are 2677G, 2677T, 3435C, and 3435T. The model includes five compartments: stomach, intestine, enterocyte, central (blood), and peripheral (other organs and tissues).
  // biomodels.db:MODEL2504020001
  // hasProperty mamo:MAMO_0000089
  // isDescribedBy doi:10.3390/pharmaceutics17070935
  // model units - time: h, extent: pmol

  // Compartments:
  compartment default = 1 dimensionless; default is "Final model";
  compartment central_compartment = 1 dimensionless;
  compartment enterocyte = 1 dimensionless;
  compartment intestine = 1 dimensionless;
  compartment peripherial_compartment = 1 dimensionless;
  compartment stomach = 1 dimensionless;

  // Species:
  species E3174_out in default = 0;  // substance in pmol
  species E3174_cc in central_compartment = 0;  // substance in pmol
  species losartan_cc in central_compartment = 0;  // substance in pmol
  species losartan_ent in enterocyte = 0;  // substance in pmol
  species losartan_int in intestine = 0;  // substance in pmol
  species losartan_out in default = 0;  // substance in pmol
  species losartan_pc in peripherial_compartment = 0;  // substance in pmol
  species losartan_stm in stomach = oral_dose/(1000 mg_per_g*461.01 g_per_mole)*1000000000000 pmol_per_mole;  // substance in pmol

  // Parameters:
  AUC_E3174 = 0 nmol_h_per_L;
  AUC_Losartan = 0 nmol_h_per_L;
  AUC_total = 0 nmol_h_per_L;
  AUC_total_constrained has nmol_h_per_L;
  AUC_total_lower_bound = 0 nmol_h_per_L;
  AUC_total_upper_bound = 0 nmol_h_per_L;
  CL_F has L_per_h;
  // L/h
  CL_m = 6.373581 L_per_h;
  // L/h
  CL_p = 43.85907 L_per_h;
  // pmol/ml или nmol/L
  C_m has nmol_per_L;
  C_m_max = 0 nmol_per_L;
  // pmol/ml или nmol/L
  C_p has nmol_per_L;
  C_p_max = 0 nmol_per_L;
  C_total has nmol_per_L;
  // L/h
  Q = 134.0716 L_per_h;
  // 1/h
  T = 0.5 h;
  // L
  Vm = 26.19163 litre;
  // L
  Vp_1 = 13.17318 litre;
  // L
  Vp_2 = 33.89024 litre;
  // 1/h
  a = 3.684986 per_h;
  // 1/h
  b = 3.95 h;
  interval = 0.01 h;
  // 1/h
  k_12 has per_h;
  // 1/h
  k_21 has per_h;
  // 1/h
  k_elm has per_h;
  // 1/h
  k_elp has per_h;
  k_ent_cc = 6.418052 per_h;
  k_ent_int = 0 per_h;
  k_int_ent = 12.66279 per_h;
  // 1/h
  k_m = 0.452 per_h;
  oral_dose = 50 mg;
  // безразмерная
  start_CYP2C9 = 0 dimensionless;
  started = 0 dimensionless;
  t = 0 h;
  t_lower_bound = 0 h;
  t_upper_bound = 0 h;

  // Assignment rules:
  C_p := losartan_cc/(Vp_1*1000 ml_per_L);
  C_m := E3174_cc/(Vm*1000 ml_per_L);
  CL_F := piecewise(0 L_per_h, C_p == 0 nmol_per_L, oral_dose*1000000 ng_per_mg/(AUC_Losartan*461.01 g_per_mole));
  C_total := C_p + C_m;
  AUC_total_constrained := AUC_total_upper_bound - AUC_total_lower_bound;
  k_12 := Q/Vp_1;
  k_21 := Q/Vp_2;
  k_elp := CL_p/Vp_1;
  k_elm := CL_m/Vm;

  // Rate rules:
  AUC_Losartan' = C_p;
  AUC_E3174' = C_m;
  AUC_total' = C_total;
  AUC_total_lower_bound' = piecewise(0 nmol_per_L, time > t_lower_bound, C_total);
  AUC_total_upper_bound' = piecewise(0 nmol_per_L, time > t_upper_bound, C_total);
  t' = started;

  // Reactions:
  E3174_elimination: E3174_cc => E3174_out; k_elm*E3174_cc; E3174_elimination is "E3174_cc -> E3174_out";
  L_from_cc_to_pc: losartan_cc => losartan_pc; k_12*losartan_cc; L_from_cc_to_pc is "losartan_cc -> losartan_pc";
  L_from_pc_to_cc: losartan_pc => losartan_cc; k_21*losartan_pc; L_from_pc_to_cc is "losartan_pc -> losartan_cc";
  Reaction_1: losartan_int => losartan_ent; k_int_ent*losartan_int; Reaction_1 is "intestine/losartan_int -> enterocyte/losartan_ent";
  Reaction_2: losartan_ent => losartan_cc; k_ent_cc*losartan_ent; Reaction_2 is "enterocyte/losartan_ent -> central_compartment/losartan_cc";
  Reaction_3: losartan_ent => losartan_int; k_ent_int*losartan_ent; Reaction_3 is "enterocyte/losartan_ent -> intestine/losartan_int";
  CYP2C9_reaction: losartan_cc => E3174_cc; k_m*losartan_cc*start_CYP2C9; CYP2C9_reaction is "losartan_cc -> E3174_cc";
  L_elimination: losartan_cc => losartan_out; k_elp*losartan_cc; L_elimination is "losartan_cc -> losartan_out";
  gastric_emptying: losartan_stm => losartan_int; max(0 per_h, a*sin(2*pi/b*time))*losartan_stm; gastric_emptying is "losartan_stm -> losartan_int";

  // Events:
  CYP2C9_delay: at (time > T), t0=false: start_CYP2C9 = 1;
  event_1: at (time > 0 h): started = 1, t = interval;
  event_2: at ((t > interval) && (C_p > C_p_max)): C_p_max = C_p, t = 0 h;
  event_2_1: at ((t > interval) && (C_m > C_m_max)): C_m_max = C_m, t = 0 h;

  // Unit definitions:
  unit h = 3600 second;
  unit nmol_h_per_L = 1e-9 mole * 3600 second / litre;
  unit nmol_per_L = 1e-9 mole / litre;
  unit pmol = 1e-12 mole;
  unit pmol_per_mole = 1e-12 mole / mole;
  unit g_per_mole = 1e-3 kilogram / mole;
  unit ng_per_mg = 1e-12 kilogram / (1e-6 kilogram);
  unit mg_per_g = 1e-6 kilogram / (1e-3 kilogram);
  unit mg = 1e-6 kilogram;
  unit L_per_h = litre / (3600 second);
  unit ml_per_L = 1e-3 litre / litre;
  unit per_h = 1 / (3600 second);
end
