// SBML level 2 version 1

model Bexkens2024_Schistosoma_mansoni_glycolysis()
  // A kinetic model of S. mansoni glycolysis in which we can vary the allosteric regulation on lactate dehydrogenase (LDH). Because not enough kinetic data are available for all the schistosome enzymes to construct a complete schistosome glycolysis model de novo, we here adjusted the well-established glycolysis model of the eukaryotic microbe Saccharomyces cerevisiae (Teusink et al., 2000; van Eunen et al., 2012; van Heerden et al., 2014). We removed reactions from the yeast model that are not used in schistosomes and added glycogen metabolism, a Krebs cycle, respiration and an allosterically regulated LDH that was parameterized on multiple in vitro kinetic data sets for schistosome LDH. Additional files are published on Zenodo: https://zenodo.org/records/10401097
  // isDescribedBy doi:10.1016/j.ijpara.2024.03.005
  // biomodels.db:MODEL2208290002
  // hasProperty mamo:MAMO_0000045

  // Compartments:
  compartment cytosol = 1;
  compartment extracellular = 1;

  // Species:
  species $CO2 in cytosol = 0;
  species $F26BP in cytosol = 0.014;
  species $GLCe in extracellular = 0;
  species $GLYCO in cytosol = 1.2;
  species $LAC in cytosol = 0;
  species $Pi in cytosol = 5;
  species ATP in cytosol = 1.18;
  species GLCi in cytosol = 0;
  species ADP in cytosol = 1.74;
  species G6P in cytosol = 0.00384;
  species F6P in cytosol = 0.00118;
  species F16BP in cytosol = 0.00444;
  species TRIO in cytosol = 0.0378;
  species NAD in cytosol = 1.59;
  species BPG in cytosol = 2.32e-7;
  species NADH in cytosol = 0.0118;
  species P3G in cytosol = 0.129;
  species P2G in cytosol = 0.0229;
  species PEP in cytosol = 0.149;
  species PYR in cytosol = 0.868;
  species AMP in cytosol = 3.37;

  // Parameters:
  vHK_Vm = 0.086;
  vHK_KmGLCi = 0.128;
  vHK_KmATP = 0.927;
  vHK_KiG6P = 0.15;
  vPGI_Vm = 2.24;
  vPGI_KmG6P = 1.4;
  vPGI_Keq = 0.538;
  vPGI_KmF6P = 0.1;
  vPFK_Vm = 0.42;
  vPFK_gR = 5.12;
  vPFK_KmF6P = 0.4;
  vPFK_KmATP = 0.3;
  vPFK_L0 = 0.66;
  vPFK_CiATP = 100;
  vPFK_KiATP = 0.65;
  vPFK_CAMP = 0.0845;
  vPFK_KmAMP = 0.0995;
  vPFK_CF26BP = 0.0174;
  vPFK_KmF26BP = 0.000682;
  vPFK_CF16BP = 0.397;
  vPFK_KmF16BP = 0.111;
  vPFK_CATP = 3;
  vALD_Vm = 0.225;
  vALD_KmF16BP = 0.3;
  KeqTPI = 0.045;
  vALD_Keq = 0.069;
  vALD_KmGAP = 2;
  vALD_KmDHAP = 2.4;
  vALD_KmGAPi = 10;
  vGAPDH_Vm = 0.845;
  vGAPDH_Keq = 0.044;
  vGAPDH_KmGAP = 0.15;
  vGAPDH_KmNAD = 0.45;
  vGAPDH_KmBPG = 0.1;
  vGAPDH_KmNADH = 0.02;
  vPGK_Vm = 0.185;
  vPGK_Keq = 3200;
  vPGK_KmBPG = 0.003;
  vPGK_KmATP = 0.3;
  vPGK_KmP3G = 0.53;
  vPGK_KmADP = 0.2;
  vPGM_Vm = 1.04;
  vPGM_KmP3G = 1.2;
  vPGM_Keq = 0.19;
  vPGM_KmP2G = 0.08;
  vENO_Vm = 0.616;
  vENO_KmP2G = 0.04;
  vENO_Keq = 6.7;
  vENO_KmPEP = 0.5;
  vPYK_Vm = 2.02;
  vPYK_KmPEP = 0.0207171;
  vPYK_n = 3.50912;
  vPYK_L0 = 60000;
  vPYK_KmATP = 1.40707;
  vPYK_KmF16BP = 0.176541;
  vPYK_KmADP = 0.28;
  vGLT_Vm = 2.119306;
  vGLT_KmGLC = 2;
  vGLT_Keq = 1;
  vGS_k = 0.0005169601;
  vGP_k = 0.001620831;
  vLDH_Vm = 1.24;
  vLDH_KiNADH = 0.430032;
  vLDH_beta = 0;
  vLDH_KA = 2.8799;
  vLDH_gamma = 0;
  vLDH_delta = 0;
  vLDH_KF = 1.007e-6;
  vLDH_epsilon = 1021210;
  vLDH_zeta = 2.14614e11;
  vLDH_KOmPYR = 0.934103;
  vLDH_KmNADH = 0.0313658;
  vTCA_Vm = 1.717285;
  vTCA_KmPYR = 32.27157;
  vTCA_KmNAD = 32.84389;
  vRES_k = 2.734482;
  vCW_k = 0.02205403;
  vAK_k1 = 2.761218;
  vAK_k2 = 2.104733;

  // Reactions:
  vHK: ATP + GLCi -> ADP + G6P + $Pi; cytosol*(vHK_Vm*(GLCi/vHK_KmGLCi*ATP/(vHK_KmATP*(1 + G6P/vHK_KiG6P)))/(1 + GLCi/vHK_KmGLCi + ATP/(vHK_KmATP*(1 + G6P/vHK_KiG6P))));
  vPGI: G6P -> F6P; cytosol*(vPGI_Vm/vPGI_KmG6P*(G6P - F6P/vPGI_Keq)/(1 + G6P/vPGI_KmG6P + F6P/vPGI_KmF6P));
  vPFK: ATP + F6P => ADP + F16BP + $Pi; cytosol*(vPFK_Vm*vPFK_gR*(F6P/vPFK_KmF6P)*(ATP/vPFK_KmATP)*(1 + F6P/vPFK_KmF6P + ATP/vPFK_KmATP + vPFK_gR*(F6P/vPFK_KmF6P)*(ATP/vPFK_KmATP))/((1 + F6P/vPFK_KmF6P + ATP/vPFK_KmATP + vPFK_gR*(F6P/vPFK_KmF6P)*(ATP/vPFK_KmATP))^2 + vPFK_L0*((1 + vPFK_CiATP*(ATP/vPFK_KiATP))/(1 + ATP/vPFK_KiATP))^2*((1 + vPFK_CAMP*(AMP/vPFK_KmAMP))/(1 + AMP/vPFK_KmAMP))^2*((1 + vPFK_CF26BP*F26BP/vPFK_KmF26BP + vPFK_CF16BP*F16BP/vPFK_KmF16BP)/(1 + F26BP/vPFK_KmF26BP + F16BP/vPFK_KmF16BP))^2*(1 + vPFK_CATP*(ATP/vPFK_KmATP))^2));  // modifiers: AMP, F26BP
  vALD: F16BP -> 2 TRIO; cytosol*(vALD_Vm/vALD_KmF16BP*(F16BP - KeqTPI/(1 + KeqTPI)*(TRIO/(1 + KeqTPI))*TRIO/vALD_Keq)/(1 + F16BP/vALD_KmF16BP + KeqTPI/(1 + KeqTPI)*TRIO/vALD_KmGAP + 1/(1 + KeqTPI)*TRIO/vALD_KmDHAP + KeqTPI/(1 + KeqTPI)*TRIO*(1/(1 + KeqTPI))*TRIO/(vALD_KmGAP*vALD_KmDHAP) + F16BP*(KeqTPI/(1 + KeqTPI))*TRIO/(vALD_KmGAPi*vALD_KmF16BP)));
  vGAPDH: TRIO + NAD + $Pi -> BPG + NADH; cytosol*(vGAPDH_Vm*(TRIO*KeqTPI/(1 + KeqTPI))*NAD*pi*(1 - BPG*NADH/(vGAPDH_Keq*(TRIO*KeqTPI/(1 + KeqTPI))*NAD))/(vGAPDH_KmGAP*vGAPDH_KmNAD*(BPG/vGAPDH_KmBPG + TRIO*KeqTPI/(1 + KeqTPI)/vGAPDH_KmGAP + 1)*(NADH/vGAPDH_KmNADH + NAD/vGAPDH_KmNAD + 1)*(pi + 1)));
  vPGK: ADP + BPG + $Pi -> ATP + P3G; cytosol*(vPGK_Vm*(vPGK_Keq*BPG*ADP/(vPGK_KmBPG*vPGK_KmATP) - P3G*ATP/(vPGK_KmP3G*vPGK_KmATP))/((1 + BPG/vPGK_KmBPG + P3G/vPGK_KmP3G)*(1 + ATP/vPGK_KmATP + ADP/vPGK_KmADP)));
  vPGM: P3G -> P2G; cytosol*(vPGM_Vm/vPGM_KmP3G*(P3G - P2G/vPGM_Keq)/(1 + P3G/vPGM_KmP3G + P2G/vPGM_KmP2G));
  vENO: P2G -> PEP; cytosol*(vENO_Vm/vENO_KmP2G*(P2G - PEP/vENO_Keq)/(1 + P2G/vENO_KmP2G + PEP/vENO_KmPEP));
  vPYK: ADP + PEP + $Pi -> ATP + PYR; cytosol*(vPYK_Vm*PEP/vPYK_KmPEP*(1 + PEP/vPYK_KmPEP)^(vPYK_n - 1)/(vPYK_L0*((1 + ATP/vPYK_KmATP)/(1 + F16BP/vPYK_KmF16BP))^vPYK_n + (1 + PEP/vPYK_KmPEP)^vPYK_n)*ADP/(ADP + vPYK_KmADP));  // modifiers: F16BP
  vGLT: $GLCe -> GLCi; vGLT_Vm/vGLT_KmGLC*(GLCe - GLCi/vGLT_Keq)/(1 + GLCe/vGLT_KmGLC + GLCi/vGLT_KmGLC + 0.91*GLCe*GLCi/(vGLT_KmGLC*vGLT_KmGLC));
  vGS: G6P + ATP => $GLYCO + ADP + $Pi; cytosol*vGS_k*G6P*ATP;
  vGP: $GLYCO => G6P; cytosol*vGP_k*GLYCO;
  vLDH: PYR + NADH -> NAD + $LAC; cytosol*(vLDH_Vm*(NADH/vLDH_KiNADH)*(PYR*(1 + vLDH_beta*ATP*vLDH_KA + vLDH_gamma*ATP^2*vLDH_KA^2 + vLDH_delta*ATP*F16BP*vLDH_KA*vLDH_KF + vLDH_epsilon*F16BP*vLDH_KF + vLDH_zeta*F16BP^2*vLDH_KF^2)/(1 + ATP*vLDH_KA + F16BP*vLDH_KF)^2/vLDH_KOmPYR)/(1 + NADH/vLDH_KiNADH + NADH*PYR*(1 + vLDH_beta*ATP*vLDH_KA + vLDH_gamma*ATP^2*vLDH_KA^2 + vLDH_delta*ATP*F16BP*vLDH_KA*vLDH_KF + vLDH_epsilon*F16BP*vLDH_KF + vLDH_zeta*F16BP^2*vLDH_KF^2)/(1 + ATP*vLDH_KA + F16BP*vLDH_KF)^2/(vLDH_KiNADH*vLDH_KOmPYR) + PYR*(1 + vLDH_beta*ATP*vLDH_KA + vLDH_gamma*ATP^2*vLDH_KA^2 + vLDH_delta*ATP*F16BP*vLDH_KA*vLDH_KF + vLDH_epsilon*F16BP*vLDH_KF + vLDH_zeta*F16BP^2*vLDH_KF^2)/(1 + ATP*vLDH_KA + F16BP*vLDH_KF)^2*vLDH_KmNADH/(vLDH_KiNADH*vLDH_KOmPYR)));  // modifiers: ATP, F16BP
  vTCA: PYR + 4 NAD => 4 NADH + 3 $CO2; cytosol*(vTCA_Vm*PYR/vTCA_KmPYR*NAD/vTCA_KmNAD/(1 + PYR/vTCA_KmPYR + NAD/vTCA_KmNAD));
  vRES: NADH + 3 ADP + 3 $Pi => 3 ATP + NAD; cytosol*vRES_k*NADH*ADP;
  vCW: ATP => ADP + $Pi; cytosol*vCW_k*ATP;
  vAK: 2 ADP -> ATP + AMP; cytosol*(vAK_k1*ADP*ADP - vAK_k2*ATP*AMP);

  // Unit definitions:
  unit substance = 1e-3 mole;
  unit volume = litre;
  unit time = 60 second;
  unit length = metre;
  unit area = metre^2;
end
