// SBML level 2 version 4
// dcterms:bibliographicCitation: urn:miriam:pubmed:18370401
// dcterms:bibliographicCitation: urn:miriam:pubmed:4190298
// dcterms:bibliographicCitation: urn:miriam:pubmed:15866519
// dcterms:bibliographicCitation: urn:miriam:pubmed:10672018
// dcterms:bibliographicCitation: urn:miriam:pubmed:11985583
// dcterms:bibliographicCitation: urn:miriam:pubmed:12672479
// dcterms:bibliographicCitation: urn:miriam:pubmed:17868694
// dcterms:bibliographicCitation: urn:miriam:pubmed:11876660
// dcterms:bibliographicCitation: urn:miriam:pubmed:17402747
// dcterms:bibliographicCitation: urn:miriam:pubmed:12547821
// dcterms:bibliographicCitation: urn:miriam:pubmed:11594753
// dcterms:bibliographicCitation: urn:miriam:pubmed:222585
// dcterms:bibliographicCitation: urn:miriam:pubmed:12939142
// dcterms:bibliographicCitation: urn:miriam:pubmed:2538435
// dcterms:bibliographicCitation: urn:miriam:pubmed:1530940
// dcterms:bibliographicCitation: urn:miriam:pubmed:6436644
// dcterms:bibliographicCitation: urn:miriam:pubmed:3935159
// dcterms:bibliographicCitation: urn:miriam:pubmed:18823127
// dcterms:bibliographicCitation: urn:miriam:pubmed:3034159
// dcterms:bibliographicCitation: urn:miriam:doi:https://doi.org/10.1039/B9NJ00758J
// dcterms:bibliographicCitation: urn:miriam:pubmed:24171775
// dcterms:bibliographicCitation: urn:miriam:pubmed:21742010

function Function_for_J1_TDO(F1, J1_Et_TDO, J1_K_O2, J1_K_TDO, J1_Kcat_TDO, L_tryptophan, O2, default)
  F1*J1_Kcat_TDO*J1_Et_TDO*L_tryptophan*O2*default/(L_tryptophan*default*O2*default + J1_K_TDO*J1_K_O2 + L_tryptophan*default*J1_K_O2 + O2*default*J1_K_TDO);
end

function Function_for_J2_AFMID(F2, J2_Et_AFMID, J2_K_AFMID, J2_Kcat_AFMID, L_formyl_kyn, default)
  F2*J2_Kcat_AFMID*J2_Et_AFMID*L_formyl_kyn/(L_formyl_kyn + J2_K_AFMID)/default;
end

function Function_for_J3_KMO(F3, J3_Et_KMO, J3_Kcat_KMO, K3_Kyn, K3_NADPH, K3_O2, L_kyneurenine, NADPH, O2, default)
  F3*J3_Kcat_KMO*J3_Et_KMO*L_kyneurenine*NADPH*O2*default/(K3_Kyn*K3_NADPH*K3_O2)/(1 + L_kyneurenine/K3_Kyn + NADPH*default/K3_NADPH + O2*default/K3_O2 + L_kyneurenine*NADPH*default*O2*default/(K3_Kyn*K3_NADPH*K3_O2));
end

function Function_for_J4_KYNU(F4, Hydroxyurenine, J4_Et_KYNU, J4_Kcat_KYNU, J4_k_KYNU, J_KYNU_ki, L_kyneurenine, default)
  F4*J4_Kcat_KYNU*J4_Et_KYNU*Hydroxyurenine/(J4_k_KYNU*(1 + L_kyneurenine/J_KYNU_ki) + Hydroxyurenine)/default;
end

function Function_for_J5_3HAO(F5, Hydroxyanthranilate, J5_Et_3HAO, J5_Kcat_3HAO, K5_HAO, K5_HAO_O2, Ki_QA_5, O2, Quinolinate, default)
  F5*J5_Kcat_3HAO*J5_Et_3HAO*(O2/(1/K5_HAO_O2 + O2*default))*Hydroxyanthranilate/(1/K5_HAO*(1 + Quinolinate*default/Ki_QA_5) + Hydroxyanthranilate);
end

function Function_for_J6_QaPRT(F6, J6_Et_QaPRT, J6_K_PRPP, J6_K_QA, J6_Kcat_QaPRT, PRPP, Quinolinate, default)
  F6*J6_Kcat_QaPRT*J6_Et_QaPRT*Quinolinate*PRPP*default/(Quinolinate*default*PRPP*default + J6_K_QA*J6_K_PRPP + Quinolinate*default*J6_K_PRPP + PRPP*default*J6_K_QA);
end

function Function_for_J7_V_NMNAT_A(ATP, F7, J7_Et_NMNAT_A, J7_Kcat_NMNAT_A, K7_ATP, K7_NaMN, Ki7_NaAD, Ki7_PPi, NaAD, NaMN, PPi, default)
  F7*J7_Kcat_NMNAT_A*J7_Et_NMNAT_A*NaMN*ATP/(K7_NaMN*K7_ATP)/(1 + NaMN/K7_NaMN + ATP*default/K7_ATP + NaAD*default/Ki7_NaAD + PPi*default/Ki7_PPi);
end

function Function_for_J8_NMNAT_B(ATP, F8, J8_Et_NMNAT_B, J8_Kcat_NMNAT_B, K8_ATP, K8_NMN, Ki8_NAD, Ki8_PPi, NAD, NMN, PPi, default)
  F8*J8_Kcat_NMNAT_B*J8_Et_NMNAT_B*NMN*ATP/(K8_NMN*K8_ATP)/(1 + NMN/K8_NMN + ATP*default/K8_ATP + NAD*default/Ki8_NAD + PPi*default/Ki8_PPi);
end

function Function_for_J9_NADSYN1_Gln(ATP, F9, Glutamine, J9_Et_NADSYN1_Gln, J9_Kcat_NADSYN1_Gln, K9_ATP, K9_Gln, K9_NaAD, NaAD, default)
  F9*J9_Kcat_NADSYN1_Gln*J9_Et_NADSYN1_Gln*ATP*Glutamine*default*NaAD*default/(K9_ATP*K9_Gln*K9_NaAD)/(1 + ATP*default/K9_ATP + Glutamine*default/K9_Gln + NaAD*default/K9_NaAD + ATP*default*Glutamine*default*NaAD*default/(K9_ATP*K9_Gln*K9_NaAD));
end

function Function_for_J10_NADSYN1_NH3(ATP, F10, J10_Et_NADSYN1_NH3, J10_Kcat_NADSYN1_NH3, K_10_ATP, K_10_NH3, K_10_NaAD, NH3, NaAD, default)
  F10*J10_Kcat_NADSYN1_NH3*J10_Et_NADSYN1_NH3*ATP*NaAD*default*NH3*default/(K_10_ATP*K_10_NaAD*K_10_NH3)/(1 + ATP*default/K_10_ATP + NH3*default/K_10_NH3 + NaAD*default/K_10_NaAD + ATP*default*NH3*default*NaAD*default/(K_10_ATP*K_10_NH3*K_10_NaAD));
end

function Function_for_J11_NADK(ATP, F11, J11_Et_NADK, J11_Kcat_NADK, K11_ATP, K11_NAD, NAD, default)
  F11*J11_Kcat_NADK*J11_Et_NADK*NAD*ATP*default/(K11_ATP*K11_NAD + NAD*default*K11_ATP + ATP*default*K11_NAD + NAD*default*ATP*default);
end

function Function_for_J12_NADG(F12, J12_Et_NADG, J12_Kcat_NADG, K12_NAD, Ki_Nam, NAD, Nam, default)
  F12*J12_Kcat_NADG*J12_Et_NADG*NAD/(K12_NAD*(1 + Nam/Ki_Nam) + NAD*default);
end

function Function_for_J13_NADPN(F13, J13_Et_NADPN, J13_Kcat_NADPN, K13_NADP, Ki_Nam, NADP, Nam, default)
  F13*J13_Kcat_NADPN*J13_Et_NADPN*NADP/(K13_NADP*(1 + Nam/Ki_Nam) + NADP*default);
end

function Function_for_J14_PARP(F14, J14_Et_PARP, J14_Kcat_PARP, K14_NAD, Ki14_Nam, NAD, Nam, default)
  F14*J14_Kcat_PARP*J14_Et_PARP*NAD/(K14_NAD*(1 + Nam/Ki14_Nam) + NAD*default);
end

function Function_for_J15_ARTD(Arginine_protein, F15, J15_Et_ARTD, J15_Kcat_ARTD, K15_Arg, K15_NAD, Ki_15_Nam, NAD, Nam, default)
  F15*J15_Kcat_ARTD*J15_Et_ARTD*(Arginine_protein/(1/K15_Arg + Arginine_protein*default))*NAD*default/(1/K15_NAD*(1 + Nam/Ki_15_Nam) + NAD*default);
end

function Function_for_J16_NUDT12(F16, J16_Et_NUDT12, J16_Kcat_NUDT12, K16_NAD, Ki_16_NADPH, NAD, NADPH, default)
  F16*J16_Kcat_NUDT12*J16_Et_NUDT12*NAD/(K16_NAD*(1 + NADPH*default/Ki_16_NADPH) + NAD*default);
end

function Function_for_J17_NAMPT(F17, J17_Et_NAPRT, J17_Kcat_NAPRT, K17_Nam, K17_PRPP, Ki17_NAD, NAD, Nam, PRPP, default)
  F17*J17_Kcat_NAPRT*J17_Et_NAPRT*Nam*PRPP/(K17_Nam*K17_PRPP)/(1 + Nam/K17_Nam + PRPP*default/K17_PRPP + NAD*default/Ki17_NAD);
end

function Function_for_J18_NT5E(ATP, F18, J18_Et_NT5E, J18_Kcat_NT5E, K_18_NMN, Ki18_ATP, NMN, default)
  F18*J18_Kcat_NT5E*J18_Et_NT5E*NMN/(K_18_NMN*(1 + ATP*default/Ki18_ATP) + NMN)/default;
end

function Function_for_J19_NRP(F19, J19_Et_NRP, J19_K_NR, J19_K_P, J19_Kcat_NRP, NR, P, default)
  F19*J19_Kcat_NRP*J19_Et_NRP*NR*P/(P*default*NR + J19_K_NR*J19_K_P + NR*J19_K_P + P*default*J19_K_NR);
end

function Function_for_J20_NRK(ATP, F20, J20_Et_NRK, J20_K_ATP, J20_K_NR, J20_Kcat_NRK, NR, default)
  F20*J20_Kcat_NRK*J20_Et_NRK*NR*ATP/(NR*ATP*default + J20_K_NR*J20_K_ATP + NR*J20_K_ATP + ATP*default*J20_K_NR);
end

function Function_for_J22_NAPRT(F22, J22_Et_NAPRT, J22_K_Na, J22_K_PRPP, J22_Kcat_NAPRT, Na, PRPP, default)
  F22*J22_Kcat_NAPRT*J22_Et_NAPRT*Na*PRPP*default/(PRPP*default*Na*default + J22_K_Na*J22_K_PRPP + Na*default*J22_K_PRPP + PRPP*default*J22_K_Na);
end

function Function_for_NAD_sink(NAD)
  1e-6*NAD;
end

function Function_for_NADP_sink(NADP)
  0.001*NADP;
end

function Function_for_PPi_sink(PPi)
  0.001*PPi;
end

function Function_for_ADPriboseP_sink(ADPriboseP)
  0.001*ADPriboseP;
end

function Function_for_ADPribose_sink(ADPribose)
  0.001*ADPribose;
end

model NAD_net_Liver()
  // Chedere2022 - NAD Biosynthesis in Human Liver
  // This SBML (L2V4) file is a well-annotated ODE-based model created to capture NAD biosynthesis in the human liver. This model contains 26 reactions with 29 genes, 31 metabolites and 138 parameters.
  // isDescribedBy doi:10.3389/fonc.2022.954512
  // biomodels.db:MODEL2205250001
  // hasProperty mamo:MAMO_0000003

  // Compartments:
  compartment default = 1 volume;

  // Species:
  species $L_tryptophan in default = 16/default;  // CHEBI:16828; kegg.compound:C00078; pubchem.substance:3378
  species L_formyl_kyn in default = 0; L_formyl_kyn is "L_formyl_kyneurenine";  // pubchem.substance:5664; kegg.compound:C02700; ChEBI:30249
  species $O2 in default = 1000/default;  // pubchem.substance:3309; CHEBI:15379; kegg.compound:C00007
  species Hydroxyurenine in default = 0; Hydroxyurenine is "Hydroxykynurenine";  // CHEBI:17380; pubchem.substance:6099; kegg.compound:C03227
  species $NADPH in default = 400/default;  // pubchem.substance:3307; CHEBI:16474; kegg.compound:C00005
  species Hydroxyanthranilate in default = 0;  // kegg.compound:C00632; pubchem.substance:3905; CHEBI:36559
  species Quinolinate in default = 0;  // pubchem.substance:6487; CHEBI:16675; kegg.compound:C03722
  species NaMN in default = 0;  // kegg.compound:C01185; pubchem.substance:4411; CHEBI:15763
  species $PRPP in default = 1000/default;  // pubchem.substance:3419; CHEBI:17111; kegg.compound:C00119
  species $PPi in default = 1/default;  // kegg.compound:C00013; pubchem.substance:3315; CHEBI:18361
  species NaAD in default = 0;  // pubchem.substance:4114; kegg.compound:C00857; CHEBI:18304
  species NAD in default = 0;  // kegg.compound:C00003; pubchem.substance:3305; CHEBI:15846
  species NMN in default = 0;  // CHEBI:16171; pubchem.substance:3741; kegg.compound:C00455
  species $ATP in default = 1000/default;  // kegg.compound:C00002; pubchem.substance:3304; CHEBI:15422
  species $NH3 in default = 100/default;  // kegg.compound:C00014; pubchem.substance:3316; CHEBI:16134
  species $Glutamine in default = 600/default;  // kegg.compound:C00064; pubchem.substance:3364; CHEBI:18050
  species NADP in default = 0;  // kegg.compound:C00006; pubchem.substance:3308; CHEBI:18009
  species Nam in default = 0;  // CHEBI:17154; pubchem.substance:3453; kegg.compound:C00153
  species ADPribose in default = 0;  // CHEBI:16960; pubchem.substance:3595; kegg.compound:C00301
  species ADPriboseP in default = 0;  // kegg.compound:C20742; pubchem.substance:254741210
  species L_kyneurenine in default = 0;  // CHEBI:16946; kegg.compound:C00328; pubchem.substance:3622
  species $Arginine_protein in default = 1000/default;  // CHEBI:16467; kegg.compound:C00062; pubchem.substance:3362
  species NR in default = 0;  // CHEBI:15927; pubchem.substance:6038; kegg.compound:C03150
  species $P in default = 1000/default;  // kegg.compound:C00009; pubchem.substance:3311; CHEBI:18367
  species $R1P in default = 50/default;  // kegg.compound:C00620; CHEBI:16300; pubchem.substance:3894
  species $Na in default = 10/default;  // pubchem.substance:3552; CHEBI:32544; kegg.compound:C00253
  species $NAD_sink in default = 10/default;
  species $NADP_sink in default = 10/default;
  species $PPi_sink in default = 10/default;
  species $ADPriboseP_sink in default = 10/default;
  species $ADPribose_sink in default = 10/default;

  // Parameters:
  J9_Kcat_NADSYN1_Gln = 7.985 unit_0;
  J9_Et_NADSYN1_Gln = 0.011831863 unit_1;
  J10_Kcat_NADSYN1_NH3 = 7.985 unit_0;
  J10_Et_NADSYN1_NH3 = 0.011831863 unit_1;
  J1_Kcat_TDO = 1.4 unit_0;
  J1_Et_TDO = 0.021027735 unit_1;
  J2_Kcat_AFMID = 0.008855 unit_0;
  J2_Et_AFMID = 0.3896883 unit_1;
  J3_Kcat_KMO = 2.2 unit_0;
  J3_Et_KMO = 0.4514211 unit_1;
  J4_Kcat_KYNU = 0.1435 unit_0;
  J4_Et_KYNU = 0.31059315 unit_1;
  J5_Kcat_3HAO = 64 unit_0;
  J5_Et_3HAO = 3.0634902 unit_1;
  J6_Kcat_QaPRT = 0.2555 unit_0;
  J6_Et_QaPRT = 0.25271865 unit_1;
  J7_Kcat_NMNAT_A = 42.9 unit_0;
  J7_Et_NMNAT_A = 0.021124193 unit_1;
  J8_Kcat_NMNAT_B = 53.85 unit_0;
  J8_Et_NMNAT_B = 0.021124193 unit_1;
  J11_Kcat_NADK = 21.93 unit_0;
  J11_Et_NADK = 0.003202389 unit_1;
  J12_Kcat_NADG = 4.85e-7 unit_0;
  J12_Et_NADG = 0.04051215 unit_1;
  J13_Kcat_NADPN = 1.11e-7 unit_0;
  J13_Et_NADPN = 0.015008787 unit_1;
  J14_Kcat_PARP = 50.367 unit_0;
  J14_Et_PARP = 0.4900041 unit_1;
  J15_Kcat_ARTD = 294.755 unit_0;
  J15_Et_ARTD = 0.017053686 unit_1;
  J16_Kcat_NUDT12 = 10.5 unit_0;
  J16_Et_NUDT12 = 0.04359879 unit_1;
  J17_Kcat_NAPRT = 0.0077 unit_0; J17_Kcat_NAPRT is "J17_Kcat_NAMPT";
  J17_Et_NAPRT = 1.22115195 unit_1; J17_Et_NAPRT is "J17_Et_NAMPT";
  J18_Kcat_NT5E = 8e-10 unit_0;
  J18_Et_NT5E = 0.036943223 unit_1;
  J19_Kcat_NRP = 8e-10 unit_0;
  J19_Et_NRP = 0.558168686 unit_1;
  J20_Kcat_NRK = 0.581 unit_0;
  J20_Et_NRK = 0.09067005 unit_1;
  J21_Kcat_Namase = 1.3e-11 unit_0;
  J21_Et_Namase = 0.3896883 unit_1;
  J22_Kcat_NAPRT = 0.25 unit_0;
  J22_Et_NAPRT = 0.54980775 unit_1;

  // Reactions:
  J1_TDO: $L_tryptophan + $O2 => L_formyl_kyn; default*Function_for_J1_TDO(F1, J1_Et_TDO, J1_K_O2, J1_K_TDO, J1_Kcat_TDO, L_tryptophan, O2, default);  // kegg.reaction:R00678; isDescribedBy pubmed:18370401
    F1 = 1; J1_K_O2 = 42; J1_K_TDO = 222;
  J2_AFMID: L_formyl_kyn => L_kyneurenine; default*Function_for_J2_AFMID(F2, J2_Et_AFMID, J2_K_AFMID, J2_Kcat_AFMID, L_formyl_kyn, default);  // kegg.reaction:R01959; isDescribedBy pubmed:15866519; isDescribedBy pubmed:4190298
    F2 = 1; J2_K_AFMID = 50;
  J3_KMO: L_kyneurenine + $NADPH + $O2 => Hydroxyurenine; default*Function_for_J3_KMO(F3, J3_Et_KMO, J3_Kcat_KMO, K3_Kyn, K3_NADPH, K3_O2, L_kyneurenine, NADPH, O2, default);  // kegg.reaction:R01960; isDescribedBy pubmed:10672018
    F3 = 1; K3_Kyn = 100; K3_NADPH = 153; K3_O2 = 71;
  J4_KYNU: Hydroxyurenine => Hydroxyanthranilate; default*Function_for_J4_KYNU(F4, Hydroxyurenine, J4_Et_KYNU, J4_Kcat_KYNU, J4_k_KYNU, J_KYNU_ki, L_kyneurenine, default);  // modifiers: L_kyneurenine; kegg.reaction:R02668; isDescribedBy pubmed:11985583
    F4 = 1; J4_k_KYNU = 3; J_KYNU_ki = 20;
  J5_3HAO: Hydroxyanthranilate + $O2 => Quinolinate; default*Function_for_J5_3HAO(F5, Hydroxyanthranilate, J5_Et_3HAO, J5_Kcat_3HAO, K5_HAO, K5_HAO_O2, Ki_QA_5, O2, Quinolinate, default);  // kegg.reaction:R04293; kegg.reaction:R02665; isDescribedBy pubmed:12672479
    F5 = 1; K5_HAO = 16; K5_HAO_O2 = 615; Ki_QA_5 = 1800;
  J6_QaPRT: Quinolinate + $PRPP => NaMN + $PPi; default*Function_for_J6_QaPRT(F6, J6_Et_QaPRT, J6_K_PRPP, J6_K_QA, J6_Kcat_QaPRT, PRPP, Quinolinate, default);  // kegg.reaction:R03348; isDescribedBy pubmed:17868694; isDescribedBy pubmed:11876660
    F6 = 1; J6_K_PRPP = 23.2; J6_K_QA = 21.6;
  J7_NMNAT_A: NaMN + $ATP => NaAD + $PPi; default*Function_for_J7_V_NMNAT_A(ATP, F7, J7_Et_NMNAT_A, J7_Kcat_NMNAT_A, K7_ATP, K7_NaMN, Ki7_NaAD, Ki7_PPi, NaAD, NaMN, PPi, default);  // kegg.reaction:R03005; isDescribedBy pubmed:17402747
    F7 = 1; K7_ATP = 58.5; K7_NaMN = 67.7; Ki7_NaAD = 502.5; Ki7_PPi = 390.4;
  J8_NMNAT_B: NMN + $ATP => NAD + $PPi; default*Function_for_J8_NMNAT_B(ATP, F8, J8_Et_NMNAT_B, J8_Kcat_NMNAT_B, K8_ATP, K8_NMN, Ki8_NAD, Ki8_PPi, NAD, NMN, PPi, default);  // kegg.reaction:R03005; isDescribedBy pubmed:17402747
    F8 = 1; K8_ATP = 58.5; K8_NMN = 22.3; Ki8_NAD = 418; Ki8_PPi = 390.4;
  J9_NADSYN1_Gln: $ATP + $Glutamine + NaAD => NAD; default*Function_for_J9_NADSYN1_Gln(ATP, F9, Glutamine, J9_Et_NADSYN1_Gln, J9_Kcat_NADSYN1_Gln, K9_ATP, K9_Gln, K9_NaAD, NaAD, default);  // kegg.reaction:R00257; isDescribedBy pubmed:12547821
    F9 = 1; K9_ATP = 89; K9_Gln = 1440; K9_NaAD = 490;
  J10_NADSYN1_NH3: NaAD + $ATP + $NH3 => NAD; default*Function_for_J10_NADSYN1_NH3(ATP, F10, J10_Et_NADSYN1_NH3, J10_Kcat_NADSYN1_NH3, K_10_ATP, K_10_NH3, K_10_NaAD, NH3, NaAD, default);  // kegg.reaction:R00189; isDescribedBy pubmed:12547821
    F10 = 1; K_10_ATP = 89; K_10_NH3 = 13000; K_10_NaAD = 490;
  J11_NADK: $ATP + NAD => NADP; default*Function_for_J11_NADK(ATP, F11, J11_Et_NADK, J11_Kcat_NADK, K11_ATP, K11_NAD, NAD, default);  // kegg.reaction:R00104; isDescribedBy pubmed:11594753
    F11 = 1; K11_ATP = 3300; K11_NAD = 540;
  J12_NADG: NAD => Nam + ADPribose; default*Function_for_J12_NADG(F12, J12_Et_NADG, J12_Kcat_NADG, K12_NAD, J12_NADG_Ki_Nam, NAD, Nam, default);  // kegg.reaction:R00102; isDescribedBy pubmed:222585
    F12 = 1; K12_NAD = 60; J12_NADG_Ki_Nam = 920;
  J13_NADPN: NADP => Nam + ADPriboseP; default*Function_for_J13_NADPN(F13, J13_Et_NADPN, J13_Kcat_NADPN, K13_NADP, J13_NADPN_Ki_Nam, NADP, Nam, default);  // kegg.reaction:R10631; isDescribedBy pubmed:222585
    F13 = 1; K13_NADP = 24; J13_NADPN_Ki_Nam = 920;
  J14_PARP: NAD => Nam; default*Function_for_J14_PARP(F14, J14_Et_PARP, J14_Kcat_PARP, K14_NAD, Ki14_Nam, NAD, Nam, default);  // kegg.reaction:R04176; isDescribedBy pubmed:2538435; isDescribedBy pubmed:12939142; isDescribedBy pubmed:1530940
    F14 = 1; K14_NAD = 20; Ki14_Nam = 31;
  J15_ARTD: NAD + $Arginine_protein => Nam; default*Function_for_J15_ARTD(Arginine_protein, F15, J15_Et_ARTD, J15_Kcat_ARTD, K15_Arg, K15_NAD, Ki_15_Nam, NAD, Nam, default);  // kegg.reaction:R00555; kegg.reaction:R10634; isDescribedBy pubmed:6436644; isDescribedBy pubmed:3935159
    F15 = 1; K15_Arg = 3000; K15_NAD = 36; Ki_15_Nam = 370;
  J16_NUDT12: NAD => NMN; default*Function_for_J16_NUDT12(F16, J16_Et_NUDT12, J16_Kcat_NUDT12, K16_NAD, Ki_16_NADPH, NAD, NADPH, default);  // modifiers: NADPH; kegg.reaction:R00103; isDescribedBy pubmed:11594753
    F16 = 1; K16_NAD = 190; Ki_16_NADPH = 16;
  J17_NAMPT: Nam + $PRPP => NMN; default*Function_for_J17_NAMPT(F17, J17_Et_NAPRT, J17_Kcat_NAPRT, K17_Nam, K17_PRPP, Ki17_NAD, NAD, Nam, PRPP, default);  // modifiers: NAD; kegg.reaction:R01271; isDescribedBy pubmed:18823127
    F17 = 0.1; K17_Nam = 0.005; K17_PRPP = 0.63; Ki17_NAD = 2.1;
  J18_NT5E: NMN => $P + NR; default*Function_for_J18_NT5E(ATP, F18, J18_Et_NT5E, J18_Kcat_NT5E, K_18_NMN, Ki18_ATP, NMN, default);  // modifiers: ATP; kegg.reaction:R02323; isDescribedBy https://doi.org/10.1039/B9NJ00758J; isDescribedBy pubmed:3034159
    F18 = 1; K_18_NMN = 4900; Ki18_ATP = 120;
  J19_NRP: NR + $P => Nam + $R1P; default*Function_for_J19_NRP(F19, J19_Et_NRP, J19_K_NR, J19_K_P, J19_Kcat_NRP, NR, P, default);  // kegg.reaction:R02294; isDescribedBy pubmed:3034159; isDescribedBy https://doi.org/10.1039/B9NJ00758J
    F19 = 1; J19_K_NR = 3000; J19_K_P = 100;
  J20_NRK: NR + $ATP => NMN; default*Function_for_J20_NRK(ATP, F20, J20_Et_NRK, J20_K_ATP, J20_K_NR, J20_Kcat_NRK, NR, default);  // kegg.reaction:R02324; isDescribedBy pubmed:24171775
    F20 = 1; J20_K_ATP = 330; J20_K_NR = 5;
  J22_NAPRT: $Na + $PRPP => NaMN + $PPi; default*Function_for_J22_NAPRT(F22, J22_Et_NAPRT, J22_K_Na, J22_K_PRPP, J22_Kcat_NAPRT, Na, PRPP, default);  // modifiers: P; kegg.reaction:R01724; isDescribedBy pubmed:21742010
    F22 = 1; J22_K_Na = 27.3; J22_K_PRPP = 38.2;
  NAD_Sink: NAD => $NAD_sink; default*Function_for_NAD_sink(NAD);
  NADP_Sink: NADP => $NADP_sink; default*Function_for_NADP_sink(NADP);
  PPi_Sink: $PPi => $PPi_sink; default*Function_for_PPi_sink(PPi);
  ADPriboseP_Sink: ADPriboseP => $ADPriboseP_sink; default*Function_for_ADPriboseP_sink(ADPriboseP);
  ADPribose_Sink: ADPribose => $ADPribose_sink; default*Function_for_ADPribose_sink(ADPribose);

  // Unit definitions:
  unit substance = 1e-6 mole;
  unit unit_0 = 1 / second; unit_0 is "1/s";
  unit unit_1 = 1e-6 mole; unit_1 is "umol";
  unit length = metre;
  unit area = metre^2;
  unit volume = litre;
  unit time = second;
end
