// SBML level 3 version 2

model cifelli08()
  // Cifelli et al, 2008
  // "Kinetic Analysis Shows that Vitamin A Disposal Rate in Humans is Positively Correlated with Vitamin A Stores" by Chris Cifelli and friends (2008)
  // The original model was coded in WinSAAM. There the delay compartments were modelled as a series of connected pseudo-compartments. We use the same approach here.
  // The model includes a helper parameter EXPERIMENT. Setting EXPERIMENT=1 simulates China, EXPERIMENT=2 simulates USA.
  // Note that this model reimplementation does NOT predict the steady states presented in Table 3.
  // isDescribedBy doi:10.1093/jn/138.5.971
  // hasTaxon taxonomy:9606
  // hasProperty MAMO:0000046 GO:0006776 mamo:MAMO_0000045
  // biomodels.db:MODEL2403080002
  // model units - substance: umol, time: day, volume: dimensionless, area: dimensionless, length: dimensionless, extent: umol

  // Compartments:
  compartment comp = 1 dimensionless;

  // Species:
  species M_1 in comp = 0; M_1 is "M_1 [gut]";  // hasPart CHEBI:50211
  species M_2 in comp = 0; M_2 is "M_2 [gut]";  // hasPart CHEBI:50211
  species M_4 in comp = 0; M_4 is "M_4 [liver]";  // hasPart CHEBI:50211
  species M_5 in comp = 0; M_5 is "M_5 [serum]";  // hasPart CHEBI:50211
  species M_6 in comp = 0; M_6 is "M_6 [extravascular]";  // hasPart CHEBI:50211
  species M_1_0 in comp = 1/comp; M_1_0 is "M_1^* [gut tracer]";  // hasPart CHEBI:50211
  species M_2_0 in comp = 0; M_2_0 is "M_2^* [gut tracer]";  // hasPart CHEBI:50211
  species M_4_0 in comp = 0; M_4_0 is "M_4^* [liver tracer]";  // hasPart CHEBI:50211
  species M_5_0 in comp = 0; M_5_0 is "M_5^* [serum tracer]";  // hasPart CHEBI:50211
  species M_6_0 in comp = 0; M_6_0 is "M_6^* [extravascular tracer]";  // hasPart CHEBI:50211
  species M_3_1 in comp = 0; M_3_1 is "M_3,1 [delay]";  // hasPart CHEBI:50211
  species M_3_2 in comp = 0; M_3_2 is "M_3,2 [delay]";  // hasPart CHEBI:50211
  species M_3_3 in comp = 0; M_3_3 is "M_3,3 [delay]";  // hasPart CHEBI:50211
  species M_3_4 in comp = 0; M_3_4 is "M_3,4 [delay]";  // hasPart CHEBI:50211
  species M_3_5 in comp = 0; M_3_5 is "M_3,5 [delay]";  // hasPart CHEBI:50211
  species M_3_6 in comp = 0; M_3_6 is "M_3,6 [delay]";  // hasPart CHEBI:50211
  species M_3_7 in comp = 0; M_3_7 is "M_3,7 [delay]";  // hasPart CHEBI:50211
  species M_3_8 in comp = 0; M_3_8 is "M_3,8 [delay]";  // hasPart CHEBI:50211
  species M_3_1_0 in comp = 0; M_3_1_0 is "M_3,1^* [delay tracer]";  // hasPart CHEBI:50211
  species M_3_2_0 in comp = 0; M_3_2_0 is "M_3,2^* [delay tracer]";  // hasPart CHEBI:50211
  species M_3_3_0 in comp = 0; M_3_3_0 is "M_3,3^* [delay tracer]";  // hasPart CHEBI:50211
  species M_3_4_0 in comp = 0; M_3_4_0 is "M_3,4^* [delay tracer]";  // hasPart CHEBI:50211
  species M_3_5_0 in comp = 0; M_3_5_0 is "M_3,5^* [delay tracer]";  // hasPart CHEBI:50211
  species M_3_6_0 in comp = 0; M_3_6_0 is "M_3,6^* [delay tracer]";  // hasPart CHEBI:50211
  species M_3_7_0 in comp = 0; M_3_7_0 is "M_3,7^* [delay tracer]";  // hasPart CHEBI:50211
  species M_3_8_0 in comp = 0; M_3_8_0 is "M_3,8^* [delay tracer]";  // hasPart CHEBI:50211

  // Parameters:
  EXPERIMENT = 1 dimensionless;
  U_1 = piecewise(7.44 umol_per_day, EXPERIMENT == 1, 19.6 umol_per_day, EXPERIMENT == 2); U_1 has umol_per_day;
  L_2_1 = piecewise(37.2 per_day, EXPERIMENT == 1, 64.4 per_day, EXPERIMENT == 2); L_2_1 has per_day;
  L_3_2 = piecewise(37.2 per_day, EXPERIMENT == 1, 64.4 per_day, EXPERIMENT == 2); L_3_2 has per_day;
  W_2 = piecewise(12.7 per_day, EXPERIMENT == 1, 21.7 per_day, EXPERIMENT == 2); W_2 has per_day;
  L_4_3 = 1 per_day;
  L_5_2 = piecewise(0.631 per_day, EXPERIMENT == 1, 0.611 per_day, EXPERIMENT == 2); L_5_2 has per_day;
  L_5_4 = piecewise(0.893 per_day, EXPERIMENT == 1, 0.713 per_day, EXPERIMENT == 2); L_5_4 has per_day;
  L_6_5 = piecewise(4.96 per_day, EXPERIMENT == 1, 9.46 per_day, EXPERIMENT == 2); L_6_5 has per_day;
  L_5_6 = piecewise(0.0544 per_day, EXPERIMENT == 1, 0.0351 per_day, EXPERIMENT == 2); L_5_6 has per_day;
  W_6 = piecewise(0.0261 per_day, EXPERIMENT == 1, 0.0199 per_day, EXPERIMENT == 2); W_6 has per_day;
  t_1 = 1/L_2_1; t_1 has day;
  t_2 = 1/(L_3_2 + W_2 + L_5_2); t_2 has day;
  t_3 = 1/L_4_3; t_3 has day;
  t_4 = 1/L_5_4; t_4 has day;
  t_5 = 1/L_6_5; t_5 has day;
  t_6 = 1/(L_5_6 + W_6); t_6 has day;
  T_1 has day;
  T_2 has day;
  T_3 has day;
  T_4 has day;
  T_5 has day;
  T_6 has day;
  T has day;
  tau_3 = piecewise(0.0919 day, EXPERIMENT == 1, 0.227 day, EXPERIMENT == 2); tau_3 has day;

  // Assignment rules:
  T_1 := M_1/U_1;
  T_2 := M_2/U_1;
  T_3 := tau_3;
  T_4 := M_4/U_1;
  T_5 := M_5/U_1;
  T_6 := M_6/U_1;
  T := T_1 + T_2 + T_3 + T_4 + T_5 + T_6;

  // Reactions:
  u_1: => M_1; U_1;
  l_2_1: M_1 => M_2; L_2_1*M_1;
  l_3_2: M_2 => M_3_1; L_3_2*M_2;
  w_2: M_2 => ; W_2*M_2;
  l_4_3: M_3_8 => M_4; L_4_3*M_3_8;
  l_5_2: M_2 => M_5; L_5_2*M_2;
  l_5_4: M_4 => M_5; L_5_4*M_4;
  l_6_5: M_5 => M_6; L_6_5*M_5;
  l_5_6: M_6 => M_5; L_5_6*M_6;
  w_6: M_6 => ; W_6*M_6;
  l_2_1_0: M_1_0 => M_2_0; L_2_1*M_1_0;
  l_3_2_0: M_2_0 => M_3_1_0; L_3_2*M_2_0;
  w_2_0: M_2_0 => ; W_2*M_2_0;
  l_4_3_0: M_3_8_0 => M_4_0; L_4_3*M_3_8_0;
  l_5_2_0: M_2_0 => M_5_0; L_5_2*M_2_0;
  l_5_4_0: M_4_0 => M_5_0; L_5_4*M_4_0;
  l_6_5_0: M_5_0 => M_6_0; L_6_5*M_5_0;
  l_5_6_0: M_6_0 => M_5_0; L_5_6*M_6_0;
  w_6_0: M_6_0 => ; W_6*M_6_0;
  D_3_1: M_3_1 => M_3_2; 8/tau_3*M_3_1;
  D_3_2: M_3_2 => M_3_3; 8/tau_3*M_3_2;
  D_3_3: M_3_3 => M_3_4; 8/tau_3*M_3_3;
  D_3_4: M_3_4 => M_3_5; 8/tau_3*M_3_4;
  D_3_5: M_3_5 => M_3_6; 8/tau_3*M_3_5;
  D_3_6: M_3_6 => M_3_7; 8/tau_3*M_3_6;
  D_3_7: M_3_7 => M_3_8; 8/tau_3*M_3_7;
  D_3_1_0: M_3_1_0 => M_3_2_0; 8/tau_3*M_3_1_0;
  D_3_2_0: M_3_2_0 => M_3_3_0; 8/tau_3*M_3_2_0;
  D_3_3_0: M_3_3_0 => M_3_4_0; 8/tau_3*M_3_3_0;
  D_3_4_0: M_3_4_0 => M_3_5_0; 8/tau_3*M_3_4_0;
  D_3_5_0: M_3_5_0 => M_3_6_0; 8/tau_3*M_3_5_0;
  D_3_6_0: M_3_6_0 => M_3_7_0; 8/tau_3*M_3_6_0;
  D_3_7_0: M_3_7_0 => M_3_8_0; 8/tau_3*M_3_7_0;

  // Unit definitions:
  unit day = 86400 second;
  unit umol = 1e-6 mole;
  unit per_day = 1 / (86400 second);
  unit umol_per_day = 1e-6 mole / (86400 second);
end
