// SBML level 2 version 4
// dcterms:bibliographicCitation: http://identifiers.org/pubmed/23046614

function Rate_Law_for_Cholesterol_Absorption_1__1(k6, IC, IBS)
  k6*IC*IBS;
end
Rate_Law_for_Cholesterol_Absorption_1__1 is "Rate Law for Cholesterol Absorption_1 [1]";

function Rate_Law_for_Cholesterol_Excretion_1__1(k7, IC, IBS)
  k7*IC*IBS;
end
Rate_Law_for_Cholesterol_Excretion_1__1 is "Rate Law for Cholesterol Excretion_1 [1]";

function Rate_Law_for_Intestinal_Nascent_HDL_Synthesis_1__1(k8, PFC)
  k8*PFC;
end
Rate_Law_for_Intestinal_Nascent_HDL_Synthesis_1__1 is "Rate Law for Intestinal Nascent HDL Synthesis_1 [1]";

function Rate_Law_for_Billary_Cholesterol_Release_1__1(BCRmax, BCRt, BS, HFC)
  BCRmax/(1 + (BCRt/HFC)^BS);
end
Rate_Law_for_Billary_Cholesterol_Release_1__1 is "Rate Law for Billary Cholesterol Release_1 [1]";

function Rate_Law_for_Bile_Salt_Synthesis(k5, HFC, HBS)
  k5*HFC/HBS;
end

function Rate_Law_for_IDL_Cholesterol_Formation(k15, VLDLC, LPL)
  k15*VLDLC*LPL;
end

function Rate_Law_for_Hepatic_LDLR_Synthesis(khrs, HLDLRsS, HFC)
  khrs*HLDLRsS/HFC;
end

function Rate_Law_for_Peripheral_LDLR_Synthesis(kprs, PLDLRsS, PFC)
  kprs*PLDLRsS/PFC;
end

function Rate_Law_for_CETP_Mediated_Transfer_To_VLDL(k27, HDLC, CETP)
  k27*HDLC*CETP;
end

function Rate_Law_for_CETP_Mediated_TransferTo_LDL(k28, HDLC, CETP)
  k28*HDLC*CETP;
end

function Rate_Law_for_Release_of_Stored_Cholesterol(k10, CEH, HCE)
  k10*CEH*HCE;
end

function Rate_Law_for_Hepatic_Cholesterol_Storage_1(k9, ACAT, HFC)
  k9*ACAT*HFC;
end

function Rate_Law_for_LDL_Cholesterol_Formation(k17, IDLC, HSL)
  k17*IDLC*HSL;
end

function Rate_Law_for_Peripheral_Cholesterol_Synthesis(PCSmax, PFC, PPCt, PCSS)
  PCSmax/(1 + (PFC/PPCt)^PCSS);
end

function Rate_Law_for_Intestinal_Cholesterol_Synthesis(ICSmax, IC, ICt, IS)
  ICSmax/(1 + (IC/ICt)^IS);
end

function Rate_Law_for_Hepatic_Cholesterol_Synthesis(HCSmax, HFC, HCSt, HS)
  HCSmax/(1 + (HFC/HCSt)^HS);
end

function Function_for_Intestinal_Cholesterol_Synthesis__1(ICSmax, ICt, IS, Intestine, IC)
  Rate_Law_for_Intestinal_Cholesterol_Synthesis(ICSmax, IC, ICt, IS)/Intestine;
end
Function_for_Intestinal_Cholesterol_Synthesis__1 is "Function for Intestinal Cholesterol Synthesis [1]";

function Function_for_Release_of_Stored_Cholesterol__1(HepaticTissue, k10, HCE, CEH)
  Rate_Law_for_Release_of_Stored_Cholesterol(k10, CEH, HCE)/HepaticTissue;
end
Function_for_Release_of_Stored_Cholesterol__1 is "Function for Release of Stored Cholesterol [1]";

function Function_for_Peripheral_LDLR_Synthesis__1(PeripheralTissue, kprs, PFC, PLDLRsS)
  Rate_Law_for_Peripheral_LDLR_Synthesis(kprs, PLDLRsS, PFC)/PeripheralTissue;
end
Function_for_Peripheral_LDLR_Synthesis__1 is "Function for Peripheral LDLR Synthesis [1]";

function Function_for_CETP_Mediated_Transfer_To_VLDL__1(Plasma, k27, HDLC, CETP)
  Rate_Law_for_CETP_Mediated_Transfer_To_VLDL(k27, HDLC, CETP)/Plasma;
end
Function_for_CETP_Mediated_Transfer_To_VLDL__1 is "Function for CETP Mediated Transfer To VLDL [1]";

function Rate_Law_for_Reverse_Cholesterol_Transport_1__1(k29, HDLC, SRB1)
  k29*HDLC*SRB1;
end
Rate_Law_for_Reverse_Cholesterol_Transport_1__1 is "Rate Law for Reverse Cholesterol Transport_1 [1]";

function Rate_Law_for_HDL_Cholesterol_Formation_1__1(k26, NHDL, PFC, LCAT)
  k26*PFC*NHDL*LCAT;
end
Rate_Law_for_HDL_Cholesterol_Formation_1__1 is "Rate Law for HDL Cholesterol Formation_1 [1]";

function Function_for_Peripheral_Cholesterol_Synthesis__1(PCSS, PCSmax, PPCt, PeripheralTissue, PFC)
  Rate_Law_for_Peripheral_Cholesterol_Synthesis(PCSmax, PFC, PPCt, PCSS)/PeripheralTissue;
end
Function_for_Peripheral_Cholesterol_Synthesis__1 is "Function for Peripheral Cholesterol Synthesis [1]";

function SIGMOID_NONVAR_3(parameter_38, parameter_39, parameter_40, parameter_41, parameter_42, parameter_43, parameter_60, HCE, EBS)
  parameter_60*(parameter_38 + (1 - parameter_38)/(1 + exp(-4*parameter_39/parameter_40/(1 - parameter_38)*(HCE - parameter_40))))*(1 - parameter_41 - (1 - parameter_41)/(1 + exp(-4*parameter_42/parameter_43/(1 - parameter_41)*(EBS - parameter_43))));
end

function Function_for_Hepatic_LDLR_Synthesis__1(HepaticTissue, khrs, HLDLRsS, HFC)
  Rate_Law_for_Hepatic_LDLR_Synthesis(khrs, HLDLRsS, HFC)/HepaticTissue;
end
Function_for_Hepatic_LDLR_Synthesis__1 is "Function for Hepatic LDLR Synthesis [1]";

function Function_for_Peripheral_LDL_Receptor_Degradation__1(PeripheralTissue, k1, PLDLRs)
  k1*PLDLRs/PeripheralTissue;
end
Function_for_Peripheral_LDL_Receptor_Degradation__1 is "Function for Peripheral LDL Receptor Degradation [1]";

function Rate_Law_for_Peripheral_Cholesterol_Storage_1__1(k23, PFC, ACAT)
  k23*ACAT*PFC;
end
Rate_Law_for_Peripheral_Cholesterol_Storage_1__1 is "Rate Law for Peripheral Cholesterol Storage_1 [1]";

function Function_for_Peripheral_Steroid_Production__1(PeripheralTissue, k1, PFC)
  k1*PFC/PeripheralTissue;
end
Function_for_Peripheral_Steroid_Production__1 is "Function for Peripheral Steroid Production [1]";

function Function_for_CETP_Mediated_TransferTo_LDL__1(Plasma, k28, HDLC, CETP)
  Rate_Law_for_CETP_Mediated_TransferTo_LDL(k28, HDLC, CETP)/Plasma;
end
Function_for_CETP_Mediated_TransferTo_LDL__1 is "Function for CETP Mediated TransferTo LDL [1]";

function Rate_Law_for_Release_of_Stored_Peripheral_Cholesterol_1__1(k24, CEH, PCE)
  k24*CEH*PCE;
end
Rate_Law_for_Release_of_Stored_Peripheral_Cholesterol_1__1 is "Rate Law for Release of Stored Peripheral Cholesterol_1 [1]";

function Rate_Law_for_Receptor_Dependent_Peripheral_Uptake_1__1(k20, LDLC, PLDLRs)
  k20*PLDLRs*LDLC;
end
Rate_Law_for_Receptor_Dependent_Peripheral_Uptake_1__1 is "Rate Law for Receptor Dependent Peripheral Uptake_1 [1]";

function Rate_Law_for_Hepatic_Nascent_HDL_Synthesis_1__1(k11, PFC)
  k11*PFC;
end
Rate_Law_for_Hepatic_Nascent_HDL_Synthesis_1__1 is "Rate Law for Hepatic Nascent HDL Synthesis_1 [1]";

function Function_for_LDL_Cholesterol_Formation__1(Plasma, k17, IDLC, HSL)
  Rate_Law_for_LDL_Cholesterol_Formation(k17, IDLC, HSL)/Plasma;
end
Function_for_LDL_Cholesterol_Formation__1 is "Function for LDL Cholesterol Formation [1]";

function SIGMOID_1_VAR_1(parameter_20, parameter_21, parameter_22, parameter_23, parameter_24, parameter_25, parameter_57, DC, NHDL, ICS)
  parameter_57*(parameter_20 + (1 - parameter_20)/(1 + exp(-4*parameter_21/parameter_22/(1 - parameter_20)*(NHDL - parameter_22))))*(1 - parameter_23 - (1 - parameter_23)/(1 + exp(-4*parameter_24/parameter_25/(1 - parameter_23)*(ICS - parameter_25))))*DC;
end

function SIGMOID_NONVAR_1(parameter_14, parameter_15, parameter_16, parameter_17, parameter_18, parameter_19, parameter_56, VLDLC, HFC)
  parameter_56*(parameter_14 + (1 - parameter_14)/(1 + exp(-4*parameter_15/parameter_16/(1 - parameter_14)*(VLDLC - parameter_16))))*(1 - parameter_17 - (1 - parameter_17)/(1 + exp(-4*parameter_18/parameter_19/(1 - parameter_17)*(HFC - parameter_19))));
end

function SIGMOID_NONVAR_2(parameter_32, parameter_33, parameter_34, parameter_35, parameter_36, parameter_37, parameter_59, HCS, HFC)
  parameter_59*(parameter_32 + (1 - parameter_32)/(1 + exp(-4*parameter_33/parameter_34/(1 - parameter_32)*(HCS - parameter_34))))*(1 - parameter_35 - (1 - parameter_35)/(1 + exp(-4*parameter_36/parameter_37/(1 - parameter_35)*(HFC - parameter_37))));
end

function SIGMOID_NON_VAR_noINH_1(parameter_44, parameter_45, parameter_46, parameter_61, ACAT)
  parameter_61*(parameter_44 + (1 - parameter_44)/(1 + exp(-4*parameter_45/parameter_46/(1 - parameter_44)*(ACAT - parameter_46))));
end

function Rate_Law_for_InLDL_merge(KinLDL, LDLC, M)
  KinLDL*LDLC*M;
end
Rate_Law_for_InLDL_merge is "Rate Law for InLDL[merge]";

function SIGMOID_2_VAR_1(parameter_26, parameter_27, parameter_28, parameter_29, parameter_31, parameter_58, PFC, IC, HBS, HFC)
  parameter_58*(parameter_26 + (1 - parameter_26)/(1 + exp(-4*parameter_27/parameter_28/(1 - parameter_26)*(PFC - parameter_28))))*(1 - parameter_29 - (1 - parameter_29)/(1 + exp(-4*parameter_27/parameter_31/(1 - parameter_29)*(HFC - parameter_31))))*HBS*IC;
end

function Function_for_IDL_Cholesterol_Formation__1(Plasma, k15, VLDLC, LPL)
  Rate_Law_for_IDL_Cholesterol_Formation(k15, VLDLC, LPL)/Plasma;
end
Function_for_IDL_Cholesterol_Formation__1 is "Function for IDL Cholesterol Formation [1]";

function Rate_Law_for_Receptor_Dependent_Hepatic_Uptake_1__1(k18, HLDLRs, LDLC)
  k18*LDLC*HLDLRs;
end
Rate_Law_for_Receptor_Dependent_Hepatic_Uptake_1__1 is "Rate Law for Receptor Dependent Hepatic Uptake_1 [1]";

function Function_for_Hepatic_LDL_Receptor_Degradation__1(HepaticTissue, k1, HLDLRs)
  k1*HLDLRs/HepaticTissue;
end
Function_for_Hepatic_LDL_Receptor_Degradation__1 is "Function for Hepatic LDL Receptor Degradation [1]";

function Rate_Law_for_inHDL_merge(HDLC, KinHDL, M)
  KinHDL*HDLC*M;
end
Rate_Law_for_inHDL_merge is "Rate Law for inHDL[merge]";

function Function_for_Bile_Salt_Synthesis__1(HepaticTissue, k5, HBS, HFC)
  Rate_Law_for_Bile_Salt_Synthesis(k5, HFC, HBS)/HepaticTissue;
end
Function_for_Bile_Salt_Synthesis__1 is "Function for Bile Salt Synthesis [1]";

function Function_for_Hepatic_Cholesterol_Synthesis__1(HCSmax, HCSt, HS, HepaticTissue, HFC)
  Rate_Law_for_Hepatic_Cholesterol_Synthesis(HCSmax, HFC, HCSt, HS)/HepaticTissue;
end
Function_for_Hepatic_Cholesterol_Synthesis__1 is "Function for Hepatic Cholesterol Synthesis [1]";

function Function_for_Hepatic_Cholesterol_Storage__1(HepaticTissue, k9, ACAT, HFC)
  Rate_Law_for_Hepatic_Cholesterol_Storage_1(k9, ACAT, HFC)/HepaticTissue;
end
Function_for_Hepatic_Cholesterol_Storage__1 is "Function for Hepatic Cholesterol Storage [1]";

model McAuley2012___Whole_body_Cholesterol_Metabolism()
  // Davies2023 - Cholesterol Metabolism and Atherosclerosis Model
  // Merged model of whole body cholesterol metabolism (BIOMD0000000434) and atherosclerosis (MODEL1002160000).
  // hasProperty DOID:14502
  // hasTaxon taxonomy:9606
  // biomodels.db:BIOMD0000000434
  // biomodels.db:MODEL1206010000
  // isVersionOf GO:0007571
  // isVersionOf GO:0008203

  // Compartments:
  compartment Intake = 1;
  compartment Intestine = 1;  // isVersionOf BTO:0000648
  compartment HepaticTissue = 1;  // isVersionOf FMA:15815
  compartment PeripheralTissue = 1;  // isVersionOf FMA:9637
  compartment Plasma = 1;  // isVersionOf BTO:0000131
  compartment Excreted = 1;
  compartment Endothelium = 1;

  // Species:
  species $DC in Intake = 1051;  // isVersionOf CHEBI:16113
  species IC in Intestine = 3150;  // isVersionOf CHEBI:16113
  species $ICS in Intestine = 0;  // SBO:0000291
  species HBS in HepaticTissue = 400;  // isVersionOf CHEBI:22868
  species IBS in Intestine = 467;  // isVersionOf CHEBI:22868
  species $EBS in Excreted = 0;  // isVersionOf CHEBI:22868
  species HFC in HepaticTissue = 60000;  // isVersionOf CHEBI:16113
  species $EC in Excreted = 0;  // isVersionOf CHEBI:16113
  species $INHDLS in Plasma = 0;
  species NHDL in Plasma = 100;  // isVersionOf uniprot:Q00341
  species PFC in PeripheralTissue = 57516;  // isVersionOf CHEBI:16113
  species $HCS in HepaticTissue = 0;  // SBO:0000291
  species HCE in HepaticTissue = 10000;  // isVersionOf CHEBI:17002
  species ACAT in HepaticTissue = 100;  // hasPart uniprot:P04180; hasPart CHEBI:17984
  species CEH in HepaticTissue = 100;  // isVersionOf uniprot:Q6PIU2
  species $HNHDLS in HepaticTissue = 0;  // SBO:0000291
  species VLDLC in Plasma = 20;  // isVersionOf uniprot:P98155
  species HLDLRs in HepaticTissue = 100;  // isVersionOf uniprot:P01130
  species $HLDLRsS in HepaticTissue = 600;  // SBO:0000291
  species $HLDLRD in HepaticTissue = 0;  // SBO:0000291
  species IDLC in Plasma = 20;  // isVersionOf uniprot:P01130
  species LPL in Plasma = 100;  // isVersionOf uniprot:P06858
  species LDLC in Plasma = 100;  // isVersionOf uniprot:P01130
  species HSL in Plasma = 100;  // isVersionOf uniprot:Q05469
  species PLDLRs in PeripheralTissue = 100;  // isVersionOf uniprot:P01130
  species $PLDLRsS in PeripheralTissue = 575.16;  // SBO:0000291
  species $PLDLRD in PeripheralTissue = 0;  // SBO:0000291
  species PCE in PeripheralTissue = 9363;  // isVersionOf CHEBI:17002
  species $PSS in PeripheralTissue = 0;  // SBO:0000291
  species HDLC in Plasma = 45;  // isVersionOf uniprot:Q00341
  species LCAT in Plasma = 100;  // hasPart uniprot:P04180; hasPart CHEBI:61995
  species $PCS in PeripheralTissue = 0;  // SBO:0000291
  species CETP in Plasma = 100;  // isVersionOf uniprot:P11597
  species SRB1 in HepaticTissue = 100;  // isVersionOf uniprot:Q8WTV0
  species LDL in Endothelium = 0;
  species oxLDL in Endothelium = 0;
  species TINF in Endothelium = 0;
  species $SUMRecTAINF in Endothelium;
  species TAINF in Endothelium = 0;
  species MP in Endothelium = 0;
  species $SIGMOID_ACTENDstim in Endothelium;
  species $SUMACT_END in Endothelium;
  species PLAQUE in Endothelium = 0;
  species $SIGMOID_ACTENDinh in Endothelium;
  species Bcells in Endothelium = 0;
  species $SUMRecBcells in Endothelium;
  species $ACT_END in Endothelium;
  species $SUMoxidLDL in Endothelium;
  species $SUMForFoam in Endothelium;
  species $SUMRecTINF in Endothelium;
  species HDL in Endothelium = 0;

  // Parameters:
  alfa7 = 2.8067;
  ActEndstim_a = 0;
  ActEndstim_b = 3.51949;
  ActEndstim_c = 1.98699;
  alfa11 = 0.313487;
  alfa12 = 4.19449;
  alfa13 = 0.719488;
  ActEndinh_a = 0;
  ActEndinh_b = 1.9416;
  ActEndinh_c = 16.8895;
  alfa8 = 1.90407;
  alfa9 = 2.36282;
  ActEndConstant = 0.021038;
  alfa10 = 2.67818;
  alfa1 = 1.55466;
  alfa2 = 4.37096;
  alfa3 = 0.679298;
  alfa4 = 0.969185;
  alfa5 = 1.83425;
  alfa6 = 1.14028;
  Kdeg_Bcells = 0.079425;
  KinLDL = 0.580224;
  KoutLDL = 0.078994;
  Kdeg_MP = 0.028099;
  KoutHDL = 0.053624;
  Kdeg_TAINF = 0.02732;
  oxLDLstim_a = 0;
  oxLDLstim_b = 0.229015;
  oxLDLstim_c = 15.8416;
  oxLDLinh_a = 0;
  oxLDLinh_b = 0.393913;
  oxLDLinh_c = 4.47565;
  oxLDLConstant = 0.040707;
  Kdeg_TINF = 0.012601;
  KinHDL = 0.151629;
  KBcleanoxLDL = 0.021449;
  KBcleanPLAQUE = 0.061655;
  KRCT = 0.043153;
  RecTINFstim_a = 0;
  RecTINFstim_b = 2.27905;
  RecTINFstim_c = 16.8985;
  RecTINFinh_a = 0;
  RecTINFinh_b = 0.24317;
  RecTINFinh_c = 14.4186;
  RecTINFConstant = 0.29185;
  RecTAINFstim_a = 0;
  RecTAINFstim_b = 0.347323;
  RecTAINFstim_c = 11.7167;
  RecTAINFinh_a = 0;
  RecTAINFinh_b = 0.160629;
  RecTAINFinh_c = 14.549;
  RecTAINFConstant = 0.45752;
  RecBcellsstim_a = 0;
  RecBcellsstim_b = 2.78714;
  RecBcellsstim_c = 2.23629;
  RecBcellsConstant = 0.163734;
  ForFoamstim_a = 0;
  ForFoamstim_b = 1.00266;
  ForFoamstim_c = 4.39941;
  ForFoaminh_a = 0;
  ForFoaminh_c = 20.0861;
  ForFoamConstant = 0.081572;
  ForFoaminh_b = 1.84577;
  MCblood = 1;
  M = 0.0155561;

  // Assignment rules:
  SUMRecTAINF := TAINF + alfa7*MP;
  SUMACT_END := MP + alfa11*oxLDL + alfa12*TINF + alfa13*PLAQUE;
  SIGMOID_ACTENDstim := ActEndstim_a + (1 - ActEndstim_a)/(1 + exp(-4*ActEndstim_b/ActEndstim_c/(1 - ActEndstim_a)*(SUMACT_END - ActEndstim_c)));
  SIGMOID_ACTENDinh := ActEndinh_a + (1 - ActEndinh_a)/(1 + exp(-4*ActEndinh_b/ActEndinh_c/(1 - ActEndinh_a)*(TAINF - ActEndinh_c)));
  ACT_END := ActEndConstant*SIGMOID_ACTENDstim*(1 - SIGMOID_ACTENDinh);
  SUMoxidLDL := MP + alfa1*ACT_END;
  SUMRecTINF := MP + alfa4*TINF + alfa5*ACT_END + alfa6*oxLDL;
  SUMRecBcells := MP + alfa8*TAINF + alfa9*ACT_END + alfa10*PLAQUE;
  SUMForFoam := MP + alfa2*TINF + alfa3*ACT_END;

  // Reactions:
  Ingestion: $DC => IC; Ingestion_k1*DC;  // isVersionOf GO:0070508
    Ingestion_k1 = 1;
  Intestinal_Cholesterol_Synthesis: $ICS => IC; Intestine*Function_for_Intestinal_Cholesterol_Synthesis__1(ICSmax, ICt, IS, Intestine, IC);  // isVersionOf GO:0006695
    ICSmax = 100; ICt = 3120; IS = 5;
  Bile_Salt_Release: HBS => IBS; Bile_Salt_Release_k1*HBS;  // isVersionOf GO:0015721
    Bile_Salt_Release_k1 = 6;
  Bile_Salt_Return: IBS => HBS; Bile_Salt_Return_k1*IBS;  // isVersionOf GO:0015721
    Bile_Salt_Return_k1 = 4.29;
  Bile_Salt_Excretion: IBS => $EBS; Bile_Salt_Excretion_k1*IBS;  // isVersionOf GO:0015721
    Bile_Salt_Excretion_k1 = 0.856;
  Bile_Salt_Synthesis: HFC => HBS; HepaticTissue*Function_for_Bile_Salt_Synthesis__1(HepaticTissue, k5, HBS, HFC);  // isVersionOf GO:0006699
    k5 = 2.66;
  Cholesterol_Absorption: IC => HFC; Rate_Law_for_Cholesterol_Absorption_1__1(k6, IC, IBS);  // modifiers: IBS; hasVersion GO:0030299
    k6 = 0.0005286;
  Cholesterol_Excretion: IC => $EC; Rate_Law_for_Cholesterol_Excretion_1__1(k7, IC, IBS);  // modifiers: IBS; isVersionOf GO:0033344
    k7 = 0.0005286;
  Intestinal_Nascent_HDL_Synthesis: $INHDLS => NHDL; Rate_Law_for_Intestinal_Nascent_HDL_Synthesis_1__1(k8, PFC);  // modifiers: PFC; isVersionOf GO:0042158
    k8 = 0.0005;
  Billary_Cholesterol_Release: HFC => IC; Rate_Law_for_Billary_Cholesterol_Release_1__1(BCRmax, BCRt, BS, HFC);
    BCRmax = 2000; BCRt = 55326; BS = 5;
  Hepatic_Cholesterol_Synthesis: $HCS => HFC; HepaticTissue*Function_for_Hepatic_Cholesterol_Synthesis__1(HCSmax, HCSt, HS, HepaticTissue, HFC);
    HCSmax = 500; HCSt = 93925; HS = 5;
  Hepatic_Cholesterol_Storage: HFC => HCE; HepaticTissue*Function_for_Hepatic_Cholesterol_Storage__1(HepaticTissue, k9, ACAT, HFC);  // modifiers: ACAT
    k9 = 1;
  Release_of_Stored_Cholesterol: HCE => HFC; HepaticTissue*Function_for_Release_of_Stored_Cholesterol__1(HepaticTissue, k10, HCE, CEH);  // modifiers: CEH
    k10 = 5.998;
  Hepatic_Nascent_HDL_Synthesis: $HNHDLS => NHDL; Rate_Law_for_Hepatic_Nascent_HDL_Synthesis_1__1(k11, PFC);  // modifiers: PFC; isVersionOf GO:0042158
    k11 = 0.005;
  VLDL_Cholesterol_Formation: HFC => VLDLC; VLDL_Cholesterol_Formation_k1*HFC;
    VLDL_Cholesterol_Formation_k1 = 0.016;
  Hepatic_LDLR_Synthesis: $HLDLRsS => HLDLRs; HepaticTissue*Function_for_Hepatic_LDLR_Synthesis__1(HepaticTissue, khrs, HLDLRsS, HFC);  // modifiers: HFC
    khrs = 100;
  Hepatic_LDL_Receptor_Degradation: HLDLRs => $HLDLRD; HepaticTissue*Function_for_Hepatic_LDL_Receptor_Degradation__1(HepaticTissue, Hepatic_LDL_Receptor_Degradation_k1, HLDLRs);
    Hepatic_LDL_Receptor_Degradation_k1 = 0.01;
  VLDL_Cholesterol_ReUptake: VLDLC => HFC; VLDL_Cholesterol_ReUptake_k1*VLDLC;
    VLDL_Cholesterol_ReUptake_k1 = 0.0496;
  IDL_Cholesterol_Formation: VLDLC => IDLC; Plasma*Function_for_IDL_Cholesterol_Formation__1(Plasma, k15, VLDLC, LPL);  // modifiers: LPL
    k15 = 0.43;
  IDL_Cholesterol_ReUptake: IDLC => HFC; IDL_Cholesterol_ReUptake_k1*IDLC;
    IDL_Cholesterol_ReUptake_k1 = 0.054;
  LDL_Cholesterol_Formation: IDLC => LDLC; Plasma*Function_for_LDL_Cholesterol_Formation__1(Plasma, k17, IDLC, HSL);  // modifiers: HSL
    k17 = 0.38;
  reaction_22: LDLC => HFC; Rate_Law_for_Receptor_Dependent_Hepatic_Uptake_1__1(k18, HLDLRs, LDLC); reaction_22 is "Receptor Dependent Hepatic Uptake";  // modifiers: HLDLRs
    k18 = 0.068;
  reaction_23: LDLC => HFC; reaction_23_k1*LDLC; reaction_23 is "Receptor Independent Hepatic Uptake";
    reaction_23_k1 = 0.005;
  reaction_24: LDLC => PFC; Rate_Law_for_Receptor_Dependent_Peripheral_Uptake_1__1(k20, LDLC, PLDLRs); reaction_24 is "Receptor Dependent Peripheral Uptake";  // modifiers: PLDLRs
    k20 = 0.00675;
  reaction_25: LDLC => PFC; reaction_25_k1*LDLC; reaction_25 is "Receptor Independent Peripheral Uptake";
    reaction_25_k1 = 5e-6;
  Peripheral_LDLR_Synthesis: $PLDLRsS => PLDLRs; PeripheralTissue*Function_for_Peripheral_LDLR_Synthesis__1(PeripheralTissue, kprs, PFC, PLDLRsS);  // modifiers: PFC
    kprs = 100;
  reaction_27: PLDLRs => $PLDLRD; PeripheralTissue*Function_for_Peripheral_LDL_Receptor_Degradation__1(PeripheralTissue, reaction_27_k1, PLDLRs); reaction_27 is "Peripheral LDL Receptor Degradation";
    reaction_27_k1 = 0.01;
  Peripheral_Cholesterol_Storage: PFC => PCE; Rate_Law_for_Peripheral_Cholesterol_Storage_1__1(k23, PFC, ACAT);  // modifiers: ACAT
    k23 = 0.017386;
  reaction_29: PCE => PFC; Rate_Law_for_Release_of_Stored_Peripheral_Cholesterol_1__1(k24, CEH, PCE); reaction_29 is "Release of Stored Peripheral Cholesterol";  // modifiers: CEH
    k24 = 0.1068;
  Peripheral_Steroid_Production: PFC => $PSS; PeripheralTissue*Function_for_Peripheral_Steroid_Production__1(PeripheralTissue, Peripheral_Steroid_Production_k1, PFC);
    Peripheral_Steroid_Production_k1 = 0.0005;
  HDL_Cholesterol_Formation: PFC + NHDL => HDLC; Rate_Law_for_HDL_Cholesterol_Formation_1__1(k26, NHDL, PFC, LCAT);  // modifiers: LCAT
    k26 = 1.5e-5;
  Peripheral_Cholesterol_Synthesis: $PCS => PFC; PeripheralTissue*Function_for_Peripheral_Cholesterol_Synthesis__1(PCSS, PCSmax, PPCt, PeripheralTissue, PFC);
    PCSS = 5; PCSmax = 500; PPCt = 80342;
  CETP_Mediated_Transfer_To_VLDL: HDLC => VLDLC; Plasma*Function_for_CETP_Mediated_Transfer_To_VLDL__1(Plasma, k27, HDLC, CETP);  // modifiers: CETP; isVersionOf GO:0030301
    k27 = 0.01;
  CETP_Mediated_TransferTo_LDL: HDLC => LDLC; Plasma*Function_for_CETP_Mediated_TransferTo_LDL__1(Plasma, k28, HDLC, CETP);  // modifiers: CETP; isVersionOf GO:0030301
    k28 = 0.001;
  Reverse_Cholesterol_Transport: HDLC => HFC; Rate_Law_for_Reverse_Cholesterol_Transport_1__1(k29, HDLC, SRB1);  // modifiers: SRB1; isVersionOf GO:0043691
    k29 = 0.05;
  Bcell_deg: Bcells => ; Endothelium*Kdeg_Bcells*Bcells;
  InLDL: LDLC => LDL; Endothelium*Rate_Law_for_InLDL_merge(KinLDL, LDLC, M);
  OutLDL: LDL => ; Endothelium*KoutLDL*LDL;
  MP_deg: MP => PLAQUE; Endothelium*Kdeg_MP*MP;
  OutHDL: HDL => ; Endothelium*KoutHDL*HDL;
  TAINF_deg: TAINF => ; Endothelium*Kdeg_TAINF*TAINF;
  oxidLDL: LDL => oxLDL; Endothelium*SIGMOID_1_VAR_1(oxLDLstim_a, oxLDLstim_b, oxLDLstim_c, oxLDLinh_a, oxLDLinh_b, oxLDLinh_c, oxLDLConstant, LDL, SUMoxidLDL, HDL);  // modifiers: SUMoxidLDL, HDL
  TINF_deg: TINF => PLAQUE; Endothelium*Kdeg_TINF*TINF;
  InHDL: HDLC => HDL; Endothelium*Rate_Law_for_inHDL_merge(HDLC, KinHDL, M);
  B_clean_oxLDL: Bcells + oxLDL => ; Endothelium*KBcleanoxLDL*Bcells*oxLDL;
  B_clean_PLAQUE: Bcells + PLAQUE => ; Endothelium*KBcleanPLAQUE*Bcells*PLAQUE;
  RCT_merge: HDL + PLAQUE => MP; Endothelium*KRCT*HDL*PLAQUE; RCT_merge is "RCT[merge]";
  Recrut_TINF: => TINF; Endothelium*SIGMOID_NONVAR_2(RecTINFstim_a, RecTINFstim_b, RecTINFstim_c, RecTINFinh_a, RecTINFinh_b, RecTINFinh_c, RecTINFConstant, SUMRecTINF, TAINF);  // modifiers: SUMRecTINF, TAINF
  Recrut_TAINF: => TAINF; Endothelium*SIGMOID_NONVAR_3(RecTAINFstim_a, RecTAINFstim_b, RecTAINFstim_c, RecTAINFinh_a, RecTAINFinh_b, RecTAINFinh_c, RecTAINFConstant, SUMRecTAINF, TINF);  // modifiers: SUMRecTAINF, TINF
  Recrut_Bcells: => Bcells; Endothelium*SIGMOID_NON_VAR_noINH_1(RecBcellsstim_a, RecBcellsstim_b, RecBcellsstim_c, RecBcellsConstant, SUMRecBcells);  // modifiers: SUMRecBcells
  MP_Recruitment: => MP; Endothelium*SIGMOID_NONVAR_1(ActEndstim_a, ActEndstim_b, ActEndstim_c, ActEndinh_a, ActEndinh_b, ActEndinh_c, ActEndConstant, SUMACT_END, TAINF);  // modifiers: SUMACT_END, TAINF
  ForFoam_merge: MP + oxLDL => PLAQUE; Endothelium*SIGMOID_2_VAR_1(ForFoamstim_a, ForFoamstim_b, ForFoamstim_c, ForFoaminh_a, ForFoaminh_c, ForFoamConstant, SUMForFoam, oxLDL, MP, TAINF); ForFoam_merge is "ForFoam[merge]";  // modifiers: SUMForFoam, TAINF

  // Unit definitions:
  unit length = metre;
  unit area = metre^2;
  unit volume = dimensionless^0;
  unit time = 86400 second;
  unit substance = dimensionless^0;
end
