// SBML level 2 version 4
// dcterms:bibliographicCitation: NAD+ METABOLISM RESTRICTION BOOSTS HIGH-DOSE MELPHALAN EFFICACY IN PATIENTS WITH MULTIPLE MYELOMA urn:miriam:doi:10.1182/bloodadvances.2024013425
// dcterms:bibliographicCitation: NAD+ METABOLISM RESTRICTION BOOSTS HIGH-DOSE MELPHALAN EFFICACY IN PATIENTS WITH MULTIPLE MYELOMA urn:miriam:pubmed:39661983
// dcterms:bibliographicCitation: http://identifiers.org/pubmed/18370401
// dcterms:bibliographicCitation: http://identifiers.org/pubmed/5470825
// dcterms:bibliographicCitation: http://identifiers.org/pubmed/19737010
// dcterms:bibliographicCitation: http://identifiers.org/pubmed/4135584
// dcterms:bibliographicCitation: http://identifiers.org/pubmed/15935693
// dcterms:bibliographicCitation: http://identifiers.org/pubmed/16973376
// dcterms:bibliographicCitation: http://identifiers.org/pubmed/11985583
// dcterms:bibliographicCitation: http://identifiers.org/doi/https://doi.or g/10.1016/0 020- 711X(75)900 23-3
// dcterms:bibliographicCitation: http://identifiers.org/pubmed/12672479
// dcterms:bibliographicCitation: http://identifiers.org/pubmed/11876660
// dcterms:bibliographicCitation: http://identifiers.org/pubmed/17402747
// dcterms:bibliographicCitation: http://identifiers.org/pubmed/21742010
// dcterms:bibliographicCitation: http://identifiers.org/pubmed/12547821
// dcterms:bibliographicCitation: http://identifiers.org/pubmed/21526340
// dcterms:bibliographicCitation: http://identifiers.org/pubmed/9494110
// dcterms:bibliographicCitation: http://identifiers.org/pubmed/2538435
// dcterms:bibliographicCitation: http://identifiers.org/pubmed/11121685
// dcterms:bibliographicCitation: http://identifiers.org/pubmed/8615841
// dcterms:bibliographicCitation: http://identifiers.org/pubmed/3935159
// dcterms:bibliographicCitation: http://identifiers.org/pubmed/12939142
// dcterms:bibliographicCitation: http://identifiers.org/pubmed/9305962
// dcterms:bibliographicCitation: http://identifiers.org/pubmed/18823127
// dcterms:bibliographicCitation: http://identifiers.org/pubmed/3001058
// dcterms:bibliographicCitation: http://identifiers.org/pubmed/17914902
// dcterms:bibliographicCitation: http://identifiers.org/pubmed/170964
// dcterms:bibliographicCitation: http://identifiers.org/pubmed/12790796
// dcterms:bibliographicCitation: http://identifiers.org/pubmed/18620547
// dcterms:bibliographicCitation: http://identifiers.org/pubmed/15656614

function R4_function_1(F4, J4_Et_KMO, J4_Kcat_KMO, J4_Km_Kynurenine, J4_Km_NADPH, J4_Km_O2, L_Kynurenine, NADPH, O2)
  F4*J4_Kcat_KMO*J4_Et_KMO*L_Kynurenine*NADPH*O2/(J4_Km_Kynurenine*J4_Km_NADPH*J4_Km_O2)/(1 + L_Kynurenine/J4_Km_Kynurenine + NADPH/J4_Km_NADPH + O2/J4_Km_O2 + L_Kynurenine*NADPH*O2/(J4_Km_Kynurenine*J4_Km_NADPH*J4_Km_O2));
end

function R3_function_1(F3, Formyl_kynurenine, J3_Et_AFMID, J3_Kcat_AFMID, J3_Ki_formylkynurenine, J3_Km_formylkynurenine)
  F3*J3_Kcat_AFMID*J3_Et_AFMID*(Formyl_kynurenine/J3_Km_formylkynurenine)/(1 + Formyl_kynurenine/J3_Km_formylkynurenine + Formyl_kynurenine/J3_Ki_formylkynurenine);
end

function R1_function_1(F1, J1_Et_TDO, J1_Km_O2, J1_Km_tryptophan, J1_kcat_TDO, L_Tryptophan, O2)
  F1*J1_kcat_TDO*J1_Et_TDO*(O2/J1_Km_tryptophan)*(L_Tryptophan/J1_Km_O2)/(1 + O2/J1_Km_tryptophan + L_Tryptophan/J1_Km_O2 + O2*L_Tryptophan/(J1_Km_tryptophan*J1_Km_O2));
end

function R2_function_1(F2, J2_Et_IDO, J2_Ki_trp, J2_Km_O2, J2_Km_trp, J2_kcat_IDO, L_Tryptophan, O2)
  F2*J2_kcat_IDO*J2_Et_IDO*(L_Tryptophan*O2/(J2_Km_trp*J2_Km_O2))/(1 + L_Tryptophan/J2_Km_trp + O2/J2_Km_O2 + L_Tryptophan/J2_Ki_trp);
end

function R8_function_1(ATP, F8, J8_Et_NMNAT, J8_Kcat_NMNAT, J8_Ki_NaAD, J8_Ki_PPi, J8_Km_ATP, J8_Km_NaMN, NaAD, NaMN, PPi)
  F8*J8_Kcat_NMNAT*J8_Et_NMNAT*(NaMN/J8_Km_NaMN)*(ATP/J8_Km_ATP)/(1 + NaMN/J8_Km_NaMN + ATP/J8_Km_ATP + NaAD/J8_Ki_PPi + PPi/J8_Ki_NaAD);
end

function R5_function_1(F5, Hydroxykynurenine, J5_Et_KYNU, J5_Kcat_KYNU, J5_Ki_kynurenine, J5_Km_hydroxykynurenine, L_Kynurenine)
  F5*J5_Kcat_KYNU*J5_Et_KYNU*(Hydroxykynurenine/J5_Km_hydroxykynurenine)/(1 + Hydroxykynurenine/J5_Km_hydroxykynurenine + L_Kynurenine/J5_Ki_kynurenine);
end

function R10_function_1(ATP, F10, Glutamine, J10_Et_NADSYN1, J10_Kcat_NADSYN1, J10_Km_ATP, J10_Km_Glutamine, J10_Km_NaAD, NaAD)
  F10*J10_Kcat_NADSYN1*J10_Et_NADSYN1*NaAD*ATP*Glutamine/(J10_Km_Glutamine*J10_Km_NaAD*J10_Km_ATP)/(1 + NaAD/J10_Km_Glutamine + ATP/J10_Km_NaAD + Glutamine/J10_Km_ATP + NaAD*ATP*Glutamine/(J10_Km_Glutamine*J10_Km_NaAD*J10_Km_ATP));
end

function R11_function_1(ATP, F11, J11_Et_NADSYN1, J11_Kcat_NADSYN1, J11_Km_ATP, J11_Km_NH3, J11_Km_NaAD, NH3, NaAD)
  F11*J11_Kcat_NADSYN1*J11_Et_NADSYN1*NaAD*ATP*NH3/(J11_Km_NH3*J11_Km_NaAD*J11_Km_ATP)/(1 + NaAD/J11_Km_NH3 + ATP/J11_Km_NaAD + NH3/J11_Km_ATP + NaAD*ATP*NH3/(J11_Km_NH3*J11_Km_NaAD*J11_Km_ATP));
end

function R6_function_1(F6, Hydroxyanthranilate, J6_Et_HAAO, J6_Kcat_HAAO, J6_Ki_Quinolinate, J6_Km_O2, J6_Km_hydroxyanthranilate, O2, Quinolinate)
  F6*J6_Kcat_HAAO*J6_Et_HAAO*(Hydroxyanthranilate/J6_Km_O2)*(O2/J6_Km_hydroxyanthranilate)/(1 + Hydroxyanthranilate/J6_Km_O2 + O2/J6_Km_hydroxyanthranilate + Quinolinate/J6_Ki_Quinolinate);
end

function R7_function_1(F7, J7_Et_QPRT, J7_Kcat_QPRT, J7_Ki_NaMN, J7_Ki_PRPP, J7_Km_PRPP, J7_Km_Quinolinate, NaMN, PRPP, Quinolinate)
  F7*J7_Kcat_QPRT*J7_Et_QPRT*(Quinolinate/J7_Km_Quinolinate)*(PRPP/J7_Km_PRPP)/(1 + Quinolinate/J7_Km_Quinolinate + PRPP/J7_Km_PRPP + PRPP/J7_Ki_PRPP + NaMN/J7_Ki_NaMN);
end

function R13_function_1(ADPribose, F13, J13_Et_BST1, J13_Kcat_BST1, J13_Ki_ADPribose, J13_Ki_Nam, J13_Km_NAD, NAD, Nam)
  F13*J13_Kcat_BST1*J13_Et_BST1*(NAD/J13_Km_NAD)/(1 + NAD/J13_Km_NAD + Nam/J13_Ki_Nam + ADPribose/J13_Ki_ADPribose);
end

function R14_function_1(ADPriboseP, F14, J14_Et_CD38, J14_Kcat_CD38, J14_Ki_ADPriboseP, J14_Ki_Nam, J14_Km_NADP, NADP, Nam)
  F14*J14_Kcat_CD38*J14_Et_CD38*(NADP/J14_Km_NADP)/(1 + NADP/J14_Km_NADP + Nam/J14_Ki_Nam + ADPriboseP/J14_Ki_ADPriboseP);
end

function R9_function_1(F9, J9_Et_NAPRT, J9_Kcat_NAPRT, J9_Km_Na, J9_Km_PRPP, Na, PRPP)
  F9*J9_Kcat_NAPRT*J9_Et_NAPRT*(Na/J9_Km_Na)*(PRPP/J9_Km_PRPP)/(1 + PRPP/J9_Km_PRPP + Na/J9_Km_Na);
end

function R15_function_1(F15, J15_Et_PARP, J15_Kcat_PARP, J15_Ki_Nam, J15_Km_NAD, NAD, Nam)
  F15*J15_Kcat_PARP*J15_Et_PARP*(NAD/J15_Km_NAD)/(1 + NAD/J15_Km_NAD + Nam/J15_Ki_Nam);
end

function R12_function_1(ATP, F12, J12_Et_NADPK, J12_Km_ATP, J12_Km_NAD, J12_kcat_NADPK, NAD)
  F12*J12_kcat_NADPK*J12_Et_NADPK*(NAD/J12_Km_NAD)*(ATP/J12_Km_ATP)/(1 + NAD/J12_Km_NAD + ATP/J12_Km_ATP + NAD*ATP/(J12_Km_NAD*J12_Km_ATP));
end

function R18_function_1(F18, J18_Et_PNP, J18_Kcat_PNP, J18_Km_NR, J18_Km_P, NR, P)
  F18*J18_Kcat_PNP*J18_Et_PNP*(NR/J18_Km_NR)*(P/J18_Km_P)/(1 + P/J18_Km_P + NR/J18_Km_NR);
end

function R16_function_1(F16, J16_Et_SIRT, J16_Kcat_SIRT, J16_Ki_Nam, J16_Km_NAD, J16_Km_arginine, L_Arginine, NAD, Nam)
  F16*J16_Kcat_SIRT*J16_Et_SIRT*(NAD/J16_Km_NAD)*(L_Arginine/J16_Km_arginine)/(1 + NAD/J16_Km_NAD + L_Arginine/J16_Km_arginine + Nam/J16_Ki_Nam);
end

function R17_function_1(F17, J17_Et_ART, J17_Kcat_ART, J17_Ki_Nam, J17_Km_NAD, J17_Km_arginine, L_Arginine, NAD, Nam)
  F17*J17_Kcat_ART*J17_Et_ART*(NAD/J17_Km_NAD)*(L_Arginine/J17_Km_arginine)/(1 + NAD/J17_Km_NAD + L_Arginine/J17_Km_arginine + Nam/J17_Ki_Nam);
end

function R22_function_1(F22, J22_Et_ENPP, J22_Kcat_ENPP, J22_Km_NAD, NAD)
  F22*J22_Kcat_ENPP*J22_Et_ENPP*NAD/(J22_Km_NAD + NAD);
end

function R19_function_1(F19, J19_Et_NAMPT, J19_Kcat_NAMPT, J19_Ki_NAD, J19_Km_Nam, J19_Km_PRPP, NMN, Nam, PRPP)
  F19*J19_Kcat_NAMPT*J19_Et_NAMPT*(Nam/J19_Km_Nam)*(PRPP/J19_Km_PRPP)/(1 + PRPP/J19_Km_PRPP + Nam/J19_Km_Nam + NMN/J19_Ki_NAD);
end

function R20_function_1(F20, J20_Et_NT5C, J20_Kcat_NT5C, J20_Ki_NAD, J20_Ki_NADP, J20_Km_NMN, NAD, NADP, NMN)
  F20*J20_Kcat_NT5C*J20_Et_NT5C*(NMN/J20_Km_NMN)/(1 + NMN/J20_Km_NMN + NAD/J20_Ki_NAD + NADP/J20_Ki_NADP);
end

function R21_function_1(ATP, F21, J21_Et_NMRK, J21_Kcat_NMRK, J21_Km_ATP, J21_Km_NR, NR)
  F21*J21_Kcat_NMRK*J21_Et_NMRK*(NR/J21_Km_NR)*(ATP/J21_Km_ATP)/(1 + NR/J21_Km_NR + ATP/J21_Km_ATP + NR/J21_Km_NR*(ATP/J21_Km_ATP));
end

function R25b_function_1(F25, Hydroxykynurenine, J25_Et_KYAT, J25_Kcat_KYAT_HK, J25_Ki_L_Kynurenine, J25_Km_Hydroxykynurenine, L_Kynurenine)
  F25*J25_Kcat_KYAT_HK*J25_Et_KYAT*(Hydroxykynurenine/J25_Km_Hydroxykynurenine)/(1 + Hydroxykynurenine/J25_Km_Hydroxykynurenine + L_Kynurenine/J25_Ki_L_Kynurenine);
end

function R24_function_1(ATP, F24, J24_Et_NMNAT, J24_Kcat_NMNAT, J24_Ki_NAD, J24_Ki_PPi, J24_Km_ATP, J24_Km_NMN, NAD, NMN, PPi)
  F24*J24_Kcat_NMNAT*J24_Et_NMNAT*(NMN/J24_Km_NMN)*(ATP/J24_Km_ATP)/(1 + NMN/J24_Km_NMN + ATP/J24_Km_ATP + NAD/J24_Ki_PPi + PPi/J24_Ki_NAD);
end

function R23_function_1(F23, J23_Et_NUDT, J23_Kcat_NUDT, J23_Km_NAD, NAD)
  F23*J23_Kcat_NUDT*J23_Et_NUDT*NAD/(J23_Km_NAD + NAD);
end

function R25a_function_1(F25, Hydroxykynurenine, J25_Et_KYAT, J25_Kcat_KYAT_kyn, J25_Ki_Hydroxykynurenine, J25_Km_Kynurenine, L_Kynurenine)
  F25*J25_Kcat_KYAT_kyn*J25_Et_KYAT*(L_Kynurenine/J25_Km_Kynurenine)/(1 + L_Kynurenine/J25_Km_Kynurenine + Hydroxykynurenine/J25_Ki_Hydroxykynurenine);
end

model NADnet_Bcell()
  // DeboraSoncini2024 - NAD_Biosynthesis_in Human_B_Lymphocytes,ODE model
  // This SBML file was created to capture NAD biosynthesis in human B-cells. This model contains 27 reactions with 42 enzymes, 31 metabolites and 157 parameters. This model is used further for generating patient-specific model for multiple myeloma.
  // isDescribedBy pubmed:39661983
  // isDescribedBy doi:10.1182/bloodadvances.2024013425
  // isDescribedBy pubmed:39661983
  // hasProperty mamo:MAMO_0000046
  // biomodels.db:MODEL2311140001

  // Compartments:
  compartment compartment = 1;

  // Species:
  species $L_Tryptophan in compartment = 50;  // pubchem.substance:3378; kegg.compound:C00078; CHEBI:16828
  species Hydroxykynurenine in compartment = 0;  // CHEBI:17380; kegg.compound:C03227; pubchem.substance:6099
  species $NADPH in compartment = 51;  // kegg.compound:C00005; CHEBI:16474; pubchem.substance:3307
  species Hydroxyanthranilate in compartment = 0;  // kegg.compound:C00632; CHEBI:36559; pubchem.substance:3905
  species Quinolinate in compartment = 0;  // pubchem.substance:6487; kegg.compound:C03722; CHEBI:16675
  species NaMN in compartment = 0;  // kegg.compound:C01185; CHEBI:15763; pubchem.substance:4411
  species $PRPP in compartment = 5;  // kegg.compound:C00119; pubchem.substance:3419; CHEBI:17111
  species PPi in compartment = 0;  // CHEBI:18361; kegg.compound:C00013; pubchem.substance:3315
  species NaAD in compartment = 0;  // pubchem.substance:4114; CHEBI:18304; kegg.compound:C00857
  species NAD in compartment = 0;  // pubchem.substance:3305; kegg.compound:C00003; CHEBI:15846
  species NMN in compartment = 0;  // kegg.compound:C00455; pubchem.substance:3741; CHEBI:16171
  species $ATP in compartment = 1500;  // pubchem.substance:3304; CHEBI:15422; kegg.compound:C00002
  species $NH3 in compartment = 40;  // pubchem.substance:3316; CHEBI:16134; kegg.compound:C00014
  species $Glutamine in compartment = 600;  // kegg.compound:C00064; CHEBI:18050; pubchem.substance:3364
  species NADP in compartment = 0;  // CHEBI:18009; kegg.compound:C00006; pubchem.substance:3308
  species Nam in compartment = 0;  // CHEBI:17154; kegg.compound:C00153; pubchem.substance:3453
  species ADPribose in compartment = 0;  // kegg.compound:C00301; CHEBI:16960; pubchem.substance:3595
  species ADPriboseP in compartment = 0;  // kegg.compound:C20742; pubchem.substance:254741210
  species L_Kynurenine in compartment = 0;  // pubchem.substance:3622; kegg.compound:C00328; CHEBI:16946
  species NR in compartment = 0;  // pubchem.substance:6038; kegg.compound:C03150; CHEBI:15927
  species $R1P in compartment = 60;  // CHEBI:16300; kegg.compound:C00620; pubchem.substance:3894
  species $Na in compartment = 50;  // CHEBI:32544; kegg.compound:C00253; pubchem.substance:3552
  species Formyl_kynurenine in compartment = 0;  // kegg.compound:C02700; pubchem.substance:5664; CHEBI:30249
  species $O2 in compartment = 6000;  // kegg.compound:C00007; pubchem.substance:3309; CHEBI:15379
  species $AMP in compartment = 51;  // CHEBI:16027; pubchem.substance:3322; kegg.compound:C00020
  species $ADP in compartment = 160;  // pubchem.substance:3310; kegg.compound:C00008; CHEBI:16761
  species $L_Arginine in compartment = 80;  // kegg.compound:C00062; CHEBI:16467; pubchem.substance:3362
  species $P in compartment = 1100;  // CHEBI:18367; kegg.compound:C00009; pubchem.substance:3311
  species $NAD_sink in compartment = 10;
  species $NADP_sink in compartment = 10;
  species $PPi_sink in compartment = 10;
  species $ADPribose_sink in compartment = 10;
  species $ADPriboseP_sink in compartment = 10;
  species $Hydroxykynurenine_sink in compartment = 10;
  species $Quinolinate_sink in compartment = 10;
  species $Nam_sink in compartment = 10;
  species Kynurenic_acid in compartment = 0;  // pubchem.substance:4854; kegg.compound:C01717; CHEBI:18344
  species Xanthurenic_acid in compartment = 0;  // kegg.compound:C02470; CHEBI:71201; pubchem.substance:5485
  species $Xanthurenic_acid_sink in compartment = 10;
  species $Kynurenic_acid_sink in compartment = 10;
  species ACMS in compartment = 1;  // CHEBI:995; pubchem.substance:7044; kegg.compound:C04409
  species $ACMS_sink in compartment = 10;

  // Reactions:
  R1: $L_Tryptophan + $O2 => Formyl_kynurenine; compartment*R1_function_1(F1, J1_Et_TDO, J1_Km_O2, J1_Km_tryptophan, J1_kcat_TDO, L_Tryptophan, O2);  // kegg.reaction:R00678; isDescribedBy pubmed:5470825; isDescribedBy pubmed:18370401
    F1 = 1; J1_Et_TDO = 0.027; J1_Km_O2 = 60; J1_Km_tryptophan = 240; J1_kcat_TDO = 1.4;
  R2: $L_Tryptophan + $O2 => Formyl_kynurenine; compartment*R2_function_1(F2, J2_Et_IDO, J2_Ki_trp, J2_Km_O2, J2_Km_trp, J2_kcat_IDO, L_Tryptophan, O2);  // kegg.reaction:R00678; isDescribedBy pubmed:19737010
    F2 = 1; J2_Et_IDO = 0.0601; J2_Ki_trp = 170; J2_Km_O2 = 42; J2_Km_trp = 15; J2_kcat_IDO = 3.1;
  R3: Formyl_kynurenine => L_Kynurenine; compartment*R3_function_1(F3, Formyl_kynurenine, J3_Et_AFMID, J3_Kcat_AFMID, J3_Ki_formylkynurenine, J3_Km_formylkynurenine);  // kegg.reaction:R01959; isDescribedBy pubmed:4135584; isDescribedBy pubmed:15935693
    F3 = 1; J3_Et_AFMID = 0.0554; J3_Kcat_AFMID = 23.79; J3_Ki_formylkynurenine = 2000; J3_Km_formylkynurenine = 180;
  R4: L_Kynurenine + $NADPH + $O2 => Hydroxykynurenine + NADP; compartment*R4_function_1(F4, J4_Et_KMO, J4_Kcat_KMO, J4_Km_Kynurenine, J4_Km_NADPH, J4_Km_O2, L_Kynurenine, NADPH, O2);  // kegg.reaction:R01960; isDescribedBy pubmed:16973376
    F4 = 1; J4_Et_KMO = 0.302; J4_Kcat_KMO = 4.9; J4_Km_Kynurenine = 53; J4_Km_NADPH = 91; J4_Km_O2 = 71;
  R5: Hydroxykynurenine => Hydroxyanthranilate; compartment*R5_function_1(F5, Hydroxykynurenine, J5_Et_KYNU, J5_Kcat_KYNU, J5_Ki_kynurenine, J5_Km_hydroxykynurenine, L_Kynurenine);  // modifiers: L_Kynurenine; kegg.reaction:R02668; isDescribedBy pubmed:11985583
    F5 = 1; J5_Et_KYNU = 0.3761; J5_Kcat_KYNU = 0.14; J5_Ki_kynurenine = 20; J5_Km_hydroxykynurenine = 3;
  R6: Hydroxyanthranilate + $O2 => ACMS; compartment*R6_function_1(F6, Hydroxyanthranilate, J6_Et_HAAO, J6_Kcat_HAAO, J6_Ki_Quinolinate, J6_Km_O2, J6_Km_hydroxyanthranilate, O2, Quinolinate);  // modifiers: Quinolinate; kegg.reaction:R02665; isDescribedBy https://doi.or g/10.1016/0 020- 711X(75)900 23-3; isDescribedBy pubmed:12672479
    F6 = 1; J6_Et_HAAO = 0.07; J6_Kcat_HAAO = 4.34; J6_Ki_Quinolinate = 1800; J6_Km_O2 = 615; J6_Km_hydroxyanthranilate = 18;
  R7: Quinolinate + $PRPP => NaMN + PPi; compartment*R7_function_1(F7, J7_Et_QPRT, J7_Kcat_QPRT, J7_Ki_NaMN, J7_Ki_PRPP, J7_Km_PRPP, J7_Km_Quinolinate, NaMN, PRPP, Quinolinate);  // kegg.reaction:R03348; isDescribedBy pubmed:11876660
    F7 = 1; J7_Et_QPRT = 0.0272; J7_Kcat_QPRT = 0.4; J7_Ki_NaMN = 63; J7_Ki_PRPP = 2200; J7_Km_PRPP = 30; J7_Km_Quinolinate = 25;
  R8: NaMN + $ATP => NaAD + PPi; compartment*R8_function_1(ATP, F8, J8_Et_NMNAT, J8_Kcat_NMNAT, J8_Ki_NaAD, J8_Ki_PPi, J8_Km_ATP, J8_Km_NaMN, NaAD, NaMN, PPi);  // kegg.reaction:R03005; isDescribedBy pubmed:17402747
    F8 = 1; J8_Et_NMNAT = 0.335; J8_Kcat_NMNAT = 42.9; J8_Ki_NaAD = 502.4; J8_Ki_PPi = 175.3; J8_Km_ATP = 58.5; J8_Km_NaMN = 67.7;
  R9: $Na + $PRPP => NaMN + PPi; compartment*R9_function_1(F9, J9_Et_NAPRT, J9_Kcat_NAPRT, J9_Km_Na, J9_Km_PRPP, Na, PRPP);  // kegg.reaction:R01724; isDescribedBy pubmed:21742010
    F9 = 1; J9_Et_NAPRT = 0.3213; J9_Kcat_NAPRT = 0.25; J9_Km_Na = 27.3; J9_Km_PRPP = 38.2;
  R10: NaAD + $ATP + $Glutamine => NAD + $AMP + PPi; compartment*R10_function_1(ATP, F10, Glutamine, J10_Et_NADSYN1, J10_Kcat_NADSYN1, J10_Km_ATP, J10_Km_Glutamine, J10_Km_NaAD, NaAD);  // kegg.reaction:R00257; isDescribedBy pubmed:12547821
    F10 = 1; J10_Et_NADSYN1 = 0.2804; J10_Kcat_NADSYN1 = 1.3; J10_Km_ATP = 89; J10_Km_Glutamine = 1440; J10_Km_NaAD = 490;
  R11: NaAD + $ATP + $NH3 => NAD + $AMP + PPi; compartment*R11_function_1(ATP, F11, J11_Et_NADSYN1, J11_Kcat_NADSYN1, J11_Km_ATP, J11_Km_NH3, J11_Km_NaAD, NH3, NaAD);  // kegg.reaction:R00189; isDescribedBy pubmed:12547821
    F11 = 1; J11_Et_NADSYN1 = 0.2804; J11_Kcat_NADSYN1 = 0.71; J11_Km_ATP = 120; J11_Km_NH3 = 2390; J11_Km_NaAD = 200;
  R12: NAD + $ATP => NADP + $ADP; compartment*R12_function_1(ATP, F12, J12_Et_NADPK, J12_Km_ATP, J12_Km_NAD, J12_kcat_NADPK, NAD);  // kegg.reaction:R00104; isDescribedBy pubmed:21526340
    F12 = 1; J12_Et_NADPK = 0.4892; J12_Km_ATP = 3600; J12_Km_NAD = 1070; J12_kcat_NADPK = 15.18;
  R13: NAD => Nam + ADPribose; compartment*R13_function_1(ADPribose, F13, J13_Et_BST1, J13_Kcat_BST1, J13_Ki_ADPribose, J13_Ki_Nam, J13_Km_NAD, NAD, Nam);  // kegg.reaction:R00102; isDescribedBy pubmed:9494110
    F13 = 1; J13_Et_BST1 = 0.266; J13_Kcat_BST1 = 1.78e-6; J13_Ki_ADPribose = 4200; J13_Ki_Nam = 920; J13_Km_NAD = 46.4;
  R14: NADP => Nam + ADPriboseP; compartment*R14_function_1(ADPriboseP, F14, J14_Et_CD38, J14_Kcat_CD38, J14_Ki_ADPriboseP, J14_Ki_Nam, J14_Km_NADP, NADP, Nam);  // kegg.reaction:R10631; isDescribedBy pubmed:9494110
    F14 = 1; J14_Et_CD38 = 0.266; J14_Kcat_CD38 = 1.2e-6; J14_Ki_ADPriboseP = 3000; J14_Ki_Nam = 920; J14_Km_NADP = 65;
  R15: NAD => Nam; compartment*R15_function_1(F15, J15_Et_PARP, J15_Kcat_PARP, J15_Ki_Nam, J15_Km_NAD, NAD, Nam);  // kegg.reaction:R04176; isDescribedBy pubmed:11121685; isDescribedBy pubmed:2538435
    F15 = 1; J15_Et_PARP = 9.44; J15_Kcat_PARP = 0.416; J15_Ki_Nam = 100; J15_Km_NAD = 242;
  R16: NAD + $L_Arginine => Nam; compartment*R16_function_1(F16, J16_Et_SIRT, J16_Kcat_SIRT, J16_Ki_Nam, J16_Km_NAD, J16_Km_arginine, L_Arginine, NAD, Nam);  // kegg.reaction:R10634; isDescribedBy pubmed:8615841; isDescribedBy pubmed:3935159
    F16 = 1; J16_Et_SIRT = 0.6392; J16_Kcat_SIRT = 2.28e-8; J16_Ki_Nam = 370; J16_Km_NAD = 100; J16_Km_arginine = 260;
  R17: NAD + $L_Arginine => Nam; compartment*R17_function_1(F17, J17_Et_ART, J17_Kcat_ART, J17_Ki_Nam, J17_Km_NAD, J17_Km_arginine, L_Arginine, NAD, Nam);  // kegg.reaction:R00555; isDescribedBy pubmed:3935159; isDescribedBy pubmed:12939142
    F17 = 1; J17_Et_ART = 0.063; J17_Kcat_ART = 12; J17_Ki_Nam = 370; J17_Km_NAD = 7; J17_Km_arginine = 260;
  R18: NR + $P => Nam + $R1P; compartment*R18_function_1(F18, J18_Et_PNP, J18_Kcat_PNP, J18_Km_NR, J18_Km_P, NR, P);  // kegg.reaction:R02294; isDescribedBy pubmed:9305962
    F18 = 1; J18_Et_PNP = 2.9491; J18_Kcat_PNP = 56; J18_Km_NR = 40; J18_Km_P = 4000;
  R19: Nam + $PRPP => NMN + PPi; compartment*R19_function_1(F19, J19_Et_NAMPT, J19_Kcat_NAMPT, J19_Ki_NAD, J19_Km_Nam, J19_Km_PRPP, NMN, Nam, PRPP);  // kegg.reaction:R01271; isDescribedBy pubmed:18823127
    F19 = 1; J19_Et_NAMPT = 0.5181; J19_Kcat_NAMPT = 0.0076; J19_Ki_NAD = 2; J19_Km_Nam = 0.005; J19_Km_PRPP = 0.63;
  R20: NMN => NR + $P; compartment*R20_function_1(F20, J20_Et_NT5C, J20_Kcat_NT5C, J20_Ki_NAD, J20_Ki_NADP, J20_Km_NMN, NAD, NADP, NMN);  // modifiers: NAD, NADP; kegg.reaction:R02323; isDescribedBy pubmed:3001058
    F20 = 1; J20_Et_NT5C = 2.7057; J20_Kcat_NT5C = 4.67; J20_Ki_NAD = 100; J20_Ki_NADP = 1000; J20_Km_NMN = 18;
  R21: NR + $ATP => NMN + $ADP; compartment*R21_function_1(ATP, F21, J21_Et_NMRK, J21_Kcat_NMRK, J21_Km_ATP, J21_Km_NR, NR);  // kegg.reaction:R02324; isDescribedBy pubmed:17914902
    F21 = 1; J21_Et_NMRK = 0.0515; J21_Kcat_NMRK = 0.6; J21_Km_ATP = 4.8; J21_Km_NR = 3.4;
  R22: NAD => NMN + $AMP; compartment*R22_function_1(F22, J22_Et_ENPP, J22_Kcat_ENPP, J22_Km_NAD, NAD);  // kegg.reaction:R00103; isDescribedBy pubmed:170964
    F22 = 1; J22_Et_ENPP = 0.5632; J22_Kcat_ENPP = 18.54; J22_Km_NAD = 30;
  R24: NMN + $ATP => NAD + PPi; compartment*R24_function_1(ATP, F24, J24_Et_NMNAT, J24_Kcat_NMNAT, J24_Ki_NAD, J24_Ki_PPi, J24_Km_ATP, J24_Km_NMN, NAD, NMN, PPi);  // kegg.reaction:R00137; isDescribedBy pubmed:17402747
    F24 = 1; J24_Et_NMNAT = 0.3355; J24_Kcat_NMNAT = 53.8; J24_Ki_NAD = 418.3; J24_Ki_PPi = 175.3; J24_Km_ATP = 58.5; J24_Km_NMN = 22.3;
  R23: NAD => NMN + $AMP; compartment*R23_function_1(F23, J23_Et_NUDT, J23_Kcat_NUDT, J23_Km_NAD, NAD);  // kegg.reaction:R00103; isDescribedBy pubmed:12790796
    F23 = 1; J23_Et_NUDT = 0.0329; J23_Kcat_NUDT = 10.5; J23_Km_NAD = 190;
  ppi_sink: PPi => $PPi_sink; compartment*ppi_sink_k1*PPi;
    ppi_sink_k1 = 0.001;
  NAD_sink_0: NAD => $NAD_sink; compartment*NAD_sink_0_k1*NAD;
    NAD_sink_0_k1 = 1e-7;
  NADP_sink_0: NADP => $NADP_sink; compartment*NADP_sink_0_k1*NADP;
    NADP_sink_0_k1 = 0.01;
  ADPr_sink: ADPribose => $ADPribose_sink; compartment*ADPr_sink_k1*ADPribose;
    ADPr_sink_k1 = 0.001;
  ADPrP_sink: ADPriboseP => $ADPriboseP_sink; compartment*ADPrP_sink_k1*ADPriboseP;
    ADPrP_sink_k1 = 0.001;
  HK_sink: Hydroxykynurenine => $Hydroxykynurenine_sink; compartment*HK_sink_k1*Hydroxykynurenine;
    HK_sink_k1 = 0.001;
  Nam_sink_0: Nam => $Nam_sink; compartment*Nam_sink_0_k1*Nam;
    Nam_sink_0_k1 = 1e-5;
  R25a: L_Kynurenine => Kynurenic_acid; compartment*R25a_function_1(R25a_F25, Hydroxykynurenine, R25a_J25_Et_KYAT, J25_Kcat_KYAT_kyn, J25_Ki_Hydroxykynurenine, J25_Km_Kynurenine, L_Kynurenine);  // modifiers: Hydroxykynurenine; kegg.reaction:R12688; isDescribedBy pubmed:18620547
    R25a_F25 = 1; R25a_J25_Et_KYAT = 0.3143; J25_Kcat_KYAT_kyn = 8.9716; J25_Ki_Hydroxykynurenine = 3800; J25_Km_Kynurenine = 4700;
  R25b: Hydroxykynurenine => Xanthurenic_acid; compartment*R25b_function_1(R25b_F25, Hydroxykynurenine, R25b_J25_Et_KYAT, J25_Kcat_KYAT_HK, J25_Ki_L_Kynurenine, J25_Km_Hydroxykynurenine, L_Kynurenine);  // modifiers: L_Kynurenine; kegg.reaction:R12693; isDescribedBy pubmed:18620547
    R25b_F25 = 1; R25b_J25_Et_KYAT = 0.3143; J25_Kcat_KYAT_HK = 1.7016; J25_Ki_L_Kynurenine = 4700; J25_Km_Hydroxykynurenine = 3800;
  KA_sink: Kynurenic_acid => $Kynurenic_acid_sink; compartment*KA_sink_k1*Kynurenic_acid;
    KA_sink_k1 = 0.001;
  XA_sink: Xanthurenic_acid => $Xanthurenic_acid_sink; compartment*XA_sink_k1*Xanthurenic_acid;
    XA_sink_k1 = 0.001;
  R6a: ACMS => Quinolinate; compartment*R6a_k1*ACMS;  // kegg.reaction:R04293; isDescribedBy pubmed:15656614
    R6a_k1 = 0.00025;
  ACMS_sink_0: ACMS => $ACMS_sink; compartment*ACMS_sink_0_k1*ACMS;
    ACMS_sink_0_k1 = 0.001;
  QA_sink: Quinolinate => $Quinolinate_sink; compartment*QA_sink_k1*Quinolinate;
    QA_sink_k1 = 0.001;

  // Unit definitions:
  unit length = metre;
  unit area = metre^2;
  unit volume = litre;
  unit time = second;
  unit substance = 1e-6 mole;
end
