// SBML level 3 version 2

model green85()
  // Green1985 - whole-body vitamin A metabolism in rats
  // "A multicompartmental model of vitamin A kinetics in rats with marginal liver vitamin A stores" by Mike Green and friends (1985)
  // μg was converted to nmol using the molecular weight of retinol: 286 g/mol
  // isDescribedBy doi:10.1016/s0022-2275(20)34310-8 pubmed:4040952
  // hasTaxon taxonomy:10117
  // hasProperty MAMO:0000046 GO:0006776 mamo:MAMO_0000045
  // biomodels.db:MODEL2311220001
  // model units - substance: nmol, time: day, volume: dimensionless, area: dimensionless, length: dimensionless, extent: nmol

  // Compartments:
  compartment comp = 1 dimensionless;

  // Species:
  species M_11 in comp = 0; M_11 is "M_11 [plasma ROH]";  // hasPart CHEBI:50211
  species M_21 in comp = 0; M_21 is "M_21 [plasma RE]";  // hasPart CHEBI:50211
  species M_2 in comp = 0; M_2 is "M_2 [plasma non-physiological]";  // hasPart CHEBI:50211
  species M_3 in comp = 0; M_3 is "M_3 [liver ROH]";  // hasPart CHEBI:50211
  species M_5 in comp = 0; M_5 is "M_5 [liver RE]";  // hasPart CHEBI:50211
  species M_13 in comp = 0; M_13 is "M_13 [kidney ROH]";  // hasPart CHEBI:50211
  species M_14 in comp = 0; M_14 is "M_14 [kidney RE]";  // hasPart CHEBI:50211
  species M_16 in comp = 0; M_16 is "M_16 [carcass ROH]";  // hasPart CHEBI:50211
  species M_17 in comp = 0; M_17 is "M_17 [carcass RE]";  // hasPart CHEBI:50211
  species M_11_0 in comp = 0.79/comp; M_11_0 is "M_11^* [plasma ROH tracer]";  // hasPart CHEBI:50211
  species M_21_0 in comp = 0.0014/comp; M_21_0 is "M_21^* [plasma RE tracer]";  // hasPart CHEBI:50211
  species M_2_0 in comp = 0.2086/comp; M_2_0 is "M_2^* [plasma non-physiological tracer]";  // hasPart CHEBI:50211
  species M_3_0 in comp = 0; M_3_0 is "M_3^* [liver ROH tracer]";  // hasPart CHEBI:50211
  species M_5_0 in comp = 0; M_5_0 is "M_5^* [liver RE tracer]";  // hasPart CHEBI:50211
  species M_13_0 in comp = 0; M_13_0 is "M_13^* [kidney ROH tracer]";  // hasPart CHEBI:50211
  species M_14_0 in comp = 0; M_14_0 is "M_14^* [kidney RE tracer]";  // hasPart CHEBI:50211
  species M_16_0 in comp = 0; M_16_0 is "M_16^* [carcass ROH tracer]";  // hasPart CHEBI:50211
  species M_17_0 in comp = 0; M_17_0 is "M_17^* [carcass RE tracer]";  // hasPart CHEBI:50211

  // Parameters:
  U_3 = 24.12587 nmol_per_day;
  L_21_11 = 0.031 per_day;
  L_5_3 = 14 per_day;
  L_3_5 = 0.34 per_day;
  L_14_13 = 0.45 per_day;
  L_13_14 = 0.11 per_day;
  L_17_16 = 0.45 per_day;
  L_16_17 = 0.11 per_day;
  L_3_11 = 6.06 per_day;
  L_11_3 = 27.8 per_day;
  L_13_11 = 0.86 per_day;
  L_11_13 = 2.92 per_day;
  L_16_11 = 5.8 per_day;
  L_11_16 = 2.92 per_day;
  L_21_14 = 0.22 per_day;
  L_3_21 = 4.67 per_day;
  W_3 = 0.46 per_day;
  W_13 = 0.46 per_day;
  W_16 = 0.46 per_day;
  W_2 = 0.46 per_day;
  t_11 = 1/(L_21_11 + L_3_11 + L_13_11 + L_16_11); t_11 has day;
  t_21 = 1/L_3_21; t_21 has day;
  t_2 = 1/W_2; t_2 has day;
  t_3 = 1/(L_5_3 + L_11_3 + W_3); t_3 has day;
  t_5 = 1/L_3_5; t_5 has day;
  t_13 = 1/(L_14_13 + L_11_13 + W_13); t_13 has day;
  t_14 = 1/(L_13_14 + L_21_14); t_14 has day;
  t_16 = 1/(L_17_16 + L_11_16 + W_16); t_16 has day;
  t_17 = 1/L_16_17; t_17 has day;
  T_11 has day;
  T_21 has day;
  T_2 has day;
  T_3 has day;
  T_5 has day;
  T_13 has day;
  T_14 has day;
  T_16 has day;
  T_17 has day;
  T has day;

  // Assignment rules:
  T_11 := M_11/U_3;
  T_21 := M_21/U_3;
  T_2 := M_2/U_3;
  T_3 := M_3/U_3;
  T_5 := M_5/U_3;
  T_13 := M_13/U_3;
  T_14 := M_14/U_3;
  T_16 := M_16/U_3;
  T_17 := M_17/U_3;
  T := T_11 + T_21 + T_2 + T_3 + T_5 + T_13 + T_14 + T_16 + T_17;

  // Reactions:
  u_3: => M_3; U_3;
  l_21_11: M_11 => M_21; L_21_11*M_11;
  l_5_3: M_3 => M_5; L_5_3*M_3;
  l_3_5: M_5 => M_3; L_3_5*M_5;
  l_14_13: M_13 => M_14; L_14_13*M_13;
  l_13_14: M_14 => M_13; L_13_14*M_14;
  l_17_16: M_16 => M_17; L_17_16*M_16;
  l_16_17: M_17 => M_16; L_16_17*M_17;
  l_3_11: M_11 => M_3; L_3_11*M_11;
  l_11_3: M_3 => M_11; L_11_3*M_3;
  l_13_11: M_11 => M_13; L_13_11*M_11;
  l_11_13: M_13 => M_11; L_11_13*M_13;
  l_16_11: M_11 => M_16; L_16_11*M_11;
  l_11_16: M_16 => M_11; L_11_16*M_16;
  l_21_14: M_14 => M_21; L_21_14*M_14;
  l_3_21: M_21 => M_3; L_3_21*M_21;
  w_3: M_3 => ; W_3*M_3;
  w_13: M_13 => ; W_13*M_13;
  w_16: M_16 => ; W_16*M_16;
  w_2: M_2 => ; W_2*M_2;
  l_21_11_0: M_11_0 => M_21_0; L_21_11*M_11_0;
  l_5_3_0: M_3_0 => M_5_0; L_5_3*M_3_0;
  l_3_5_0: M_5_0 => M_3_0; L_3_5*M_5_0;
  l_14_13_0: M_13_0 => M_14_0; L_14_13*M_13_0;
  l_13_14_0: M_14_0 => M_13_0; L_13_14*M_14_0;
  l_17_16_0: M_16_0 => M_17_0; L_17_16*M_16_0;
  l_16_17_0: M_17_0 => M_16_0; L_16_17*M_17_0;
  l_3_11_0: M_11_0 => M_3_0; L_3_11*M_11_0;
  l_11_3_0: M_3_0 => M_11_0; L_11_3*M_3_0;
  l_13_11_0: M_11_0 => M_13_0; L_13_11*M_11_0;
  l_11_13_0: M_13_0 => M_11_0; L_11_13*M_13_0;
  l_16_11_0: M_11_0 => M_16_0; L_16_11*M_11_0;
  l_11_16_0: M_16_0 => M_11_0; L_11_16*M_16_0;
  l_21_14_0: M_14_0 => M_21_0; L_21_14*M_14_0;
  l_3_21_0: M_21_0 => M_3_0; L_3_21*M_21_0;
  w_3_0: M_3_0 => ; W_3*M_3_0;
  w_13_0: M_13_0 => ; W_13*M_13_0;
  w_16_0: M_16_0 => ; W_16*M_16_0;
  w_2_0: M_2_0 => ; W_2*M_2_0;

  // Unit definitions:
  unit day = 86400 second;
  unit nmol = 1e-9 mole;
  unit per_day = 1 / (86400 second);
  unit nmol_per_day = 1e-9 mole / (86400 second);
end
