// SBML level 3 version 2

model green94()
  // Green and Green, 1994
  // "Dynamics and control of plasma retinol" by Mike and Joanne Green (1994)
  // mg was converted to μmol using the molecular weight of retinol: 286 g/mol
  // The model includes a helper parameter EXPERIMENT. Setting EXPERIMENT=0 simulates Figure 2, EXPERIMENT=1 simulates Subject 1, EXPERIMENT=2 simulates Subject 2, EXPERIMENT=3 simulates Subject 3.
  // isDescribedBy doi:10.1201/9781482277562-20
  // hasTaxon taxonomy:9606
  // hasProperty MAMO:0000046 GO:0006776 mamo:MAMO_0000045
  // biomodels.db:MODEL2403010001
  // model units - substance: umol, time: day, volume: dimensionless, area: dimensionless, length: dimensionless, extent: umol

  // Compartments:
  compartment comp = 1 dimensionless;

  // Species:
  species M_1 in comp = 0; M_1 is "M_1 [plasma]";  // hasPart CHEBI:50211
  species M_2 in comp = 0; M_2 is "M_2 [liver]";  // hasPart CHEBI:50211
  species M_3 in comp = 0; M_3 is "M_3 [other]";  // hasPart CHEBI:50211
  species M_1_0 in comp = 1/comp; M_1_0 is "M_1^* [plasma tracer]";  // hasPart CHEBI:50211
  species M_2_0 in comp = 0; M_2_0 is "M_2^* [liver tracer]";  // hasPart CHEBI:50211
  species M_3_0 in comp = 0; M_3_0 is "M_3^* [other tracer]";  // hasPart CHEBI:50211

  // Parameters:
  EXPERIMENT = 1 dimensionless;
  U_2 = 5.979021 umol_per_day;
  L_1_2 = piecewise(0.0151 per_day, EXPERIMENT == 0, 0.0205 per_day, EXPERIMENT == 1, 0.0164 per_day, EXPERIMENT == 2, 0.0102 per_day, EXPERIMENT == 3); L_1_2 has per_day;
  L_2_1 = piecewise(1.74 per_day, EXPERIMENT == 0, 2.01 per_day, EXPERIMENT == 1, 1.65 per_day, EXPERIMENT == 2, 1.58 per_day, EXPERIMENT == 3); L_2_1 has per_day;
  L_3_1 = 2.68 per_day;
  L_1_3 = piecewise(0.264 per_day, EXPERIMENT == 0, 0.154 per_day, EXPERIMENT == 1, 0.416 per_day, EXPERIMENT == 2, 0.287 per_day, EXPERIMENT == 3); L_1_3 has per_day;
  W_3 = piecewise(0.203 per_day, EXPERIMENT == 0, 0.331 per_day, EXPERIMENT == 1, 0.147 per_day, EXPERIMENT == 2, 0.169 per_day, EXPERIMENT == 3); W_3 has per_day;
  t_1 = 1/(L_2_1 + L_3_1); t_1 has day;
  t_2 = 1/L_1_2; t_2 has day;
  t_3 = 1/(L_1_3 + W_3); t_3 has day;
  T_1 has day;
  T_2 has day;
  T_3 has day;
  T has day;

  // Assignment rules:
  T_1 := M_1/U_2;
  T_2 := M_2/U_2;
  T_3 := M_3/U_2;
  T := T_1 + T_2 + T_3;

  // Reactions:
  u_2: => M_2; U_2;
  l_1_2: M_2 => M_1; L_1_2*M_2;
  l_2_1: M_1 => M_2; L_2_1*M_1;
  l_3_1: M_1 => M_3; L_3_1*M_1;
  l_1_3: M_3 => M_1; L_1_3*M_3;
  w_3: M_3 => ; W_3*M_3;
  l_1_2_0: M_2_0 => M_1_0; L_1_2*M_2_0;
  l_2_1_0: M_1_0 => M_2_0; L_2_1*M_1_0;
  l_3_1_0: M_1_0 => M_3_0; L_3_1*M_1_0;
  l_1_3_0: M_3_0 => M_1_0; L_1_3*M_3_0;
  w_3_0: M_3_0 => ; W_3*M_3_0;

  // Unit definitions:
  unit day = 86400 second;
  unit umol = 1e-6 mole;
  unit per_day = 1 / (86400 second);
  unit umol_per_day = 1e-6 mole / (86400 second);
end
