// SBML level 3 version 1

model Glycolysis_FKRM()
  // Haiman2020 - Full Kinase Regulatory Model of Erythrocyte Glycolysis
  // Dynamic model utilizing mass action kinetics to elucidate network-level effects of allosteric regulation in erythrocyte metabolism. The full kinase regulatory model includes the glycolytic pathway, the Rapaport Leubering (R.L.) Shunt, hemoglobin-oxygen binding, and elementary reaction steps to represent the enzymatic mechanisms for Hexokinase (HEX1), Phosphofructokinase (PFK), and Pyruvate Kinase (PYK). The model and its variations are assembled using the MASSpy software through a module-wise building process outlined in Yurkovich et. al (2018). To validate the MASSpy modeling tool, select results presented in Yurkovich et. al (2018) are reproduced. All models associated with the validation example of the MASSpy publication are additionally hosted at (https://github.com/SBRG/MASSpy-publication), including iPython notebooks to construct all model variations presented in the publication. The MASSpy validation example reproduces models and results from the following publication: Yurkovich JT, Alcantar MA, Haiman ZB, Palsson BO (2018) Network-level allosteric effects are elucidated by detailing how ligand-binding events modulate utilization of catalytic potentials. PLOS Computational Biology 14(8): e1006356. https://doi.org/10.1371/journal.pcbi.1006356
  // isDescribedBy doi:10.1371/journal.pcbi.1008208
  // hasProperty mamo:MAMO_0000046
  // biomodels.db:MODEL2012150001

  // Compartments:
  compartment c = 1; c is "Cytosol";
  compartment b = 1; b is "boundary";

  // Species:
  species M_glc__D_c in c = 1.050228; M_glc__D_c is "D-Glucose";
  species M_g6p_c in c = 0.323537; M_g6p_c is "D-Glucose 6-phosphate";
  species M_f6p_c in c = 0.1325242; M_f6p_c is "D-Fructose 6-phosphate";
  species M_fdp_c in c = 0.01147133; M_fdp_c is "D-Fructose 1,6-bisphosphate";
  species M_dhap_c in c = 0.1434221; M_dhap_c is "Dihydroxyacetone phosphate";
  species M_g3p_c in c = 0.006332697; M_g3p_c is "Glyceraldehyde 3-phosphate";
  species M__13dpg_c in c = 0.0002408789; M__13dpg_c is "3-Phospho-D-glyceroyl phosphate";
  species M__3pg_c in c = 0.08506874; M__3pg_c is "3-Phospho-D-glycerate";
  species M__2pg_c in c = 0.01244248; M__2pg_c is "D-Glycerate 2-phosphate";
  species M_pep_c in c = 0.01893645; M_pep_c is "Phosphoenolpyruvate";
  species M_pyr_c in c = 0.06030107; M_pyr_c is "Pyruvate";
  species M_lac__L_c in c = 1.359991; M_lac__L_c is "L-Lactate";
  species M_nad_c in c = 0.0674912; M_nad_c is "Nicotinamide adenine dinucleotide";
  species M_nadh_c in c = 0.0301067; M_nadh_c is "Nicotinamide adenine dinucleotide - reduced";
  species M_amp_c in c = 0.08672812; M_amp_c is "AMP";
  species M_adp_c in c = 0.2603419; M_adp_c is "ADP";
  species M_atp_c in c = 1.289473; M_atp_c is "ATP";
  species M_pi_c in c = 2.5; M_pi_c is "Phosphate";
  species M_h_c in c = 0.0001168567; M_h_c is "H+";
  species M_h2o_c in c = 1; M_h2o_c is "H2O";
  species M__23dpg_c in c = 3.055984; M__23dpg_c is "2,3-Disphospho-D-glycerate";
  species M_hb_1o2_c in c = 0.05008976; M_hb_1o2_c is "Oxyhemoglobin (1)";
  species M_hb_c in c = 0.05963063; M_hb_c is "Hemoglobin";
  species M_o2_c in c = 0.0200788; M_o2_c is "Oxygen";
  species M_hb_2o2_c in c = 0.07363191; M_hb_2o2_c is "Oxyhemoglobin (2)";
  species M_hb_3o2_c in c = 0.2628652; M_hb_3o2_c is "Oxyhemoglobin (3)";
  species M_hb_4o2_c in c = 6.808221; M_hb_4o2_c is "Oxyhemoglobin (4)";
  species M_dhb_c in c = 0.04555756; M_dhb_c is "Deoxyhemoglobin";
  // enzyme_module_id: HEX1
  // bound_metabolites: 1 M_adp_c
  species M_hex1_A_PI_c in c = 3.287773e-6; M_hex1_A_PI_c is "HEX1-adp complex";
  // enzyme_module_id: HEX1
  species M_hex1_c in c = 1.262868e-5; M_hex1_c is "HEX1";
  // enzyme_module_id: HEX1
  // bound_metabolites: 1 M_g6p_c
  species M_hex1_G_PI_c in c = 6.128765e-8; M_hex1_G_PI_c is "HEX1-g6p complex";
  // enzyme_module_id: HEX1
  // bound_metabolites: 1 M_glc__D_c
  species M_hex1_G_c in c = 8.034877e-8; M_hex1_G_c is "HEX1-glc__D complex";
  // enzyme_module_id: HEX1
  // bound_metabolites: 1 M_atp_c
  species M_hex1_A_c in c = 7.882732e-6; M_hex1_A_c is "HEX1-atp complex";
  // enzyme_module_id: HEX1
  // bound_metabolites: 1 M__23dpg_c; 1 M_glc__D_c
  species M_hex1_G_CI_c in c = 4.464442e-8; M_hex1_G_CI_c is "HEX1-glc__D-_23dpg complex";
  // enzyme_module_id: HEX1
  // bound_metabolites: 1 M_atp_c; 1 M_glc__D_c
  species M_hex1_AG_c in c = 1.459715e-8; M_hex1_AG_c is "HEX1-glc__D-atp complex";
  // enzyme_module_id: PFK
  // bound_metabolites: 1 M_atp_c
  species M_pfk_R0_A_c in c = 1.124713e-7; M_pfk_R0_A_c is "PFK-atp complex";
  // enzyme_module_id: PFK
  species M_pfk_R0_c in c = 4.603334e-8; M_pfk_R0_c is "PFK";
  // enzyme_module_id: PFK
  // bound_metabolites: 1 M_atp_c; 1 M_f6p_c
  species M_pfk_R0_AF_c in c = 2.105484e-8; M_pfk_R0_AF_c is "PFK-atp-f6p complex";
  // enzyme_module_id: PFK
  // bound_metabolites: 1 M_amp_c
  species M_pfk_R1_c in c = 4.839249e-7; M_pfk_R1_c is "PFK-amp complex";
  // enzyme_module_id: PFK
  // bound_metabolites: 1 M_amp_c; 1 M_atp_c
  species M_pfk_R1_A_c in c = 1.182353e-6; M_pfk_R1_A_c is "PFK-atp-amp complex";
  // enzyme_module_id: PFK
  // bound_metabolites: 1 M_amp_c; 1 M_atp_c; 1 M_f6p_c
  species M_pfk_R1_AF_c in c = 2.213388e-7; M_pfk_R1_AF_c is "PFK-atp-f6p-amp complex";
  // enzyme_module_id: PFK
  // bound_metabolites: 2 M_amp_c
  species M_pfk_R2_c in c = 1.907721e-6; M_pfk_R2_c is "PFK-amp complex";
  // enzyme_module_id: PFK
  // bound_metabolites: 2 M_amp_c; 1 M_atp_c
  species M_pfk_R2_A_c in c = 4.661052e-6; M_pfk_R2_A_c is "PFK-atp-amp complex";
  // enzyme_module_id: PFK
  // bound_metabolites: 2 M_amp_c; 1 M_atp_c; 1 M_f6p_c
  species M_pfk_R2_AF_c in c = 8.725582e-7; M_pfk_R2_AF_c is "PFK-atp-f6p-amp complex";
  // enzyme_module_id: PFK
  // bound_metabolites: 3 M_amp_c
  species M_pfk_R3_c in c = 3.342482e-6; M_pfk_R3_c is "PFK-amp complex";
  // enzyme_module_id: PFK
  // bound_metabolites: 3 M_amp_c; 1 M_atp_c
  species M_pfk_R3_A_c in c = 8.166543e-6; M_pfk_R3_A_c is "PFK-atp-amp complex";
  // enzyme_module_id: PFK
  // bound_metabolites: 3 M_amp_c; 1 M_atp_c; 1 M_f6p_c
  species M_pfk_R3_AF_c in c = 1.528793e-6; M_pfk_R3_AF_c is "PFK-atp-f6p-amp complex";
  // enzyme_module_id: PFK
  // bound_metabolites: 4 M_amp_c
  species M_pfk_R4_c in c = 2.196113e-6; M_pfk_R4_c is "PFK-amp complex";
  // enzyme_module_id: PFK
  // bound_metabolites: 4 M_amp_c; 1 M_atp_c
  species M_pfk_R4_A_c in c = 5.365669e-6; M_pfk_R4_A_c is "PFK-atp-amp complex";
  // enzyme_module_id: PFK
  // bound_metabolites: 4 M_amp_c; 1 M_atp_c; 1 M_f6p_c
  species M_pfk_R4_AF_c in c = 1.004464e-6; M_pfk_R4_AF_c is "PFK-atp-f6p-amp complex";
  // enzyme_module_id: PFK
  species M_pfk_T0_c in c = 5.063667e-11; M_pfk_T0_c is "PFK";
  // enzyme_module_id: PFK
  // bound_metabolites: 1 M_atp_c
  species M_pfk_T1_c in c = 2.611784e-9; M_pfk_T1_c is "PFK-atp complex";
  // enzyme_module_id: PFK
  // bound_metabolites: 2 M_atp_c
  species M_pfk_T2_c in c = 5.051737e-8; M_pfk_T2_c is "PFK-atp complex";
  // enzyme_module_id: PFK
  // bound_metabolites: 3 M_atp_c
  species M_pfk_T3_c in c = 4.342718e-7; M_pfk_T3_c is "PFK-atp complex";
  // enzyme_module_id: PFK
  // bound_metabolites: 4 M_atp_c
  species M_pfk_T4_c in c = 1.399954e-6; M_pfk_T4_c is "PFK-atp complex";
  // enzyme_module_id: PYK
  // bound_metabolites: 1 M_pep_c
  species M_pyk_R0_P_c in c = 1.619888e-6; M_pyk_R0_P_c is "PYK-pep complex";
  // enzyme_module_id: PYK
  species M_pyk_R0_c in c = 1.93738e-5; M_pyk_R0_c is "PYK";
  // enzyme_module_id: PYK
  // bound_metabolites: 1 M_adp_c
  species M_pyk_R0_A_c in c = 1.063595e-5; M_pyk_R0_A_c is "PYK-adp complex";
  // enzyme_module_id: PYK
  // bound_metabolites: 1 M_adp_c; 1 M_pep_c
  species M_pyk_R0_AP_c in c = 8.846576e-7; M_pyk_R0_AP_c is "PYK-adp-pep complex";
  // enzyme_module_id: PYK
  // bound_metabolites: 1 M_fdp_c
  species M_pyk_R1_c in c = 0.0001777945; M_pyk_R1_c is "PYK-fdp complex";
  // enzyme_module_id: PYK
  // bound_metabolites: 1 M_fdp_c; 1 M_pep_c
  species M_pyk_R1_P_c in c = 1.486581e-5; M_pyk_R1_P_c is "PYK-pep-fdp complex";
  // enzyme_module_id: PYK
  // bound_metabolites: 1 M_adp_c; 1 M_fdp_c
  species M_pyk_R1_A_c in c = 9.760679e-5; M_pyk_R1_A_c is "PYK-adp-fdp complex";
  // enzyme_module_id: PYK
  // bound_metabolites: 1 M_adp_c; 1 M_fdp_c; 1 M_pep_c
  species M_pyk_R1_AP_c in c = 8.118557e-6; M_pyk_R1_AP_c is "PYK-adp-pep-fdp complex";
  // enzyme_module_id: PYK
  // bound_metabolites: 2 M_fdp_c
  species M_pyk_R2_c in c = 0.0006118618; M_pyk_R2_c is "PYK-fdp complex";
  // enzyme_module_id: PYK
  // bound_metabolites: 2 M_fdp_c; 1 M_pep_c
  species M_pyk_R2_P_c in c = 5.115916e-5; M_pyk_R2_P_c is "PYK-pep-fdp complex";
  // enzyme_module_id: PYK
  // bound_metabolites: 1 M_adp_c; 2 M_fdp_c
  species M_pyk_R2_A_c in c = 0.0003359038; M_pyk_R2_A_c is "PYK-adp-fdp complex";
  // enzyme_module_id: PYK
  // bound_metabolites: 1 M_adp_c; 2 M_fdp_c; 1 M_pep_c
  species M_pyk_R2_AP_c in c = 2.793919e-5; M_pyk_R2_AP_c is "PYK-adp-pep-fdp complex";
  // enzyme_module_id: PYK
  // bound_metabolites: 3 M_fdp_c
  species M_pyk_R3_c in c = 0.0009358489; M_pyk_R3_c is "PYK-fdp complex";
  // enzyme_module_id: PYK
  // bound_metabolites: 3 M_fdp_c; 1 M_pep_c
  species M_pyk_R3_P_c in c = 7.824846e-5; M_pyk_R3_P_c is "PYK-pep-fdp complex";
  // enzyme_module_id: PYK
  // bound_metabolites: 1 M_adp_c; 3 M_fdp_c
  species M_pyk_R3_A_c in c = 0.0005137683; M_pyk_R3_A_c is "PYK-adp-fdp complex";
  // enzyme_module_id: PYK
  // bound_metabolites: 1 M_adp_c; 3 M_fdp_c; 1 M_pep_c
  species M_pyk_R3_AP_c in c = 4.273327e-5; M_pyk_R3_AP_c is "PYK-adp-pep-fdp complex";
  // enzyme_module_id: PYK
  // bound_metabolites: 4 M_fdp_c
  species M_pyk_R4_c in c = 0.0005367714; M_pyk_R4_c is "PYK-fdp complex";
  // enzyme_module_id: PYK
  // bound_metabolites: 4 M_fdp_c; 1 M_pep_c
  species M_pyk_R4_P_c in c = 4.488069e-5; M_pyk_R4_P_c is "PYK-pep-fdp complex";
  // enzyme_module_id: PYK
  // bound_metabolites: 1 M_adp_c; 4 M_fdp_c
  species M_pyk_R4_A_c in c = 0.0002946802; M_pyk_R4_A_c is "PYK-adp-fdp complex";
  // enzyme_module_id: PYK
  // bound_metabolites: 1 M_adp_c; 4 M_fdp_c; 1 M_pep_c
  species M_pyk_R4_AP_c in c = 2.451037e-5; M_pyk_R4_AP_c is "PYK-adp-pep-fdp complex";
  // enzyme_module_id: PYK
  species M_pyk_T0_c in c = 0.0003681022; M_pyk_T0_c is "PYK";
  // enzyme_module_id: PYK
  // bound_metabolites: 1 M_atp_c
  species M_pyk_T1_c in c = 0.0005600676; M_pyk_T1_c is "PYK-atp complex";
  // enzyme_module_id: PYK
  // bound_metabolites: 2 M_atp_c
  species M_pyk_T2_c in c = 0.0003195537; M_pyk_T2_c is "PYK-atp complex";
  // enzyme_module_id: PYK
  // bound_metabolites: 3 M_atp_c
  species M_pyk_T3_c in c = 8.103351e-5; M_pyk_T3_c is "PYK-atp complex";
  // enzyme_module_id: PYK
  // bound_metabolites: 4 M_atp_c
  species M_pyk_T4_c in c = 7.705783e-6; M_pyk_T4_c is "PYK-atp complex";

  // Parameters:
  cobra_default_lb = -1000 mmol_per_gDW_per_hr;
  cobra_default_ub = 1000 mmol_per_gDW_per_hr;
  cobra_0_bound = 0 mmol_per_gDW_per_hr;
  minus_inf = -INF; minus_inf has mmol_per_gDW_per_hr;
  plus_inf = INF; plus_inf has mmol_per_gDW_per_hr;
  v_R_PGI = 1.12;
  v_R_FBA = 1.12;
  v_R_TPI = 1.12;
  v_R_GAPD = 2.24;
  v_R_PGK = 1.805262;
  v_R_PGM = 2.24;
  v_R_ENO = 2.24;
  v_R_LDH_L = 2.01595;
  v_R_DM_amp_c = 0.014;
  v_R_ADK1 = 0;
  v_R_SK_pyr_c = 0.2240498;
  v_R_SK_lac__L_c = 2.01595;
  v_R_ATPM = 1.805262;
  v_R_DM_nadh = 0.2240498;
  v_R_SK_glc__D_c = 1.12;
  v_R_SK_amp_c = 0.014;
  v_R_SK_h_c = 2.6881;
  v_R_SK_h2o_c = 0;
  v_R_SK_pi_c = -5.470646e-13;
  v_R_DPGM = 0.4347381;
  v_R_DPGase = 0.4347381;
  v_R_HBO1 = 0;
  v_R_HBO2 = 0;
  v_R_HBO3 = 0;
  v_R_HBO4 = 0;
  v_R_HBDPG = 0;
  v_R_SK_o2_c = 0;
  v_R_HEX1_1 = 0;
  v_R_HEX1_2 = 0;
  v_R_HEX1_3 = 0.6895299;
  v_R_HEX1_4 = 0.4304701;
  v_R_HEX1_5 = 0;
  v_R_HEX1_6 = 0.6895299;
  v_R_HEX1_7 = 0.4304701;
  v_R_HEX1_8 = 1.12;
  v_R_PFK_R01 = 0.006463837;
  v_R_PFK_R02 = 0.006463837;
  v_R_PFK_R03 = 0.006463837;
  v_R_PFK_R10 = -6.617445e-18;
  v_R_PFK_R11 = 0.06795101;
  v_R_PFK_R12 = 0.06795101;
  v_R_PFK_R13 = 0.06795101;
  v_R_PFK_R20 = 2.646978e-17;
  v_R_PFK_R21 = 0.2678754;
  v_R_PFK_R22 = 0.2678754;
  v_R_PFK_R23 = 0.2678754;
  v_R_PFK_R30 = 0;
  v_R_PFK_R31 = 0.4693394;
  v_R_PFK_R32 = 0.4693394;
  v_R_PFK_R33 = 0.4693394;
  v_R_PFK_R40 = 0;
  v_R_PFK_R41 = 0.3083704;
  v_R_PFK_R42 = 0.3083704;
  v_R_PFK_R43 = 0.3083704;
  v_R_PFK_L = -6.617445e-12;
  v_R_PFK_T1 = -2.584939e-19;
  v_R_PFK_T2 = 0;
  v_R_PFK_T3 = 0;
  v_R_PFK_T4 = 0;
  v_R_PYK_R01 = 0.009583905;
  v_R_PYK_R02 = 0.009436233;
  v_R_PYK_R03 = 0.009436233;
  v_R_PYK_R04 = 0.009583905;
  v_R_PYK_R05 = 0.01902014;
  v_R_PYK_R10 = 1.058791e-16;
  v_R_PYK_R11 = 0.08795209;
  v_R_PYK_R12 = 0.08659689;
  v_R_PYK_R13 = 0.08659689;
  v_R_PYK_R14 = 0.08795209;
  v_R_PYK_R15 = 0.174549;
  v_R_PYK_R20 = -1.694066e-15;
  v_R_PYK_R21 = 0.3026782;
  v_R_PYK_R22 = 0.2980144;
  v_R_PYK_R23 = 0.2980144;
  v_R_PYK_R24 = 0.3026782;
  v_R_PYK_R25 = 0.6006925;
  v_R_PYK_R30 = -1.694066e-15;
  v_R_PYK_R31 = 0.4629494;
  v_R_PYK_R32 = 0.4558161;
  v_R_PYK_R33 = 0.4558161;
  v_R_PYK_R34 = 0.4629494;
  v_R_PYK_R35 = 0.9187654;
  v_R_PYK_R40 = 1.694066e-15;
  v_R_PYK_R41 = 0.2655322;
  v_R_PYK_R42 = 0.2614408;
  v_R_PYK_R43 = 0.2614408;
  v_R_PYK_R44 = 0.2655322;
  v_R_PYK_R45 = 0.5269729;
  v_R_PYK_L = -3.388132e-9;
  v_R_PYK_T1 = 2.168404e-13;
  v_R_PYK_T2 = 4.336809e-13;
  v_R_PYK_T3 = -1.084202e-13;
  v_R_PYK_T4 = 0;

  // Reactions:
  R_PGI: M_g6p_c -> M_f6p_c; kf_R_PGI*(M_g6p_c - M_f6p_c/Keq_R_PGI); R_PGI is "Glucose-6-phosphate isomerase";
    kf_R_PGI = 3644.44; Keq_R_PGI = 0.41;
  R_FBA: M_fdp_c -> M_dhap_c + M_g3p_c; kf_R_FBA*(M_fdp_c - M_dhap_c*M_g3p_c/Keq_R_FBA); R_FBA is "Fructose-bisphosphate aldolase";
    Keq_R_FBA = 0.082; kf_R_FBA = 2834.57;
  R_TPI: M_dhap_c -> M_g3p_c; kf_R_TPI*(M_dhap_c - M_g3p_c/Keq_R_TPI); R_TPI is "Triose-phosphate isomerase";
    kf_R_TPI = 34.3558; Keq_R_TPI = 0.0571429;
  R_GAPD: M_g3p_c + M_nad_c + M_pi_c -> M__13dpg_c + M_h_c + M_nadh_c; kf_R_GAPD*(M_g3p_c*M_nad_c*M_pi_c - M__13dpg_c*M_nadh_c/Keq_R_GAPD); R_GAPD is "Glyceraldehyde-3-phosphate dehydrogenase";
    kf_R_GAPD = 3376.75; Keq_R_GAPD = 0.0179;
  R_PGK: M__13dpg_c + M_adp_c -> M__3pg_c + M_atp_c; kf_R_PGK*(M__13dpg_c*M_adp_c - M__3pg_c*M_atp_c/Keq_R_PGK); R_PGK is "Phosphoglycerate kinase";
    kf_R_PGK = 1020000; Keq_R_PGK = 1800;
  R_PGM: M__3pg_c -> M__2pg_c; kf_R_PGM*(M__3pg_c - M__2pg_c/Keq_R_PGM); R_PGM is "Phosphoglycerate mutase";
    Keq_R_PGM = 0.147059; kf_R_PGM = 4869.57;
  R_ENO: M__2pg_c -> M_h2o_c + M_pep_c; kf_R_ENO*(M__2pg_c - M_pep_c/Keq_R_ENO); R_ENO is "Enolase";
    kf_R_ENO = 1763.78; Keq_R_ENO = 1.69492;
  R_LDH_L: M_h_c + M_nadh_c + M_pyr_c -> M_lac__L_c + M_nad_c; kf_R_LDH_L*(M_nadh_c*M_pyr_c - M_lac__L_c*M_nad_c/Keq_R_LDH_L); R_LDH_L is "L-lactate dehydrogenase";
    kf_R_LDH_L = 1112.57; Keq_R_LDH_L = 26300;
  R_DM_amp_c: M_amp_c => ; M_amp_c*kf_R_DM_amp_c; R_DM_amp_c is "AMP demand";
    kf_R_DM_amp_c = 0.161424;
  R_ADK1: 2 M_adp_c -> M_amp_c + M_atp_c; kf_R_ADK1*(M_adp_c^2 - M_amp_c*M_atp_c/Keq_R_ADK1); R_ADK1 is "Adenylate kinase";
    Keq_R_ADK1 = 1.65; kf_R_ADK1 = 100000;
  R_SK_pyr_c: M_pyr_c -> ; kf_R_SK_pyr_c*(M_pyr_c - pyr_b/Keq_R_SK_pyr_c); R_SK_pyr_c is "Pyruvate sink";
    Keq_R_SK_pyr_c = 1; pyr_b = 0.06; kf_R_SK_pyr_c = 744.186;
  R_SK_lac__L_c: M_lac__L_c -> ; kf_R_SK_lac__L_c*(M_lac__L_c - lac__L_b/Keq_R_SK_lac__L_c); R_SK_lac__L_c is "L-Lactate sink";
    kf_R_SK_lac__L_c = 5.6; lac__L_b = 1; Keq_R_SK_lac__L_c = 1;
  R_ATPM: M_atp_c + M_h2o_c => M_adp_c + M_h_c + M_pi_c; M_atp_c*kf_R_ATPM; R_ATPM is "ATP maintenance requirement";
    kf_R_ATPM = 1.4;
  R_DM_nadh: M_nadh_c => M_h_c + M_nad_c; M_nadh_c*kf_R_DM_nadh; R_DM_nadh is "Demand NADH";
    kf_R_DM_nadh = 7.44186;
  R_SK_glc__D_c: -> M_glc__D_c; kf_R_SK_glc__D_c*(glc__D_b - M_glc__D_c/Keq_R_SK_glc__D_c); R_SK_glc__D_c is "D-Glucose sink";
    kf_R_SK_glc__D_c = 1.12; glc__D_b = 1; Keq_R_SK_glc__D_c = INF;
  R_SK_amp_c: -> M_amp_c; kf_R_SK_amp_c*(amp_b - M_amp_c/Keq_R_SK_amp_c); R_SK_amp_c is "AMP sink";
    kf_R_SK_amp_c = 0.014; Keq_R_SK_amp_c = INF; amp_b = 1;
  R_SK_h_c: M_h_c -> ; kf_R_SK_h_c*(M_h_c - h_b/Keq_R_SK_h_c); R_SK_h_c is "H+ sink";
    h_b = 8.99757e-5; Keq_R_SK_h_c = 1; kf_R_SK_h_c = 100000;
  R_SK_h2o_c: M_h2o_c -> ; kf_R_SK_h2o_c*(M_h2o_c - h2o_b/Keq_R_SK_h2o_c); R_SK_h2o_c is "H2O sink";
    kf_R_SK_h2o_c = 100000; h2o_b = 1; Keq_R_SK_h2o_c = 1;
  R_SK_pi_c: M_pi_c -> ; kf_R_SK_pi_c*(M_pi_c - pi_b/Keq_R_SK_pi_c); R_SK_pi_c is "Phosphate sink";
    Keq_R_SK_pi_c = 1; pi_b = 2.5; kf_R_SK_pi_c = 0.23;
  R_DPGM: M__13dpg_c -> M__23dpg_c + M_h_c; kf_R_DPGM*(M__13dpg_c - M__23dpg_c/Keq_R_DPGM); R_DPGM is "Diphosphoglyceromutase";
    Keq_R_DPGM = 2300000; kf_R_DPGM = 1814.81;
  R_DPGase: M__23dpg_c + M_h2o_c => M__3pg_c + M_pi_c; M__23dpg_c*kf_R_DPGase; R_DPGase is "Diphosphoglycerate phosphatase";
    kf_R_DPGase = 0.142258;
  R_HBO1: M_hb_c + M_o2_c -> M_hb_1o2_c; kf_R_HBO1*(M_hb_c*M_o2_c - M_hb_1o2_c/Keq_R_HBO1); R_HBO1 is "Oxygen Loading (1)";
    Keq_R_HBO1 = 41.8352; kf_R_HBO1 = 506935;
  R_HBO2: M_hb_1o2_c + M_o2_c -> M_hb_2o2_c; kf_R_HBO2*(M_hb_1o2_c*M_o2_c - M_hb_2o2_c/Keq_R_HBO2); R_HBO2 is "Oxygen Loading (2)";
    Keq_R_HBO2 = 73.2115; kf_R_HBO2 = 511077;
  R_HBO3: M_hb_2o2_c + M_o2_c -> M_hb_3o2_c; kf_R_HBO3*(M_hb_2o2_c*M_o2_c - M_hb_3o2_c/Keq_R_HBO3); R_HBO3 is "Oxygen Loading (3)";
    Keq_R_HBO3 = 177.799; kf_R_HBO3 = 509243;
  R_HBO4: M_hb_3o2_c + M_o2_c -> M_hb_4o2_c; kf_R_HBO4*(M_hb_3o2_c*M_o2_c - M_hb_4o2_c/Keq_R_HBO4); R_HBO4 is "Oxygen Loading (4)";
    kf_R_HBO4 = 501595; Keq_R_HBO4 = 1289.92;
  R_HBDPG: M__23dpg_c + M_hb_c -> M_dhb_c; kf_R_HBDPG*(M__23dpg_c*M_hb_c - M_dhb_c/Keq_R_HBDPG); R_HBDPG is "Hemoglobin-23dpg binding";
    kf_R_HBDPG = 519613; Keq_R_HBDPG = 0.25;
  R_SK_o2_c: M_o2_c -> ; kf_R_SK_o2_c*(M_o2_c - o2_b/Keq_R_SK_o2_c); R_SK_o2_c is "Oxygen sink";
    o2_b = 0.0200788; Keq_R_SK_o2_c = 1; kf_R_SK_o2_c = 509726;
  // SUBSYSTEM: Glycolysis
  // enzyme_module_id: HEX1
  R_HEX1_1: M_hex1_c + M_adp_c -> M_hex1_A_PI_c; kf_R_HEX1_1*(M_adp_c*M_hex1_c - M_hex1_A_PI_c/Keq_R_HEX1_1); R_HEX1_1 is "hex1-adp binding";
    Keq_R_HEX1_1 = 1; kf_R_HEX1_1 = 1000000;
  // SUBSYSTEM: Glycolysis
  // enzyme_module_id: HEX1
  R_HEX1_2: M_g6p_c + M_hex1_c -> M_hex1_G_PI_c; kf_R_HEX1_2*(M_g6p_c*M_hex1_c - M_hex1_G_PI_c/Keq_R_HEX1_2); R_HEX1_2 is "hex1-g6p binding";
    Keq_R_HEX1_2 = 0.015; kf_R_HEX1_2 = 1000000;
  // SUBSYSTEM: Glycolysis
  // enzyme_module_id: HEX1
  R_HEX1_3: M_glc__D_c + M_hex1_c -> M_hex1_G_c; R_HEX1_3_kf_HEX1_G*(M_glc__D_c*M_hex1_c - M_hex1_G_c/R_HEX1_3_Keq_HEX1_G); R_HEX1_3 is "hex1-glc__D binding";
    R_HEX1_3_kf_HEX1_G = 52001; R_HEX1_3_Keq_HEX1_G = 26.3158;
  // SUBSYSTEM: Glycolysis
  // enzyme_module_id: HEX1
  R_HEX1_4: M_atp_c + M_hex1_c -> M_hex1_A_c; R_HEX1_4_kf_HEX1_A*(M_atp_c*M_hex1_c - M_hex1_A_c/R_HEX1_4_Keq_HEX1_A); R_HEX1_4 is "hex1-atp binding";
    R_HEX1_4_Keq_HEX1_A = 0.485437; R_HEX1_4_kf_HEX1_A = 9376585;
  // SUBSYSTEM: Glycolysis
  // enzyme_module_id: HEX1
  R_HEX1_5: M__23dpg_c + M_hex1_G_c -> M_hex1_G_CI_c; kf_R_HEX1_5*(M__23dpg_c*M_hex1_G_c - M_hex1_G_CI_c/Keq_R_HEX1_5); R_HEX1_5 is "hex1_G-_23dpg binding";
    kf_R_HEX1_5 = 1000000; Keq_R_HEX1_5 = 0.181818;
  // SUBSYSTEM: Glycolysis
  // enzyme_module_id: HEX1
  R_HEX1_6: M_atp_c + M_hex1_G_c -> M_hex1_AG_c; R_HEX1_6_kf_HEX1_A*(M_atp_c*M_hex1_G_c - M_hex1_AG_c/R_HEX1_6_Keq_HEX1_A); R_HEX1_6 is "hex1_G-atp binding";
    R_HEX1_6_Keq_HEX1_A = 0.485437; R_HEX1_6_kf_HEX1_A = 9376585;
  // SUBSYSTEM: Glycolysis
  // enzyme_module_id: HEX1
  R_HEX1_7: M_glc__D_c + M_hex1_A_c -> M_hex1_AG_c; R_HEX1_7_kf_HEX1_G*(M_glc__D_c*M_hex1_A_c - M_hex1_AG_c/R_HEX1_7_Keq_HEX1_G); R_HEX1_7 is "hex1_A-glc__D binding";
    R_HEX1_7_kf_HEX1_G = 52001; R_HEX1_7_Keq_HEX1_G = 26.3158;
  // SUBSYSTEM: Glycolysis
  // enzyme_module_id: HEX1
  R_HEX1_8: M_hex1_AG_c -> M_adp_c + M_g6p_c + M_h_c + M_hex1_c; kf_HEX1*(M_hex1_AG_c - M_adp_c*M_g6p_c*M_hex1_c/Keq_HEX1); R_HEX1_8 is "hex1_AG catalyzation";
    kf_HEX1 = 100000000; Keq_HEX1 = 313.12;
  // SUBSYSTEM: Glycolysis
  // enzyme_module_id: PFK
  R_PFK_R01: M_pfk_R0_c + M_atp_c -> M_pfk_R0_A_c; R_PFK_R01_kf_PFK_A*(M_atp_c*M_pfk_R0_c - M_pfk_R0_A_c/R_PFK_R01_Keq_PFK_A); R_PFK_R01 is "pfk_R0-atp binding";
    R_PFK_R01_Keq_PFK_A = 14.7059; R_PFK_R01_kf_PFK_A = 125000;
  // SUBSYSTEM: Glycolysis
  // enzyme_module_id: PFK
  R_PFK_R02: M_f6p_c + M_pfk_R0_A_c -> M_pfk_R0_AF_c; R_PFK_R02_kf_PFK_F*(M_f6p_c*M_pfk_R0_A_c - M_pfk_R0_AF_c/R_PFK_R02_Keq_PFK_F); R_PFK_R02 is "pfk_R0_A-f6p binding";
    R_PFK_R02_kf_PFK_F = 505000; R_PFK_R02_Keq_PFK_F = 10;
  // SUBSYSTEM: Glycolysis
  // enzyme_module_id: PFK
  R_PFK_R03: M_pfk_R0_AF_c => M_adp_c + M_fdp_c + M_h_c + M_pfk_R0_c; M_pfk_R0_AF_c*R_PFK_R03_kf_PFK; R_PFK_R03 is "pfk_R0_AF catalyzation";
    R_PFK_R03_kf_PFK = 307000;
  // SUBSYSTEM: Glycolysis
  // enzyme_module_id: PFK
  R_PFK_R10: M_amp_c + M_pfk_R0_c -> M_pfk_R1_c; R_PFK_R10_kf_PFK_ACT*(4*M_amp_c*M_pfk_R0_c - M_pfk_R1_c/R_PFK_R10_Keq_PFK_ACT); R_PFK_R10 is "pfk_R0-amp binding";
    R_PFK_R10_kf_PFK_ACT = 1000000; R_PFK_R10_Keq_PFK_ACT = 30.303;
  // SUBSYSTEM: Glycolysis
  // enzyme_module_id: PFK
  R_PFK_R11: M_atp_c + M_pfk_R1_c -> M_pfk_R1_A_c; R_PFK_R11_kf_PFK_A*(M_atp_c*M_pfk_R1_c - M_pfk_R1_A_c/R_PFK_R11_Keq_PFK_A); R_PFK_R11 is "pfk_R1-atp binding";
    R_PFK_R11_Keq_PFK_A = 14.7059; R_PFK_R11_kf_PFK_A = 125000;
  // SUBSYSTEM: Glycolysis
  // enzyme_module_id: PFK
  R_PFK_R12: M_f6p_c + M_pfk_R1_A_c -> M_pfk_R1_AF_c; R_PFK_R12_kf_PFK_F*(M_f6p_c*M_pfk_R1_A_c - M_pfk_R1_AF_c/R_PFK_R12_Keq_PFK_F); R_PFK_R12 is "pfk_R1_A-f6p binding";
    R_PFK_R12_kf_PFK_F = 505000; R_PFK_R12_Keq_PFK_F = 10;
  // SUBSYSTEM: Glycolysis
  // enzyme_module_id: PFK
  R_PFK_R13: M_pfk_R1_AF_c => M_adp_c + M_fdp_c + M_h_c + M_pfk_R1_c; M_pfk_R1_AF_c*R_PFK_R13_kf_PFK; R_PFK_R13 is "pfk_R1_AF catalyzation";
    R_PFK_R13_kf_PFK = 307000;
  // SUBSYSTEM: Glycolysis
  // enzyme_module_id: PFK
  R_PFK_R20: M_amp_c + M_pfk_R1_c -> M_pfk_R2_c; R_PFK_R20_kf_PFK_ACT*(3*M_amp_c*M_pfk_R1_c - 2*M_pfk_R2_c/R_PFK_R20_Keq_PFK_ACT); R_PFK_R20 is "pfk_R1-amp binding";
    R_PFK_R20_kf_PFK_ACT = 1000000; R_PFK_R20_Keq_PFK_ACT = 30.303;
  // SUBSYSTEM: Glycolysis
  // enzyme_module_id: PFK
  R_PFK_R21: M_atp_c + M_pfk_R2_c -> M_pfk_R2_A_c; R_PFK_R21_kf_PFK_A*(M_atp_c*M_pfk_R2_c - M_pfk_R2_A_c/R_PFK_R21_Keq_PFK_A); R_PFK_R21 is "pfk_R2-atp binding";
    R_PFK_R21_Keq_PFK_A = 14.7059; R_PFK_R21_kf_PFK_A = 125000;
  // SUBSYSTEM: Glycolysis
  // enzyme_module_id: PFK
  R_PFK_R22: M_f6p_c + M_pfk_R2_A_c -> M_pfk_R2_AF_c; R_PFK_R22_kf_PFK_F*(M_f6p_c*M_pfk_R2_A_c - M_pfk_R2_AF_c/R_PFK_R22_Keq_PFK_F); R_PFK_R22 is "pfk_R2_A-f6p binding";
    R_PFK_R22_kf_PFK_F = 505000; R_PFK_R22_Keq_PFK_F = 10;
  // SUBSYSTEM: Glycolysis
  // enzyme_module_id: PFK
  R_PFK_R23: M_pfk_R2_AF_c => M_adp_c + M_fdp_c + M_h_c + M_pfk_R2_c; M_pfk_R2_AF_c*R_PFK_R23_kf_PFK; R_PFK_R23 is "pfk_R2_AF catalyzation";
    R_PFK_R23_kf_PFK = 307000;
  // SUBSYSTEM: Glycolysis
  // enzyme_module_id: PFK
  R_PFK_R30: M_amp_c + M_pfk_R2_c -> M_pfk_R3_c; R_PFK_R30_kf_PFK_ACT*(2*M_amp_c*M_pfk_R2_c - 3*M_pfk_R3_c/R_PFK_R30_Keq_PFK_ACT); R_PFK_R30 is "pfk_R2-amp binding";
    R_PFK_R30_kf_PFK_ACT = 1000000; R_PFK_R30_Keq_PFK_ACT = 30.303;
  // SUBSYSTEM: Glycolysis
  // enzyme_module_id: PFK
  R_PFK_R31: M_atp_c + M_pfk_R3_c -> M_pfk_R3_A_c; R_PFK_R31_kf_PFK_A*(M_atp_c*M_pfk_R3_c - M_pfk_R3_A_c/R_PFK_R31_Keq_PFK_A); R_PFK_R31 is "pfk_R3-atp binding";
    R_PFK_R31_Keq_PFK_A = 14.7059; R_PFK_R31_kf_PFK_A = 125000;
  // SUBSYSTEM: Glycolysis
  // enzyme_module_id: PFK
  R_PFK_R32: M_f6p_c + M_pfk_R3_A_c -> M_pfk_R3_AF_c; R_PFK_R32_kf_PFK_F*(M_f6p_c*M_pfk_R3_A_c - M_pfk_R3_AF_c/R_PFK_R32_Keq_PFK_F); R_PFK_R32 is "pfk_R3_A-f6p binding";
    R_PFK_R32_kf_PFK_F = 505000; R_PFK_R32_Keq_PFK_F = 10;
  // SUBSYSTEM: Glycolysis
  // enzyme_module_id: PFK
  R_PFK_R33: M_pfk_R3_AF_c => M_adp_c + M_fdp_c + M_h_c + M_pfk_R3_c; M_pfk_R3_AF_c*R_PFK_R33_kf_PFK; R_PFK_R33 is "pfk_R3_AF catalyzation";
    R_PFK_R33_kf_PFK = 307000;
  // SUBSYSTEM: Glycolysis
  // enzyme_module_id: PFK
  R_PFK_R40: M_amp_c + M_pfk_R3_c -> M_pfk_R4_c; R_PFK_R40_kf_PFK_ACT*(M_amp_c*M_pfk_R3_c - 4*M_pfk_R4_c/R_PFK_R40_Keq_PFK_ACT); R_PFK_R40 is "pfk_R3-amp binding";
    R_PFK_R40_kf_PFK_ACT = 1000000; R_PFK_R40_Keq_PFK_ACT = 30.303;
  // SUBSYSTEM: Glycolysis
  // enzyme_module_id: PFK
  R_PFK_R41: M_atp_c + M_pfk_R4_c -> M_pfk_R4_A_c; R_PFK_R41_kf_PFK_A*(M_atp_c*M_pfk_R4_c - M_pfk_R4_A_c/R_PFK_R41_Keq_PFK_A); R_PFK_R41 is "pfk_R4-atp binding";
    R_PFK_R41_Keq_PFK_A = 14.7059; R_PFK_R41_kf_PFK_A = 125000;
  // SUBSYSTEM: Glycolysis
  // enzyme_module_id: PFK
  R_PFK_R42: M_f6p_c + M_pfk_R4_A_c -> M_pfk_R4_AF_c; R_PFK_R42_kf_PFK_F*(M_f6p_c*M_pfk_R4_A_c - M_pfk_R4_AF_c/R_PFK_R42_Keq_PFK_F); R_PFK_R42 is "pfk_R4_A-f6p binding";
    R_PFK_R42_kf_PFK_F = 505000; R_PFK_R42_Keq_PFK_F = 10;
  // SUBSYSTEM: Glycolysis
  // enzyme_module_id: PFK
  R_PFK_R43: M_pfk_R4_AF_c => M_adp_c + M_fdp_c + M_h_c + M_pfk_R4_c; M_pfk_R4_AF_c*R_PFK_R43_kf_PFK; R_PFK_R43 is "pfk_R4_AF catalyzation";
    R_PFK_R43_kf_PFK = 307000;
  // SUBSYSTEM: Glycolysis
  // enzyme_module_id: PFK
  R_PFK_L: M_pfk_R0_c -> M_pfk_T0_c; kf_R_PFK_L*(M_pfk_R0_c - M_pfk_T0_c/Keq_R_PFK_L); R_PFK_L is "pfk_R0-pfk_T0 transition";
    kf_R_PFK_L = 1e12; Keq_R_PFK_L = 0.0011;
  // SUBSYSTEM: Glycolysis
  // enzyme_module_id: PFK
  R_PFK_T1: M_atp_c + M_pfk_T0_c -> M_pfk_T1_c; R_PFK_T1_kf_PFK_I*(4*M_atp_c*M_pfk_T0_c - M_pfk_T1_c/R_PFK_T1_Keq_PFK_I); R_PFK_T1 is "pfk_T0-atp binding";
    R_PFK_T1_Keq_PFK_I = 10; R_PFK_T1_kf_PFK_I = 1000000;
  // SUBSYSTEM: Glycolysis
  // enzyme_module_id: PFK
  R_PFK_T2: M_atp_c + M_pfk_T1_c -> M_pfk_T2_c; R_PFK_T2_kf_PFK_I*(3*M_atp_c*M_pfk_T1_c - 2*M_pfk_T2_c/R_PFK_T2_Keq_PFK_I); R_PFK_T2 is "pfk_T1-atp binding";
    R_PFK_T2_Keq_PFK_I = 10; R_PFK_T2_kf_PFK_I = 1000000;
  // SUBSYSTEM: Glycolysis
  // enzyme_module_id: PFK
  R_PFK_T3: M_atp_c + M_pfk_T2_c -> M_pfk_T3_c; R_PFK_T3_kf_PFK_I*(2*M_atp_c*M_pfk_T2_c - 3*M_pfk_T3_c/R_PFK_T3_Keq_PFK_I); R_PFK_T3 is "pfk_T2-atp binding";
    R_PFK_T3_Keq_PFK_I = 10; R_PFK_T3_kf_PFK_I = 1000000;
  // SUBSYSTEM: Glycolysis
  // enzyme_module_id: PFK
  R_PFK_T4: M_atp_c + M_pfk_T3_c -> M_pfk_T4_c; R_PFK_T4_kf_PFK_I*(M_atp_c*M_pfk_T3_c - 4*M_pfk_T4_c/R_PFK_T4_Keq_PFK_I); R_PFK_T4 is "pfk_T3-atp binding";
    R_PFK_T4_Keq_PFK_I = 10; R_PFK_T4_kf_PFK_I = 1000000;
  // SUBSYSTEM: Glycolysis
  // enzyme_module_id: PYK
  R_PYK_R01: M_pyk_R0_c + M_pep_c -> M_pyk_R0_P_c; R_PYK_R01_kf_PYK_P*(M_pep_c*M_pyk_R0_c - M_pyk_R0_P_c/R_PYK_R01_Keq_PYK_P); R_PYK_R01 is "pyk_R0-pep binding";
    R_PYK_R01_Keq_PYK_P = 4.44444; R_PYK_R01_kf_PYK_P = 4000000;
  // SUBSYSTEM: Glycolysis
  // enzyme_module_id: PYK
  R_PYK_R02: M_adp_c + M_pyk_R0_c -> M_pyk_R0_A_c; R_PYK_R02_kf_PYK_A*(M_adp_c*M_pyk_R0_c - M_pyk_R0_A_c/R_PYK_R02_Keq_PYK_A); R_PYK_R02 is "pyk_R0-adp binding";
    R_PYK_R02_kf_PYK_A = 4000000; R_PYK_R02_Keq_PYK_A = 2.1097;
  // SUBSYSTEM: Glycolysis
  // enzyme_module_id: PYK
  R_PYK_R03: M_pep_c + M_pyk_R0_A_c -> M_pyk_R0_AP_c; R_PYK_R03_kf_PYK_P*(M_pep_c*M_pyk_R0_A_c - M_pyk_R0_AP_c/R_PYK_R03_Keq_PYK_P); R_PYK_R03 is "pyk_R0_A-pep binding";
    R_PYK_R03_Keq_PYK_P = 4.44444; R_PYK_R03_kf_PYK_P = 4000000;
  // SUBSYSTEM: Glycolysis
  // enzyme_module_id: PYK
  R_PYK_R04: M_adp_c + M_pyk_R0_P_c -> M_pyk_R0_AP_c; R_PYK_R04_kf_PYK_A*(M_adp_c*M_pyk_R0_P_c - M_pyk_R0_AP_c/R_PYK_R04_Keq_PYK_A); R_PYK_R04 is "pyk_R0_P-adp binding";
    R_PYK_R04_kf_PYK_A = 4000000; R_PYK_R04_Keq_PYK_A = 2.1097;
  // SUBSYSTEM: Glycolysis
  // enzyme_module_id: PYK
  R_PYK_R05: M_h_c + M_pyk_R0_AP_c => M_atp_c + M_pyk_R0_c + M_pyr_c; M_pyk_R0_AP_c*R_PYK_R05_kf_PYK; R_PYK_R05 is "pyk_R0_AP catalyzation";
    R_PYK_R05_kf_PYK = 21500;
  // SUBSYSTEM: Glycolysis
  // enzyme_module_id: PYK
  R_PYK_R10: M_fdp_c + M_pyk_R0_c -> M_pyk_R1_c; R_PYK_R10_kf_PYK_ACT*(4*M_fdp_c*M_pyk_R0_c - M_pyk_R1_c/R_PYK_R10_Keq_PYK_ACT); R_PYK_R10 is "pyk_R0-fdp binding";
    R_PYK_R10_Keq_PYK_ACT = 200; R_PYK_R10_kf_PYK_ACT = 1000000;
  // SUBSYSTEM: Glycolysis
  // enzyme_module_id: PYK
  R_PYK_R11: M_pep_c + M_pyk_R1_c -> M_pyk_R1_P_c; R_PYK_R11_kf_PYK_P*(M_pep_c*M_pyk_R1_c - M_pyk_R1_P_c/R_PYK_R11_Keq_PYK_P); R_PYK_R11 is "pyk_R1-pep binding";
    R_PYK_R11_Keq_PYK_P = 4.44444; R_PYK_R11_kf_PYK_P = 4000000;
  // SUBSYSTEM: Glycolysis
  // enzyme_module_id: PYK
  R_PYK_R12: M_adp_c + M_pyk_R1_c -> M_pyk_R1_A_c; R_PYK_R12_kf_PYK_A*(M_adp_c*M_pyk_R1_c - M_pyk_R1_A_c/R_PYK_R12_Keq_PYK_A); R_PYK_R12 is "pyk_R1-adp binding";
    R_PYK_R12_kf_PYK_A = 4000000; R_PYK_R12_Keq_PYK_A = 2.1097;
  // SUBSYSTEM: Glycolysis
  // enzyme_module_id: PYK
  R_PYK_R13: M_pep_c + M_pyk_R1_A_c -> M_pyk_R1_AP_c; R_PYK_R13_kf_PYK_P*(M_pep_c*M_pyk_R1_A_c - M_pyk_R1_AP_c/R_PYK_R13_Keq_PYK_P); R_PYK_R13 is "pyk_R1_A-pep binding";
    R_PYK_R13_Keq_PYK_P = 4.44444; R_PYK_R13_kf_PYK_P = 4000000;
  // SUBSYSTEM: Glycolysis
  // enzyme_module_id: PYK
  R_PYK_R14: M_adp_c + M_pyk_R1_P_c -> M_pyk_R1_AP_c; R_PYK_R14_kf_PYK_A*(M_adp_c*M_pyk_R1_P_c - M_pyk_R1_AP_c/R_PYK_R14_Keq_PYK_A); R_PYK_R14 is "pyk_R1_P-adp binding";
    R_PYK_R14_kf_PYK_A = 4000000; R_PYK_R14_Keq_PYK_A = 2.1097;
  // SUBSYSTEM: Glycolysis
  // enzyme_module_id: PYK
  R_PYK_R15: M_h_c + M_pyk_R1_AP_c => M_atp_c + M_pyk_R1_c + M_pyr_c; M_pyk_R1_AP_c*R_PYK_R15_kf_PYK; R_PYK_R15 is "pyk_R1_AP catalyzation";
    R_PYK_R15_kf_PYK = 21500;
  // SUBSYSTEM: Glycolysis
  // enzyme_module_id: PYK
  R_PYK_R20: M_fdp_c + M_pyk_R1_c -> M_pyk_R2_c; R_PYK_R20_kf_PYK_ACT*(3*M_fdp_c*M_pyk_R1_c - 2*M_pyk_R2_c/R_PYK_R20_Keq_PYK_ACT); R_PYK_R20 is "pyk_R1-fdp binding";
    R_PYK_R20_Keq_PYK_ACT = 200; R_PYK_R20_kf_PYK_ACT = 1000000;
  // SUBSYSTEM: Glycolysis
  // enzyme_module_id: PYK
  R_PYK_R21: M_pep_c + M_pyk_R2_c -> M_pyk_R2_P_c; R_PYK_R21_kf_PYK_P*(M_pep_c*M_pyk_R2_c - M_pyk_R2_P_c/R_PYK_R21_Keq_PYK_P); R_PYK_R21 is "pyk_R2-pep binding";
    R_PYK_R21_Keq_PYK_P = 4.44444; R_PYK_R21_kf_PYK_P = 4000000;
  // SUBSYSTEM: Glycolysis
  // enzyme_module_id: PYK
  R_PYK_R22: M_adp_c + M_pyk_R2_c -> M_pyk_R2_A_c; R_PYK_R22_kf_PYK_A*(M_adp_c*M_pyk_R2_c - M_pyk_R2_A_c/R_PYK_R22_Keq_PYK_A); R_PYK_R22 is "pyk_R2-adp binding";
    R_PYK_R22_kf_PYK_A = 4000000; R_PYK_R22_Keq_PYK_A = 2.1097;
  // SUBSYSTEM: Glycolysis
  // enzyme_module_id: PYK
  R_PYK_R23: M_pep_c + M_pyk_R2_A_c -> M_pyk_R2_AP_c; R_PYK_R23_kf_PYK_P*(M_pep_c*M_pyk_R2_A_c - M_pyk_R2_AP_c/R_PYK_R23_Keq_PYK_P); R_PYK_R23 is "pyk_R2_A-pep binding";
    R_PYK_R23_Keq_PYK_P = 4.44444; R_PYK_R23_kf_PYK_P = 4000000;
  // SUBSYSTEM: Glycolysis
  // enzyme_module_id: PYK
  R_PYK_R24: M_adp_c + M_pyk_R2_P_c -> M_pyk_R2_AP_c; R_PYK_R24_kf_PYK_A*(M_adp_c*M_pyk_R2_P_c - M_pyk_R2_AP_c/R_PYK_R24_Keq_PYK_A); R_PYK_R24 is "pyk_R2_P-adp binding";
    R_PYK_R24_kf_PYK_A = 4000000; R_PYK_R24_Keq_PYK_A = 2.1097;
  // SUBSYSTEM: Glycolysis
  // enzyme_module_id: PYK
  R_PYK_R25: M_h_c + M_pyk_R2_AP_c => M_atp_c + M_pyk_R2_c + M_pyr_c; M_pyk_R2_AP_c*R_PYK_R25_kf_PYK; R_PYK_R25 is "pyk_R2_AP catalyzation";
    R_PYK_R25_kf_PYK = 21500;
  // SUBSYSTEM: Glycolysis
  // enzyme_module_id: PYK
  R_PYK_R30: M_fdp_c + M_pyk_R2_c -> M_pyk_R3_c; R_PYK_R30_kf_PYK_ACT*(2*M_fdp_c*M_pyk_R2_c - 3*M_pyk_R3_c/R_PYK_R30_Keq_PYK_ACT); R_PYK_R30 is "pyk_R2-fdp binding";
    R_PYK_R30_Keq_PYK_ACT = 200; R_PYK_R30_kf_PYK_ACT = 1000000;
  // SUBSYSTEM: Glycolysis
  // enzyme_module_id: PYK
  R_PYK_R31: M_pep_c + M_pyk_R3_c -> M_pyk_R3_P_c; R_PYK_R31_kf_PYK_P*(M_pep_c*M_pyk_R3_c - M_pyk_R3_P_c/R_PYK_R31_Keq_PYK_P); R_PYK_R31 is "pyk_R3-pep binding";
    R_PYK_R31_Keq_PYK_P = 4.44444; R_PYK_R31_kf_PYK_P = 4000000;
  // SUBSYSTEM: Glycolysis
  // enzyme_module_id: PYK
  R_PYK_R32: M_adp_c + M_pyk_R3_c -> M_pyk_R3_A_c; R_PYK_R32_kf_PYK_A*(M_adp_c*M_pyk_R3_c - M_pyk_R3_A_c/R_PYK_R32_Keq_PYK_A); R_PYK_R32 is "pyk_R3-adp binding";
    R_PYK_R32_kf_PYK_A = 4000000; R_PYK_R32_Keq_PYK_A = 2.1097;
  // SUBSYSTEM: Glycolysis
  // enzyme_module_id: PYK
  R_PYK_R33: M_pep_c + M_pyk_R3_A_c -> M_pyk_R3_AP_c; R_PYK_R33_kf_PYK_P*(M_pep_c*M_pyk_R3_A_c - M_pyk_R3_AP_c/R_PYK_R33_Keq_PYK_P); R_PYK_R33 is "pyk_R3_A-pep binding";
    R_PYK_R33_Keq_PYK_P = 4.44444; R_PYK_R33_kf_PYK_P = 4000000;
  // SUBSYSTEM: Glycolysis
  // enzyme_module_id: PYK
  R_PYK_R34: M_adp_c + M_pyk_R3_P_c -> M_pyk_R3_AP_c; R_PYK_R34_kf_PYK_A*(M_adp_c*M_pyk_R3_P_c - M_pyk_R3_AP_c/R_PYK_R34_Keq_PYK_A); R_PYK_R34 is "pyk_R3_P-adp binding";
    R_PYK_R34_kf_PYK_A = 4000000; R_PYK_R34_Keq_PYK_A = 2.1097;
  // SUBSYSTEM: Glycolysis
  // enzyme_module_id: PYK
  R_PYK_R35: M_h_c + M_pyk_R3_AP_c => M_atp_c + M_pyk_R3_c + M_pyr_c; M_pyk_R3_AP_c*R_PYK_R35_kf_PYK; R_PYK_R35 is "pyk_R3_AP catalyzation";
    R_PYK_R35_kf_PYK = 21500;
  // SUBSYSTEM: Glycolysis
  // enzyme_module_id: PYK
  R_PYK_R40: M_fdp_c + M_pyk_R3_c -> M_pyk_R4_c; R_PYK_R40_kf_PYK_ACT*(M_fdp_c*M_pyk_R3_c - 4*M_pyk_R4_c/R_PYK_R40_Keq_PYK_ACT); R_PYK_R40 is "pyk_R3-fdp binding";
    R_PYK_R40_Keq_PYK_ACT = 200; R_PYK_R40_kf_PYK_ACT = 1000000;
  // SUBSYSTEM: Glycolysis
  // enzyme_module_id: PYK
  R_PYK_R41: M_pep_c + M_pyk_R4_c -> M_pyk_R4_P_c; R_PYK_R41_kf_PYK_P*(M_pep_c*M_pyk_R4_c - M_pyk_R4_P_c/R_PYK_R41_Keq_PYK_P); R_PYK_R41 is "pyk_R4-pep binding";
    R_PYK_R41_Keq_PYK_P = 4.44444; R_PYK_R41_kf_PYK_P = 4000000;
  // SUBSYSTEM: Glycolysis
  // enzyme_module_id: PYK
  R_PYK_R42: M_adp_c + M_pyk_R4_c -> M_pyk_R4_A_c; R_PYK_R42_kf_PYK_A*(M_adp_c*M_pyk_R4_c - M_pyk_R4_A_c/R_PYK_R42_Keq_PYK_A); R_PYK_R42 is "pyk_R4-adp binding";
    R_PYK_R42_kf_PYK_A = 4000000; R_PYK_R42_Keq_PYK_A = 2.1097;
  // SUBSYSTEM: Glycolysis
  // enzyme_module_id: PYK
  R_PYK_R43: M_pep_c + M_pyk_R4_A_c -> M_pyk_R4_AP_c; R_PYK_R43_kf_PYK_P*(M_pep_c*M_pyk_R4_A_c - M_pyk_R4_AP_c/R_PYK_R43_Keq_PYK_P); R_PYK_R43 is "pyk_R4_A-pep binding";
    R_PYK_R43_Keq_PYK_P = 4.44444; R_PYK_R43_kf_PYK_P = 4000000;
  // SUBSYSTEM: Glycolysis
  // enzyme_module_id: PYK
  R_PYK_R44: M_adp_c + M_pyk_R4_P_c -> M_pyk_R4_AP_c; R_PYK_R44_kf_PYK_A*(M_adp_c*M_pyk_R4_P_c - M_pyk_R4_AP_c/R_PYK_R44_Keq_PYK_A); R_PYK_R44 is "pyk_R4_P-adp binding";
    R_PYK_R44_kf_PYK_A = 4000000; R_PYK_R44_Keq_PYK_A = 2.1097;
  // SUBSYSTEM: Glycolysis
  // enzyme_module_id: PYK
  R_PYK_R45: M_h_c + M_pyk_R4_AP_c => M_atp_c + M_pyk_R4_c + M_pyr_c; M_pyk_R4_AP_c*R_PYK_R45_kf_PYK; R_PYK_R45 is "pyk_R4_AP catalyzation";
    R_PYK_R45_kf_PYK = 21500;
  // SUBSYSTEM: Glycolysis
  // enzyme_module_id: PYK
  R_PYK_L: M_pyk_R0_c -> M_pyk_T0_c; kf_R_PYK_L*(M_pyk_R0_c - M_pyk_T0_c/Keq_R_PYK_L); R_PYK_L is "pyk_R0-pyk_T0 transition";
    Keq_R_PYK_L = 19; kf_R_PYK_L = 1e12;
  // SUBSYSTEM: Glycolysis
  // enzyme_module_id: PYK
  R_PYK_T1: M_atp_c + M_pyk_T0_c -> M_pyk_T1_c; R_PYK_T1_kf_PYK_I*(4*M_atp_c*M_pyk_T0_c - M_pyk_T1_c/R_PYK_T1_Keq_PYK_I); R_PYK_T1 is "pyk_T0-atp binding";
    R_PYK_T1_Keq_PYK_I = 0.294985; R_PYK_T1_kf_PYK_I = 1000000;
  // SUBSYSTEM: Glycolysis
  // enzyme_module_id: PYK
  R_PYK_T2: M_atp_c + M_pyk_T1_c -> M_pyk_T2_c; R_PYK_T2_kf_PYK_I*(3*M_atp_c*M_pyk_T1_c - 2*M_pyk_T2_c/R_PYK_T2_Keq_PYK_I); R_PYK_T2 is "pyk_T1-atp binding";
    R_PYK_T2_Keq_PYK_I = 0.294985; R_PYK_T2_kf_PYK_I = 1000000;
  // SUBSYSTEM: Glycolysis
  // enzyme_module_id: PYK
  R_PYK_T3: M_atp_c + M_pyk_T2_c -> M_pyk_T3_c; R_PYK_T3_kf_PYK_I*(2*M_atp_c*M_pyk_T2_c - 3*M_pyk_T3_c/R_PYK_T3_Keq_PYK_I); R_PYK_T3 is "pyk_T2-atp binding";
    R_PYK_T3_Keq_PYK_I = 0.294985; R_PYK_T3_kf_PYK_I = 1000000;
  // SUBSYSTEM: Glycolysis
  // enzyme_module_id: PYK
  R_PYK_T4: M_atp_c + M_pyk_T3_c -> M_pyk_T4_c; R_PYK_T4_kf_PYK_I*(M_atp_c*M_pyk_T3_c - 4*M_pyk_T4_c/R_PYK_T4_Keq_PYK_I); R_PYK_T4 is "pyk_T3-atp binding";
    R_PYK_T4_Keq_PYK_I = 0.294985; R_PYK_T4_kf_PYK_I = 1000000;

  // Unit definitions:
  unit mM = 1e-3 mole / litre; mM is "Millimolar";
  unit hr = 3600 second; hr is "hour";
  unit mmol_per_gDW_per_hr = 1e-3 mole / (3600 second * gram); mmol_per_gDW_per_hr is "cobra flux unit";
end
