// SBML level 3 version 1

model Glu_Growth_Glycolysis_C0()
  // Haiman2020 Functional enzyme states in the E.coli glycolytic proteome metabolic model
  // Dynamic model utilizing mass action kinetics to compute the functional states of the E.coli glycolytic proteome, providing insight into distribution of catalytic activities of enzymes for different metabolic states. Glycolytic model is derived from the iML1515 E.coli constraint-based reconstruction and contains 17 enzyme modules (12 enzymes plus an additional isozyme for PFK, FBP, FBA, PGM, and PYK). Each enzyme module represents the microscopic steps of the enzymatic mechanism using mass action kinetics and the MASSef package for enzyme fitting (https://github.com/opencobra/MASSef). Two ensembles of 1000 models were parameterized without prior knowledge of enzyme concentrations using E.coli growth data from (DOI:https://doi.org/10.1016/j.cels.2015.09.008). One ensemble representing growth on a glucose carbon source and the other representing growth on a pyruvate carbon source, and the parameterized ensembles were simulated to steady state. The ensembles were used to elucidate thermodynamic shift in the metabolic state, and fractional abundances for individual enzyme states were calculated using the model, providing insight into how catalytic activity is distributed across isozymes. All models associated with the example are found in the GitHub repository at (https://github.com/SBRG/MASSpy-publication/case-study), including iPython notebooks to construct all model variations presented in the publication.
  // isDescribedBy doi:10.1371/journal.pcbi.1008208
  // hasProperty mamo:MAMO_0000046
  // biomodels.db:MODEL2012150003

  // Compartments:
  compartment c = 1;
  compartment b = 1; b is "boundary";

  // Species:
  // original_bigg_ids: ['f6p_c']
  species M_f6p_c in c = 0.002406053; M_f6p_c is "D-Fructose-6-phosphate";  // bigg.metabolite:f6p META:FRUCTOSE-6P CHEBI:16084 CHEBI:12352
  // original_bigg_ids: ['g6p_c']
  species M_g6p_c in c = 0.004859399; M_g6p_c is "D-Glucose-6-phosphate";  // bigg.metabolite:g6p META:D-glucopyranose-6-phosphate CHEBI:61548 CHEBI:14314
  // original_bigg_ids: ['adp_c']
  species M_adp_c in c = 0.001483511; M_adp_c is "Adenosine diphosphate";  // bigg.metabolite:adp META:ADP CHEBI:2342 CHEBI:16761
  // original_bigg_ids: ['atp_c']
  species M_atp_c in c = 0.02546572; M_atp_c is "Adenosine triphosphate";  // bigg.metabolite:atp META:ATP CHEBI:15422 CHEBI:10789
  // original_bigg_ids: ['fdp_c']
  species M_fdp_c in c = 0.03464125; M_fdp_c is "D-Fructose-1-6-bisphosphate";  // bigg.metabolite:fdp CHEBI:37736 CHEBI:49299 inchi_key:RNBGYGVWRKECFJ-VRPWFDPXSA-J
  // original_bigg_ids: ['h_c']
  species $M_h_c in c = 1; M_h_c is "H+";  // bigg.metabolite:h META:PROTON CHEBI:5584 CHEBI:13357
  // original_bigg_ids: ['h2o_c']
  species $M_h2o_c in c = 1; M_h2o_c is "H2O H2O";  // bigg.metabolite:h2o META:CPD-15815 META:OXONIUM META:HYDROXYL-GROUP
  // original_bigg_ids: ['pi_c']
  species M_pi_c in c = 0.001228223; M_pi_c is "Phosphate";  // bigg.metabolite:pi META:Pi META:CPD-16459 META:PHOSPHATE-GROUP
  // original_bigg_ids: ['dhap_c']
  species M_dhap_c in c = 0.01142698; M_dhap_c is "Dihydroxyacetone-phosphate";  // bigg.metabolite:dhap META:DIHYDROXY-ACETONE-PHOSPHATE CHEBI:14341 CHEBI:5454
  // original_bigg_ids: ['g3p_c']
  species M_g3p_c in c = 0.0002768696; M_g3p_c is "Glyceraldehyde 3-phosphate";  // bigg.metabolite:g3p META:GAP CHEBI:5446 CHEBI:14333
  // original_bigg_ids: ['13dpg_c']
  species M__13dpg_c in c = 0.0007530407; M__13dpg_c is "3-Phospho-D-glyceroyl-phosphate";  // bigg.metabolite:13dpg META:DPG CHEBI:57604 CHEBI:20189
  // original_bigg_ids: ['nad_c']
  species M_nad_c in c = 0.06494118; M_nad_c is "Nicotinamide-adenine-dinucleotide";  // bigg.metabolite:nad META:NAD CHEBI:7422 CHEBI:44215
  // original_bigg_ids: ['nadh_c']
  species M_nadh_c in c = 1.022738e-5; M_nadh_c is "Nicotinamide-adenine-dinucleotide-reduced";  // bigg.metabolite:nadh META:NADH CHEBI:13395 CHEBI:21902
  // original_bigg_ids: ['3pg_c']
  species M__3pg_c in c = 0.00898538; M__3pg_c is "D-Glycerate-3-phosphate";  // bigg.metabolite:3pg META:G3P CHEBI:11879 CHEBI:11880
  // original_bigg_ids: ['2pg_c']
  species M__2pg_c in c = 0.001085939; M__2pg_c is "D-Glycerate-2-phosphate";  // bigg.metabolite:2pg META:2-PG CHEBI:39868 CHEBI:21028
  // original_bigg_ids: ['pep_c']
  species M_pep_c in c = 0.0006135249; M_pep_c is "Phosphoenolpyruvate";  // bigg.metabolite:pep META:PHOSPHO-ENOL-PYRUVATE CHEBI:18021 CHEBI:44894
  // original_bigg_ids: ['pyr_c']
  species M_pyr_c in c = 0.000460718; M_pyr_c is "Pyruvate";  // bigg.metabolite:pyr META:PYRUVATE CHEBI:26462 CHEBI:26466
  // original_bigg_ids: ['amp_c']
  species M_amp_c in c = 0.02558424; M_amp_c is "Adenosine monophosphate";  // bigg.metabolite:amp META:AMP-GROUP META:AMP CHEBI:13736
  // original_bigg_ids: ['lac__D_c']
  species M_lac__D_c in c = 0.002960814; M_lac__D_c is "D-Lactate";  // bigg.metabolite:lac__D META:D-LACTATE CHEBI:16004 CHEBI:341
  // original_bigg_ids: ['gdp_c']
  species $M_gdp_c in c = 0.000874388; M_gdp_c is "Guanosine-5'-diphosphate";  // bigg.metabolite:gdp META:GDP CHEBI:5212 CHEBI:17552
  // enzyme_module_id: PGI
  species M_E_PGI_c in c = 6.324895e-7;
  // enzyme_module_id: PGI
  // bound_metabolites: 1 M_g6p_c
  species M_E_PGI_c_g6p in c = 5.662374e-6;
  // enzyme_module_id: PGI
  // bound_metabolites: 1 M_f6p_c
  species M_E_PGI_c_f6p in c = 1.288719e-5;
  // enzyme_module_id: PFK1
  species M_E_PFK1_c in c = 1.643743e-7;
  // enzyme_module_id: PFK1
  // bound_metabolites: 1 M_f6p_c
  species M_E_PFK1_c_f6p in c = 1.937338e-6;
  // enzyme_module_id: PFK1
  // bound_metabolites: 1 M_fdp_c
  species M_E_PFK1_c_fdp in c = 0.0270013;
  // enzyme_module_id: PFK1
  // bound_metabolites: 1 M_f6p_c; 1 M_atp_c
  species M_E_PFK1_c_f6p_atp in c = 1.23907e-10;
  // enzyme_module_id: PFK1
  // bound_metabolites: 1 M_fdp_c; 1 M_adp_c
  species M_E_PFK1_c_fdp_adp in c = 1.27579e-8;
  // enzyme_module_id: PFK1
  // bound_metabolites: 1 M_gdp_c
  species M_E_PFK1_c_gdp in c = 2.908255e-21;
  // enzyme_module_id: PFK1
  // bound_metabolites: 1 M_f6p_c; 1 M_gdp_c
  species M_E_PFK1_c_f6p_gdp in c = 5.999205e-25;
  // enzyme_module_id: PFK1
  // bound_metabolites: 1 M_fdp_c; 1 M_gdp_c
  species M_E_PFK1_c_fdp_gdp in c = 1.000726e-22;
  // enzyme_module_id: PFK1
  // bound_metabolites: 1 M_f6p_c; 1 M_atp_c; 1 M_gdp_c
  species M_E_PFK1_c_f6p_atp_gdp in c = 7.527969e-21;
  // enzyme_module_id: PFK1
  // bound_metabolites: 1 M_fdp_c; 1 M_adp_c; 1 M_gdp_c
  species M_E_PFK1_c_fdp_adp_gdp in c = 2.994646e-23;
  // enzyme_module_id: PFK1
  // bound_metabolites: 2 M_gdp_c
  species M_E_PFK1_c_gdp_gdp in c = 1.929577e-35;
  // enzyme_module_id: PFK1
  // bound_metabolites: 1 M_f6p_c; 2 M_gdp_c
  species M_E_PFK1_c_f6p_gdp_gdp in c = 4.674264e-38;
  // enzyme_module_id: PFK1
  // bound_metabolites: 1 M_fdp_c; 2 M_gdp_c
  species M_E_PFK1_c_fdp_gdp_gdp in c = 2.11064e-42;
  // enzyme_module_id: PFK1
  // bound_metabolites: 1 M_f6p_c; 1 M_atp_c; 2 M_gdp_c
  species M_E_PFK1_c_f6p_atp_gdp_gdp in c = 1.466616e-29;
  // enzyme_module_id: PFK1
  // bound_metabolites: 1 M_fdp_c; 1 M_adp_c; 2 M_gdp_c
  species M_E_PFK1_c_fdp_adp_gdp_gdp in c = 7.776147e-36;
  // enzyme_module_id: PFK1
  // bound_metabolites: 3 M_gdp_c
  species M_E_PFK1_c_gdp_gdp_gdp in c = 5.689961e-50;
  // enzyme_module_id: PFK1
  // bound_metabolites: 1 M_f6p_c; 3 M_gdp_c
  species M_E_PFK1_c_f6p_gdp_gdp_gdp in c = 1.170385e-49;
  // enzyme_module_id: PFK1
  // bound_metabolites: 1 M_fdp_c; 3 M_gdp_c
  species M_E_PFK1_c_fdp_gdp_gdp_gdp in c = 1.616724e-58;
  // enzyme_module_id: PFK1
  // bound_metabolites: 1 M_f6p_c; 1 M_atp_c; 3 M_gdp_c
  species M_E_PFK1_c_f6p_atp_gdp_gdp_gdp in c = 1.419148e-46;
  // enzyme_module_id: PFK1
  // bound_metabolites: 1 M_fdp_c; 1 M_adp_c; 3 M_gdp_c
  species M_E_PFK1_c_fdp_adp_gdp_gdp_gdp in c = 1.933346e-56;
  // enzyme_module_id: PFK1
  // bound_metabolites: 4 M_gdp_c
  species M_E_PFK1_c_gdp_gdp_gdp_gdp in c = 6.291986e-65;
  // enzyme_module_id: PFK1
  // bound_metabolites: 1 M_f6p_c; 4 M_gdp_c
  species M_E_PFK1_c_f6p_gdp_gdp_gdp_gdp in c = 3.029078e-67;
  // enzyme_module_id: PFK1
  // bound_metabolites: 1 M_fdp_c; 4 M_gdp_c
  species M_E_PFK1_c_fdp_gdp_gdp_gdp_gdp in c = 1.26331e-68;
  // enzyme_module_id: PFK1
  // bound_metabolites: 1 M_f6p_c; 1 M_atp_c; 4 M_gdp_c
  species M_E_PFK1_c_f6p_atp_gdp_gdp_gdp_gdp in c = 5.158177e-69;
  // enzyme_module_id: PFK1
  // bound_metabolites: 1 M_fdp_c; 1 M_adp_c; 4 M_gdp_c
  species M_E_PFK1_c_fdp_adp_gdp_gdp_gdp_gdp in c = 8.587115e-74;
  // enzyme_module_id: PFK1
  species M_E_PFK1_T_c in c = 4.109363e-14;
  // enzyme_module_id: PFK1
  // bound_metabolites: 1 M_pep_c
  species M_E_PFK1_T_c_pep in c = 1.344643e-13;
  // enzyme_module_id: PFK1
  // bound_metabolites: 2 M_pep_c
  species M_E_PFK1_T_c_pep_pep in c = 1.649949e-13;
  // enzyme_module_id: PFK1
  // bound_metabolites: 3 M_pep_c
  species M_E_PFK1_T_c_pep_pep_pep in c = 8.998119e-14;
  // enzyme_module_id: PFK1
  // bound_metabolites: 4 M_pep_c
  species M_E_PFK1_T_c_pep_pep_pep_pep in c = 1.840196e-14;
  // enzyme_module_id: PFK2
  species M_E_PFK2_c in c = 4.652205e-9;
  // enzyme_module_id: PFK2
  // bound_metabolites: 1 M_f6p_c
  species M_E_PFK2_c_f6p in c = 3.296567e-10;
  // enzyme_module_id: PFK2
  // bound_metabolites: 1 M_fdp_c
  species M_E_PFK2_c_fdp in c = 3.949395e-5;
  // enzyme_module_id: PFK2
  // bound_metabolites: 1 M_f6p_c; 1 M_atp_c
  species M_E_PFK2_c_f6p_atp in c = 1.371877e-13;
  // enzyme_module_id: PFK2
  // bound_metabolites: 1 M_fdp_c; 1 M_adp_c
  species M_E_PFK2_c_fdp_adp in c = 7.086993e-7;
  // enzyme_module_id: FBP1
  species M_E_FBP1_c in c = 7.801961e-10;
  // enzyme_module_id: FBP1
  // bound_metabolites: 1 M_fdp_c
  species M_E_FBP1_c_fdp in c = 5.730739e-10;
  // enzyme_module_id: FBP1
  // bound_metabolites: 1 M_f6p_c
  species M_E_FBP1_c_f6p in c = 1.745298e-6;
  // enzyme_module_id: FBP1
  // bound_metabolites: 1 M_f6p_c; 1 M_pi_c
  species M_E_FBP1_c_f6p_pi in c = 1.531807e-7;
  // enzyme_module_id: FBP2
  species M_E_FBP2_c in c = 8.586569e-5;
  // enzyme_module_id: FBP2
  // bound_metabolites: 1 M_fdp_c
  species M_E_FBP2_c_fdp in c = 6.145579e-10;
  // enzyme_module_id: FBP2
  // bound_metabolites: 1 M_f6p_c
  species M_E_FBP2_c_f6p in c = 1.589186e-7;
  // enzyme_module_id: FBP2
  // bound_metabolites: 1 M_f6p_c; 1 M_pi_c
  species M_E_FBP2_c_f6p_pi in c = 0.0003497163;
  // enzyme_module_id: FBA1
  species M_E_FBA1_c in c = 8.904909e-7;
  // enzyme_module_id: FBA1
  // bound_metabolites: 1 M_fdp_c
  species M_E_FBA1_c_fdp in c = 0.001637046;
  // enzyme_module_id: FBA1
  // bound_metabolites: 1 M_dhap_c
  species M_E_FBA1_c_dhap in c = 0.0004832825;
  // enzyme_module_id: FBA1
  // bound_metabolites: 1 M_dhap_c; 1 M_g3p_c
  species M_E_FBA1_c_dhap_g3p in c = 9.571689e-7;
  // enzyme_module_id: FBA2
  species M_E_FBA2_c in c = 6.580281e-8;
  // enzyme_module_id: FBA2
  // bound_metabolites: 1 M_fdp_c
  species M_E_FBA2_c_fdp in c = 5.469955e-8;
  // enzyme_module_id: FBA2
  // bound_metabolites: 1 M_dhap_c
  species M_E_FBA2_c_dhap in c = 0.0191691;
  // enzyme_module_id: FBA2
  // bound_metabolites: 1 M_dhap_c; 1 M_g3p_c
  species M_E_FBA2_c_dhap_g3p in c = 2.930314e-12;
  // enzyme_module_id: TPI
  species M_E_TPI_c in c = 2.941244e-8;
  // enzyme_module_id: TPI
  // bound_metabolites: 1 M_dhap_c
  species M_E_TPI_c_dhap in c = 1.015868e-5;
  // enzyme_module_id: TPI
  // bound_metabolites: 1 M_g3p_c
  species M_E_TPI_c_g3p in c = 1.600767e-5;
  // enzyme_module_id: GAPD
  species M_E_GAPD_c in c = 2.782053e-7;
  // enzyme_module_id: GAPD
  // bound_metabolites: 1 M_nad_c
  species M_E_GAPD_c_nad in c = 0.04668338;
  // enzyme_module_id: GAPD
  // bound_metabolites: 1 M_nadh_c
  species M_E_GAPD_c_nadh in c = 1.990236e-6;
  // enzyme_module_id: GAPD
  // bound_metabolites: 1 M_nad_c; 1 M_g3p_c
  species M_E_GAPD_c_nad_g3p in c = 1.627526e-6;
  // enzyme_module_id: GAPD
  // bound_metabolites: 1 M_nadh_c; 1 M__13dpg_c
  species M_E_GAPD_c_nadh_13dpg in c = 1.750124e-9;
  // enzyme_module_id: GAPD
  // bound_metabolites: 1 M_nad_c; 1 M_g3p_c; 1 M_pi_c
  species M_E_GAPD_c_nad_g3p_pi in c = 1.646388e-6;
  // enzyme_module_id: PGK
  species M_E_PGK_c in c = 4.141999e-7;
  // enzyme_module_id: PGK
  // bound_metabolites: 1 M_adp_c
  species M_E_PGK_c_adp in c = 3.507451e-9;
  // enzyme_module_id: PGK
  // bound_metabolites: 1 M__13dpg_c
  species M_E_PGK_c_13dpg in c = 4.323161e-14;
  // enzyme_module_id: PGK
  // bound_metabolites: 1 M_atp_c
  species M_E_PGK_c_atp in c = 6.722343e-7;
  // enzyme_module_id: PGK
  // bound_metabolites: 1 M__3pg_c
  species M_E_PGK_c_3pg in c = 3.340713e-7;
  // enzyme_module_id: PGK
  // bound_metabolites: 1 M__13dpg_c; 1 M_adp_c
  species M_E_PGK_c_13dpg_adp in c = 6.195164e-8;
  // enzyme_module_id: PGK
  // bound_metabolites: 1 M__3pg_c; 1 M_atp_c
  species M_E_PGK_c_3pg_atp in c = 2.433427e-6;
  // enzyme_module_id: PGMi
  species M_E_PGMi_c in c = 1.01264e-6;
  // enzyme_module_id: PGMi
  // bound_metabolites: 1 M__3pg_c
  species M_E_PGMi_c_3pg in c = 4.245529e-5;
  // enzyme_module_id: PGMi
  // bound_metabolites: 1 M__2pg_c
  species M_E_PGMi_c_2pg in c = 8.371832e-6;
  // enzyme_module_id: PGMd
  species M_E_PGMd_c in c = 2.485887e-8;
  // enzyme_module_id: PGMd
  // bound_metabolites: 1 M__3pg_c
  species M_E_PGMd_c_3pg in c = 7.410637e-7;
  // enzyme_module_id: PGMd
  // bound_metabolites: 1 M__2pg_c
  species M_E_PGMd_c_2pg in c = 2.84645e-7;
  // enzyme_module_id: ENO
  species M_E_ENO_c in c = 2.025831e-7;
  // enzyme_module_id: ENO
  // bound_metabolites: 1 M__2pg_c
  species M_E_ENO_c_2pg in c = 1.699011e-6;
  // enzyme_module_id: ENO
  // bound_metabolites: 1 M_pep_c
  species M_E_ENO_c_pep in c = 5.498387e-6;
  // enzyme_module_id: PYK1
  species M_E_PYK1_c in c = 4.985638e-8;
  // enzyme_module_id: PYK1
  // bound_metabolites: 1 M_adp_c
  species M_E_PYK1_c_adp in c = 1.392442e-7;
  // enzyme_module_id: PYK1
  // bound_metabolites: 1 M_atp_c
  species M_E_PYK1_c_atp in c = 0.002318033;
  // enzyme_module_id: PYK1
  // bound_metabolites: 1 M_pep_c; 1 M_adp_c
  species M_E_PYK1_c_pep_adp in c = 8.912814e-14;
  // enzyme_module_id: PYK1
  // bound_metabolites: 1 M_pyr_c; 1 M_atp_c
  species M_E_PYK1_c_pyr_atp in c = 4.050318e-6;
  // enzyme_module_id: PYK2
  species M_E_PYK2_c in c = 3.491369e-6;
  // enzyme_module_id: PYK2
  // bound_metabolites: 1 M_adp_c
  species M_E_PYK2_c_adp in c = 4.02166e-5;
  // enzyme_module_id: PYK2
  // bound_metabolites: 1 M_atp_c
  species M_E_PYK2_c_atp in c = 3.230232e-6;
  // enzyme_module_id: PYK2
  // bound_metabolites: 1 M_pep_c; 1 M_adp_c
  species M_E_PYK2_c_pep_adp in c = 1.55845e-12;
  // enzyme_module_id: PYK2
  // bound_metabolites: 1 M_pyr_c; 1 M_atp_c
  species M_E_PYK2_c_pyr_atp in c = 6.138084e-8;
  // enzyme_module_id: PPS
  species M_E_PPS_c in c = 8.370873e-8;
  // enzyme_module_id: PPS
  // bound_metabolites: 1 M_pyr_c
  species M_E_PPS_c_pyr in c = 2.587209e-9;
  // enzyme_module_id: PPS
  // bound_metabolites: 1 M_pep_c
  species M_E_PPS_c_pep in c = 3.623049e-7;
  // enzyme_module_id: PPS
  // bound_metabolites: 1 M_pyr_c; 1 M_atp_c
  species M_E_PPS_c_pyr_atp in c = 6.087085e-7;
  // enzyme_module_id: PPS
  // bound_metabolites: 1 M_pep_c; 1 M_amp_c
  species M_E_PPS_c_pep_amp in c = 0.001206501;
  // enzyme_module_id: PPS
  // bound_metabolites: 1 M_pep_c; 1 M_amp_c; 1 M_pi_c
  species M_E_PPS_c_pep_amp_pi in c = 1.123994e-8;
  // enzyme_module_id: LDH_D
  species M_E_LDH_D_c in c = 4.929717e-8;
  // enzyme_module_id: LDH_D
  // bound_metabolites: 1 M_lac__D_c
  species M_E_LDH_D_c_lac__D in c = 3.985123e-12;
  // enzyme_module_id: LDH_D
  // bound_metabolites: 1 M_pyr_c
  species M_E_LDH_D_c_pyr in c = 1.658675e-11;
  // enzyme_module_id: LDH_D
  // bound_metabolites: 1 M_lac__D_c; 1 M_nad_c
  species M_E_LDH_D_c_lac__D_nad in c = 9.574828e-9;
  // enzyme_module_id: LDH_D
  // bound_metabolites: 1 M_nadh_c; 1 M_pyr_c
  species M_E_LDH_D_c_nadh_pyr in c = 6.734369e-12;

  // Parameters:
  cobra_default_lb = -1000;
  cobra_default_ub = 1000;
  cobra_0_bound = 0;
  minus_inf = -INF;
  plus_inf = INF;
  v_R_SK_f6p_c = 1.55495;
  v_R_SK_g6p_c = 0.440749;
  v_R_SK_adp_c = 1.311016;
  v_R_SK_atp_c = 1.262741;
  v_R_SK_h_c = 0;
  v_R_SK_h2o_c = 0;
  v_R_SK_pi_c = 1.780823;
  v_R_SK_dhap_c = -1.854038e-5;
  v_R_SK_g3p_c = -0.1415189;
  v_R_SK_nad_c = 2.086881;
  v_R_SK_nadh_c = 2.086881;
  v_R_SK__3pg_c = -0.1245889;
  v_R_SK_pep_c = 1.66361;
  v_R_SK_pyr_c = 0.54786;
  v_R_SK_amp_c = 0.04827524;
  v_R_SK_lac__D_c = 1.587471e-5;
  v_R_PGI1 = -0.440749;
  v_R_PGI2 = -0.440749;
  v_R_PGI3 = -0.440749;
  v_R_PFK11 = 0.9912796;
  v_R_PFK12 = 0.9912796;
  v_R_PFK13 = 0.9912796;
  v_R_PFK14 = 0.9912796;
  v_R_PFK15 = 0.9912796;
  v_R_PFK11_84 = 2.320044e-26;
  v_R_PFK12_84 = 1.550964e-25;
  v_R_PFK13_84 = 1.47124e-23;
  v_R_PFK14_84 = 1.079981e-25;
  v_R_PFK15_84 = 1.314566e-25;
  v_R_PFK11_85 = -2.755065e-40;
  v_R_PFK12_85 = 2.831154e-38;
  v_R_PFK13_85 = -2.755738e-40;
  v_R_PFK14_85 = 2.831154e-38;
  v_R_PFK15_85 = 2.831152e-38;
  v_R_PFK11_86 = 1.141679e-50;
  v_R_PFK12_86 = 1.141679e-50;
  v_R_PFK13_86 = 1.141675e-50;
  v_R_PFK14_86 = 1.141679e-50;
  v_R_PFK15_86 = 1.141679e-50;
  v_R_PFK11_87 = 1.851901e-65;
  v_R_PFK12_87 = 1.851926e-65;
  v_R_PFK13_87 = 1.851926e-65;
  v_R_PFK14_87 = 1.851926e-65;
  v_R_PFK15_87 = 1.851926e-65;
  v_R_PFK1_Activation_gdp_88 = -8.481832e-26;
  v_R_PFK1_Activation_gdp_89 = -2.858954e-38;
  v_R_PFK1_Activation_gdp_90 = 4.078315e-56;
  v_R_PFK1_Activation_gdp_91 = -1.086681e-70;
  v_R_PFK1_Inhibition_pep_92 = -1.620111e-23;
  v_R_PFK1_Inhibition_pep_93 = -1.607832e-23;
  v_R_PFK1_Inhibition_pep_94 = -1.59103e-23;
  v_R_PFK1_Inhibition_pep_95 = -1.574874e-23;
  v_R_PFK1_TransitionStep = 0;
  v_R_PFK21 = 0.3806886;
  v_R_PFK22 = 0.3806886;
  v_R_PFK23 = 0.3806886;
  v_R_PFK24 = 0.3806886;
  v_R_PFK25 = 0.3806886;
  v_R_FBP11 = 0.1742109;
  v_R_FBP12 = 0.1742109;
  v_R_FBP13 = 0.1742109;
  v_R_FBP14 = 0.1742109;
  v_R_FBP21 = 0.08355615;
  v_R_FBP22 = 0.08355615;
  v_R_FBP23 = 0.08355615;
  v_R_FBP24 = 0.08355615;
  v_R_FBA11 = 0.9820662;
  v_R_FBA12 = 0.9820662;
  v_R_FBA13 = 0.9820662;
  v_R_FBA14 = 0.9820662;
  v_R_FBA21 = 0.132135;
  v_R_FBA22 = 0.132135;
  v_R_FBA23 = 0.132135;
  v_R_FBA24 = 0.132135;
  v_R_TPI1 = 1.114183;
  v_R_TPI2 = 1.114183;
  v_R_TPI3 = 1.114183;
  v_R_GAPD1 = 2.086865;
  v_R_GAPD2 = 2.086865;
  v_R_GAPD3 = 2.086865;
  v_R_GAPD4 = 2.086865;
  v_R_GAPD5 = 2.086865;
  v_R_GAPD6 = 2.086865;
  v_R_PGK1 = 2.086865;
  v_R_PGK2 = 7.917712e-9;
  v_R_PGK3 = 6.345469e-8;
  v_R_PGK4 = 2.086865;
  v_R_PGK5 = 2.086865;
  v_R_PGK6 = 7.917712e-9;
  v_R_PGK7 = 6.345469e-8;
  v_R_PGK8 = 2.086865;
  v_R_PGK9 = 2.086865;
  v_R_PGMi1 = 1.61946;
  v_R_PGMi2 = 1.61946;
  v_R_PGMi3 = 1.61946;
  v_R_PGMd1 = 0.591994;
  v_R_PGMd2 = 0.591994;
  v_R_PGMd3 = 0.591994;
  v_R_ENO1 = 2.211454;
  v_R_ENO2 = 2.211454;
  v_R_ENO3 = 2.211454;
  v_R_PYK11 = 0.3051703;
  v_R_PYK12 = 0.3051703;
  v_R_PYK13 = 0.3051703;
  v_R_PYK14 = 0.3051703;
  v_R_PYK15 = 0.3051703;
  v_R_PYK21 = 0.2909491;
  v_R_PYK22 = 0.2909491;
  v_R_PYK23 = 0.2909491;
  v_R_PYK24 = 0.2909491;
  v_R_PYK25 = 0.2909491;
  v_R_PPS1 = 0.04827524;
  v_R_PPS2 = 0.04827524;
  v_R_PPS3 = 0.04827524;
  v_R_PPS4 = 0.04827524;
  v_R_PPS5 = 0.04827524;
  v_R_PPS6 = 0.04827524;
  v_R_LDH_D1 = 1.587471e-5;
  v_R_LDH_D2 = 1.587471e-5;
  v_R_LDH_D3 = 1.587471e-5;
  v_R_LDH_D4 = 1.587471e-5;
  v_R_LDH_D5 = 1.587471e-5;

  // Reactions:
  R_SK_f6p_c: -> M_f6p_c; kf_R_SK_f6p_c*(f6p_b - M_f6p_c/Keq_R_SK_f6p_c); R_SK_f6p_c is "D-Fructose-6-phosphate sink";
    kf_R_SK_f6p_c = 737.4381; Keq_R_SK_f6p_c = 1; f6p_b = 0.004514637;
  R_SK_g6p_c: M_g6p_c -> ; kf_R_SK_g6p_c*(M_g6p_c - g6p_b/Keq_R_SK_g6p_c); R_SK_g6p_c is "D-Glucose-6-phosphate sink";
    Keq_R_SK_g6p_c = 1; g6p_b = 0.003486212; kf_R_SK_g6p_c = 320.9679;
  R_SK_adp_c: -> M_adp_c; kf_R_SK_adp_c*(adp_b - M_adp_c/Keq_R_SK_adp_c); R_SK_adp_c is "Adenosine diphosphate sink";
    adp_b = 0.002439607; kf_R_SK_adp_c = 1371.218; Keq_R_SK_adp_c = 1;
  R_SK_atp_c: M_atp_c -> ; kf_R_SK_atp_c*(M_atp_c - atp_b/Keq_R_SK_atp_c); R_SK_atp_c is "Adenosine triphosphate sink";
    Keq_R_SK_atp_c = 1; atp_b = 0.01836735; kf_R_SK_atp_c = 177.8918;
  R_SK_h_c: $M_h_c -> ; kf_R_SK_h_c*(M_h_c - h_b/Keq_R_SK_h_c); R_SK_h_c is "H+ sink";
    Keq_R_SK_h_c = 1; kf_R_SK_h_c = 6.650038; h_b = 1;
  R_SK_h2o_c: $M_h2o_c -> ; kf_R_SK_h2o_c*(M_h2o_c - h2o_b/Keq_R_SK_h2o_c); R_SK_h2o_c is "H2O H2O sink";
    kf_R_SK_h2o_c = 4.259965; h2o_b = 1; Keq_R_SK_h2o_c = 1;
  R_SK_pi_c: -> M_pi_c; kf_R_SK_pi_c*(pi_b - M_pi_c/Keq_R_SK_pi_c); R_SK_pi_c is "Phosphate sink";
    Keq_R_SK_pi_c = 1; kf_R_SK_pi_c = 2312.358; pi_b = 0.001998356;
  R_SK_dhap_c: -> M_dhap_c; kf_R_SK_dhap_c*(dhap_b - M_dhap_c/Keq_R_SK_dhap_c); R_SK_dhap_c is "Dihydroxyacetone-phosphate sink";
    dhap_b = 0.00868148; kf_R_SK_dhap_c = 0.006753009; Keq_R_SK_dhap_c = 1;
  R_SK_g3p_c: -> M_g3p_c; kf_R_SK_g3p_c*(g3p_b - M_g3p_c/Keq_R_SK_g3p_c); R_SK_g3p_c is "Glyceraldehyde 3-phosphate sink";
    g3p_b = 0.000215708; kf_R_SK_g3p_c = 2313.854; Keq_R_SK_g3p_c = 1;
  R_SK_nad_c: -> M_nad_c; kf_R_SK_nad_c*(nad_b - M_nad_c/Keq_R_SK_nad_c); R_SK_nad_c is "Nicotinamide-adenine-dinucleotide sink";
    kf_R_SK_nad_c = 43.62325; nad_b = 0.1127799; Keq_R_SK_nad_c = 1;
  R_SK_nadh_c: M_nadh_c -> ; kf_R_SK_nadh_c*(M_nadh_c - nadh_b/Keq_R_SK_nadh_c); R_SK_nadh_c is "Nicotinamide-adenine-dinucleotide-reduced sink";
    Keq_R_SK_nadh_c = 1; nadh_b = 7.18125e-6; kf_R_SK_nadh_c = 685093.4;
  R_SK__3pg_c: M__3pg_c -> ; kf_R_SK__3pg_c*(M__3pg_c - _3pg_b/Keq_R_SK__3pg_c); R_SK__3pg_c is "D-Glycerate-3-phosphate sink";
    _3pg_b = 0.0137217; kf_R_SK__3pg_c = 26.30502; Keq_R_SK__3pg_c = 1;
  R_SK_pep_c: M_pep_c -> ; kf_R_SK_pep_c*(M_pep_c - pep_b/Keq_R_SK_pep_c); R_SK_pep_c is "Phosphoenolpyruvate sink";
    kf_R_SK_pep_c = 8872.474; Keq_R_SK_pep_c = 1; pep_b = 0.0004260225;
  R_SK_pyr_c: M_pyr_c -> ; kf_R_SK_pyr_c*(M_pyr_c - pyr_b/Keq_R_SK_pyr_c); R_SK_pyr_c is "Pyruvate sink";
    pyr_b = 0.0002704882; kf_R_SK_pyr_c = 2879.99; Keq_R_SK_pyr_c = 1;
  R_SK_amp_c: M_amp_c -> ; kf_R_SK_amp_c*(M_amp_c - amp_b/Keq_R_SK_amp_c); R_SK_amp_c is "Adenosine monophosphate sink";
    Keq_R_SK_amp_c = 1; kf_R_SK_amp_c = 4.929076; amp_b = 0.01579027;
  R_SK_lac__D_c: -> M_lac__D_c; kf_R_SK_lac__D_c*(lac__D_b - M_lac__D_c/Keq_R_SK_lac__D_c); R_SK_lac__D_c is "D-Lactate sink";
    lac__D_b = 0.00463379; Keq_R_SK_lac__D_c = 1; kf_R_SK_lac__D_c = 0.009488904;
  // enzyme_module_id: PGI
  R_PGI1: M_E_PGI_c + M_g6p_c -> M_E_PGI_c_g6p; M_E_PGI_c*M_g6p_c*kf_R_PGI1 - M_E_PGI_c_g6p*kr_R_PGI1;
    kr_R_PGI1 = 7.120335e7; kf_R_PGI1 = 1.310352e11;
  // enzyme_module_id: PGI
  R_PGI2: M_E_PGI_c_f6p -> M_E_PGI_c + M_f6p_c; -(M_E_PGI_c*M_f6p_c*kr_R_PGI2) + M_E_PGI_c_f6p*kf_R_PGI2;
    kr_R_PGI2 = 5.215683e10; kf_R_PGI2 = 6124818;
  // enzyme_module_id: PGI
  R_PGI3: M_E_PGI_c_g6p -> M_E_PGI_c_f6p; -(M_E_PGI_c_f6p*kr_R_PGI3) + M_E_PGI_c_g6p*kf_R_PGI3;
    kr_R_PGI3 = 92167.2; kf_R_PGI3 = 131928.2;
  // enzyme_module_id: PFK1
  R_PFK11: M_E_PFK1_c + M_f6p_c -> M_E_PFK1_c_f6p; M_E_PFK1_c*M_f6p_c*kf_R_PFK11 - M_E_PFK1_c_f6p*kr_R_PFK11;
    kf_R_PFK11 = 2.507492e9; kr_R_PFK11 = 215.2286;
  // enzyme_module_id: PFK1
  R_PFK12: M_E_PFK1_c_fdp -> M_E_PFK1_c + M_fdp_c; -(M_E_PFK1_c*M_fdp_c*kr_R_PFK12) + M_E_PFK1_c_fdp*kf_R_PFK12;
    kr_R_PFK12 = 3.590733e12; kf_R_PFK12 = 757263.4;
  // enzyme_module_id: PFK1
  R_PFK13: M_atp_c + M_E_PFK1_c_f6p -> M_E_PFK1_c_f6p_atp; M_E_PFK1_c_f6p*M_atp_c*kf_R_PFK13 - M_E_PFK1_c_f6p_atp*kr_R_PFK13;
    kf_R_PFK13 = 7.545614e9; kr_R_PFK13 = 2.996417e12;
  // enzyme_module_id: PFK1
  R_PFK14: M_E_PFK1_c_fdp_adp -> M_adp_c + M_E_PFK1_c_fdp; -(M_E_PFK1_c_fdp*M_adp_c*kr_R_PFK14) + M_E_PFK1_c_fdp_adp*kf_R_PFK14;
    kr_R_PFK14 = 7.85498e8; kf_R_PFK14 = 2.466353e12;
  // enzyme_module_id: PFK1
  R_PFK15: M_E_PFK1_c_f6p_atp -> M_E_PFK1_c_fdp_adp; M_E_PFK1_c_f6p_atp*kf_R_PFK15 - M_E_PFK1_c_fdp_adp*kr_R_PFK15;
    kr_R_PFK15 = 3.487103e10; kf_R_PFK15 = 3.598443e12;
  // enzyme_module_id: PFK1
  R_PFK11_84: M_E_PFK1_c_gdp + M_f6p_c -> M_E_PFK1_c_f6p_gdp; -(M_E_PFK1_c_f6p_gdp*kr_R_PFK11_84) + M_E_PFK1_c_gdp*M_f6p_c*kf_R_PFK11_84;
    kr_R_PFK11_84 = 0.003600001; kf_R_PFK11_84 = 0.003624218;
  // enzyme_module_id: PFK1
  R_PFK12_84: M_E_PFK1_c_fdp_gdp -> M_E_PFK1_c_gdp + M_fdp_c; M_E_PFK1_c_fdp_gdp*kf_R_PFK12_84 - M_E_PFK1_c_gdp*M_fdp_c*kr_R_PFK12_84;
    kf_R_PFK12_84 = 3.599999e12; kr_R_PFK12_84 = 3.575951e12;
  // enzyme_module_id: PFK1
  R_PFK13_84: M_atp_c + M_E_PFK1_c_f6p_gdp -> M_E_PFK1_c_f6p_atp_gdp; -(M_E_PFK1_c_f6p_atp_gdp*kr_R_PFK13_84) + M_E_PFK1_c_f6p_gdp*M_atp_c*kf_R_PFK13_84;
    kf_R_PFK13_84 = 3.599999e12; kr_R_PFK13_84 = 7305906;
  // enzyme_module_id: PFK1
  R_PFK14_84: M_E_PFK1_c_fdp_adp_gdp -> M_adp_c + M_E_PFK1_c_fdp_gdp; M_E_PFK1_c_fdp_adp_gdp*kf_R_PFK14_84 - M_E_PFK1_c_fdp_gdp*M_adp_c*kr_R_PFK14_84;
    kf_R_PFK14_84 = 0.003624218; kr_R_PFK14_84 = 0.003600001;
  // enzyme_module_id: PFK1
  R_PFK15_84: M_E_PFK1_c_f6p_atp_gdp -> M_E_PFK1_c_fdp_adp_gdp; M_E_PFK1_c_f6p_atp_gdp*kf_R_PFK15_84 - M_E_PFK1_c_fdp_adp_gdp*kr_R_PFK15_84;
    kf_R_PFK15_84 = 316558.2; kr_R_PFK15_84 = 7.957669e7;
  // enzyme_module_id: PFK1
  R_PFK11_85: M_E_PFK1_c_gdp_gdp + M_f6p_c -> M_E_PFK1_c_f6p_gdp_gdp; -(M_E_PFK1_c_f6p_gdp_gdp*kr_R_PFK11_85) + M_E_PFK1_c_gdp_gdp*M_f6p_c*kf_R_PFK11_85;
    kr_R_PFK11_85 = 3.575661e12; kf_R_PFK11_85 = 3.599998e12;
  // enzyme_module_id: PFK1
  R_PFK12_85: M_E_PFK1_c_fdp_gdp_gdp -> M_E_PFK1_c_gdp_gdp + M_fdp_c; M_E_PFK1_c_fdp_gdp_gdp*kf_R_PFK12_85 - M_E_PFK1_c_gdp_gdp*M_fdp_c*kr_R_PFK12_85;
    kr_R_PFK12_85 = 71088.98; kf_R_PFK12_85 = 2.251355e10;
  // enzyme_module_id: PFK1
  R_PFK13_85: M_atp_c + M_E_PFK1_c_f6p_gdp_gdp -> M_E_PFK1_c_f6p_atp_gdp_gdp; -(M_E_PFK1_c_f6p_atp_gdp_gdp*kr_R_PFK13_85) + M_E_PFK1_c_f6p_gdp_gdp*M_atp_c*kf_R_PFK13_85;
    kr_R_PFK13_85 = 0.003600002; kf_R_PFK13_85 = 4.435577e7;
  // enzyme_module_id: PFK1
  R_PFK14_85: M_E_PFK1_c_fdp_adp_gdp_gdp -> M_adp_c + M_E_PFK1_c_fdp_gdp_gdp; M_E_PFK1_c_fdp_adp_gdp_gdp*kf_R_PFK14_85 - M_E_PFK1_c_fdp_gdp_gdp*M_adp_c*kr_R_PFK14_85;
    kf_R_PFK14_85 = 0.003642346; kr_R_PFK14_85 = 3793.448;
  // enzyme_module_id: PFK1
  R_PFK15_85: M_E_PFK1_c_f6p_atp_gdp_gdp -> M_E_PFK1_c_fdp_adp_gdp_gdp; M_E_PFK1_c_f6p_atp_gdp_gdp*kf_R_PFK15_85 - M_E_PFK1_c_fdp_adp_gdp_gdp*kr_R_PFK15_85;
    kf_R_PFK15_85 = 11.54232; kr_R_PFK15_85 = 2.176934e7;
  // enzyme_module_id: PFK1
  R_PFK11_86: M_E_PFK1_c_gdp_gdp_gdp + M_f6p_c -> M_E_PFK1_c_f6p_gdp_gdp_gdp; -(M_E_PFK1_c_f6p_gdp_gdp_gdp*kr_R_PFK11_86) + M_E_PFK1_c_gdp_gdp_gdp*M_f6p_c*kf_R_PFK11_86;
    kr_R_PFK11_86 = 2676754; kf_R_PFK11_86 = 2.288353e9;
  // enzyme_module_id: PFK1
  R_PFK12_86: M_E_PFK1_c_fdp_gdp_gdp_gdp -> M_E_PFK1_c_gdp_gdp_gdp + M_fdp_c; M_E_PFK1_c_fdp_gdp_gdp_gdp*kf_R_PFK12_86 - M_E_PFK1_c_gdp_gdp_gdp*M_fdp_c*kr_R_PFK12_86;
    kr_R_PFK12_86 = 0.003600001; kf_R_PFK12_86 = 7.066072e7;
  // enzyme_module_id: PFK1
  R_PFK13_86: M_atp_c + M_E_PFK1_c_f6p_gdp_gdp_gdp -> M_E_PFK1_c_f6p_atp_gdp_gdp_gdp; -(M_E_PFK1_c_f6p_atp_gdp_gdp_gdp*kr_R_PFK13_86) + M_E_PFK1_c_f6p_gdp_gdp_gdp*M_atp_c*kf_R_PFK13_86;
    kf_R_PFK13_86 = 1.428309e11; kr_R_PFK13_86 = 2999711;
  // enzyme_module_id: PFK1
  R_PFK14_86: M_E_PFK1_c_fdp_adp_gdp_gdp_gdp -> M_adp_c + M_E_PFK1_c_fdp_gdp_gdp_gdp; M_E_PFK1_c_fdp_adp_gdp_gdp_gdp*kf_R_PFK14_86 - M_E_PFK1_c_fdp_gdp_gdp_gdp*M_adp_c*kr_R_PFK14_86;
    kr_R_PFK14_86 = 9.907008e10; kf_R_PFK14_86 = 1819542;
  // enzyme_module_id: PFK1
  R_PFK15_86: M_E_PFK1_c_f6p_atp_gdp_gdp_gdp -> M_E_PFK1_c_fdp_adp_gdp_gdp_gdp; M_E_PFK1_c_f6p_atp_gdp_gdp_gdp*kf_R_PFK15_86 - M_E_PFK1_c_fdp_adp_gdp_gdp_gdp*kr_R_PFK15_86;
    kr_R_PFK15_86 = 1.308889e9; kf_R_PFK15_86 = 0.1783942;
  // enzyme_module_id: PFK1
  R_PFK11_87: M_E_PFK1_c_gdp_gdp_gdp_gdp + M_f6p_c -> M_E_PFK1_c_f6p_gdp_gdp_gdp_gdp; -(M_E_PFK1_c_f6p_gdp_gdp_gdp_gdp*kr_R_PFK11_87) + M_E_PFK1_c_gdp_gdp_gdp_gdp*M_f6p_c*kf_R_PFK11_87;
    kr_R_PFK11_87 = 1.792795e12; kf_R_PFK11_87 = 3.587138e12;
  // enzyme_module_id: PFK1
  R_PFK12_87: M_E_PFK1_c_fdp_gdp_gdp_gdp_gdp -> M_E_PFK1_c_gdp_gdp_gdp_gdp + M_fdp_c; M_E_PFK1_c_fdp_gdp_gdp_gdp_gdp*kf_R_PFK12_87 - M_E_PFK1_c_gdp_gdp_gdp_gdp*M_fdp_c*kr_R_PFK12_87;
    kf_R_PFK12_87 = 1466.555; kr_R_PFK12_87 = 0.003612912;
  // enzyme_module_id: PFK1
  R_PFK13_87: M_atp_c + M_E_PFK1_c_f6p_gdp_gdp_gdp_gdp -> M_E_PFK1_c_f6p_atp_gdp_gdp_gdp_gdp; -(M_E_PFK1_c_f6p_atp_gdp_gdp_gdp_gdp*kr_R_PFK13_87) + M_E_PFK1_c_f6p_gdp_gdp_gdp_gdp*M_atp_c*kf_R_PFK13_87;
    kr_R_PFK13_87 = 1.118144e9; kf_R_PFK13_87 = 7.477026e8;
  // enzyme_module_id: PFK1
  R_PFK14_87: M_E_PFK1_c_fdp_adp_gdp_gdp_gdp_gdp -> M_adp_c + M_E_PFK1_c_fdp_gdp_gdp_gdp_gdp; M_E_PFK1_c_fdp_adp_gdp_gdp_gdp_gdp*kf_R_PFK14_87 - M_E_PFK1_c_fdp_gdp_gdp_gdp_gdp*M_adp_c*kr_R_PFK14_87;
    kf_R_PFK14_87 = 3.042102e11; kr_R_PFK14_87 = 1.392876e9;
  // enzyme_module_id: PFK1
  R_PFK15_87: M_E_PFK1_c_f6p_atp_gdp_gdp_gdp_gdp -> M_E_PFK1_c_fdp_adp_gdp_gdp_gdp_gdp; M_E_PFK1_c_f6p_atp_gdp_gdp_gdp_gdp*kf_R_PFK15_87 - M_E_PFK1_c_fdp_adp_gdp_gdp_gdp_gdp*kr_R_PFK15_87;
    kf_R_PFK15_87 = 283876.5; kr_R_PFK15_87 = 1.683646e10;
  // enzyme_module_id: PFK1
  R_PFK1_Activation_gdp_88: M_E_PFK1_c + $M_gdp_c -> M_E_PFK1_c_gdp; 4*M_E_PFK1_c*M_gdp_c*R_PFK1_Activation_gdp_88_kf_PFK1_Activation_gdp - M_E_PFK1_c_gdp*R_PFK1_Activation_gdp_88_kr_PFK1_Activation_gdp;
    R_PFK1_Activation_gdp_88_kf_PFK1_Activation_gdp = 0.0036; R_PFK1_Activation_gdp_88_kr_PFK1_Activation_gdp = 7.11653e8;
  // enzyme_module_id: PFK1
  R_PFK1_Activation_gdp_89: M_E_PFK1_c_gdp + $M_gdp_c -> M_E_PFK1_c_gdp_gdp; 3*M_E_PFK1_c_gdp*M_gdp_c*R_PFK1_Activation_gdp_89_kf_PFK1_Activation_gdp - 2*M_E_PFK1_c_gdp_gdp*R_PFK1_Activation_gdp_89_kr_PFK1_Activation_gdp;
    R_PFK1_Activation_gdp_89_kf_PFK1_Activation_gdp = 0.0036; R_PFK1_Activation_gdp_89_kr_PFK1_Activation_gdp = 7.11653e8;
  // enzyme_module_id: PFK1
  R_PFK1_Activation_gdp_90: M_E_PFK1_c_gdp_gdp + $M_gdp_c -> M_E_PFK1_c_gdp_gdp_gdp; 2*M_E_PFK1_c_gdp_gdp*M_gdp_c*R_PFK1_Activation_gdp_90_kf_PFK1_Activation_gdp - 3*M_E_PFK1_c_gdp_gdp_gdp*R_PFK1_Activation_gdp_90_kr_PFK1_Activation_gdp;
    R_PFK1_Activation_gdp_90_kf_PFK1_Activation_gdp = 0.0036; R_PFK1_Activation_gdp_90_kr_PFK1_Activation_gdp = 7.11653e8;
  // enzyme_module_id: PFK1
  R_PFK1_Activation_gdp_91: M_E_PFK1_c_gdp_gdp_gdp + $M_gdp_c -> M_E_PFK1_c_gdp_gdp_gdp_gdp; M_E_PFK1_c_gdp_gdp_gdp*M_gdp_c*R_PFK1_Activation_gdp_91_kf_PFK1_Activation_gdp - 4*M_E_PFK1_c_gdp_gdp_gdp_gdp*R_PFK1_Activation_gdp_91_kr_PFK1_Activation_gdp;
    R_PFK1_Activation_gdp_91_kf_PFK1_Activation_gdp = 0.0036; R_PFK1_Activation_gdp_91_kr_PFK1_Activation_gdp = 7.11653e8;
  // enzyme_module_id: PFK1
  R_PFK1_Inhibition_pep_92: M_E_PFK1_T_c + M_pep_c -> M_E_PFK1_T_c_pep; 4*M_E_PFK1_T_c*M_pep_c*R_PFK1_Inhibition_pep_92_kf_PFK1_Inhibition_pep - M_E_PFK1_T_c_pep*R_PFK1_Inhibition_pep_92_kr_PFK1_Inhibition_pep;
    R_PFK1_Inhibition_pep_92_kf_PFK1_Inhibition_pep = 549448; R_PFK1_Inhibition_pep_92_kr_PFK1_Inhibition_pep = 412.0846;
  // enzyme_module_id: PFK1
  R_PFK1_Inhibition_pep_93: M_E_PFK1_T_c_pep + M_pep_c -> M_E_PFK1_T_c_pep_pep; 3*M_E_PFK1_T_c_pep*M_pep_c*R_PFK1_Inhibition_pep_93_kf_PFK1_Inhibition_pep - 2*M_E_PFK1_T_c_pep_pep*R_PFK1_Inhibition_pep_93_kr_PFK1_Inhibition_pep;
    R_PFK1_Inhibition_pep_93_kf_PFK1_Inhibition_pep = 549448; R_PFK1_Inhibition_pep_93_kr_PFK1_Inhibition_pep = 412.0846;
  // enzyme_module_id: PFK1
  R_PFK1_Inhibition_pep_94: M_E_PFK1_T_c_pep_pep + M_pep_c -> M_E_PFK1_T_c_pep_pep_pep; 2*M_E_PFK1_T_c_pep_pep*M_pep_c*R_PFK1_Inhibition_pep_94_kf_PFK1_Inhibition_pep - 3*M_E_PFK1_T_c_pep_pep_pep*R_PFK1_Inhibition_pep_94_kr_PFK1_Inhibition_pep;
    R_PFK1_Inhibition_pep_94_kf_PFK1_Inhibition_pep = 549448; R_PFK1_Inhibition_pep_94_kr_PFK1_Inhibition_pep = 412.0846;
  // enzyme_module_id: PFK1
  R_PFK1_Inhibition_pep_95: M_E_PFK1_T_c_pep_pep_pep + M_pep_c -> M_E_PFK1_T_c_pep_pep_pep_pep; M_E_PFK1_T_c_pep_pep_pep*M_pep_c*R_PFK1_Inhibition_pep_95_kf_PFK1_Inhibition_pep - 4*M_E_PFK1_T_c_pep_pep_pep_pep*R_PFK1_Inhibition_pep_95_kr_PFK1_Inhibition_pep;
    R_PFK1_Inhibition_pep_95_kf_PFK1_Inhibition_pep = 549448; R_PFK1_Inhibition_pep_95_kr_PFK1_Inhibition_pep = 412.0846;
  // enzyme_module_id: PFK1
  R_PFK1_TransitionStep: M_E_PFK1_c -> M_E_PFK1_T_c; -(M_E_PFK1_T_c*kr_R_PFK1_TransitionStep) + M_E_PFK1_c*kf_R_PFK1_TransitionStep;
    kr_R_PFK1_TransitionStep = 3.599997e12; kf_R_PFK1_TransitionStep = 900000.4;
  // enzyme_module_id: PFK2
  R_PFK21: M_E_PFK2_c + M_f6p_c -> M_E_PFK2_c_f6p; M_E_PFK2_c*M_f6p_c*kf_R_PFK21 - M_E_PFK2_c_f6p*kr_R_PFK21;
    kr_R_PFK21 = 6.527352e8; kf_R_PFK21 = 5.323355e10;
  // enzyme_module_id: PFK2
  R_PFK22: M_E_PFK2_c_fdp -> M_E_PFK2_c + M_fdp_c; -(M_E_PFK2_c*M_fdp_c*kr_R_PFK22) + M_E_PFK2_c_fdp*kf_R_PFK22;
    kr_R_PFK22 = 3.599994e12; kf_R_PFK22 = 1.46997e7;
  // enzyme_module_id: PFK2
  R_PFK23: M_atp_c + M_E_PFK2_c_f6p -> M_E_PFK2_c_f6p_atp; M_E_PFK2_c_f6p*M_atp_c*kf_R_PFK23 - M_E_PFK2_c_f6p_atp*kr_R_PFK23;
    kr_R_PFK23 = 3.596437e12; kf_R_PFK23 = 1.041193e11;
  // enzyme_module_id: PFK2
  R_PFK24: M_E_PFK2_c_fdp_adp -> M_adp_c + M_E_PFK2_c_fdp; -(M_E_PFK2_c_fdp*M_adp_c*kr_R_PFK24) + M_E_PFK2_c_fdp_adp*kf_R_PFK24;
    kr_R_PFK24 = 58894.08; kf_R_PFK24 = 542034.1;
  // enzyme_module_id: PFK2
  R_PFK25: M_E_PFK2_c_f6p_atp -> M_E_PFK2_c_fdp_adp; M_E_PFK2_c_f6p_atp*kf_R_PFK25 - M_E_PFK2_c_fdp_adp*kr_R_PFK25;
    kf_R_PFK25 = 3.6e12; kr_R_PFK25 = 159711.1;
  // enzyme_module_id: FBP1
  R_FBP11: M_E_FBP1_c + M_fdp_c -> M_E_FBP1_c_fdp; M_E_FBP1_c*M_fdp_c*kf_R_FBP11 - M_E_FBP1_c_fdp*kr_R_FBP11;
    kr_R_FBP11 = 1.681818e11; kf_R_FBP11 = 3.572536e12;
  // enzyme_module_id: FBP1
  R_FBP12: M_E_FBP1_c_f6p -> M_E_FBP1_c + M_f6p_c; -(M_E_FBP1_c*M_f6p_c*kr_R_FBP12) + M_E_FBP1_c_f6p*kf_R_FBP12;
    kr_R_FBP12 = 3.446847e7; kf_R_FBP12 = 99854.38;
  // enzyme_module_id: FBP1
  R_FBP13: M_E_FBP1_c_fdp -> M_E_FBP1_c_f6p_pi; -(M_E_FBP1_c_f6p_pi*kr_R_FBP13) + M_E_FBP1_c_fdp*kf_R_FBP13;
    kr_R_FBP13 = 6344.208; kf_R_FBP13 = 3.056895e8;
  // enzyme_module_id: FBP1
  R_FBP14: M_E_FBP1_c_f6p_pi -> M_E_FBP1_c_f6p + M_pi_c; -(M_E_FBP1_c_f6p*M_pi_c*kr_R_FBP14) + M_E_FBP1_c_f6p_pi*kf_R_FBP14;
    kf_R_FBP14 = 8.304124e9; kr_R_FBP14 = 5.933235e11;
  // enzyme_module_id: FBP2
  R_FBP21: M_E_FBP2_c + M_fdp_c -> M_E_FBP2_c_fdp; M_E_FBP2_c*M_fdp_c*kf_R_FBP21 - M_E_FBP2_c_fdp*kr_R_FBP21;
    kf_R_FBP21 = 79102.24; kr_R_FBP21 = 2.468978e8;
  // enzyme_module_id: FBP2
  R_FBP22: M_E_FBP2_c_f6p -> M_E_FBP2_c + M_f6p_c; -(M_E_FBP2_c*M_f6p_c*kr_R_FBP22) + M_E_FBP2_c_f6p*kf_R_FBP22;
    kr_R_FBP22 = 5238.89; kf_R_FBP22 = 532590.3;
  // enzyme_module_id: FBP2
  R_FBP23: M_E_FBP2_c_fdp -> M_E_FBP2_c_f6p_pi; -(M_E_FBP2_c_f6p_pi*kr_R_FBP23) + M_E_FBP2_c_fdp*kf_R_FBP23;
    kf_R_FBP23 = 1.359954e8; kr_R_FBP23 = 0.05973201;
  // enzyme_module_id: FBP2
  R_FBP24: M_E_FBP2_c_f6p_pi -> M_E_FBP2_c_f6p + M_pi_c; -(M_E_FBP2_c_f6p*M_pi_c*kr_R_FBP24) + M_E_FBP2_c_f6p_pi*kf_R_FBP24;
    kf_R_FBP24 = 88849.8; kr_R_FBP24 = 1.587636e11;
  // enzyme_module_id: FBA1
  R_FBA11: M_E_FBA1_c + M_fdp_c -> M_E_FBA1_c_fdp; M_E_FBA1_c*M_fdp_c*kf_R_FBA11 - M_E_FBA1_c_fdp*kr_R_FBA11;
    kf_R_FBA11 = 7.629942e8; kr_R_FBA11 = 13777.6;
  // enzyme_module_id: FBA1
  R_FBA12: M_E_FBA1_c_dhap -> M_dhap_c + M_E_FBA1_c; -(M_E_FBA1_c*M_dhap_c*kr_R_FBA12) + M_E_FBA1_c_dhap*kf_R_FBA12;
    kf_R_FBA12 = 7.543828e7; kr_R_FBA12 = 3.582781e12;
  // enzyme_module_id: FBA1
  R_FBA13: M_E_FBA1_c_fdp -> M_E_FBA1_c_dhap_g3p; -(M_E_FBA1_c_dhap_g3p*kr_R_FBA13) + M_E_FBA1_c_fdp*kf_R_FBA13;
    kr_R_FBA13 = 1638019; kf_R_FBA13 = 1557.639;
  // enzyme_module_id: FBA1
  R_FBA14: M_E_FBA1_c_dhap_g3p -> M_E_FBA1_c_dhap + M_g3p_c; -(M_E_FBA1_c_dhap*M_g3p_c*kr_R_FBA14) + M_E_FBA1_c_dhap_g3p*kf_R_FBA14;
    kf_R_FBA14 = 3.288697e7; kr_R_FBA14 = 2.27914e8;
  // enzyme_module_id: FBA2
  R_FBA21: M_E_FBA2_c + M_fdp_c -> M_E_FBA2_c_fdp; M_E_FBA2_c*M_fdp_c*kf_R_FBA21 - M_E_FBA2_c_fdp*kr_R_FBA21;
    kf_R_FBA21 = 2.855744e12; kr_R_FBA21 = 1.190049e11;
  // enzyme_module_id: FBA2
  R_FBA22: M_E_FBA2_c_dhap -> M_dhap_c + M_E_FBA2_c; -(M_E_FBA2_c*M_dhap_c*kr_R_FBA22) + M_E_FBA2_c_dhap*kf_R_FBA22;
    kf_R_FBA22 = 33035.58; kr_R_FBA22 = 8.420095e11;
  // enzyme_module_id: FBA2
  R_FBA23: M_E_FBA2_c_fdp -> M_E_FBA2_c_dhap_g3p; -(M_E_FBA2_c_dhap_g3p*kr_R_FBA23) + M_E_FBA2_c_fdp*kf_R_FBA23;
    kf_R_FBA23 = 8550862; kr_R_FBA23 = 1.145247e11;
  // enzyme_module_id: FBA2
  R_FBA24: M_E_FBA2_c_dhap_g3p -> M_E_FBA2_c_dhap + M_g3p_c; -(M_E_FBA2_c_dhap*M_g3p_c*kr_R_FBA24) + M_E_FBA2_c_dhap_g3p*kf_R_FBA24;
    kf_R_FBA24 = 2.207636e11; kr_R_FBA24 = 96992.41;
  // enzyme_module_id: TPI
  R_TPI1: M_E_TPI_c + M_dhap_c -> M_E_TPI_c_dhap; M_E_TPI_c*M_dhap_c*kf_R_TPI1 - M_E_TPI_c_dhap*kr_R_TPI1;
    kf_R_TPI1 = 3.599999e12; kr_R_TPI1 = 1.189947e8;
  // enzyme_module_id: TPI
  R_TPI2: M_E_TPI_c_g3p -> M_E_TPI_c + M_g3p_c; -(M_E_TPI_c*M_g3p_c*kr_R_TPI2) + M_E_TPI_c_g3p*kf_R_TPI2;
    kr_R_TPI2 = 4.149744e10; kf_R_TPI2 = 90713.62;
  // enzyme_module_id: TPI
  R_TPI3: M_E_TPI_c_dhap -> M_E_TPI_c_g3p; M_E_TPI_c_dhap*kf_R_TPI3 - M_E_TPI_c_g3p*kr_R_TPI3;
    kf_R_TPI3 = 3.564767e12; kr_R_TPI3 = 2.262248e12;
  // enzyme_module_id: GAPD
  R_GAPD1: M_E_GAPD_c + M_nad_c -> M_E_GAPD_c_nad; M_E_GAPD_c*M_nad_c*kf_R_GAPD1 - M_E_GAPD_c_nad*kr_R_GAPD1;
    kr_R_GAPD1 = 89432.93; kf_R_GAPD1 = 2.312017e11;
  // enzyme_module_id: GAPD
  R_GAPD2: M_E_GAPD_c_nadh -> M_E_GAPD_c + M_nadh_c; -(M_E_GAPD_c*M_nadh_c*kr_R_GAPD2) + M_E_GAPD_c_nadh*kf_R_GAPD2;
    kr_R_GAPD2 = 2.504033e12; kf_R_GAPD2 = 4628403;
  // enzyme_module_id: GAPD
  R_GAPD3: M_E_GAPD_c_nad + M_g3p_c -> M_E_GAPD_c_nad_g3p; M_E_GAPD_c_nad*M_g3p_c*kf_R_GAPD3 - M_E_GAPD_c_nad_g3p*kr_R_GAPD3;
    kr_R_GAPD3 = 3.599998e12; kf_R_GAPD3 = 4.533075e11;
  // enzyme_module_id: GAPD
  R_GAPD4: M_E_GAPD_c_nadh_13dpg -> M__13dpg_c + M_E_GAPD_c_nadh; -(M_E_GAPD_c_nadh*M__13dpg_c*kr_R_GAPD4) + M_E_GAPD_c_nadh_13dpg*kf_R_GAPD4;
    kf_R_GAPD4 = 2.187406e12; kr_R_GAPD4 = 2.552926e12;
  // enzyme_module_id: GAPD
  R_GAPD5: M_E_GAPD_c_nad_g3p + M_pi_c -> M_E_GAPD_c_nad_g3p_pi; M_E_GAPD_c_nad_g3p*M_pi_c*kf_R_GAPD5 - M_E_GAPD_c_nad_g3p_pi*kr_R_GAPD5;
    kf_R_GAPD5 = 3.599998e12; kr_R_GAPD5 = 4.369676e9;
  // enzyme_module_id: GAPD
  R_GAPD6: M_E_GAPD_c_nad_g3p_pi -> M_E_GAPD_c_nadh_13dpg; M_E_GAPD_c_nad_g3p_pi*kf_R_GAPD6 - M_E_GAPD_c_nadh_13dpg*kr_R_GAPD6;
    kf_R_GAPD6 = 2.53843e9; kr_R_GAPD6 = 2.386776e12;
  // enzyme_module_id: PGK
  R_PGK1: M_E_PGK_c + M_adp_c -> M_E_PGK_c_adp; M_E_PGK_c*M_adp_c*kf_R_PGK1 - M_E_PGK_c_adp*kr_R_PGK1;
    kf_R_PGK1 = 1.004549e11; kr_R_PGK1 = 1.70037e10;
  // enzyme_module_id: PGK
  R_PGK2: M__13dpg_c + M_E_PGK_c -> M_E_PGK_c_13dpg; M_E_PGK_c*M__13dpg_c*kf_R_PGK2 - M_E_PGK_c_13dpg*kr_R_PGK2;
    kf_R_PGK2 = 2929976; kr_R_PGK2 = 2.113914e10;
  // enzyme_module_id: PGK
  R_PGK3: M_E_PGK_c_atp -> M_atp_c + M_E_PGK_c; -(M_E_PGK_c*M_atp_c*kr_R_PGK3) + M_E_PGK_c_atp*kf_R_PGK3;
    kr_R_PGK3 = 557.3738; kf_R_PGK3 = 8.840037;
  // enzyme_module_id: PGK
  R_PGK4: M_E_PGK_c_3pg -> M__3pg_c + M_E_PGK_c; -(M_E_PGK_c*M__3pg_c*kr_R_PGK4) + M_E_PGK_c_3pg*kf_R_PGK4;
    kr_R_PGK4 = 5.237659e10; kf_R_PGK4 = 5.897516e8;
  // enzyme_module_id: PGK
  R_PGK5: M__13dpg_c + M_E_PGK_c_adp -> M_E_PGK_c_13dpg_adp; -(M_E_PGK_c_13dpg_adp*kr_R_PGK5) + M_E_PGK_c_adp*M__13dpg_c*kf_R_PGK5;
    kr_R_PGK5 = 4.592081e7; kf_R_PGK5 = 1.867195e12;
  // enzyme_module_id: PGK
  R_PGK6: M_adp_c + M_E_PGK_c_13dpg -> M_E_PGK_c_13dpg_adp; M_E_PGK_c_13dpg*M_adp_c*kf_R_PGK6 - M_E_PGK_c_13dpg_adp*kr_R_PGK6;
    kr_R_PGK6 = 0.1609266; kf_R_PGK6 = 2.789039e8;
  // enzyme_module_id: PGK
  R_PGK7: M_E_PGK_c_3pg_atp -> M__3pg_c + M_E_PGK_c_atp; M_E_PGK_c_3pg_atp*kf_R_PGK7 - M_E_PGK_c_atp*M__3pg_c*kr_R_PGK7;
    kf_R_PGK7 = 10424.92; kr_R_PGK7 = 4199840;
  // enzyme_module_id: PGK
  R_PGK8: M_E_PGK_c_3pg_atp -> M_atp_c + M_E_PGK_c_3pg; -(M_E_PGK_c_3pg*M_atp_c*kr_R_PGK8) + M_E_PGK_c_3pg_atp*kf_R_PGK8;
    kf_R_PGK8 = 1.25866e10; kr_R_PGK8 = 3.599998e12;
  // enzyme_module_id: PGK
  R_PGK9: M_E_PGK_c_13dpg_adp -> M_E_PGK_c_3pg_atp; M_E_PGK_c_13dpg_adp*kf_R_PGK9 - M_E_PGK_c_3pg_atp*kr_R_PGK9;
    kr_R_PGK9 = 208405.2; kf_R_PGK9 = 4.187143e7;
  // enzyme_module_id: PGMi
  R_PGMi1: M_E_PGMi_c + M__3pg_c -> M_E_PGMi_c_3pg; M_E_PGMi_c*M__3pg_c*kf_R_PGMi1 - M_E_PGMi_c_3pg*kr_R_PGMi1;
    kf_R_PGMi1 = 7.702356e8; kr_R_PGMi1 = 126930.7;
  // enzyme_module_id: PGMi
  R_PGMi2: M_E_PGMi_c_2pg -> M__2pg_c + M_E_PGMi_c; -(M_E_PGMi_c*M__2pg_c*kr_R_PGMi2) + M_E_PGMi_c_2pg*kf_R_PGMi2;
    kf_R_PGMi2 = 5.845594e7; kr_R_PGMi2 = 4.435567e11;
  // enzyme_module_id: PGMi
  R_PGMi3: M_E_PGMi_c_3pg -> M_E_PGMi_c_2pg; -(M_E_PGMi_c_2pg*kr_R_PGMi3) + M_E_PGMi_c_3pg*kf_R_PGMi3;
    kr_R_PGMi3 = 454315.1; kf_R_PGMi3 = 127732.3;
  // enzyme_module_id: PGMd
  R_PGMd1: M_E_PGMd_c + M__3pg_c -> M_E_PGMd_c_3pg; M_E_PGMd_c*M__3pg_c*kf_R_PGMd1 - M_E_PGMd_c_3pg*kr_R_PGMd1;
    kr_R_PGMd1 = 8524115; kf_R_PGMd1 = 3.093082e10;
  // enzyme_module_id: PGMd
  R_PGMd2: M_E_PGMd_c_2pg -> M__2pg_c + M_E_PGMd_c; -(M_E_PGMd_c*M__2pg_c*kr_R_PGMd2) + M_E_PGMd_c_2pg*kf_R_PGMd2;
    kf_R_PGMd2 = 1.653623e8; kr_R_PGMd2 = 1.721696e12;
  // enzyme_module_id: PGMd
  R_PGMd3: M_E_PGMd_c_3pg -> M_E_PGMd_c_2pg; -(M_E_PGMd_c_2pg*kr_R_PGMd3) + M_E_PGMd_c_3pg*kf_R_PGMd3;
    kr_R_PGMd3 = 2866387; kf_R_PGMd3 = 1899832;
  // enzyme_module_id: ENO
  R_ENO1: M_E_ENO_c + M__2pg_c -> M_E_ENO_c_2pg; M_E_ENO_c*M__2pg_c*kf_R_ENO1 - M_E_ENO_c_2pg*kr_R_ENO1;
    kr_R_ENO1 = 2.354742e8; kf_R_ENO1 = 1.828627e12;
  // enzyme_module_id: ENO
  R_ENO2: M_E_ENO_c_pep -> M_E_ENO_c + M_pep_c; -(M_E_ENO_c*M_pep_c*kr_R_ENO2) + M_E_ENO_c_pep*kf_R_ENO2;
    kf_R_ENO2 = 4946055; kr_R_ENO2 = 2.010131e11;
  // enzyme_module_id: ENO
  R_ENO3: M_E_ENO_c_2pg -> M_E_ENO_c_pep; M_E_ENO_c_2pg*kf_R_ENO3 - M_E_ENO_c_pep*kr_R_ENO3;
    kr_R_ENO3 = 54403.62; kf_R_ENO3 = 1477675;
  // enzyme_module_id: PYK1
  R_PYK11: M_E_PYK1_c + M_adp_c -> M_E_PYK1_c_adp; M_E_PYK1_c*M_adp_c*kf_R_PYK11 - M_E_PYK1_c_adp*kr_R_PYK11;
    kf_R_PYK11 = 5.09853e9; kr_R_PYK11 = 516572.5;
  // enzyme_module_id: PYK1
  R_PYK12: M_E_PYK1_c_atp -> M_atp_c + M_E_PYK1_c; -(M_E_PYK1_c*M_atp_c*kr_R_PYK12) + M_E_PYK1_c_atp*kf_R_PYK12;
    kr_R_PYK12 = 3.253938e12; kf_R_PYK12 = 1782372;
  // enzyme_module_id: PYK1
  R_PYK13: M_E_PYK1_c_adp + M_pep_c -> M_E_PYK1_c_pep_adp; M_E_PYK1_c_adp*M_pep_c*kf_R_PYK13 - M_E_PYK1_c_pep_adp*kr_R_PYK13;
    kf_R_PYK13 = 6.66698e9; kr_R_PYK13 = 2.966384e12;
  // enzyme_module_id: PYK1
  R_PYK14: M_E_PYK1_c_pyr_atp -> M_E_PYK1_c_atp + M_pyr_c; -(M_E_PYK1_c_atp*M_pyr_c*kr_R_PYK14) + M_E_PYK1_c_pyr_atp*kf_R_PYK14;
    kf_R_PYK14 = 8.579757e11; kr_R_PYK14 = 3.253938e12;
  // enzyme_module_id: PYK1
  R_PYK15: M_E_PYK1_c_pep_adp -> M_E_PYK1_c_pyr_atp; M_E_PYK1_c_pep_adp*kf_R_PYK15 - M_E_PYK1_c_pyr_atp*kr_R_PYK15;
    kr_R_PYK15 = 501.9483; kf_R_PYK15 = 3.44676e12;
  // enzyme_module_id: PYK2
  R_PYK21: M_E_PYK2_c + M_adp_c -> M_E_PYK2_c_adp; M_E_PYK2_c*M_adp_c*kf_R_PYK21 - M_E_PYK2_c_adp*kr_R_PYK21;
    kr_R_PYK21 = 67923.04; kf_R_PYK21 = 5.835683e8;
  // enzyme_module_id: PYK2
  R_PYK22: M_E_PYK2_c_atp -> M_atp_c + M_E_PYK2_c; -(M_E_PYK2_c*M_atp_c*kr_R_PYK22) + M_E_PYK2_c_atp*kf_R_PYK22;
    kr_R_PYK22 = 784400.6; kf_R_PYK22 = 111660.8;
  // enzyme_module_id: PYK2
  R_PYK23: M_E_PYK2_c_adp + M_pep_c -> M_E_PYK2_c_pep_adp; M_E_PYK2_c_adp*M_pep_c*kf_R_PYK23 - M_E_PYK2_c_pep_adp*kr_R_PYK23;
    kf_R_PYK23 = 1.690651e8; kr_R_PYK23 = 2.490001e12;
  // enzyme_module_id: PYK2
  R_PYK24: M_E_PYK2_c_pyr_atp -> M_E_PYK2_c_atp + M_pyr_c; -(M_E_PYK2_c_atp*M_pyr_c*kr_R_PYK24) + M_E_PYK2_c_pyr_atp*kf_R_PYK24;
    kr_R_PYK24 = 2184707; kf_R_PYK24 = 4793034;
  // enzyme_module_id: PYK2
  R_PYK25: M_E_PYK2_c_pep_adp -> M_E_PYK2_c_pyr_atp; M_E_PYK2_c_pep_adp*kf_R_PYK25 - M_E_PYK2_c_pyr_atp*kr_R_PYK25;
    kf_R_PYK25 = 2.770545e11; kr_R_PYK25 = 2294309;
  // enzyme_module_id: PPS
  R_PPS1: M_E_PPS_c + M_pyr_c -> M_E_PPS_c_pyr; M_E_PPS_c*M_pyr_c*kf_R_PPS1 - M_E_PPS_c_pyr*kr_R_PPS1;
    kf_R_PPS1 = 1.302625e9; kr_R_PPS1 = 758325.9;
  // enzyme_module_id: PPS
  R_PPS2: M_E_PPS_c_pep -> M_E_PPS_c + M_pep_c; -(M_E_PPS_c*M_pep_c*kr_R_PPS2) + M_E_PPS_c_pep*kf_R_PPS2;
    kr_R_PPS2 = 2.069836e7; kf_R_PPS2 = 136178.8;
  // enzyme_module_id: PPS
  R_PPS3: M_atp_c + M_E_PPS_c_pyr -> M_E_PPS_c_pyr_atp; M_E_PPS_c_pyr*M_atp_c*kf_R_PPS3 - M_E_PPS_c_pyr_atp*kr_R_PPS3;
    kf_R_PPS3 = 1.508352e10; kr_R_PPS3 = 1553296;
  // enzyme_module_id: PPS
  R_PPS4: M_E_PPS_c_pep_amp -> M_amp_c + M_E_PPS_c_pep; -(M_E_PPS_c_pep*M_amp_c*kr_R_PPS4) + M_E_PPS_c_pep_amp*kf_R_PPS4;
    kr_R_PPS4 = 3.587879e12; kf_R_PPS4 = 2.756498e7;
  // enzyme_module_id: PPS
  R_PPS5: M_E_PPS_c_pyr_atp -> M_E_PPS_c_pep_amp_pi; -(M_E_PPS_c_pep_amp_pi*kr_R_PPS5) + M_E_PPS_c_pyr_atp*kf_R_PPS5;
    kr_R_PPS5 = 2.466564e7; kf_R_PPS5 = 534764.1;
  // enzyme_module_id: PPS
  R_PPS6: M_E_PPS_c_pep_amp_pi -> M_E_PPS_c_pep_amp + M_pi_c; -(M_E_PPS_c_pep_amp*M_pi_c*kr_R_PPS6) + M_E_PPS_c_pep_amp_pi*kf_R_PPS6;
    kf_R_PPS6 = 2.705663e12; kr_R_PPS6 = 2.052258e10;
  // enzyme_module_id: LDH_D
  R_LDH_D1: M_E_LDH_D_c + M_lac__D_c -> M_E_LDH_D_c_lac__D; M_E_LDH_D_c*M_lac__D_c*kf_R_LDH_D1 - M_E_LDH_D_c_lac__D*kr_R_LDH_D1;
    kf_R_LDH_D1 = 429758.3; kr_R_LDH_D1 = 1.17569e7;
  // enzyme_module_id: LDH_D
  R_LDH_D2: M_E_LDH_D_c_pyr -> M_E_LDH_D_c + M_pyr_c; -(M_E_LDH_D_c*M_pyr_c*kr_R_LDH_D2) + M_E_LDH_D_c_pyr*kf_R_LDH_D2;
    kr_R_LDH_D2 = 4.511497e8; kf_R_LDH_D2 = 6.187126e8;
  // enzyme_module_id: LDH_D
  R_LDH_D3: M_E_LDH_D_c_lac__D + M_nad_c -> M_E_LDH_D_c_lac__D_nad; M_E_LDH_D_c_lac__D*M_nad_c*kf_R_LDH_D3 - M_E_LDH_D_c_lac__D_nad*kr_R_LDH_D3;
    kr_R_LDH_D3 = 9019902; kf_R_LDH_D3 = 3.337726e11;
  // enzyme_module_id: LDH_D
  R_LDH_D4: M_E_LDH_D_c_nadh_pyr -> M_E_LDH_D_c_pyr + M_nadh_c; M_E_LDH_D_c_nadh_pyr*kf_R_LDH_D4 - M_E_LDH_D_c_pyr*M_nadh_c*kr_R_LDH_D4;
    kf_R_LDH_D4 = 5886360; kr_R_LDH_D4 = 1.400989e11;
  // enzyme_module_id: LDH_D
  R_LDH_D5: M_E_LDH_D_c_lac__D_nad -> M_E_LDH_D_c_nadh_pyr; M_E_LDH_D_c_lac__D_nad*kf_R_LDH_D5 - M_E_LDH_D_c_nadh_pyr*kr_R_LDH_D5;
    kr_R_LDH_D5 = 1.060797e7; kf_R_LDH_D5 = 9118.985;
end
