// SBML level 3 version 1

model Glycolysis_Hb_PYK()
  // Haiman2020 - Pyruvate Kinase Regulatory Model of Erythrocyte Glycolysis
  // Dynamic model utilizing mass action kinetics to elucidate network-level effects of allosteric regulation in erythrocyte metabolism. The pyruvate kinase regulatory model includes the glycolytic pathway, the Rapaport Leubering (R.L.) Shunt, hemoglobin-oxygen binding, and elementary reaction steps to represent the enzymatic mechanisms for Pyruvate Kinase (PYK). To demonstrate the sampling and ensemble handling capabilities of MASSpy, an eensemble modeling approach is utilized to assess the dynamics of pyruvate kinase regulation. For the ensemble modeling feature demonstration, a range of parameter sets are generated through Markov-chain Monte Carlo (MCMC) sampling to represent the biological variability across the ensemble of models. Transient dynamic behavior and model steady states are studied through dynamic simulation and analysis. All models associated with the ensemble-modeling example are found in the GitHub repository at (https://github.com/SBRG/MASSpy-publication), including iPython notebooks to construct all model variations presented in the publication.
  // isDescribedBy doi:10.1371/journal.pcbi.1008208
  // hasProperty mamo:MAMO_0000046
  // biomodels.db:MODEL2012150002

  // Compartments:
  compartment c = 1; c is "Cytosol";
  compartment b = 1; b is "boundary";

  // Species:
  species M_glc__D_c in c = 1.240819; M_glc__D_c is "D-Glucose";
  species M_g6p_c in c = 0.06021853; M_g6p_c is "D-Glucose 6-phosphate";
  species M_f6p_c in c = 0.0245636; M_f6p_c is "D-Fructose 6-phosphate";
  species M_fdp_c in c = 0.009237988; M_fdp_c is "D-Fructose 1,6-bisphosphate";
  species M_dhap_c in c = 0.1301209; M_dhap_c is "Dihydroxyacetone phosphate";
  species M_g3p_c in c = 0.005572625; M_g3p_c is "Glyceraldehyde 3-phosphate";
  species M__13dpg_c in c = 0.000240879; M__13dpg_c is "3-Phospho-D-glyceroyl phosphate";
  species M__3pg_c in c = 0.08506876; M__3pg_c is "3-Phospho-D-glycerate";
  species M__2pg_c in c = 0.01244248; M__2pg_c is "D-Glycerate 2-phosphate";
  species M_pep_c in c = 0.01893646; M_pep_c is "Phosphoenolpyruvate";
  species M_pyr_c in c = 0.06030114; M_pyr_c is "Pyruvate";
  species M_lac__L_c in c = 1.359982; M_lac__L_c is "L-Lactate";
  species M_nad_c in c = 0.07670342; M_nad_c is "Nicotinamide adenine dinucleotide";
  species M_nadh_c in c = 0.03011378; M_nadh_c is "Nicotinamide adenine dinucleotide - reduced";
  species M_amp_c in c = 0.08672812; M_amp_c is "AMP";
  species M_adp_c in c = 0.2603419; M_adp_c is "ADP";
  species M_atp_c in c = 1.289473; M_atp_c is "ATP";
  species M_pi_c in c = 2.5; M_pi_c is "Phosphate";
  species M_h_c in c = 0.0001168578; M_h_c is "H+";
  species M_h2o_c in c = 1; M_h2o_c is "H2O";
  species M__23dpg_c in c = 3.055984; M__23dpg_c is "2,3-Disphospho-D-glycerate";
  species M_hb_1o2_c in c = 0.05008976; M_hb_1o2_c is "Oxyhemoglobin (1)";
  species M_hb_c in c = 0.05963063; M_hb_c is "Hemoglobin";
  species M_o2_c in c = 0.0200788; M_o2_c is "Oxygen";
  species M_hb_2o2_c in c = 0.07363191; M_hb_2o2_c is "Oxyhemoglobin (2)";
  species M_hb_3o2_c in c = 0.2628652; M_hb_3o2_c is "Oxyhemoglobin (3)";
  species M_hb_4o2_c in c = 6.808221; M_hb_4o2_c is "Oxyhemoglobin (4)";
  species M_dhb_c in c = 0.04555757; M_dhb_c is "Deoxyhemoglobin";
  // enzyme_module_id: PYK
  // bound_metabolites: 1 M_pep_c
  species M_pyk_R0_P_c in c = 1.032121e-5; M_pyk_R0_P_c is "PYK-pep complex";
  // enzyme_module_id: PYK
  species M_pyk_R0_c in c = 0.0001228617; M_pyk_R0_c is "PYK";
  // enzyme_module_id: PYK
  // bound_metabolites: 1 M_adp_c
  species M_pyk_R0_A_c in c = 6.747208e-5; M_pyk_R0_A_c is "PYK-adp complex";
  // enzyme_module_id: PYK
  // bound_metabolites: 1 M_adp_c; 1 M_pep_c
  species M_pyk_R0_AP_c in c = 5.659803e-6; M_pyk_R0_AP_c is "PYK-adp-pep complex";
  // enzyme_module_id: PYK
  // bound_metabolites: 1 M_fdp_c
  species M_pyk_R1_c in c = 0.0009079962; M_pyk_R1_c is "PYK-fdp complex";
  // enzyme_module_id: PYK
  // bound_metabolites: 1 M_fdp_c; 1 M_pep_c
  species M_pyk_R1_P_c in c = 7.627778e-5; M_pyk_R1_P_c is "PYK-pep-fdp complex";
  // enzyme_module_id: PYK
  // bound_metabolites: 1 M_adp_c; 1 M_fdp_c
  species M_pyk_R1_A_c in c = 0.000498645; M_pyk_R1_A_c is "PYK-adp-fdp complex";
  // enzyme_module_id: PYK
  // bound_metabolites: 1 M_adp_c; 1 M_fdp_c; 1 M_pep_c
  species M_pyk_R1_AP_c in c = 4.182815e-5; M_pyk_R1_AP_c is "PYK-adp-pep-fdp complex";
  // enzyme_module_id: PYK
  // bound_metabolites: 2 M_fdp_c
  species M_pyk_R2_c in c = 0.002516417; M_pyk_R2_c is "PYK-fdp complex";
  // enzyme_module_id: PYK
  // bound_metabolites: 2 M_fdp_c; 1 M_pep_c
  species M_pyk_R2_P_c in c = 0.000211396; M_pyk_R2_P_c is "PYK-pep-fdp complex";
  // enzyme_module_id: PYK
  // bound_metabolites: 1 M_adp_c; 2 M_fdp_c
  species M_pyk_R2_A_c in c = 0.001381943; M_pyk_R2_A_c is "PYK-adp-fdp complex";
  // enzyme_module_id: PYK
  // bound_metabolites: 1 M_adp_c; 2 M_fdp_c; 1 M_pep_c
  species M_pyk_R2_AP_c in c = 0.0001159224; M_pyk_R2_AP_c is "PYK-adp-pep-fdp complex";
  // enzyme_module_id: PYK
  // bound_metabolites: 3 M_fdp_c
  species M_pyk_R3_c in c = 0.003099551; M_pyk_R3_c is "PYK-fdp complex";
  // enzyme_module_id: PYK
  // bound_metabolites: 3 M_fdp_c; 1 M_pep_c
  species M_pyk_R3_P_c in c = 0.0002603831; M_pyk_R3_P_c is "PYK-pep-fdp complex";
  // enzyme_module_id: PYK
  // bound_metabolites: 1 M_adp_c; 3 M_fdp_c
  species M_pyk_R3_A_c in c = 0.001702183; M_pyk_R3_A_c is "PYK-adp-fdp complex";
  // enzyme_module_id: PYK
  // bound_metabolites: 1 M_adp_c; 3 M_fdp_c; 1 M_pep_c
  species M_pyk_R3_AP_c in c = 0.0001427853; M_pyk_R3_AP_c is "PYK-adp-pep-fdp complex";
  // enzyme_module_id: PYK
  // bound_metabolites: 4 M_fdp_c
  species M_pyk_R4_c in c = 0.001431681; M_pyk_R4_c is "PYK-fdp complex";
  // enzyme_module_id: PYK
  // bound_metabolites: 4 M_fdp_c; 1 M_pep_c
  species M_pyk_R4_P_c in c = 0.0001202708; M_pyk_R4_P_c is "PYK-pep-fdp complex";
  // enzyme_module_id: PYK
  // bound_metabolites: 1 M_adp_c; 4 M_fdp_c
  species M_pyk_R4_A_c in c = 0.0007862372; M_pyk_R4_A_c is "PYK-adp-fdp complex";
  // enzyme_module_id: PYK
  // bound_metabolites: 1 M_adp_c; 4 M_fdp_c; 1 M_pep_c
  species M_pyk_R4_AP_c in c = 6.595243e-5; M_pyk_R4_AP_c is "PYK-adp-pep-fdp complex";
  // enzyme_module_id: PYK
  species M_pyk_T0_c in c = 0.002334373; M_pyk_T0_c is "PYK";
  // enzyme_module_id: PYK
  // bound_metabolites: 1 M_atp_c
  species M_pyk_T1_c in c = 0.00355175; M_pyk_T1_c is "PYK-atp complex";
  // enzyme_module_id: PYK
  // bound_metabolites: 2 M_atp_c
  species M_pyk_T2_c in c = 0.002026496; M_pyk_T2_c is "PYK-atp complex";
  // enzyme_module_id: PYK
  // bound_metabolites: 3 M_atp_c
  species M_pyk_T3_c in c = 0.0005138857; M_pyk_T3_c is "PYK-atp complex";
  // enzyme_module_id: PYK
  // bound_metabolites: 4 M_atp_c
  species M_pyk_T4_c in c = 4.886733e-5; M_pyk_T4_c is "PYK-atp complex";

  // Parameters:
  cobra_default_lb = -1000 mmol_per_gDW_per_hr;
  cobra_default_ub = 1000 mmol_per_gDW_per_hr;
  cobra_0_bound = 0 mmol_per_gDW_per_hr;
  minus_inf = -INF; minus_inf has mmol_per_gDW_per_hr;
  plus_inf = INF; plus_inf has mmol_per_gDW_per_hr;
  v_R_HEX1 = 1.12;
  v_R_PGI = 1.12;
  v_R_PFK = 1.12;
  v_R_FBA = 1.12;
  v_R_TPI = 1.12;
  v_R_GAPD = 2.24;
  v_R_PGK = 1.805262;
  v_R_PGM = 2.24;
  v_R_ENO = 2.24;
  v_R_LDH_L = 2.015897;
  v_R_DM_amp_c = 0.014;
  v_R_ADK1 = -1.387779e-12;
  v_R_SK_pyr_c = 0.2241025;
  v_R_SK_lac__L_c = 2.015897;
  v_R_ATPM = 1.805262;
  v_R_DM_nadh = 0.2241025;
  v_R_SK_glc__D_c = 1.12;
  v_R_SK_amp_c = 0.014;
  v_R_SK_h_c = 2.688205;
  v_R_SK_h2o_c = 0;
  v_R_SK_pi_c = 7.456258e-15;
  v_R_DPGM = 0.4347382;
  v_R_DPGase = 0.4347382;
  v_R_HBO1 = 0;
  v_R_HBO2 = 0;
  v_R_HBO3 = 1.104245e-13;
  v_R_HBO4 = 4.350643e-13;
  v_R_HBDPG = 0;
  v_R_SK_o2_c = 0;
  v_R_PYK_R01 = 0.01716574;
  v_R_PYK_R02 = 0.01690124;
  v_R_PYK_R03 = 0.01690124;
  v_R_PYK_R04 = 0.01716574;
  v_R_PYK_R05 = 0.03406698;
  v_R_PYK_R10 = -8.470329e-16;
  v_R_PYK_R11 = 0.1268615;
  v_R_PYK_R12 = 0.1249068;
  v_R_PYK_R13 = 0.1249068;
  v_R_PYK_R14 = 0.1268615;
  v_R_PYK_R15 = 0.2517682;
  v_R_PYK_R20 = -6.776264e-15;
  v_R_PYK_R21 = 0.3515835;
  v_R_PYK_R22 = 0.3461661;
  v_R_PYK_R23 = 0.3461661;
  v_R_PYK_R24 = 0.3515835;
  v_R_PYK_R25 = 0.6977496;
  v_R_PYK_R30 = 6.776264e-15;
  v_R_PYK_R31 = 0.4330565;
  v_R_PYK_R32 = 0.4263838;
  v_R_PYK_R33 = 0.4263838;
  v_R_PYK_R34 = 0.4330565;
  v_R_PYK_R35 = 0.8594403;
  v_R_PYK_R40 = -3.388132e-15;
  v_R_PYK_R41 = 0.2000285;
  v_R_PYK_R42 = 0.1969464;
  v_R_PYK_R43 = 0.1969464;
  v_R_PYK_R44 = 0.2000285;
  v_R_PYK_R45 = 0.3969749;
  v_R_PYK_L = 0;
  v_R_PYK_T1 = -1.734723e-12;
  v_R_PYK_T2 = -1.734723e-12;
  v_R_PYK_T3 = -1.734723e-12;
  v_R_PYK_T4 = -2.168404e-13;

  // Reactions:
  R_HEX1: M_atp_c + M_glc__D_c -> M_adp_c + M_g6p_c + M_h_c; kf_R_HEX1*(M_atp_c*M_glc__D_c - M_adp_c*M_g6p_c/Keq_R_HEX1); R_HEX1 is "Hexokinase (D-glucose:ATP)";
    kf_R_HEX1 = 0.700007; Keq_R_HEX1 = 850;
  R_PGI: M_g6p_c -> M_f6p_c; kf_R_PGI*(M_g6p_c - M_f6p_c/Keq_R_PGI); R_PGI is "Glucose-6-phosphate isomerase";
    Keq_R_PGI = 0.41; kf_R_PGI = 3644.44;
  R_PFK: M_atp_c + M_f6p_c -> M_adp_c + M_fdp_c + M_h_c; kf_R_PFK*(M_atp_c*M_f6p_c - M_adp_c*M_fdp_c/Keq_R_PFK); R_PFK is "Phosphofructokinase";
    kf_R_PFK = 35.3688; Keq_R_PFK = 310;
  R_FBA: M_fdp_c -> M_dhap_c + M_g3p_c; kf_R_FBA*(M_fdp_c - M_dhap_c*M_g3p_c/Keq_R_FBA); R_FBA is "Fructose-bisphosphate aldolase";
    Keq_R_FBA = 0.082; kf_R_FBA = 2834.57;
  R_TPI: M_dhap_c -> M_g3p_c; kf_R_TPI*(M_dhap_c - M_g3p_c/Keq_R_TPI); R_TPI is "Triose-phosphate isomerase";
    kf_R_TPI = 34.3558; Keq_R_TPI = 0.0571429;
  R_GAPD: M_g3p_c + M_nad_c + M_pi_c -> M__13dpg_c + M_h_c + M_nadh_c; kf_R_GAPD*(M_g3p_c*M_nad_c*M_pi_c - M__13dpg_c*M_nadh_c/Keq_R_GAPD); R_GAPD is "Glyceraldehyde-3-phosphate dehydrogenase";
    kf_R_GAPD = 3376.75; Keq_R_GAPD = 0.0179;
  R_PGK: M__13dpg_c + M_adp_c -> M__3pg_c + M_atp_c; kf_R_PGK*(M__13dpg_c*M_adp_c - M__3pg_c*M_atp_c/Keq_R_PGK); R_PGK is "Phosphoglycerate kinase";
    Keq_R_PGK = 1800; kf_R_PGK = 1020000;
  R_PGM: M__3pg_c -> M__2pg_c; kf_R_PGM*(M__3pg_c - M__2pg_c/Keq_R_PGM); R_PGM is "Phosphoglycerate mutase";
    kf_R_PGM = 4869.57; Keq_R_PGM = 0.147059;
  R_ENO: M__2pg_c -> M_h2o_c + M_pep_c; kf_R_ENO*(M__2pg_c - M_pep_c/Keq_R_ENO); R_ENO is "Enolase";
    Keq_R_ENO = 1.69492; kf_R_ENO = 1763.78;
  R_LDH_L: M_h_c + M_nadh_c + M_pyr_c -> M_lac__L_c + M_nad_c; kf_R_LDH_L*(M_nadh_c*M_pyr_c - M_lac__L_c*M_nad_c/Keq_R_LDH_L); R_LDH_L is "L-lactate dehydrogenase";
    Keq_R_LDH_L = 26300; kf_R_LDH_L = 1112.57;
  R_DM_amp_c: M_amp_c => ; M_amp_c*kf_R_DM_amp_c; R_DM_amp_c is "AMP demand";
    kf_R_DM_amp_c = 0.161424;
  R_ADK1: 2 M_adp_c -> M_amp_c + M_atp_c; kf_R_ADK1*(M_adp_c^2 - M_amp_c*M_atp_c/Keq_R_ADK1); R_ADK1 is "Adenylate kinase";
    Keq_R_ADK1 = 1.65; kf_R_ADK1 = 100000;
  R_SK_pyr_c: M_pyr_c -> ; kf_R_SK_pyr_c*(M_pyr_c - pyr_b/Keq_R_SK_pyr_c); R_SK_pyr_c is "Pyruvate sink";
    kf_R_SK_pyr_c = 744.186; Keq_R_SK_pyr_c = 1; pyr_b = 0.06;
  R_SK_lac__L_c: M_lac__L_c -> ; kf_R_SK_lac__L_c*(M_lac__L_c - lac__L_b/Keq_R_SK_lac__L_c); R_SK_lac__L_c is "L-Lactate sink";
    lac__L_b = 1; Keq_R_SK_lac__L_c = 1; kf_R_SK_lac__L_c = 5.6;
  R_ATPM: M_atp_c + M_h2o_c => M_adp_c + M_h_c + M_pi_c; M_atp_c*kf_R_ATPM; R_ATPM is "ATP maintenance requirement";
    kf_R_ATPM = 1.4;
  R_DM_nadh: M_nadh_c => M_h_c + M_nad_c; M_nadh_c*kf_R_DM_nadh; R_DM_nadh is "Demand NADH";
    kf_R_DM_nadh = 7.44186;
  R_SK_glc__D_c: -> M_glc__D_c; kf_R_SK_glc__D_c*(glc__D_b - M_glc__D_c/Keq_R_SK_glc__D_c); R_SK_glc__D_c is "D-Glucose sink";
    glc__D_b = 1; Keq_R_SK_glc__D_c = INF; kf_R_SK_glc__D_c = 1.12;
  R_SK_amp_c: -> M_amp_c; kf_R_SK_amp_c*(amp_b - M_amp_c/Keq_R_SK_amp_c); R_SK_amp_c is "AMP sink";
    kf_R_SK_amp_c = 0.014; amp_b = 1; Keq_R_SK_amp_c = INF;
  R_SK_h_c: M_h_c -> ; kf_R_SK_h_c*(M_h_c - h_b/Keq_R_SK_h_c); R_SK_h_c is "H+ sink";
    Keq_R_SK_h_c = 1; kf_R_SK_h_c = 100000; h_b = 8.99757e-5;
  R_SK_h2o_c: M_h2o_c -> ; kf_R_SK_h2o_c*(M_h2o_c - h2o_b/Keq_R_SK_h2o_c); R_SK_h2o_c is "H2O sink";
    h2o_b = 1; Keq_R_SK_h2o_c = 1; kf_R_SK_h2o_c = 100000;
  R_SK_pi_c: M_pi_c -> ; kf_R_SK_pi_c*(M_pi_c - pi_b/Keq_R_SK_pi_c); R_SK_pi_c is "Phosphate sink";
    kf_R_SK_pi_c = 0.23; pi_b = 2.5; Keq_R_SK_pi_c = 1;
  R_DPGM: M__13dpg_c -> M__23dpg_c + M_h_c; kf_R_DPGM*(M__13dpg_c - M__23dpg_c/Keq_R_DPGM); R_DPGM is "Diphosphoglyceromutase";
    Keq_R_DPGM = 2300000; kf_R_DPGM = 1814.81;
  R_DPGase: M__23dpg_c + M_h2o_c => M__3pg_c + M_pi_c; M__23dpg_c*kf_R_DPGase; R_DPGase is "Diphosphoglycerate phosphatase";
    kf_R_DPGase = 0.142258;
  R_HBO1: M_hb_c + M_o2_c -> M_hb_1o2_c; kf_R_HBO1*(M_hb_c*M_o2_c - M_hb_1o2_c/Keq_R_HBO1); R_HBO1 is "Oxygen Loading (1)";
    Keq_R_HBO1 = 41.8352; kf_R_HBO1 = 506935;
  R_HBO2: M_hb_1o2_c + M_o2_c -> M_hb_2o2_c; kf_R_HBO2*(M_hb_1o2_c*M_o2_c - M_hb_2o2_c/Keq_R_HBO2); R_HBO2 is "Oxygen Loading (2)";
    Keq_R_HBO2 = 73.2115; kf_R_HBO2 = 511077;
  R_HBO3: M_hb_2o2_c + M_o2_c -> M_hb_3o2_c; kf_R_HBO3*(M_hb_2o2_c*M_o2_c - M_hb_3o2_c/Keq_R_HBO3); R_HBO3 is "Oxygen Loading (3)";
    kf_R_HBO3 = 509243; Keq_R_HBO3 = 177.799;
  R_HBO4: M_hb_3o2_c + M_o2_c -> M_hb_4o2_c; kf_R_HBO4*(M_hb_3o2_c*M_o2_c - M_hb_4o2_c/Keq_R_HBO4); R_HBO4 is "Oxygen Loading (4)";
    kf_R_HBO4 = 501595; Keq_R_HBO4 = 1289.92;
  R_HBDPG: M__23dpg_c + M_hb_c -> M_dhb_c; kf_R_HBDPG*(M__23dpg_c*M_hb_c - M_dhb_c/Keq_R_HBDPG); R_HBDPG is "Hemoglobin-23dpg binding";
    Keq_R_HBDPG = 0.25; kf_R_HBDPG = 519613;
  R_SK_o2_c: M_o2_c -> ; kf_R_SK_o2_c*(M_o2_c - o2_b/Keq_R_SK_o2_c); R_SK_o2_c is "Oxygen sink";
    kf_R_SK_o2_c = 509726; Keq_R_SK_o2_c = 1; o2_b = 0.0200788;
  // SUBSYSTEM: Glycolysis
  // enzyme_module_id: PYK
  R_PYK_R01: M_pyk_R0_c + M_pep_c -> M_pyk_R0_P_c; R_PYK_R01_kf_PYK_P*(M_pep_c*M_pyk_R0_c - M_pyk_R0_P_c/R_PYK_R01_Keq_PYK_P); R_PYK_R01 is "pyk_R0-pep binding";
    R_PYK_R01_kf_PYK_P = 4000000; R_PYK_R01_Keq_PYK_P = 4.44444;
  // SUBSYSTEM: Glycolysis
  // enzyme_module_id: PYK
  R_PYK_R02: M_adp_c + M_pyk_R0_c -> M_pyk_R0_A_c; R_PYK_R02_kf_PYK_A*(M_adp_c*M_pyk_R0_c - M_pyk_R0_A_c/R_PYK_R02_Keq_PYK_A); R_PYK_R02 is "pyk_R0-adp binding";
    R_PYK_R02_Keq_PYK_A = 2.1097; R_PYK_R02_kf_PYK_A = 4000000;
  // SUBSYSTEM: Glycolysis
  // enzyme_module_id: PYK
  R_PYK_R03: M_pep_c + M_pyk_R0_A_c -> M_pyk_R0_AP_c; R_PYK_R03_kf_PYK_P*(M_pep_c*M_pyk_R0_A_c - M_pyk_R0_AP_c/R_PYK_R03_Keq_PYK_P); R_PYK_R03 is "pyk_R0_A-pep binding";
    R_PYK_R03_kf_PYK_P = 4000000; R_PYK_R03_Keq_PYK_P = 4.44444;
  // SUBSYSTEM: Glycolysis
  // enzyme_module_id: PYK
  R_PYK_R04: M_adp_c + M_pyk_R0_P_c -> M_pyk_R0_AP_c; R_PYK_R04_kf_PYK_A*(M_adp_c*M_pyk_R0_P_c - M_pyk_R0_AP_c/R_PYK_R04_Keq_PYK_A); R_PYK_R04 is "pyk_R0_P-adp binding";
    R_PYK_R04_Keq_PYK_A = 2.1097; R_PYK_R04_kf_PYK_A = 4000000;
  // SUBSYSTEM: Glycolysis
  // enzyme_module_id: PYK
  R_PYK_R05: M_h_c + M_pyk_R0_AP_c => M_atp_c + M_pyk_R0_c + M_pyr_c; M_pyk_R0_AP_c*R_PYK_R05_kf_PYK; R_PYK_R05 is "pyk_R0_AP catalyzation";
    R_PYK_R05_kf_PYK = 6019.11;
  // SUBSYSTEM: Glycolysis
  // enzyme_module_id: PYK
  R_PYK_R10: M_fdp_c + M_pyk_R0_c -> M_pyk_R1_c; R_PYK_R10_kf_PYK_ACT*(4*M_fdp_c*M_pyk_R0_c - M_pyk_R1_c/R_PYK_R10_Keq_PYK_ACT); R_PYK_R10 is "pyk_R0-fdp binding";
    R_PYK_R10_Keq_PYK_ACT = 200; R_PYK_R10_kf_PYK_ACT = 1000000;
  // SUBSYSTEM: Glycolysis
  // enzyme_module_id: PYK
  R_PYK_R11: M_pep_c + M_pyk_R1_c -> M_pyk_R1_P_c; R_PYK_R11_kf_PYK_P*(M_pep_c*M_pyk_R1_c - M_pyk_R1_P_c/R_PYK_R11_Keq_PYK_P); R_PYK_R11 is "pyk_R1-pep binding";
    R_PYK_R11_kf_PYK_P = 4000000; R_PYK_R11_Keq_PYK_P = 4.44444;
  // SUBSYSTEM: Glycolysis
  // enzyme_module_id: PYK
  R_PYK_R12: M_adp_c + M_pyk_R1_c -> M_pyk_R1_A_c; R_PYK_R12_kf_PYK_A*(M_adp_c*M_pyk_R1_c - M_pyk_R1_A_c/R_PYK_R12_Keq_PYK_A); R_PYK_R12 is "pyk_R1-adp binding";
    R_PYK_R12_Keq_PYK_A = 2.1097; R_PYK_R12_kf_PYK_A = 4000000;
  // SUBSYSTEM: Glycolysis
  // enzyme_module_id: PYK
  R_PYK_R13: M_pep_c + M_pyk_R1_A_c -> M_pyk_R1_AP_c; R_PYK_R13_kf_PYK_P*(M_pep_c*M_pyk_R1_A_c - M_pyk_R1_AP_c/R_PYK_R13_Keq_PYK_P); R_PYK_R13 is "pyk_R1_A-pep binding";
    R_PYK_R13_kf_PYK_P = 4000000; R_PYK_R13_Keq_PYK_P = 4.44444;
  // SUBSYSTEM: Glycolysis
  // enzyme_module_id: PYK
  R_PYK_R14: M_adp_c + M_pyk_R1_P_c -> M_pyk_R1_AP_c; R_PYK_R14_kf_PYK_A*(M_adp_c*M_pyk_R1_P_c - M_pyk_R1_AP_c/R_PYK_R14_Keq_PYK_A); R_PYK_R14 is "pyk_R1_P-adp binding";
    R_PYK_R14_Keq_PYK_A = 2.1097; R_PYK_R14_kf_PYK_A = 4000000;
  // SUBSYSTEM: Glycolysis
  // enzyme_module_id: PYK
  R_PYK_R15: M_h_c + M_pyk_R1_AP_c => M_atp_c + M_pyk_R1_c + M_pyr_c; M_pyk_R1_AP_c*R_PYK_R15_kf_PYK; R_PYK_R15 is "pyk_R1_AP catalyzation";
    R_PYK_R15_kf_PYK = 6019.11;
  // SUBSYSTEM: Glycolysis
  // enzyme_module_id: PYK
  R_PYK_R20: M_fdp_c + M_pyk_R1_c -> M_pyk_R2_c; R_PYK_R20_kf_PYK_ACT*(3*M_fdp_c*M_pyk_R1_c - 2*M_pyk_R2_c/R_PYK_R20_Keq_PYK_ACT); R_PYK_R20 is "pyk_R1-fdp binding";
    R_PYK_R20_Keq_PYK_ACT = 200; R_PYK_R20_kf_PYK_ACT = 1000000;
  // SUBSYSTEM: Glycolysis
  // enzyme_module_id: PYK
  R_PYK_R21: M_pep_c + M_pyk_R2_c -> M_pyk_R2_P_c; R_PYK_R21_kf_PYK_P*(M_pep_c*M_pyk_R2_c - M_pyk_R2_P_c/R_PYK_R21_Keq_PYK_P); R_PYK_R21 is "pyk_R2-pep binding";
    R_PYK_R21_kf_PYK_P = 4000000; R_PYK_R21_Keq_PYK_P = 4.44444;
  // SUBSYSTEM: Glycolysis
  // enzyme_module_id: PYK
  R_PYK_R22: M_adp_c + M_pyk_R2_c -> M_pyk_R2_A_c; R_PYK_R22_kf_PYK_A*(M_adp_c*M_pyk_R2_c - M_pyk_R2_A_c/R_PYK_R22_Keq_PYK_A); R_PYK_R22 is "pyk_R2-adp binding";
    R_PYK_R22_Keq_PYK_A = 2.1097; R_PYK_R22_kf_PYK_A = 4000000;
  // SUBSYSTEM: Glycolysis
  // enzyme_module_id: PYK
  R_PYK_R23: M_pep_c + M_pyk_R2_A_c -> M_pyk_R2_AP_c; R_PYK_R23_kf_PYK_P*(M_pep_c*M_pyk_R2_A_c - M_pyk_R2_AP_c/R_PYK_R23_Keq_PYK_P); R_PYK_R23 is "pyk_R2_A-pep binding";
    R_PYK_R23_kf_PYK_P = 4000000; R_PYK_R23_Keq_PYK_P = 4.44444;
  // SUBSYSTEM: Glycolysis
  // enzyme_module_id: PYK
  R_PYK_R24: M_adp_c + M_pyk_R2_P_c -> M_pyk_R2_AP_c; R_PYK_R24_kf_PYK_A*(M_adp_c*M_pyk_R2_P_c - M_pyk_R2_AP_c/R_PYK_R24_Keq_PYK_A); R_PYK_R24 is "pyk_R2_P-adp binding";
    R_PYK_R24_Keq_PYK_A = 2.1097; R_PYK_R24_kf_PYK_A = 4000000;
  // SUBSYSTEM: Glycolysis
  // enzyme_module_id: PYK
  R_PYK_R25: M_h_c + M_pyk_R2_AP_c => M_atp_c + M_pyk_R2_c + M_pyr_c; M_pyk_R2_AP_c*R_PYK_R25_kf_PYK; R_PYK_R25 is "pyk_R2_AP catalyzation";
    R_PYK_R25_kf_PYK = 6019.11;
  // SUBSYSTEM: Glycolysis
  // enzyme_module_id: PYK
  R_PYK_R30: M_fdp_c + M_pyk_R2_c -> M_pyk_R3_c; R_PYK_R30_kf_PYK_ACT*(2*M_fdp_c*M_pyk_R2_c - 3*M_pyk_R3_c/R_PYK_R30_Keq_PYK_ACT); R_PYK_R30 is "pyk_R2-fdp binding";
    R_PYK_R30_Keq_PYK_ACT = 200; R_PYK_R30_kf_PYK_ACT = 1000000;
  // SUBSYSTEM: Glycolysis
  // enzyme_module_id: PYK
  R_PYK_R31: M_pep_c + M_pyk_R3_c -> M_pyk_R3_P_c; R_PYK_R31_kf_PYK_P*(M_pep_c*M_pyk_R3_c - M_pyk_R3_P_c/R_PYK_R31_Keq_PYK_P); R_PYK_R31 is "pyk_R3-pep binding";
    R_PYK_R31_kf_PYK_P = 4000000; R_PYK_R31_Keq_PYK_P = 4.44444;
  // SUBSYSTEM: Glycolysis
  // enzyme_module_id: PYK
  R_PYK_R32: M_adp_c + M_pyk_R3_c -> M_pyk_R3_A_c; R_PYK_R32_kf_PYK_A*(M_adp_c*M_pyk_R3_c - M_pyk_R3_A_c/R_PYK_R32_Keq_PYK_A); R_PYK_R32 is "pyk_R3-adp binding";
    R_PYK_R32_Keq_PYK_A = 2.1097; R_PYK_R32_kf_PYK_A = 4000000;
  // SUBSYSTEM: Glycolysis
  // enzyme_module_id: PYK
  R_PYK_R33: M_pep_c + M_pyk_R3_A_c -> M_pyk_R3_AP_c; R_PYK_R33_kf_PYK_P*(M_pep_c*M_pyk_R3_A_c - M_pyk_R3_AP_c/R_PYK_R33_Keq_PYK_P); R_PYK_R33 is "pyk_R3_A-pep binding";
    R_PYK_R33_kf_PYK_P = 4000000; R_PYK_R33_Keq_PYK_P = 4.44444;
  // SUBSYSTEM: Glycolysis
  // enzyme_module_id: PYK
  R_PYK_R34: M_adp_c + M_pyk_R3_P_c -> M_pyk_R3_AP_c; R_PYK_R34_kf_PYK_A*(M_adp_c*M_pyk_R3_P_c - M_pyk_R3_AP_c/R_PYK_R34_Keq_PYK_A); R_PYK_R34 is "pyk_R3_P-adp binding";
    R_PYK_R34_Keq_PYK_A = 2.1097; R_PYK_R34_kf_PYK_A = 4000000;
  // SUBSYSTEM: Glycolysis
  // enzyme_module_id: PYK
  R_PYK_R35: M_h_c + M_pyk_R3_AP_c => M_atp_c + M_pyk_R3_c + M_pyr_c; M_pyk_R3_AP_c*R_PYK_R35_kf_PYK; R_PYK_R35 is "pyk_R3_AP catalyzation";
    R_PYK_R35_kf_PYK = 6019.11;
  // SUBSYSTEM: Glycolysis
  // enzyme_module_id: PYK
  R_PYK_R40: M_fdp_c + M_pyk_R3_c -> M_pyk_R4_c; R_PYK_R40_kf_PYK_ACT*(M_fdp_c*M_pyk_R3_c - 4*M_pyk_R4_c/R_PYK_R40_Keq_PYK_ACT); R_PYK_R40 is "pyk_R3-fdp binding";
    R_PYK_R40_Keq_PYK_ACT = 200; R_PYK_R40_kf_PYK_ACT = 1000000;
  // SUBSYSTEM: Glycolysis
  // enzyme_module_id: PYK
  R_PYK_R41: M_pep_c + M_pyk_R4_c -> M_pyk_R4_P_c; R_PYK_R41_kf_PYK_P*(M_pep_c*M_pyk_R4_c - M_pyk_R4_P_c/R_PYK_R41_Keq_PYK_P); R_PYK_R41 is "pyk_R4-pep binding";
    R_PYK_R41_kf_PYK_P = 4000000; R_PYK_R41_Keq_PYK_P = 4.44444;
  // SUBSYSTEM: Glycolysis
  // enzyme_module_id: PYK
  R_PYK_R42: M_adp_c + M_pyk_R4_c -> M_pyk_R4_A_c; R_PYK_R42_kf_PYK_A*(M_adp_c*M_pyk_R4_c - M_pyk_R4_A_c/R_PYK_R42_Keq_PYK_A); R_PYK_R42 is "pyk_R4-adp binding";
    R_PYK_R42_Keq_PYK_A = 2.1097; R_PYK_R42_kf_PYK_A = 4000000;
  // SUBSYSTEM: Glycolysis
  // enzyme_module_id: PYK
  R_PYK_R43: M_pep_c + M_pyk_R4_A_c -> M_pyk_R4_AP_c; R_PYK_R43_kf_PYK_P*(M_pep_c*M_pyk_R4_A_c - M_pyk_R4_AP_c/R_PYK_R43_Keq_PYK_P); R_PYK_R43 is "pyk_R4_A-pep binding";
    R_PYK_R43_kf_PYK_P = 4000000; R_PYK_R43_Keq_PYK_P = 4.44444;
  // SUBSYSTEM: Glycolysis
  // enzyme_module_id: PYK
  R_PYK_R44: M_adp_c + M_pyk_R4_P_c -> M_pyk_R4_AP_c; R_PYK_R44_kf_PYK_A*(M_adp_c*M_pyk_R4_P_c - M_pyk_R4_AP_c/R_PYK_R44_Keq_PYK_A); R_PYK_R44 is "pyk_R4_P-adp binding";
    R_PYK_R44_Keq_PYK_A = 2.1097; R_PYK_R44_kf_PYK_A = 4000000;
  // SUBSYSTEM: Glycolysis
  // enzyme_module_id: PYK
  R_PYK_R45: M_h_c + M_pyk_R4_AP_c => M_atp_c + M_pyk_R4_c + M_pyr_c; M_pyk_R4_AP_c*R_PYK_R45_kf_PYK; R_PYK_R45 is "pyk_R4_AP catalyzation";
    R_PYK_R45_kf_PYK = 6019.11;
  // SUBSYSTEM: Glycolysis
  // enzyme_module_id: PYK
  R_PYK_L: M_pyk_R0_c -> M_pyk_T0_c; kf_R_PYK_L*(M_pyk_R0_c - M_pyk_T0_c/Keq_R_PYK_L); R_PYK_L is "pyk_R0-pyk_T0 transition";
    kf_R_PYK_L = 1e12; Keq_R_PYK_L = 19;
  // SUBSYSTEM: Glycolysis
  // enzyme_module_id: PYK
  R_PYK_T1: M_atp_c + M_pyk_T0_c -> M_pyk_T1_c; R_PYK_T1_kf_PYK_I*(4*M_atp_c*M_pyk_T0_c - M_pyk_T1_c/R_PYK_T1_Keq_PYK_I); R_PYK_T1 is "pyk_T0-atp binding";
    R_PYK_T1_Keq_PYK_I = 0.294985; R_PYK_T1_kf_PYK_I = 1000000;
  // SUBSYSTEM: Glycolysis
  // enzyme_module_id: PYK
  R_PYK_T2: M_atp_c + M_pyk_T1_c -> M_pyk_T2_c; R_PYK_T2_kf_PYK_I*(3*M_atp_c*M_pyk_T1_c - 2*M_pyk_T2_c/R_PYK_T2_Keq_PYK_I); R_PYK_T2 is "pyk_T1-atp binding";
    R_PYK_T2_Keq_PYK_I = 0.294985; R_PYK_T2_kf_PYK_I = 1000000;
  // SUBSYSTEM: Glycolysis
  // enzyme_module_id: PYK
  R_PYK_T3: M_atp_c + M_pyk_T2_c -> M_pyk_T3_c; R_PYK_T3_kf_PYK_I*(2*M_atp_c*M_pyk_T2_c - 3*M_pyk_T3_c/R_PYK_T3_Keq_PYK_I); R_PYK_T3 is "pyk_T2-atp binding";
    R_PYK_T3_Keq_PYK_I = 0.294985; R_PYK_T3_kf_PYK_I = 1000000;
  // SUBSYSTEM: Glycolysis
  // enzyme_module_id: PYK
  R_PYK_T4: M_atp_c + M_pyk_T3_c -> M_pyk_T4_c; R_PYK_T4_kf_PYK_I*(M_atp_c*M_pyk_T3_c - 4*M_pyk_T4_c/R_PYK_T4_Keq_PYK_I); R_PYK_T4 is "pyk_T3-atp binding";
    R_PYK_T4_Keq_PYK_I = 0.294985; R_PYK_T4_kf_PYK_I = 1000000;

  // Unit definitions:
  unit mM = 1e-3 mole / litre; mM is "Millimolar";
  unit hr = 3600 second; hr is "hour";
  unit mmol_per_gDW_per_hr = 1e-3 mole / (gram * 3600 second); mmol_per_gDW_per_hr is "cobra flux unit";
end
