// SBML level 2 version 4

model M1()
  // Immuno-metabolism of M1 macrophjages in leishmaniasis
  // The M1 polarization is important for the control of infection by Leishmania spp. They are characterized by the impaired Tricarboxylic Cycle (TCA cycle), production of pro inflammatory cytokines such as Interleukin-12 (IL-12), Interferon gamma (IFNℽ) etc., and by generation of Reactive oxygen species (ROS) and Nitric oxide (NO) that help in efficient parasite killing.
  // hasProperty mamo:MAMO_0000003
  // isDescribedBy pubmed:37799190

  // Compartments:
  compartment default = 1 volume;
  compartment cytoplasm in default = 1 volume;
  compartment Nucleus in cytoplasm = 1 volume;
  compartment Plasma_membrane in default = 1 volume;
  compartment Mitochondria in cytoplasm = 1 volume;

  // Species:
  substanceOnly species LPG in Plasma_membrane = 10000;
  substanceOnly species TLR2_6 in Plasma_membrane = 10000; TLR2_6 is "TLR2/6";
  substanceOnly species TLR2_6_LPG_complex in Plasma_membrane = 0; TLR2_6_LPG_complex is "TLR2/6-LPG complex";
  species MyD88 in cytoplasm = 0;
  substanceOnly species kinase in cytoplasm = 1000;
  substanceOnly species ATP_cytoplasm in cytoplasm = 4000;
  species ADP_cytoplasm in cytoplasm = 0;
  species IRAK1_4 in cytoplasm = 0; IRAK1_4 is "IRAK1/4";
  species NF_kB_complex in cytoplasm = 0; NF_kB_complex is "NF-kB complex";
  species NF_kB in Nucleus = 0; NF_kB is "NF-kB";
  substanceOnly species IRF1 in Nucleus = 1000;
  substanceOnly species c_Rel in Nucleus = 1000; c_Rel is "c-Rel";
  substanceOnly species IL12R in Plasma_membrane = 10000;
  species IL12_cytoplasm in cytoplasm = 0;
  substanceOnly species NFAT5 in Nucleus = 10000;
  species JAK2_TYK2 in cytoplasm = 0; JAK2_TYK2 is "JAK2/TYK2";
  species s79 in cytoplasm = 0; s79 is "STAT4";
  species s87 in cytoplasm = 0; s87 is "STAT4";
  substanceOnly species L_Arginine in cytoplasm = 5000; L_Arginine is "L-Arginine";
  species NO in cytoplasm = 0;
  substanceOnly species NADPH in cytoplasm = 1000;
  species NADP in cytoplasm = 0; NADP is "NADP+";
  substanceOnly species O2 in cytoplasm = 5000;
  species CITRULLINE in cytoplasm = 0;
  substanceOnly species IL12B in Nucleus = 0;
  species Argininosuccinate in cytoplasm = 0;
  substanceOnly species Argininosuccinate_synthase in cytoplasm = 1000;
  substanceOnly species Argininosuccinate_lyase in cytoplasm = 1000;
  species Fumarate in cytoplasm = 0;
  substanceOnly species Aspartate_cytoplasm in cytoplasm = 5000;
  species AMP in cytoplasm = 0;
  species Acetyl_CoA in Mitochondria = 0;
  substanceOnly species Oxaloacetate in Mitochondria = 10000;
  species Citric_acid in Mitochondria = 0;
  substanceOnly species Citrate_synthase in Mitochondria = 1000;
  substanceOnly species cis_Aconitate in Mitochondria = 0; cis_Aconitate is "cis-Aconitate";
  substanceOnly species Aconitase in Mitochondria = 1000;
  substanceOnly species Pyruvate in cytoplasm = 10000;
  species Pyruvate_dehydrogenase in cytoplasm = 0;
  species D_Isocitrate in Mitochondria = 0; D_Isocitrate is "D-Isocitrate";
  substanceOnly species CoA in Mitochondria = 0;
  species H2O in Mitochondria = 0;
  species s149 in Mitochondria = 0; s149 is "a-ketoglutarate";
  substanceOnly species Isocitrate_dehydrogenase in Mitochondria = 1000;
  substanceOnly species NAD_Mitochondria in Mitochondria = 2000; NAD_Mitochondria is "NAD+";
  substanceOnly species $CO2 in Mitochondria = 100;
  species Succinyl_CoA in Mitochondria = 0; Succinyl_CoA is "Succinyl-CoA";
  substanceOnly species a_ketoglutarate_dehydrogenase in Mitochondria = 1000; a_ketoglutarate_dehydrogenase is "a-ketoglutarate dehydrogenase";
  species Succinate in Mitochondria = 0;
  substanceOnly species Succinyl_CoA_synthetase in Mitochondria = 1000; Succinyl_CoA_synthetase is "Succinyl-CoA synthetase";
  substanceOnly species GTP in Mitochondria = 1000;
  substanceOnly species GDP in Mitochondria = 1000;
  substanceOnly species ATP_Mitochondria in Mitochondria = 1000;
  species ADP_Mitochondria in Mitochondria = 0;
  species Aspartate_Mitochondria in Mitochondria = 0;
  substanceOnly species Aspartate_transaminase in Mitochondria = 1000;
  substanceOnly species Glutamate in Mitochondria = 1000;
  species s174 in Mitochondria = 0; s174 is "a-ketoglutarate";
  substanceOnly species Tryptophan in cytoplasm = 10000;
  substanceOnly species tryptophan_2_3_dioxygenase in cytoplasm = 1000; tryptophan_2_3_dioxygenase is "tryptophan 2,3-dioxygenase";
  species Formylkynurenine in cytoplasm = 0;
  species Kynurenine in cytoplasm = 0;
  species Quinolinic_acid in cytoplasm = 0;
  substanceOnly species Kynurenine_formamidase in cytoplasm = 1000;
  species NAD_cytoplasm in cytoplasm = 0; NAD_cytoplasm is "NAD+";
  substanceOnly species QPRT in cytoplasm = 1000;
  substanceOnly species Enzymes in cytoplasm = 2000;
  substanceOnly species Succinate_dehydrogenase in Mitochondria = 5000;
  species ROS in cytoplasm = 0;
  species Electron_Transport_Chain in Mitochondria = 0;
  substanceOnly species IL10 in Nucleus = 0;
  substanceOnly species AP_1 in Nucleus = 1000; AP_1 is "AP-1";
  species IL12_mRNA in Nucleus = 0; IL12_mRNA is "IL12 (mRNA)";
  species TRAF6_complex in cytoplasm = 0;
  species IKK_complex in cytoplasm = 0;
  substanceOnly species IFN_g_Nucleus in Nucleus = 0; IFN_g_Nucleus is "IFN-g";
  species STAT4_Nucleus in Nucleus = 0;
  substanceOnly species T_bet in Nucleus = 1000; T_bet is "T-bet";
  species IFN_g_mRNA in Nucleus = 0; IFN_g_mRNA is "IFN-g(mRNA)";
  species IFN_g_cytoplasm in cytoplasm = 0; IFN_g_cytoplasm is "IFN-g";
  substanceOnly species IFN_g_Plasma_membrane in Plasma_membrane = 8500; IFN_g_Plasma_membrane is "IFN-g";
  substanceOnly species IFN_gR in Plasma_membrane = 10000; IFN_gR is "IFN-gR";
  species JAK1_JAK2 in cytoplasm = 0; JAK1_JAK2 is "JAK1/JAK2";
  species s210 in cytoplasm = 0; s210 is "STAT1";
  species s211 in cytoplasm = 0; s211 is "STAT1";
  species STAT1_Nucleus in Nucleus = 0;
  substanceOnly species IL12_Plasma_membrane in Plasma_membrane = 6000;
  species IL12_IL12R_complex in Plasma_membrane = 0; IL12_IL12R_complex is "IL12 - IL12R complex";
  species IFN_g_IFN_gR_complex in Plasma_membrane = 0; IFN_g_IFN_gR_complex is "IFN-g - IFN-gR complex";
  species NOS2 in Nucleus = 0;
  species iNOS in cytoplasm = 0;
  substanceOnly species GSK_3b in cytoplasm = 0; GSK_3b is "GSK-3b";
  species IL_10_mRNA in Nucleus = 0; IL_10_mRNA is "IL 10(mRNA)";
  species IL_10 in cytoplasm = 0;
  substanceOnly species NADH in Mitochondria = 0;

  // Reactions:
  re4: LPG + TLR2_6 => TLR2_6_LPG_complex; 10000*10000*k76;
    re4_k1 = 1.05 substance; re4_k2 = 0.1 substance; re4_k3 = 1e-5 substance; re4_k4 = 1e-6 substance; re4_k5 = 1e-6 substance; re4_k6 = 1e-6 substance; re4_k7 = 0.001 substance; re4_k8 = 1e-6 substance; re4_k9 = 1e-6 substance; re4_k10 = 1e-6 substance; re4_k11 = 1e-6 substance; re4_k12 = 0.05 substance; re4_k13 = 0.0001 substance; re4_k14 = 0.0005 substance; re4_k15 = 0.001 substance; re4_k16 = 0.0002 substance; re4_k17 = 0.0001 substance; re4_k18 = 0.001 substance; re4_k19 = 1e-5 substance; re4_k20 = 1e-5 substance; re4_k21 = 1e-5 substance; re4_k22 = 1e-6 substance; re4_k23 = 2e-5 substance; re4_k24 = 9e-5 substance; re4_k25 = 1e-6 substance; re4_k26 = 1e-5 substance; re4_k27 = 0.0001 substance; re4_k28 = 0.0009 substance; re4_k29 = 1e-5 substance; re4_k30 = 0.0099 substance; k31 = 0.00099 substance; k32 = 0.0001 substance; k33 = 1e-5 substance; re4_v1 = 1000 substance; k34 = 1.1e-5 substance; k35 = 1e-5 substance; k36 = 1e-5 substance; k37 = 1.01e-5 substance; k38 = 1.001e-5 substance; k39 = 1.0001e-5 substance; k40 = 1.1e-5 substance; k41 = 1.09e-5 substance; k42 = 1.00001e-5 substance; k43 = 1.000001e-5 substance; k44 = 9e-6 substance; k45 = 9e-5 substance; k46 = 1.01e-5 substance; k47 = 1.009e-5 substance; k48 = 1.0009e-5 substance; k49 = 1.05e-5 substance; k50 = 1e-5 substance; k51 = 1.0001e-5 substance; k52 = 1.009e-5 substance; k53 = 1.0011e-5 substance; k54 = 1.011e-5 substance; k55 = 1.1001e-5 substance; k56 = 1.1e-5 substance; k57 = 9e-6 substance; k58 = 9.9e-6 substance; k59 = 1e-6 substance; k60 = 9e-7 substance; k61 = 9.99e-5 substance; k62 = 9.9e-6 substance; k63 = 9.99e-6 substance; k64 = 9.99e-6 substance; k65 = 1e-6 substance; k66 = 9.999e-6 substance; k67 = 9.9999e-6 substance; k68 = 9.99e-6 substance; k69 = 9.99e-6 substance; k70 = 9.9e-7 substance; k71 = 9.99e-7 substance; k72 = 4.995e-6 substance; k73 = 4.995e-6 substance; k74 = 0.0004995 substance; k75 = 4.995e-7 substance; k76 = 4.995e-6 substance;
  re6: TLR2_6_LPG_complex => MyD88; 9000*re6_k17;
    re6_k1 = 9e-6 substance; re6_k2 = 9.99e-6 substance; re6_k3 = 0.1 substance; re6_k4 = 9e-5 substance; re6_k5 = 0.0009 substance; re6_k6 = 0.009 substance; re6_k7 = 0.9 substance; re6_k8 = 0.0099 substance; re6_k9 = 0.00999 substance; re6_k10 = 0.00999 substance; re6_k11 = 0.00099 substance; re6_k12 = 0.09 substance; re6_k13 = 0.00999 substance; re6_k14 = 0.009 substance; re6_k15 = 0.00999 substance; re6_k16 = 0.009999 substance; re6_k17 = 0.04999 substance;
  re9: MyD88 => IRAK1_4; v29*8300/(re9_k30 + 8300);  // modifiers: kinase
    re9_k1 = 0.0099 substance; re9_v1 = 1 substance; re9_k2 = 0.00999 substance; re9_v2 = 2 substance; re9_k3 = 0.00999 substance; re9_v3 = 0.25 substance; re9_k4 = 1 substance; re9_v4 = 2 substance; re9_k5 = 2.5 substance; re9_v5 = 10 substance; re9_k6 = 5 substance; re9_v6 = 3 substance; re9_k7 = 0.0099 substance; re9_v7 = 5 substance; re9_k8 = 0.0055 substance; re9_v8 = 5 substance; re9_k9 = 0.0099 substance; re9_v9 = 10 substance; re9_k10 = 0.0099 substance; re9_v10 = 5 substance; re9_k11 = 0.1 substance; re9_v11 = 5 substance; re9_k12 = 1 substance; re9_v12 = 4 substance; re9_k13 = 1 substance; re9_v13 = 6 substance; re9_k14 = 1 substance; v14 = 6 substance; re9_k15 = 0.01 substance; v15 = 8 substance; re9_k16 = 1 substance; v16 = 8 substance; re9_k17 = 0.00999 substance; v17 = 1 substance; re9_k18 = 1.5 substance; v18 = 6 substance; re9_k19 = 1 substance; v19 = 9 substance; re9_k20 = 2 substance; v20 = 8 substance; re9_k21 = 10 substance; v21 = 10 substance; re9_k22 = 0.0099 substance; v22 = 100 substance; re9_k23 = 0.00999 substance; v23 = 100 substance; re9_k24 = 0.009 substance; v24 = 10 substance; re9_k25 = 9e-6 substance; v25 = 100 substance; re9_k26 = 9e-6 substance; v26 = 80 substance; re9_k27 = 0.0008 substance; v27 = 80 substance; re9_k28 = 8.8e-5 substance; v28 = 80 substance; re9_k29 = 8e-5 substance; v29 = 400 substance; re9_k30 = 0.0002495 substance;
  re19: ATP_cytoplasm => ADP_cytoplasm; 600*re19_k3;
    re19_k1 = 0.0099 substance; re19_k2 = 0.00999 substance; re19_k3 = 0.04999 substance;
  re20: IRAK1_4 => TRAF6_complex; re20_v5*7400/(re20_k5 + 7400);  // modifiers: kinase
    re20_v1 = 5 substance; re20_k1 = 1 substance; re20_v2 = 6 substance; re20_k2 = 1 substance; re20_v3 = 80 substance; re20_k3 = 8e-5 substance; re20_v4 = 390 substance; re20_k4 = 0.0002495 substance; re20_v5 = 400 substance; re20_k5 = 0.0002495 substance;
  re21: ATP_cytoplasm => ADP_cytoplasm; 600*re21_k2;
    re21_k1 = 0.0099 substance; re21_k2 = 0.04999 substance;
  re24: TRAF6_complex => IKK_complex; 7400*re24_k5;
    re24_v1 = 6 substance; re24_k1 = 1 substance; re24_v2 = 80 substance; re24_k2 = 8e-5 substance; re24_v3 = 400 substance; re24_k3 = 0.0002495 substance; re24_k4 = 0.0999 substance; re24_k5 = 0.04999 substance;
  re25: ATP_cytoplasm => ADP_cytoplasm; 600*re25_k2;
    re25_k1 = 0.0099 substance; re25_k2 = 0.04999 substance;
  re26: IKK_complex => NF_kB_complex; 7400*re26_k13;
    re26_v1 = 6 substance; re26_k1 = 1 substance; re26_v2 = 6 substance; re26_k2 = 1 substance; re26_v3 = 6 substance; re26_k3 = 1 substance; re26_v4 = 5 substance; re26_k4 = 0.1 substance; re26_v5 = 6 substance; re26_k5 = 5 substance; re26_v6 = 6 substance; re26_k6 = 1 substance; re26_v7 = 5 substance; re26_k7 = 2 substance; re26_v8 = 6 substance; re26_k8 = 1 substance; re26_v9 = 6 substance; re26_k9 = 1 substance; re26_v10 = 80 substance; re26_k10 = 8e-5 substance; re26_v11 = 400 substance; re26_k11 = 0.0002495 substance; re26_k12 = 0.0999 substance; re26_k13 = 0.04999 substance;
  re28: ATP_cytoplasm => ADP_cytoplasm; 600*re28_k2;
    re28_k1 = 0.0099 substance; re28_k2 = 0.04999 substance;
  re29: NF_kB_complex => NF_kB; 7400*re29_k11;
    re29_k1 = 0.0099 substance; re29_k2 = 9.9e-5 substance; re29_k3 = 0.0099 substance; re29_k4 = 0.0001 substance; re29_k5 = 0.00099 substance; re29_k6 = 0.1 substance; re29_k7 = 8e-5 substance; re29_k8 = 0.008 substance; re29_k9 = 0.0099 substance; re29_k10 = 0.04999 substance; re29_k11 = 0.04999 substance;
  re32: IL12_mRNA => IL12_cytoplasm; 8000*re32_k6;
    re32_k1 = 0.00999 substance; re32_k2 = 0.00999 substance; re32_k3 = 0.009999 substance; re32_k4 = 0.00999 substance; re32_k5 = 0.04999 substance; re32_k6 = 0.04999 substance;
  re33: IL12_cytoplasm => IL12_Plasma_membrane; 5000*re33_k3;
    re33_k1 = 0.00999 substance; re33_k2 = 0.00999 substance; re33_k3 = 0.04999 substance;
  re52: JAK2_TYK2 => s79; 7000*re52_k18;
    re52_v1 = 100 substance; re52_k1 = 8e-5 substance; re52_v2 = 80 substance; re52_k2 = 9e-5 substance; re52_k3 = 0.00999 substance; re52_k4 = 0.00999 substance; re52_k5 = 9e-5 substance; re52_k6 = 0.00999 substance; re52_v3 = 80 substance; re52_k7 = 9e-5 substance; re52_v4 = 80 substance; re52_k8 = 9e-5 substance; re52_v5 = 90 substance; re52_k9 = 9e-5 substance; re52_v6 = 90 substance; re52_k10 = 8e-5 substance; re52_v7 = 90 substance; re52_k11 = 9e-5 substance; re52_v8 = 90 substance; re52_k12 = 9e-5 substance; re52_v9 = 80 substance; re52_k13 = 9e-5 substance; re52_v10 = 100 substance; re52_k14 = 9e-5 substance; re52_v11 = 90 substance; re52_k15 = 8e-5 substance; re52_v12 = 80 substance; re52_k16 = 8e-5 substance; re52_v13 = 90 substance; re52_k17 = 7e-5 substance; re52_k18 = 0.04999 substance;
  re53: 2 s79 => s87; 2500*re53_k27;
    re53_k1 = 0.00999 substance; re53_k2 = 8e-5 substance; re53_k3 = 0.001 substance; re53_k4 = 0.1 substance; re53_k5 = 0.00999 substance; re53_k6 = 0.00099 substance; re53_k7 = 0.000999 substance; re53_k8 = 0.00999 substance; re53_k9 = 9.09e-5 substance; re53_k10 = 0.098 substance; re53_k11 = 9.99e-6 substance; re53_k12 = 0.000999 substance; re53_k13 = 0.00111 substance; re53_k14 = 0.00555 substance; re53_k15 = 9.99e-5 substance; re53_k16 = 8.8e-5 substance; re53_k17 = 0.001 substance; re53_k18 = 0.00999 substance; re53_k19 = 0.00999 substance; re53_k20 = 0.00999 substance; re53_k21 = 0.00999 substance; re53_k22 = 0.00999 substance; re53_k23 = 0.00999 substance; re53_k24 = 0.04999 substance; re53_k25 = 0.04999 substance; re53_k26 = 0.04999 substance; re53_k27 = 0.04999 substance;
  re56: NOS2 => iNOS; 1000*re56_k4;
    re56_k1 = 0.00999 substance; re56_k2 = 0.00999 substance; re56_k3 = 0.00999 substance; re56_k4 = 0.04999 substance;
  re57: ATP_cytoplasm => ADP_cytoplasm; 600*re57_k2;
    re57_k1 = 0.00999 substance; re57_k2 = 0.04999 substance;
  re59: L_Arginine => NO; re59_v10*7000/(re59_k10 + 7000);  // modifiers: iNOS
    re59_v1 = 100 substance; re59_k1 = 8e-5 substance; re59_v2 = 10 substance; re59_k2 = 8e-5 substance; re59_v3 = 80 substance; re59_k3 = 8e-5 substance; re59_v4 = 500 substance; re59_k4 = 0.0002495 substance; re59_v5 = 1000 substance; re59_k5 = 0.0002495 substance; re59_v6 = 550 substance; re59_k6 = 0.0002495 substance; re59_v7 = 800 substance; re59_k7 = 0.0002495 substance; re59_v8 = 550 substance; re59_k8 = 0.0002495 substance; re59_v9 = 450 substance; re59_k9 = 0.0002495 substance; re59_v10 = 350 substance; re59_k10 = 0.0002495 substance;
  re62: NADPH => NADP; 1000*re62_k3;
    re62_k1 = 0.00999 substance; re62_k2 = 0.00999 substance; re62_k3 = 0.04999 substance;
  re63: O2 => CITRULLINE; 4000*re63_k3;
    re63_k1 = 0.00999 substance; re63_k2 = 0.04999 substance; re63_k3 = 0.04999 substance;
  re70: Aspartate_cytoplasm + CITRULLINE => Argininosuccinate; re70_v3*3000/(re70_k3 + 3000);  // modifiers: Argininosuccinate_synthase
    re70_v1 = 90 substance; re70_k1 = 9e-5 substance; re70_v2 = 490 substance; re70_k2 = 0.0002495 substance; re70_v3 = 150 substance; re70_k3 = 0.0002495 substance;
  re71: Argininosuccinate => Fumarate + L_Arginine; re71_v6*2000/(re71_k6 + 2000);  // modifiers: Argininosuccinate_lyase
    re71_v1 = 90 substance; re71_k1 = 9e-5 substance; re71_v2 = 90 substance; re71_k2 = 9e-5 substance; re71_v3 = 50 substance; re71_k3 = 9e-5 substance; re71_v4 = 225 substance; re71_k4 = 0.0002495 substance; re71_v5 = 400 substance; re71_k5 = 0.0002495 substance; re71_v6 = 100 substance; re71_k6 = 0.0002495 substance;
  re72: ATP_cytoplasm => AMP; 600*re72_k3;
    re72_k1 = 0.00999 substance; re72_k2 = 0.04999 substance; re72_k3 = 0.04999 substance;
  re73: Acetyl_CoA + Oxaloacetate => Citric_acid + CoA; re73_v12*9000/(re73_k12 + 9000);  // modifiers: Citrate_synthase
    re73_v1 = 80 substance; re73_k1 = 9e-5 substance; re73_v2 = 90 substance; re73_k2 = 9e-5 substance; re73_v3 = 80 substance; re73_k3 = 8e-5 substance; re73_v4 = 100 substance; re73_k4 = 0.00999 substance; re73_v5 = 99 substance; re73_k5 = 9e-5 substance; re73_v6 = 90 substance; re73_k6 = 9e-5 substance; re73_v7 = 60 substance; re73_k7 = 9e-5 substance; re73_v8 = 10 substance; re73_k8 = 9e-5 substance; re73_v9 = 90 substance; re73_k9 = 9e-5 substance; re73_v10 = 90 substance; re73_k10 = 9e-5 substance; re73_v11 = 90 substance; re73_k11 = 9e-5 substance; re73_v12 = 450 substance; re73_k12 = 0.0002495 substance;
  re74: Citric_acid => cis_Aconitate + H2O; re74_v11*8000/(re74_k11 + 8000);  // modifiers: Aconitase
    re74_v1 = 80 substance; re74_k1 = 9e-5 substance; re74_v2 = 90 substance; re74_k2 = 9e-5 substance; re74_v3 = 10 substance; re74_k3 = 9e-5 substance; re74_v4 = 90 substance; re74_k4 = 9e-5 substance; re74_v5 = 90 substance; re74_k5 = 9e-5 substance; re74_v6 = 80 substance; re74_k6 = 8e-5 substance; re74_v7 = 80 substance; re74_k7 = 0.00999 substance; re74_v8 = 80 substance; re74_k8 = 8e-5 substance; re74_v9 = 80 substance; re74_k9 = 9e-5 substance; re74_v10 = 450 substance; re74_k10 = 0.0002495 substance; re74_v11 = 400 substance; re74_k11 = 0.0002495 substance;
  re75: Pyruvate => Acetyl_CoA; re75_v6*10000/(re75_k6 + 10000);  // modifiers: Pyruvate_dehydrogenase
    re75_v1 = 80 substance; re75_k1 = 9e-5 substance; re75_v2 = 90 substance; re75_k2 = 9e-5 substance; re75_v3 = 90 substance; re75_k3 = 0.0009 substance; re75_v4 = 90 substance; re75_k4 = 9e-5 substance; re75_v5 = 90 substance; re75_k5 = 9e-5 substance; re75_v6 = 500 substance; re75_k6 = 0.0002495 substance;
  re76: cis_Aconitate + H2O => D_Isocitrate; re76_v4*8000/(re76_k4 + 8000);  // modifiers: Aconitase
    re76_v1 = 90 substance; re76_k1 = 9e-5 substance; re76_v2 = 90 substance; re76_k2 = 9e-5 substance; re76_v3 = 80 substance; re76_k3 = 8e-5 substance; re76_v4 = 400 substance; re76_k4 = 0.0002495 substance;
  re77: NAD_Mitochondria => NADH; 1000*re77_k2;
    re77_k1 = 0.00999 substance; re77_k2 = 0.04999 substance;
  re78: D_Isocitrate => s149 + $CO2; re78_v10*7000/(re78_k10 + 7000);  // modifiers: Isocitrate_dehydrogenase
    re78_v1 = 90 substance; re78_k1 = 9e-5 substance; re78_v2 = 10 substance; re78_k2 = 9e-5 substance; re78_v3 = 90 substance; re78_k3 = 9e-5 substance; re78_v4 = 90 substance; re78_k4 = 9e-5 substance; re78_v5 = 10 substance; re78_k5 = 9e-5 substance; re78_v6 = 90 substance; re78_k6 = 9e-5 substance; re78_v7 = 10 substance; re78_k7 = 9e-5 substance; re78_v8 = 90 substance; re78_k8 = 9e-5 substance; re78_v9 = 80 substance; re78_k9 = 9e-5 substance; re78_v10 = 320 substance; re78_k10 = 0.0002495 substance;
  re79: s149 + CoA => Succinyl_CoA + $CO2; re79_v4*6000/(re79_k4 + 6000);  // modifiers: a_ketoglutarate_dehydrogenase
    re79_v1 = 90 substance; re79_k1 = 9e-5 substance; re79_v2 = 90 substance; re79_k2 = 9e-5 substance; re79_v3 = 80 substance; re79_k3 = 9e-5 substance; re79_v4 = 300 substance; re79_k4 = 0.0002495 substance;
  re80: NAD_Mitochondria => NADH; 1000*re80_k2;
    re80_k1 = 0.0099 substance; re80_k2 = 0.04999 substance;
  re81: Succinyl_CoA => Succinate; re81_v6*5000/(re81_k6 + 5000);  // modifiers: Succinyl_CoA_synthetase
    re81_v1 = 80 substance; re81_k1 = 9e-5 substance; re81_v2 = 80 substance; re81_k2 = 8e-5 substance; re81_v3 = 80 substance; re81_k3 = 9e-5 substance; re81_v4 = 80 substance; re81_k4 = 9e-5 substance; re81_v5 = 50 substance; re81_k5 = 9e-5 substance; re81_v6 = 250 substance; re81_k6 = 0.0002495 substance;
  re85: GDP -> GTP; 1000*re85_k3;
    re85_k1 = 0.00999 substance; re85_k2 = 0.00999 substance; re85_k3 = 0.04999 substance;
  re87: ATP_Mitochondria => ADP_Mitochondria; 1000*re87_k2;
    re87_k1 = 0.00999 substance; re87_k2 = 0.04999 substance;
  re88: Oxaloacetate => Aspartate_Mitochondria; re88_v3*1000/(re88_k3 + 1000);  // modifiers: Aspartate_transaminase
    re88_v1 = 60 substance; re88_k1 = 9e-5 substance; re88_v2 = 10 substance; re88_k2 = 9e-5 substance; re88_v3 = 50 substance; re88_k3 = 0.0002495 substance;
  re89: Glutamate => s174; 800*re89_k4;
    re89_k1 = 0.00999 substance; re89_k2 = 0.00999 substance; re89_k3 = 0.00999 substance; re89_k4 = 0.04999 substance;
  re90: Aspartate_Mitochondria => Aspartate_cytoplasm; 800*re90_k2;
    re90_k1 = 0.00999 substance; re90_k2 = 0.04999 substance;
  re91: Tryptophan => Formylkynurenine; re91_v2*10000/(re91_k2 + 10000);  // modifiers: tryptophan_2_3_dioxygenase
    re91_v1 = 90 substance; re91_k1 = 9e-5 substance; re91_v2 = 500 substance; re91_k2 = 0.0002495 substance;
  re92: Formylkynurenine => Kynurenine; re92_v2*9000/(re92_k2 + 9000);  // modifiers: Kynurenine_formamidase
    re92_v1 = 90 substance; re92_k1 = 9e-5 substance; re92_v2 = 450 substance; re92_k2 = 0.0002495 substance;
  re93: Kynurenine => Quinolinic_acid; re93_v3*8000/(re93_k3 + 8000);  // modifiers: Enzymes
    re93_v1 = 80 substance; re93_k1 = 9e-5 substance; re93_v2 = 350 substance; re93_k2 = 0.0002495 substance; re93_v3 = 400 substance; re93_k3 = 0.0002495 substance;
  re94: Quinolinic_acid => NAD_cytoplasm; re94_v2*7000/(re94_k2 + 7000);  // modifiers: QPRT
    re94_v1 = 80 substance; re94_k1 = 9e-5 substance; re94_v2 = 400 substance; re94_k2 = 0.0002495 substance;
  re96: Succinate_dehydrogenase => Electron_Transport_Chain; 5000*re96_k2;
    re96_k1 = 0.0099 substance; re96_k2 = 0.04999 substance;
  re97: NAD_cytoplasm => Electron_Transport_Chain; re97_v4*6000/(re97_k5 + 6000);
    re97_k1 = 0.00999 substance; re97_v1 = 300 substance; re97_k2 = 0.0002495 substance; re97_v2 = 350 substance; re97_k3 = 0.0002495 substance; re97_v3 = 450 substance; re97_k4 = 0.0002495 substance; re97_v4 = 400 substance; re97_k5 = 0.0002495 substance;
  re98: Electron_Transport_Chain => ROS; 5000*re98_k3;
    re98_k1 = 0.00999 substance; re98_k2 = 0.04999 substance; re98_k3 = 0.04999 substance;
  re99: Electron_Transport_Chain => ROS; 6000*re99_k3;
    re99_k1 = 0.00999 substance; re99_k2 = 0.04999 substance; re99_k3 = 0.04999 substance;
  re100: L_Arginine => L_Arginine; 1500*re100_k3;
    re100_k1 = 0.00999 substance; re100_k2 = 0.04999 substance; re100_k3 = 0.04999 substance;
  re101: ROS => GSK_3b; 4000*re101_k2;
    re101_k1 = 0.00999 substance; re101_k2 = 0.04999 substance;
  re106: s87 => STAT4_Nucleus; 2500*re106_k4;
    re106_k1 = 0.00999 substance; re106_k2 = 0.00999 substance; re106_k3 = 0.04999 substance; re106_k4 = 0.04999 substance;
  re108: IFN_g_mRNA => IFN_g_cytoplasm; 1600*re108_k3;
    re108_k1 = 0.00999 substance; re108_k2 = 0.00999 substance; re108_k3 = 0.04999 substance;
  re109: IFN_g_cytoplasm => IFN_g_Plasma_membrane; 1600*re109_k5;
    re109_k1 = 0.00999 substance; re109_k2 = 0.04999 substance; re109_k3 = 0.04999 substance; re109_k4 = 0.04999 substance; re109_k5 = 0.04999 substance;
  re112: 2 s210 => s211; 4000*re112_k8;
    re112_k1 = 0.00999 substance; re112_k2 = 0.00999 substance; re112_k3 = 0.00999 substance; re112_k4 = 0.00999 substance; re112_k5 = 0.00999 substance; re112_k6 = 0.04999 substance; re112_k7 = 0.04999 substance; re112_k8 = 0.04999 substance;
  re114: s211 => STAT1_Nucleus; 2000*re114_k5;
    re114_k1 = 0.00999 substance; re114_k2 = 0.00999 substance; re114_k3 = 0.00999 substance; re114_k4 = 0.00999 substance; re114_k5 = 0.04999 substance;
  re116: JAK1_JAK2 => s210; 8000*re116_k5;
    re116_k1 = 0.00999 substance; re116_k2 = 0.00999 substance; re116_k3 = 0.00999 substance; re116_k4 = 0.04999 substance; re116_k5 = 0.04999 substance;
  re117: STAT1_Nucleus => NOS2; 1000*re117_k4;
    re117_k1 = 0.00999 substance; re117_k2 = 0.00999 substance; re117_k3 = 0.00999 substance; re117_k4 = 0.04999 substance;
  re119: STAT1_Nucleus => IL12B; 1000*re119_k2;
    re119_k1 = 0.00999 substance; re119_k2 = 0.04999 substance;
  re120: NF_kB => IL12B; 6500*re120_k1;
    re120_k1 = 0.04999 substance;
  re121: IL12B => IL12_mRNA; 10000*re121_k2;
    re121_k1 = 0.04999 substance; re121_k2 = 0.04999 substance;
  re122: STAT4_Nucleus => IFN_g_Nucleus; 2000*re122_k4;
    re122_k1 = 0.04999 substance; re122_k2 = 0.04999 substance; re122_k3 = 0.04999 substance; re122_k4 = 0.04999 substance;
  re123: IFN_g_Nucleus => IFN_g_mRNA; 1800*re123_k3;
    re123_k1 = 0.04999 substance; re123_k2 = 0.04999 substance; re123_k3 = 0.04999 substance;
  re124: IL12_Plasma_membrane + IL12R => IL12_IL12R_complex; 10000*10000*re124_k2;
    re124_k1 = 0.04999 substance; re124_k2 = 4.995e-6 substance;
  re125: IL12_IL12R_complex => JAK2_TYK2; 9000*re125_k1;
    re125_k1 = 0.04999 substance;
  re126: IFN_g_Plasma_membrane + IFN_gR => IFN_g_IFN_gR_complex; 10000*10000*re126_k1;
    re126_k1 = 4.995e-6 substance;
  re127: IFN_g_IFN_gR_complex => JAK1_JAK2; 9000*re127_k1;
    re127_k1 = 0.04999 substance;
  re128: NFAT5 => IL12B; 2000*re128_k1;
    re128_k1 = 0.04999 substance;
  re130: NFAT5 => NOS2; 2000*re130_k1;
    re130_k1 = 0.04999 substance;
  re131: NFAT5 => IFN_g_Nucleus; 2000*re131_k1;
    re131_k1 = 0.04999 substance;
  re132: T_bet => IFN_g_Nucleus; 500*re132_k1;
    re132_k1 = 0.0999 substance;
  re135: c_Rel => IL12B; 500*re135_k1;
    re135_k1 = 0.0999 substance;
  re136: IRF1 => IL12B; 500*re136_k1;
    re136_k1 = 0.0999 substance;
  re137: GSK_3b => AP_1; 800*8000/((1000 + 8000)*(1 + 8000/150));
  re138: AP_1 => IL10; 800*re138_k2;
    re138_k1 = 0.0999 substance; re138_k2 = 0.04999 substance;
  re139: IL10 => IL_10_mRNA; 700*re139_k2;
    re139_k1 = 0.0999 substance; re139_k2 = 0.0499 substance;
  re140: IL_10_mRNA => IL_10; 500*re140_k3;
    re140_k1 = 0.0999 substance; re140_k2 = 0.499 substance; re140_k3 = 0.04999 substance;
  re141: NFAT5 => IL10; 450*8000/((1000 + 8000)*(1 + 8000/150));

  // Unit definitions:
  unit substance = mole;
  unit volume = litre;
  unit area = metre^2;
  unit length = metre;
  unit time = second;
end
