// SBML level 2 version 4

function Constant_flux__irreversible(v)
  v;
end
Constant_flux__irreversible is "Constant flux (irreversible)";

function function_iso(v, Sx, Sy)
  v*Sx/(Sx + Sy);
end

model New_Model()
  // Jallet2024 - Isotopic model of ethanolamine metabolism in E. coli
  // Isotopic model of ethanolamine metabolism in E. coli, used for 13C-flux calculations.
  // biomodels.db:MODEL2403010002
  // hasProperty mamo:MAMO_0000009
  // isDescribedBy doi:10.1101/2024.03.04.583360

  // Compartments:
  compartment compartment = 1;

  // Species:
  species EA_c in compartment = 1;
  species $EA_e in compartment = 16.40054;
  species EA_eut in compartment = 1;
  species AAL_eut in compartment = 1;
  species NH4_eut in compartment = 1;
  species EtOH_eut in compartment = 1;
  species AcCoA_eut in compartment = 1;
  species NADH_eut in compartment = 1;
  species NAD_eut in compartment = 1;
  species AcP_eut in compartment = 1;
  species NH4_c in compartment = 1;
  species EtOH_c in compartment = 1;
  species AcP_c_1 in compartment = 0;
  species GLY_c in compartment = 1;
  species $GLY_e in compartment = 33.82826;
  species $NH4_e in compartment = 0.3031652;
  species $EtOH_e in compartment = 0;
  species AcP_c_0 in compartment = 1;
  species $Ace_e_1 in compartment = 0.1106158;
  species $Ace_e_0 in compartment = 0.3039997;
  species BIOMASS in compartment = 0.01665158;
  species Ace_c_0 in compartment = 1;
  species Ace_c_1 in compartment = 0;

  // Parameters:
  v10_F = 1.742348;
  v14_F = 1.572459;
  v15_F = 3.693703;
  v17_F = 2.486247;
  v18_F = 11.3312;
  mu = 0.3732907;
  k_evap_EtOH = 0.03792326;
  v21_F = 6.237552;
  Initial_for_v10_F = v10_F;
  Initial_for_v13 = v13;
  Initial_for_v14_F = v14_F;
  Initial_for_v15_F = v15_F;
  Initial_for_v17_F = v17_F;
  Initial_for_v18_F = v18_F;
  Initial_for_v21_F = v21_F;
  Initial_for_v3 = v3;
  Initial_for_v4 = v4;
  Initial_for_v5 = v5;
  Initial_for_v6 = v6;
  Initial_for_v7 = v7;
  Initial_for_v8 = v8;

  // Assignment rules:
  v16 := Initial_for_v17_F + Initial_for_v18_F;
  v13 := Initial_for_v14_F + Initial_for_v15_F - Initial_for_v17_F;
  v7 := Initial_for_v13;
  v6 := Initial_for_v7;
  v5 := Initial_for_v6;
  v4 := Initial_for_v5;
  v3 := Initial_for_v4 + Initial_for_v5 + Initial_for_v10_F;
  v1 := Initial_for_v3;
  v2 := Initial_for_v3;
  v8 := Initial_for_v3;
  v9 := Initial_for_v8 - Initial_for_v21_F;
  v11 := Initial_for_v4;
  v12 := Initial_for_v4;

  // Rate rules:
  EA_e' = -BIOMASS*r1_EA_in;
  GLY_e' = -BIOMASS*r16_GLY_in;
  NH4_e' = BIOMASS*r9_NH4_out;
  EtOH_e' = BIOMASS*r12_EtOH_out;
  Ace_e_1' = BIOMASS*r14_Ace_out_1;
  Ace_e_0' = BIOMASS*r14_Ace_out_0;

  // Reactions:
  r1_EA_in: $EA_e => EA_c; compartment*Constant_flux__irreversible(v1);
  r2_EA_xch: EA_c => EA_eut; compartment*Constant_flux__irreversible(v2);
  r3_EutBC: EA_eut => NH4_eut + AAL_eut; compartment*Constant_flux__irreversible(v3);
  r4_EutG: AAL_eut + NADH_eut => EtOH_eut + NAD_eut; compartment*Constant_flux__irreversible(v4);
  r5_EutE: AAL_eut + NAD_eut => AcCoA_eut + NADH_eut; compartment*Constant_flux__irreversible(v5);
  r6_EutD: AcCoA_eut => AcP_eut; compartment*Constant_flux__irreversible(v6);
  r7_EutQ_0: AcP_c_0 => Ace_c_0; compartment*function_iso(v14_F, AcP_c_0, AcP_c_1);  // modifiers: AcP_c_1
  r8_NH4_xch: NH4_eut => NH4_c; compartment*Constant_flux__irreversible(v8);
  r9_NH4_out: NH4_c => $NH4_e; compartment*Constant_flux__irreversible(v9);
  r10_AAL_xch: AAL_eut => ; compartment*Constant_flux__irreversible(v10_F);
  r11_EtOH_xch: EtOH_eut => EtOH_c; compartment*Constant_flux__irreversible(v11);
  r12_EtOH_out: EtOH_c => $EtOH_e; compartment*Constant_flux__irreversible(v12);
  r13_AcP_xch: AcP_eut => AcP_c_1; compartment*Constant_flux__irreversible(v13);
  r14_Ace_out_1: Ace_c_1 => $Ace_e_1; compartment*function_iso(v14_F, Ace_c_1, Ace_c_0);  // modifiers: Ace_c_0
  r16_GLY_in: $GLY_e => GLY_c; compartment*Constant_flux__irreversible(v16);
  r17_glycolysis: GLY_c => AcP_c_0; compartment*Constant_flux__irreversible(v17_F);
  r18_GLY_bm: GLY_c => ; compartment*Constant_flux__irreversible(v18_F);
  r15_AcP_bm_0: AcP_c_0 => ; compartment*function_iso(v15_F, AcP_c_0, AcP_c_1);  // modifiers: AcP_c_1
  r15_AcP_bm_1: AcP_c_1 => ; compartment*function_iso(v15_F, AcP_c_1, AcP_c_0);  // modifiers: AcP_c_0
  r14_Ace_out_0: Ace_c_0 => $Ace_e_0; compartment*function_iso(v14_F, Ace_c_0, Ace_c_1);  // modifiers: Ace_c_1
  r19_growth: BIOMASS => 2 BIOMASS; compartment*mu*BIOMASS;
  r20_EtOH_evap: $EtOH_e => ; compartment*k_evap_EtOH*EtOH_e;
  r7_EutQ_1: AcP_c_1 => Ace_c_1; compartment*function_iso(v14_F, AcP_c_1, AcP_c_0);  // modifiers: AcP_c_0
  r21_NH4_growth: NH4_c => ; compartment*Constant_flux__irreversible(v21_F);

  // Unit definitions:
  unit length = metre;
  unit area = metre^2;
  unit volume = 1e-3 litre;
  unit time = second;
  unit substance = 1e-3 mole;
end
