// SBML level 3 version 1
// dcterms:bibliographicCitation: urn:miriam:doi:10.2215/CJN.08161109
// dcterms:bibliographicCitation: urn:miriam:doi:10.1111/j.1600-0404.2009.01261.x
// dcterms:bibliographicCitation: urn:miriam:doi:10.1006/abio.1997.2126
// dcterms:bibliographicCitation: urn:miriam:doi:10.1073/pnas.93.16.8175
// dcterms:bibliographicCitation: urn:miriam:doi:10.1182/blood-2004-06-2477
// dcterms:bibliographicCitation: urn:miriam:doi:10.1016/j.bcmd.2009.09.004
// dcterms:bibliographicCitation: urn:miriam:doi:10.1089/ars.2004.6.819
// dcterms:bibliographicCitation: Tosha T, Hasan MR, Theil EC. The ferritin Fe2 site at the diiron catalytic center controls the reaction with O2 in the rapid mineralization pathway. Proc Natl Acad Sci U S A. 2008;105(47):18182-18187 urn:miriam:doi:10.1073/pnas.0805083105
// dcterms:bibliographicCitation: urn:miriam:pubmed:7585245
// dcterms:bibliographicCitation: urn:miriam:doi:10.1042/BJ20021607
// dcterms:bibliographicCitation: urn:miriam:doi:10.1182/blood-2005-04-1766
// dcterms:bibliographicCitation: urn:miriam:doi:10.1074/jbc.C000664200
// dcterms:bibliographicCitation: urn:miriam:unknown:
// dcterms:bibliographicCitation: urn:miriam:doi:10.1016/S0014-5793(03)00114-5
// dcterms:bibliographicCitation: urn:miriam:doi:10.1016/j.cell.2005.06.025
// dcterms:bibliographicCitation: urn:miriam:doi:10.1124/mol.106.023556
// dcterms:bibliographicCitation: urn:miriam:doi:10.1371/journal.pone.0012371
// dcterms:bibliographicCitation: urn:miriam:doi:10.1172/JCI106697
// dcterms:bibliographicCitation: urn:miriam:doi:10.1124/jpet.106.102699

function Constant_flux_irreversible(v)
  v;
end
Constant_flux_irreversible is "Constant flux (irreversible)";

function Hill_modified_for_Fe_oxidation__1(kcat, H, FT, S, n, Km, rO)
  kcat*((H + rO)/(24 + rO))*FT*S^n/(Km^n + S^n);
end
Hill_modified_for_Fe_oxidation__1 is "Hill modified for Fe oxidation [1]";

function Rate_Law_for_nucleation_w__inhibition(k1, S, M, L, rN, ki, n, I)
  k1*S^2*M*((L + rN)/(24 + rN))*(ki^n/(ki^n + I^n));
end
Rate_Law_for_nucleation_w__inhibition is "Rate Law for nucleation w/ inhibition";

function Rate_Law_for_core_formation_no_L(k1, S, M, k2, k3, n, m, x)
  k1*S*M/(k2 + S)*(k3^n/(k3^n + M^n))*((4300^m - x^m)/4300^m);
end

function Biochemical_Hill_Function_General_1(K, a, n, LIP, Fpn)
  a*(Fpn^n/(K^n + Fpn^n))*LIP;
end

function Hill_Function____1(K, a, n, IRP)
  a*IRP^n/(K^n + IRP^n);
end
Hill_Function____1 is "Hill Function ->_1";

function Hill_Function____1_0(K, a, n, IRP)
  a*(1 - IRP^n/(K^n + IRP^n));
end
Hill_Function____1_0 is "Hill Function -|_1";

function Hill_Function____2(K, a, n, LIP)
  a*(1 - LIP^n/(K^n + LIP^n));
end
Hill_Function____2 is "Hill Function -|_2";

function Biochemical_Hill_Function_____workaround__1(K, a, n, Fpn, Hamp)
  a*(Hamp^n/(K^n + Hamp^n))*Fpn;
end
Biochemical_Hill_Function_____workaround__1 is "Biochemical Hill Function -> (workaround)_1";

function Biochemical_Hill_Function_____workaround__1_0(K, a, n, TfR2, Tf_Fe_intercell)
  a*(1 - Tf_Fe_intercell^n/(K^n + Tf_Fe_intercell^n))*TfR2;
end
Biochemical_Hill_Function_____workaround__1_0 is "Biochemical Hill Function -| (workaround)_1";

function Hepc_Expression_7__1__1(K, K1, a, a1, basal, n, _2HFE_TfR2, _2_Tf_Fe_TfR2)
  basal + a*_2HFE_TfR2^n/(K^n + _2HFE_TfR2^n) + a1*_2_Tf_Fe_TfR2/(K1 + _2_Tf_Fe_TfR2);
end
Hepc_Expression_7__1__1 is "Hepc Expression 7 [1]_1";

function Henri_Michaelis_Menten__irreversible__1(Km, V, Heme_intercell)
  V*Heme_intercell/(Km + Heme_intercell);
end
Henri_Michaelis_Menten__irreversible__1 is "Henri-Michaelis-Menten (irreversible)_1";

function Henri_Michaelis_Menten__irreversible__2(Km, V, Heme)
  V*Heme/(Km + Heme);
end
Henri_Michaelis_Menten__irreversible__2 is "Henri-Michaelis-Menten (irreversible)_2";

function Hill_expression_1(K, a, Heme)
  a*(Heme/(K + Heme));
end

function Henri_Michaelis_Menten_kcat__irreversible___1__1(C, K, HO_1, Heme)
  HO_1*C*Heme/(K + Heme);
end
Henri_Michaelis_Menten_kcat__irreversible___1__1 is "Henri-Michaelis-Menten kcat (irreversible) [1]_1";

function Rate_Law_for_reaction(K, S, M)
  K*(S/M)*M;
end

model Liver_Iron_Metabolism_with_updated_ferritin()
  // Masison2022 - Liver Iron Metabolism with updated ferritin
  // This is a new version of a liver iron model (original from Mitchell 2013 BIOMD0000000498) with updated kinetics of ferritin iron storage. It uses MODEL2211030001 as a substitute for the original ferritin reactions.
  // isDerivedFrom biomodels.db:MODEL1302260000
  // hasProperty mamo:MAMO_0000045
  // model units - substance: substance, time: time, volume: volume, area: area, length: length, extent: substance

  // Compartments:
  compartment LiverCell = 1 volume;
  compartment intercell = 1 volume;

  // Species:
  species Hamp in LiverCell = 1.137504e-8;  // uniprot:P81172; isDescribedBy doi:10.2215/CJN.08161109
  species HO_1 in LiverCell = 5.531143e-11; HO_1 is "HO-1";  // uniprot:P09601; isDescribedBy doi:10.1111/j.1600-0404.2009.01261.x
  species Heme in LiverCell = 4.81986e-9;  // kegg.compound:C00032
  species LIP in LiverCell = 4.910048e-6;  // CHEBI:29033; isDescribedBy doi:10.1006/abio.1997.2126
  species Fpn in LiverCell = 4.04747e-6;  // uniprot:Q9NP59
  species IRP in LiverCell = 4.238031e-7;  // uniprot:P21399; isDescribedBy doi:10.1073/pnas.93.16.8175
  species $Tf_Fe_intercell in intercell = 5e-6; Tf_Fe_intercell is "Tf-Fe_intercell";  // hasPart kegg.compound:P02787; hasPart kegg.compound:C00023; isDescribedBy doi:10.1182/blood-2004-06-2477
  species TfR in intercell = 2.119326e-7;  // uniprot:P02786; isDescribedBy doi:10.1016/j.bcmd.2009.09.004
  species Tf_Fe_TfR1 in intercell = 1.465865e-6; Tf_Fe_TfR1 is "Tf-Fe-TfR1";  // hasPart uniprot:P02787; hasPart uniprot:Q9UP52; hasPart kegg.compound:C00023
  species HFE in intercell = 1.89277e-8;  // uniprot:Q30201; isDescribedBy doi:10.1016/j.bcmd.2009.09.004
  species HFE_TfR in intercell = 5.525683e-8; HFE_TfR is "HFE-TfR";  // hasPart uniprot:Q30201; hasPart uniprot:P02786
  species Tf_Fe_TfR2 in intercell = 5.716924e-6; Tf_Fe_TfR2 is "Tf-Fe-TfR2";  // hasPart uniprot:P02787; hasPart kegg.compound:C00023; hasPart uniprot:Q9UP52
  species _2_Tf_Fe_TfR1 in intercell = 1.063268e-6; _2_Tf_Fe_TfR1 is "2(Tf-Fe)-TfR1";  // hasPart uniprot:P02787; hasPart kegg.compound:C00023; hasPart uniprot:P02786
  species _2HFE_TfR in intercell = 1.440691e-8; _2HFE_TfR is "2HFE-TfR";  // hasPart uniprot:Q30201; hasPart uniprot:P02786
  species _2HFE_TfR2 in intercell = 1.327963e-7; _2HFE_TfR2 is "2HFE-TfR2";  // hasPart uniprot:Q30201; hasPart uniprot:Q9UP52
  species _2_Tf_Fe_TfR2 in intercell = 2.320646e-6; _2_Tf_Fe_TfR2 is "2(Tf-Fe)-TfR2";  // hasPart uniprot:P02787; hasPart uniprot:Q9UP52; hasPart kegg.compound:C00023
  species TfR2 in intercell = 1.770464e-6;  // uniprot:Q9UP52; isDescribedBy doi:10.1016/j.bcmd.2009.09.004
  species $Heme_intercell in intercell = 1e-7;  // kegg.compound:C00032; isDescribedBy doi:10.1089/ars.2004.6.819
  species core in LiverCell = FT_cage*atoms_per_cage_initial;  // hasPart wikipedia.en:Ferrihydrite; hasPart CHEBI:192761
  species FT_cage in LiverCell = 1.349809e-8; FT_cage is "FT-cage";  // CHEBI:82594; GO:0008043
  species DFP in LiverCell = 2.61193e-8;  // isDescribedBy doi:10.1073/pnas.0805083105

  // Parameters:
  // Number of Fe atoms that are stored inside the core of a ferritin cage at the initial time
  atoms_per_cage_initial = 1500; atoms_per_cage_initial is "atoms-per-cage_initial";
  // Number of heavy ferritin subunits in a 24-mer cage.
  // (needs to be a number between 0 and 24)
  H = 4;
  rO = 2;
  // Transient number of Fe atoms that are stored inside the core of a ferritin cage
  var atoms_per_cage_transient; atoms_per_cage_transient is "atoms-per-cage_transient";
  rN = 50;
  kdecay_FT = 1.203e-5;
  re = 0;
  var FT_fe_tot; FT_fe_tot is "FT-fe-tot";
  quantity_to_number_factor = 6.02214179e23;

  // Assignment rules:
  atoms_per_cage_transient := core*quantity_to_number_factor*LiverCell/(FT_cage*quantity_to_number_factor*LiverCell);
  L := 24 - H;
  FT_fe_tot := core + DFP;

  // Reactions:
  Fpn_Export: 2 LIP => $Tf_Fe_intercell; Biochemical_Hill_Function_General_1(Fpn_Export_K, Fpn_Export_a, Fpn_Export_n, LIP, Fpn);  // modifiers: Fpn
    Fpn_Export_K = 3e-6; Fpn_Export_a = 2; Fpn_Export_n = 1;
  TfR1_expression: => TfR; intercell*Hill_Function____1(TfR1_expression_K, TfR1_expression_a, TfR1_expression_n, IRP);  // modifiers: IRP; isDescribedBy doi:10.1016/j.bcmd.2009.09.004
    TfR1_expression_K = 1e-6; TfR1_expression_a = 6e-12; TfR1_expression_n = 1;
  TfR1_degradation: TfR => ; intercell*TfR1_degradation_k1*TfR;  // isDescribedBy doi:10.1016/j.bcmd.2009.09.004
    TfR1_degradation_k1 = 8.37e-6;
  Ferroportin_Expression: => Fpn; LiverCell*Hill_Function____1_0(Ferroportin_Expression_K, Ferroportin_Expression_a, Ferroportin_Expression_n, IRP);  // modifiers: IRP
    Ferroportin_Expression_K = 5e-6; Ferroportin_Expression_a = 1e-9; Ferroportin_Expression_n = 1;
  IRP_expresion: => IRP; LiverCell*Hill_Function____2(IRP_expresion_K, IRP_expresion_a, IRP_expresion_n, LIP);  // modifiers: LIP; isDescribedBy pubmed:7585245
    IRP_expresion_K = 1e-6; IRP_expresion_a = 4e-11; IRP_expresion_n = 1;
  IRP_degradation: IRP => ; LiverCell*IRP_degradation_k1*IRP;  // isDescribedBy pubmed:7585245
    IRP_degradation_k1 = 1.597e-5;
  Fpn_degradation: Fpn => ; LiverCell*Biochemical_Hill_Function_____workaround__1(Fpn_degradation_K, Fpn_degradation_a, Fpn_degradation_n, Fpn, Hamp);  // modifiers: Hamp
    Fpn_degradation_K = 5e-9; Fpn_degradation_a = 0.0002315; Fpn_degradation_n = 5;
  HFE_degradation: HFE => ; intercell*HFE_degradation_k1*HFE;  // isDescribedBy doi:10.1042/BJ20021607
    HFE_degradation_k1 = 6.418e-5;
  HFE_expression: => HFE; intercell*Constant_flux_irreversible(HFE_expression_v);  // isDescribedBy doi:10.1042/BJ20021607
    HFE_expression_v = 2.3469e-11;
  TfR2_expression: => TfR2; intercell*Constant_flux_irreversible(TfR2_expression_v);  // isDescribedBy doi:10.1016/j.bcmd.2009.09.004
    TfR2_expression_v = 3e-11;
  TfR2_degradation: TfR2 => ; intercell*Biochemical_Hill_Function_____workaround__1_0(TfR2_degradation_K, TfR2_degradation_a, TfR2_degradation_n, TfR2, Tf_Fe_intercell);  // modifiers: Tf_Fe_intercell; isDescribedBy doi:10.1016/j.bcmd.2009.09.004
    TfR2_degradation_K = 2.5e-6; TfR2_degradation_a = 3.2e-5; TfR2_degradation_n = 1;
  Hepcidin_expression: => Hamp; LiverCell*Hepc_Expression_7__1__1(Hepcidin_expression_K, K1, Hepcidin_expression_a, a1, basal, Hepcidin_expression_n, _2HFE_TfR2, _2_Tf_Fe_TfR2);  // modifiers: _2HFE_TfR2, _2_Tf_Fe_TfR2; isDescribedBy doi:10.2215/CJN.08161109
    Hepcidin_expression_K = 1.35e-7; K1 = 6e-7; Hepcidin_expression_a = 5e-12; a1 = 5e-12; basal = 0; Hepcidin_expression_n = 5;
  Hepcidin_degradation: Hamp => ; LiverCell*Hepcidin_degradation_k1*Hamp;  // isDescribedBy doi:10.1182/blood-2005-04-1766
    Hepcidin_degradation_k1 = 0.00056;
  HFE_TfR1_binding: HFE + TfR => HFE_TfR; intercell*HFE_TfR1_binding_k1*HFE*TfR;  // isDescribedBy doi:10.1074/jbc.C000664200
    HFE_TfR1_binding_k1 = 1102000;
  HFE_TfR1_release: HFE_TfR => HFE + TfR; intercell*HFE_TfR1_release_k1*HFE_TfR;  // isDescribedBy doi:10.1074/jbc.C000664200
    HFE_TfR1_release_k1 = 0.08;
  TfR1_binding: $Tf_Fe_intercell + TfR => Tf_Fe_TfR1; intercell*TfR1_binding_k1*Tf_Fe_intercell*TfR;  // isDescribedBy doi:10.1074/jbc.C000664200
    TfR1_binding_k1 = 837400;
  TfR1_release: Tf_Fe_TfR1 => $Tf_Fe_intercell + TfR; intercell*TfR1_release_k1*Tf_Fe_TfR1;  // isDescribedBy doi:10.1074/jbc.C000664200
    TfR1_release_k1 = 0.0009142;
  HFE_TfR2_binding: 2 HFE + TfR2 => _2HFE_TfR2; intercell*HFE_TfR2_binding_k1*HFE^2*TfR2;
    HFE_TfR2_binding_k1 = 3.9438e11;
  HFE_TfR2_release: _2HFE_TfR2 => 2 HFE + TfR2; intercell*HFE_TfR2_release_k1*_2HFE_TfR2;
    HFE_TfR2_release_k1 = 0.0018;
  TfR2_binding: $Tf_Fe_intercell + TfR2 => Tf_Fe_TfR2; intercell*TfR2_binding_k1*Tf_Fe_intercell*TfR2;  // isDescribedBy doi:10.1074/jbc.C000664200
    TfR2_binding_k1 = 222390;
  TfR2_release: Tf_Fe_TfR2 => $Tf_Fe_intercell + TfR2; intercell*TfR2_release_k1*Tf_Fe_TfR2;
    TfR2_release_k1 = 0.0061;
  TfR1_binding_2: Tf_Fe_TfR1 + $Tf_Fe_intercell => _2_Tf_Fe_TfR1; intercell*TfR1_binding_2_k1*Tf_Fe_TfR1*Tf_Fe_intercell;  // isDescribedBy doi:10.1074/jbc.C000664200
    TfR1_binding_2_k1 = 121400;
  TfR1_release_2: _2_Tf_Fe_TfR1 => Tf_Fe_TfR1 + $Tf_Fe_intercell; intercell*TfR1_release_2_k1*_2_Tf_Fe_TfR1;  // isDescribedBy doi:10.1074/jbc.C000664200
    TfR1_release_2_k1 = 0.003535;
  HFE_TfR1_binding_2: HFE_TfR + HFE => _2HFE_TfR; intercell*HFE_TfR1_binding_2_k1*HFE_TfR*HFE;  // isDescribedBy doi:10.1074/jbc.C000664200
    HFE_TfR1_binding_2_k1 = 1102000;
  HFE_TfR1_release_2: _2HFE_TfR => HFE_TfR + HFE; intercell*HFE_TfR1_release_2_k1*_2HFE_TfR;  // isDescribedBy doi:10.1074/jbc.C000664200
    HFE_TfR1_release_2_k1 = 0.08;
  TfR2_binding_2: Tf_Fe_TfR2 + $Tf_Fe_intercell => _2_Tf_Fe_TfR2; intercell*TfR2_binding_2_k1*Tf_Fe_TfR2*Tf_Fe_intercell;  // isDescribedBy doi:10.1074/jbc.C000664200
    TfR2_binding_2_k1 = 69600;
  TfR2_release_2: _2_Tf_Fe_TfR2 => Tf_Fe_TfR2 + $Tf_Fe_intercell; intercell*TfR2_release_2_k1*_2_Tf_Fe_TfR2;  // isDescribedBy doi:10.1074/jbc.C000664200
    TfR2_release_2_k1 = 0.024;
  TfR1_iron_internalisation: _2_Tf_Fe_TfR1 => 4 LIP + TfR; TfR1_iron_internalisation_k1*_2_Tf_Fe_TfR1;
    TfR1_iron_internalisation_k1 = 0.8333;
  TfR2_iron_internalisation: _2_Tf_Fe_TfR2 => 4 LIP + TfR2; TfR2_iron_internalisation_k1*_2_Tf_Fe_TfR2;
    TfR2_iron_internalisation_k1 = 0.8333;
  outFlow: LIP => ; LiverCell*outFlow_k1*LIP;
    outFlow_k1 = 0.0004;
  FT_expression: => FT_cage; LiverCell*Hill_Function____1_0(FT_expression_K, FT_expression_a, FT_expression_n, IRP);  // modifiers: IRP; isDescribedBy doi:10.1016/S0014-5793(03)00114-5
    FT_expression_K = 1e-6; FT_expression_a = 2.312e-13; FT_expression_n = 1;
  HFETfR_degradation: _2HFE_TfR => ; intercell*HFETfR_degradation_k1*_2HFE_TfR;
    HFETfR_degradation_k1 = 8.37e-7;
  HFETfR2_degradation: _2HFE_TfR2 => ; intercell*HFETfR2_degradation_k1*_2HFE_TfR2;
    HFETfR2_degradation_k1 = 8.37e-5;
  Heme_uptake: $Heme_intercell => Heme; Henri_Michaelis_Menten__irreversible__1(Heme_uptake_Km, Heme_uptake_V, Heme_intercell);  // isDescribedBy doi:10.1016/j.cell.2005.06.025
    Heme_uptake_Km = 0.000125; Heme_uptake_V = 1.034e-5;
  Heme_export: Heme => $Heme_intercell; Henri_Michaelis_Menten__irreversible__2(Heme_export_Km, Heme_export_V, Heme);  // isDescribedBy doi:10.1124/mol.106.023556
    Heme_export_Km = 1.78e-5; Heme_export_V = 2.18e-5;
  HO1_exp: => HO_1; LiverCell*Hill_expression_1(HO1_exp_K, HO1_exp_a, Heme);  // modifiers: Heme; isDescribedBy doi:10.1371/journal.pone.0012371
    HO1_exp_K = 1e-9; HO1_exp_a = 2.1432e-15;
  HO1_Deg: HO_1 => ; LiverCell*HO1_Deg_k1*HO_1;  // isDescribedBy doi:10.1172/JCI106697
    HO1_Deg_k1 = 3.209e-5;
  Heme_oxygenation: Heme => LIP; LiverCell*Henri_Michaelis_Menten_kcat__irreversible___1__1(C, Heme_oxygenation_K, HO_1, Heme);  // modifiers: HO_1; subtiwiki:0000201; isDescribedBy doi:10.1124/jpet.106.102699
    C = 1.77777e4; Heme_oxygenation_K = 2e-6;
  FT_Fe_reduction: DFP => 2 LIP; LiverCell*FT_Fe_reduction_k1*DFP;
    FT_Fe_reduction_k1 = 0.2605;
  FT_Fe_oxidation: 2 LIP => DFP; LiverCell*Hill_modified_for_Fe_oxidation__1(kcat, H, FT_cage, LIP, FT_Fe_oxidation_n, FT_Fe_oxidation_Km, rO);  // modifiers: FT_cage; isDescribedBy doi:10.1073/pnas.0805083105
    kcat = 591; FT_Fe_oxidation_n = 1.3; FT_Fe_oxidation_Km = 0.00035;
  FT_core_formation: DFP => 2 core; LiverCell*Rate_Law_for_core_formation_no_L(FT_core_formation_k1, DFP, core, k2, k3, FT_core_formation_n, m, atoms_per_cage_transient);  // isDescribedBy doi:10.1073/pnas.0805083105
    FT_core_formation_k1 = 0.101564; k2 = 5e-6; k3 = 0.0046458; FT_core_formation_n = 4; m = 8;
  FT_nucleation: 2 DFP => 4 core; LiverCell*Rate_Law_for_nucleation_w__inhibition(FT_nucleation_k1, DFP, FT_cage, L, rN, ki, FT_nucleation_n, core);  // modifiers: FT_cage
    FT_nucleation_k1 = 50000000; ki = 0.000461598; FT_nucleation_n = 4;
  FT_degradation: FT_cage => ; LiverCell*kdecay_FT*FT_cage;
  FT_degradation_core_release: core => LIP; LiverCell*Rate_Law_for_reaction(kdecay_FT, core, FT_cage);  // modifiers: FT_cage

  // Unit definitions:
  unit length = metre;
  unit area = metre^2;
  unit volume = litre;
  unit time = second;
  unit substance = mole;
end
