// SBML level 2 version 4

model Nitin2023_Kinetic_model_of_cellular_metabolism()
  // Nitin2023- Kinetic model of cellular metabolism
  // A simplistic numerical model designed to simulate and augment the commercially available real-time, in-vitro, end-point kinetic glycolysis assay with and without pathway-modulating drugs to extend the insight into the cellular metabolism by elucidating the underlying mechanisms leading to the pathway end-product.
  // hasProperty mamo:MAMO_0000046

  // Compartments:
  compartment media = 1;
  compartment cell in media = 1;
  compartment mitochondria in cell = 1;

  // Species:
  species Glu_ex in media = 20000;
  species Lac_ex in media = 0;
  species $Capacity_G in media = 500;
  species Oligo in media = 0;
  species _2DG in media = 0;
  species Glu in cell = 0;
  species Pyr in cell = 0;
  species Lac in cell = 0;
  species $Capacity_M in cell = 50;
  species TCA in mitochondria = 0;
  species OxPP in mitochondria = 0;
  species CellComponents in mitochondria = 0;

  // Parameters:
  k_in = 0.00012;
  kf_1 = 1;
  kf_2 = 1;
  kf_3 = 1;
  kf_4 = 0.1;
  kr_1 = 0.01;
  kr_2 = 0.1;
  kr_4 = 1;
  kr_3 = 0.1;
  i2 = 0.1;
  kf_5 = 1;
  kf_6 = 1;
  i1 = 0.1;

  // Reactions:
  Reaction_1: Glu_ex + $Capacity_G => Glu; k_in*Glu_ex*(Capacity_G - Glu);
  Reaction_2: Glu -> Pyr; kf_1*Glu*(1 + Oligo*i2 - _2DG*i1) - kr_1*Pyr;
  Reaction_3: Pyr -> Lac; kf_2*Pyr - kr_2*Lac;
  Reaction_4: Lac -> Lac_ex; kf_3*Lac - kr_3*Lac_ex;
  Reaction_5: Pyr + $Capacity_M -> TCA; kf_4*Pyr*(Capacity_M - TCA) - kr_4*TCA;
  Reaction_10: TCA => OxPP; kf_5*TCA*(1 - Oligo*i2);
  Reaction_6: TCA => CellComponents; kf_6*TCA;
end
