// SBML level 2 version 4

model MODEL1302010030()
  // Pitkanen2014 - Metabolic reconstruction of Encephalitozoon cuniculi using CoReCo
  // This model was reconstructed with the CoReCo method (Comparative ReConstruction of genome-scale metabolic networks) from protein sequence and phylogeny data.
  // This model is described in the article:
  // Comparative Genome-Scale Reconstruction of Gapless Metabolic Networks for Present and Ancestral Species
  // Esa Pitkänen, Paula Jouhten, Jian Hou, Muhammad Fahad Syed, Peter Blomberg, Jana Kludas, Merja Oja, Liisa Holm, Merja Penttilä, Juho Rousu, Mikko Arvas
  // PLoS Comput Biol. 2014 Feb 6;10(2):e1003465
  // Abstract:
  // We introduce a novel computational approach, CoReCo, for comparative metabolic reconstruction and provide genome-scale metabolic network models for 49 important fungal species. Leveraging on the exponential growth in sequenced genome availability, our method reconstructs genome-scale gapless metabolic networks simultaneously for a large number of species by integrating sequence data in a probabilistic framework. High reconstruction accuracy is demonstrated by comparisons to the well-curated Saccharomyces cerevisiae consensus model and large-scale knock-out experiments. Our comparative approach is particularly useful in scenarios where the quality of available sequence data is lacking, and when reconstructing evolutionary distant species. Moreover, the reconstructed networks are fully carbon mapped, allowing their use in 13C flux analysis. We demonstrate the functionality and usability of the reconstructed fungal models with computational steady-state biomass production experiment, as these fungi include some of the most important production organisms in industrial biotechnology. In contrast to many existing reconstruction techniques, only minimal manual effort is required before the reconstructed models are usable in flux balance experiments. CoReCo is available at http://esaskar.github.io/CoReCo/.
  // This model is hosted on BioModels Database and identified by: MODEL1302010030 .
  // To cite BioModels Database, please use: BioModels Database: An enhanced, curated and annotated resource for published quantitative kinetic models .
  // To the extent possible under law, all copyright and related or neighbouring rights to this encoded model have been dedicated to the public domain worldwide. Please refer to CC0 Public Domain Dedication for more information.
  // hasTaxon taxonomy:6035
  // biomodels.db:MODEL1302010030
  // isDescribedBy doi:10.1371/journal.pcbi.1003465
  // isVersionOf GO:0044237

  // Compartments:
  compartment cytosol = 1;  // GO:0005737

  // Species:
  species C16471 in cytosol; C16471 is "5-Methyl-3-oxo-4-hexenoyl-CoA [cytosol]";
  species _5_Methylhex_4_enoyl_CoA_cytosol in cytosol; _5_Methylhex_4_enoyl_CoA_cytosol is "5-Methylhex-4-enoyl-CoA [cytosol]";
  species Ubiquinol_cytosol in cytosol; Ubiquinol_cytosol is "Ubiquinol [cytosol]";
  species _5_ppPur_mRNA_cytosol in cytosol; _5_ppPur_mRNA_cytosol is "5')ppPur-mRNA [cytosol]";
  species _3_Sulfinylpyruvate_cytosol in cytosol; _3_Sulfinylpyruvate_cytosol is "3-Sulfinylpyruvate [cytosol]";
  species L_Proline_cytosol in cytosol; L_Proline_cytosol is "L-Proline [cytosol]";
  species _3_5_Cyclic_GMP_cytosol in cytosol; _3_5_Cyclic_GMP_cytosol is "3',5'-Cyclic GMP [cytosol]";
  species C05995 in cytosol; C05995 is "7-Hydroxy-6-methyl-8-ribityl lumazine [cytosol]";
  species tRNA_Cys_cytosol in cytosol; tRNA_Cys_cytosol is "tRNA(Cys) [cytosol]";
  species Cathenamine_cytosol in cytosol; Cathenamine_cytosol is "Cathenamine [cytosol]";
  species L_Methionyl_tRNA_cytosol in cytosol; L_Methionyl_tRNA_cytosol is "L-Methionyl-tRNA [cytosol]";
  species Acetyl_adenylate_cytosol in cytosol; Acetyl_adenylate_cytosol is "Acetyl adenylate [cytosol]";
  species C07335 in cytosol; C07335 is "2-Amino-3-oxo-4-phosphonooxybutyrate [cytosol]";
  species _5_Aminolevulinate_cytosol in cytosol; _5_Aminolevulinate_cytosol is "5-Aminolevulinate [cytosol]";
  species _5_Aminopentanoate_cytosol in cytosol; _5_Aminopentanoate_cytosol is "5-Aminopentanoate [cytosol]";
  species C04509 in cytosol; C04509 is "di-trans,poly-cis-Decaprenyl diphosphate [cytosol]";
  species _10_OPDA_cytosol in cytosol; _10_OPDA_cytosol is "10-OPDA [cytosol]";
  species _9_10_EOT_cytosol in cytosol; _9_10_EOT_cytosol is "9,10-EOT [cytosol]";
  species Hydroxymethylbilane_cytosol in cytosol; Hydroxymethylbilane_cytosol is "Hydroxymethylbilane [cytosol]";
  species p_Benzenediol_cytosol in cytosol; p_Benzenediol_cytosol is "p-Benzenediol [cytosol]";
  species Dopaquinone_cytosol in cytosol; Dopaquinone_cytosol is "Dopaquinone [cytosol]";
  species Sphingosine_1_phosphate_cytosol in cytosol; Sphingosine_1_phosphate_cytosol is "Sphingosine 1-phosphate [cytosol]";
  species C12482 in cytosol; C12482 is "2-Pyrroline-2-carboxyl-[pcp] [cytosol]";
  species Pyrrole_2_carboxyl_pcp_cytosol in cytosol; Pyrrole_2_carboxyl_pcp_cytosol is "Pyrrole-2-carboxyl-[pcp] [cytosol]";
  species C01180 in cytosol; C01180 is "4-Methylthio-2-oxobutanoic acid [cytosol]";
  species Dihydrosanguinarine_cytosol in cytosol; Dihydrosanguinarine_cytosol is "Dihydrosanguinarine [cytosol]";
  species C01185 in cytosol; C01185 is "Nicotinate D-ribonucleotide [cytosol]";
  species C15812 in cytosol; C15812 is "Enzyme]-S-sulfanylcysteine [cytosol]";
  species Enzyme_cysteine_cytosol in cytosol; Enzyme_cysteine_cytosol is "Enzyme]-cysteine [cytosol]";
  species A00001 in cytosol; A00001 is "A00001 [cytosol]";
  species C07350 in cytosol; C07350 is "3-Methyl-1-(2,4,6-trihydroxyphenyl)butan-1-one [cytosol]";
  species Urobilin_cytosol in cytosol; Urobilin_cytosol is "Urobilin [cytosol]";
  species D_Urobilin_cytosol in cytosol; D_Urobilin_cytosol is "D-Urobilin [cytosol]";
  species I_Urobilinogen_cytosol in cytosol; I_Urobilinogen_cytosol is "I-Urobilinogen [cytosol]";
  species D_Urobilinogen_cytosol in cytosol; D_Urobilinogen_cytosol is "D-Urobilinogen [cytosol]";
  species L_Urobilin_cytosol in cytosol; L_Urobilin_cytosol is "L-Urobilin [cytosol]";
  species D_Sorbitol_cytosol in cytosol; D_Sorbitol_cytosol is "D-Sorbitol [cytosol]";
  species Coumarin_cytosol in cytosol; Coumarin_cytosol is "Coumarin [cytosol]";
  species Creatinine_cytosol in cytosol; Creatinine_cytosol is "Creatinine [cytosol]";
  species R_C_R_SH_cytosol in cytosol; R_C_R_SH_cytosol is "R'C(R)SH [cytosol]";
  species C01233 in cytosol; C01233 is "sn-glycero-3-Phosphoethanolamine [cytosol]";
  species Acyl_phosphate_cytosol in cytosol; Acyl_phosphate_cytosol is "Acyl phosphate [cytosol]";
  species Adenylyl_sulfate_cytosol in cytosol; Adenylyl_sulfate_cytosol is "Adenylyl sulfate [cytosol]";
  species p_Coumaroyl_CoA_cytosol in cytosol; p_Coumaroyl_CoA_cytosol is "p-Coumaroyl-CoA [cytosol]";
  species C01236 in cytosol; C01236 is "D-Glucono-1,5-lactone 6-phosphate [cytosol]";
  species beta_D_Glucose_cytosol in cytosol; beta_D_Glucose_cytosol is "beta-D-Glucose [cytosol]";
  species L_Arginine_cytosol in cytosol; L_Arginine_cytosol is "L-Arginine [cytosol]";
  species _2_Phenylacetamide_cytosol in cytosol; _2_Phenylacetamide_cytosol is "2-Phenylacetamide [cytosol]";
  species Acyl_carrier_protein_cytosol in cytosol; Acyl_carrier_protein_cytosol is "Acyl-carrier protein [cytosol]";
  species Sphingomyelin_cytosol in cytosol; Sphingomyelin_cytosol is "Sphingomyelin [cytosol]";
  species C16392 in cytosol; C16392 is "4-Hydroxylamino-2,6-dinitrotoluene [cytosol]";
  species _11_cis_Retinol_cytosol in cytosol; _11_cis_Retinol_cytosol is "11-cis-Retinol [cytosol]";
  species ROH_cytosol in cytosol; ROH_cytosol is "ROH [cytosol]";
  species cis_2_Hydroxycinnamate_cytosol in cytosol; cis_2_Hydroxycinnamate_cytosol is "cis-2-Hydroxycinnamate [cytosol]";
  species dTMP_cytosol in cytosol; dTMP_cytosol is "dTMP [cytosol]";
  species dUMP_cytosol in cytosol; dUMP_cytosol is "dUMP [cytosol]";
  species dGMP_cytosol in cytosol; dGMP_cytosol is "dGMP [cytosol]";
  species dTDP_cytosol in cytosol; dTDP_cytosol is "dTDP [cytosol]";
  species Orthophosphate_cytosol in cytosol; Orthophosphate_cytosol is "Orthophosphate [cytosol]";
  species ADP_cytosol in cytosol; ADP_cytosol is "ADP [cytosol]";
  species Oxygen_cytosol in cytosol; Oxygen_cytosol is "Oxygen [cytosol]";
  species NADP_cytosol in cytosol; NADP_cytosol is "NADP+ [cytosol]";
  species NADPH_cytosol in cytosol; NADPH_cytosol is "NADPH [cytosol]";
  species NADH_cytosol in cytosol; NADH_cytosol is "NADH [cytosol]";
  species NAD_cytosol in cytosol; NAD_cytosol is "NAD+ [cytosol]";
  species ATP_cytosol in cytosol; ATP_cytosol is "ATP [cytosol]";
  species H2O_cytosol in cytosol; H2O_cytosol is "H2O [cytosol]";
  species Methaneselenol_cytosol in cytosol; Methaneselenol_cytosol is "Methaneselenol [cytosol]";
  species C16619 in cytosol; C16619 is "6-Thioguanosine monophosphate [cytosol]";
  species C16618 in cytosol; C16618 is "6-Thioxanthine 5'-monophosphate [cytosol]";
  species C04157 in cytosol; C04157 is "tRNA containing N1-methylguanine [cytosol]";
  species R_Allantoin_cytosol in cytosol; R_Allantoin_cytosol is "R)(-)-Allantoin [cytosol]";
  species C03740 in cytosol; C03740 is "5-L-Glutamyl)-L-amino acid [cytosol]";
  species C16617 in cytosol; C16617 is "6-Mercaptopurine ribonucleoside triphosphate [cytosol]";
  species beta_Alanine_cytosol in cytosol; beta_Alanine_cytosol is "beta-Alanine [cytosol]";
  species _1_2_Diacyl_sn_glycerol_cytosol in cytosol; _1_2_Diacyl_sn_glycerol_cytosol is "1,2-Diacyl-sn-glycerol [cytosol]";
  species L_Lysyl_tRNA_cytosol in cytosol; L_Lysyl_tRNA_cytosol is "L-Lysyl-tRNA [cytosol]";
  species Spermidine_cytosol in cytosol; Spermidine_cytosol is "Spermidine [cytosol]";
  species Selenide_cytosol in cytosol; Selenide_cytosol is "Selenide [cytosol]";
  species D_Proline_cytosol in cytosol; D_Proline_cytosol is "D-Proline [cytosol]";
  species D_Glucose_6_phosphate_cytosol in cytosol; D_Glucose_6_phosphate_cytosol is "D-Glucose 6-phosphate [cytosol]";
  species sn_Glycerol_3_phosphate_cytosol in cytosol; sn_Glycerol_3_phosphate_cytosol is "sn-Glycerol 3-phosphate [cytosol]";
  species Tetradecanoyl_CoA_cytosol in cytosol; Tetradecanoyl_CoA_cytosol is "Tetradecanoyl-CoA [cytosol]";
  species Protein_serine_cytosol in cytosol; Protein_serine_cytosol is "Protein serine [cytosol]";
  species GDP_mannose_cytosol in cytosol; GDP_mannose_cytosol is "GDP-mannose [cytosol]";
  species L_Cysteine_cytosol in cytosol; L_Cysteine_cytosol is "L-Cysteine [cytosol]";
  species C17212 in cytosol; C17212 is "3-(2'-Methylthio)ethylmalic acid [cytosol]";
  species _1_Pyrroline_cytosol in cytosol; _1_Pyrroline_cytosol is "1-Pyrroline [cytosol]";
  species C17210 in cytosol; C17210 is "2-(2'-Methylthio)ethylmalic acid [cytosol]";
  species C17211 in cytosol; C17211 is "2-Oxo-5-methylthiopentanoic acid [cytosol]";
  species _5_L_Glutamyl_taurine_cytosol in cytosol; _5_L_Glutamyl_taurine_cytosol is "5-L-Glutamyl-taurine [cytosol]";
  species C06196 in cytosol; C06196 is "2'-Deoxyinosine 5'-phosphate [cytosol]";
  species C04732 in cytosol; C04732 is "5-Amino-6-(1-D-ribitylamino)uracil [cytosol]";
  species C11039 in cytosol; C11039 is "2'-Deoxy-5-hydroxymethylcytidine-5'-triphosphate [cytosol]";
  species Benzoyl_acetyl_CoA_cytosol in cytosol; Benzoyl_acetyl_CoA_cytosol is "Benzoyl acetyl-CoA [cytosol]";
  species _3_Methylcrotonyl_CoA_cytosol in cytosol; _3_Methylcrotonyl_CoA_cytosol is "3-Methylcrotonyl-CoA [cytosol]";
  species C05679 in cytosol; C05679 is "N-Monomethyl-2-aminoethylphosphonate [cytosol]";
  species C05674 in cytosol; C05674 is "CMP-N-trimethyl-2-aminoethylphosphonate [cytosol]";
  species C05673 in cytosol; C05673 is "CMP-2-aminoethylphosphonate [cytosol]";
  species C06429 in cytosol; C06429 is "4Z,7Z,10Z,13Z,16Z,19Z)-Docosahexaenoic acid [cytosol]";
  species beta_Aminopropionitrile_cytosol in cytosol; beta_Aminopropionitrile_cytosol is "beta-Aminopropionitrile [cytosol]";
  species Diacylglycerol_cytosol in cytosol; Diacylglycerol_cytosol is "Diacylglycerol [cytosol]";
  species Phenylpyruvate_cytosol in cytosol; Phenylpyruvate_cytosol is "Phenylpyruvate [cytosol]";
  species L_Histidyl_tRNA_His_cytosol in cytosol; L_Histidyl_tRNA_His_cytosol is "L-Histidyl-tRNA(His) [cytosol]";
  species _2_Oxo_acid_cytosol in cytosol; _2_Oxo_acid_cytosol is "2-Oxo acid [cytosol]";
  species Fatty_acid_cytosol in cytosol; Fatty_acid_cytosol is "Fatty acid [cytosol]";
  species Propanoate_cytosol in cytosol; Propanoate_cytosol is "Propanoate [cytosol]";
  species L_Aspartyl_tRNA_Asp_cytosol in cytosol; L_Aspartyl_tRNA_Asp_cytosol is "L-Aspartyl-tRNA(Asp) [cytosol]";
  species _3_5_Cyclic_AMP_cytosol in cytosol; _3_5_Cyclic_AMP_cytosol is "3',5'-Cyclic AMP [cytosol]";
  species Hydroxypyruvate_cytosol in cytosol; Hydroxypyruvate_cytosol is "Hydroxypyruvate [cytosol]";
  species L_Leucyl_tRNA_cytosol in cytosol; L_Leucyl_tRNA_cytosol is "L-Leucyl-tRNA [cytosol]";
  species C14787 in cytosol; C14787 is "1S,2R)-Naphthalene 1,2-oxide [cytosol]";
  species C14786 in cytosol; C14786 is "1R,2S)-Naphthalene 1,2-oxide [cytosol]";
  species _4_Phospho_L_aspartate_cytosol in cytosol; _4_Phospho_L_aspartate_cytosol is "4-Phospho-L-aspartate [cytosol]";
  species R_C_R_S_S_R_CR_cytosol in cytosol; R_C_R_S_S_R_CR_cytosol is "R'C(R)S-S(R)CR' [cytosol]";
  species Geranyl_diphosphate_cytosol in cytosol; Geranyl_diphosphate_cytosol is "Geranyl diphosphate [cytosol]";
  species _2_5_Dichlorophenol_cytosol in cytosol; _2_5_Dichlorophenol_cytosol is "2,5-Dichlorophenol [cytosol]";
  species _6_Carboxyhexanoyl_CoA_cytosol in cytosol; _6_Carboxyhexanoyl_CoA_cytosol is "6-Carboxyhexanoyl-CoA [cytosol]";
  species D_Glucosamine_cytosol in cytosol; D_Glucosamine_cytosol is "D-Glucosamine [cytosol]";
  species C16365 in cytosol; C16365 is "5-Acetylamino-6-formylamino-3-methyluracil [cytosol]";
  species Pantothenate_cytosol in cytosol; Pantothenate_cytosol is "Pantothenate [cytosol]";
  species Ceramide_1_phosphate_cytosol in cytosol; Ceramide_1_phosphate_cytosol is "Ceramide 1-phosphate [cytosol]";
  species C16366 in cytosol; C16366 is "5-Acetylamino-6-amino-3-methyluracil [cytosol]";
  species C04549 in cytosol; C04549 is "1-Phosphatidyl-1D-myo-inositol 3-phosphate [cytosol]";
  species _5_L_Glutamyl_amino_acid_cytosol in cytosol; _5_L_Glutamyl_amino_acid_cytosol is "5-L-Glutamyl amino acid [cytosol]";
  species Cys_Gly_cytosol in cytosol; Cys_Gly_cytosol is "Cys-Gly [cytosol]";
  species R_5_Diphosphomevalonate_cytosol in cytosol; R_5_Diphosphomevalonate_cytosol is "R)-5-Diphosphomevalonate [cytosol]";
  species Strictosidine_aglycone_cytosol in cytosol; Strictosidine_aglycone_cytosol is "Strictosidine aglycone [cytosol]";
  species C03564 in cytosol; C03564 is "1-Pyrroline-2-carboxylate [cytosol]";
  species L_Asparaginyl_tRNA_Asn_cytosol in cytosol; L_Asparaginyl_tRNA_Asn_cytosol is "L-Asparaginyl-tRNA(Asn) [cytosol]";
  species C11822 in cytosol; C11822 is "2-Aminomalonate semialdehyde [cytosol]";
  species Sulfur_cytosol in cytosol; Sulfur_cytosol is "Sulfur [cytosol]";
  species Miraxanthin_V_cytosol in cytosol; Miraxanthin_V_cytosol is "Miraxanthin-V [cytosol]";
  species Aldophosphamide_cytosol in cytosol; Aldophosphamide_cytosol is "Aldophosphamide [cytosol]";
  species Phosphoramide_mustard_cytosol in cytosol; Phosphoramide_mustard_cytosol is "Phosphoramide mustard [cytosol]";
  species C03881 in cytosol; C03881 is "N-Tetradecanoylglycylpeptide [cytosol]";
  species C03968 in cytosol; C03968 is "1-Alkyl-sn-glycero-3-phosphate [cytosol]";
  species _3_Oxohexanoyl_CoA_cytosol in cytosol; _3_Oxohexanoyl_CoA_cytosol is "3-Oxohexanoyl-CoA [cytosol]";
  species _3_Oxodecanoyl_CoA_cytosol in cytosol; _3_Oxodecanoyl_CoA_cytosol is "3-Oxodecanoyl-CoA [cytosol]";
  species C04692 in cytosol; C04692 is "Peptide 2-[3-carboxy-3-(methylammonio)propyl]-L-histidine [cytosol]";
  species _3_Oxooctanoyl_CoA_cytosol in cytosol; _3_Oxooctanoyl_CoA_cytosol is "3-Oxooctanoyl-CoA [cytosol]";
  species _3_Oxotetradecanoyl_CoA_cytosol in cytosol; _3_Oxotetradecanoyl_CoA_cytosol is "3-Oxotetradecanoyl-CoA [cytosol]";
  species _3_Oxododecanoyl_CoA_cytosol in cytosol; _3_Oxododecanoyl_CoA_cytosol is "3-Oxododecanoyl-CoA [cytosol]";
  species CDP_diacylglycerol_cytosol in cytosol; CDP_diacylglycerol_cytosol is "CDP-diacylglycerol [cytosol]";
  species Dihydrobiopterin_cytosol in cytosol; Dihydrobiopterin_cytosol is "Dihydrobiopterin [cytosol]";
  species Folate_cytosol in cytosol; Folate_cytosol is "Folate [cytosol]";
  species Hypoxanthine_cytosol in cytosol; Hypoxanthine_cytosol is "Hypoxanthine [cytosol]";
  species alpha_D_Glucose_cytosol in cytosol; alpha_D_Glucose_cytosol is "alpha-D-Glucose [cytosol]";
  species _2_3_Dihydroxynaphthalene_cytosol in cytosol; _2_3_Dihydroxynaphthalene_cytosol is "2,3-Dihydroxynaphthalene [cytosol]";
  species Ethanol_cytosol in cytosol; Ethanol_cytosol is "Ethanol [cytosol]";
  species _2_Deoxy_scyllo_inosamine_cytosol in cytosol; _2_Deoxy_scyllo_inosamine_cytosol is "2-Deoxy-scyllo-inosamine [cytosol]";
  species C17581 in cytosol; C17581 is "3-Amino-2,3-dideoxy-scyllo-inosose [cytosol]";
  species Chitin_cytosol in cytosol; Chitin_cytosol is "Chitin [cytosol]";
  species dUTP_cytosol in cytosol; dUTP_cytosol is "dUTP [cytosol]";
  species C11038 in cytosol; C11038 is "2'-Deoxy-5-hydroxymethylcytidine-5'-diphosphate [cytosol]";
  species L_Kynurenine_cytosol in cytosol; L_Kynurenine_cytosol is "L-Kynurenine [cytosol]";
  species dGTP_cytosol in cytosol; dGTP_cytosol is "dGTP [cytosol]";
  species Hydrogen_sulfide_cytosol in cytosol; Hydrogen_sulfide_cytosol is "Hydrogen sulfide [cytosol]";
  species Thiosulfate_cytosol in cytosol; Thiosulfate_cytosol is "Thiosulfate [cytosol]";
  species Azathioprine_cytosol in cytosol; Azathioprine_cytosol is "Azathioprine [cytosol]";
  species Protein_lysine_cytosol in cytosol; Protein_lysine_cytosol is "Protein lysine [cytosol]";
  species Apocytochrome_c_cytosol in cytosol; Apocytochrome_c_cytosol is "Apocytochrome c [cytosol]";
  species C03702 in cytosol; C03702 is "Histone N6-methyl-L-lysine [cytosol]";
  species C04646 in cytosol; C04646 is "6-Thioinosine-5'-monophosphate [cytosol]";
  species Dehydroascorbate_cytosol in cytosol; Dehydroascorbate_cytosol is "Dehydroascorbate [cytosol]";
  species _4_Bromophenol_cytosol in cytosol; _4_Bromophenol_cytosol is "4-Bromophenol [cytosol]";
  species C03819 in cytosol; C03819 is "1-Acylglycerophosphoinositol [cytosol]";
  species _3_Methoxytyramine_cytosol in cytosol; _3_Methoxytyramine_cytosol is "3-Methoxytyramine [cytosol]";
  species D_Arabinose_cytosol in cytosol; D_Arabinose_cytosol is "D-Arabinose [cytosol]";
  species Thymidine_cytosol in cytosol; Thymidine_cytosol is "Thymidine [cytosol]";
  species Dihydrolipoate_cytosol in cytosol; Dihydrolipoate_cytosol is "Dihydrolipoate [cytosol]";
  species Oxaloacetate_cytosol in cytosol; Oxaloacetate_cytosol is "Oxaloacetate [cytosol]";
  species Glycine_cytosol in cytosol; Glycine_cytosol is "Glycine [cytosol]";
  species GDP_cytosol in cytosol; GDP_cytosol is "GDP [cytosol]";
  species Heme_cytosol in cytosol; Heme_cytosol is "Heme [cytosol]";
  species Acetate_cytosol in cytosol; Acetate_cytosol is "Acetate [cytosol]";
  species D_Glucose_cytosol in cytosol; D_Glucose_cytosol is "D-Glucose [cytosol]";
  species Butanoyl_CoA_cytosol in cytosol; Butanoyl_CoA_cytosol is "Butanoyl-CoA [cytosol]";
  species L_Histidine_cytosol in cytosol; L_Histidine_cytosol is "L-Histidine [cytosol]";
  species Methanol_cytosol in cytosol; Methanol_cytosol is "Methanol [cytosol]";
  species dATP_cytosol in cytosol; dATP_cytosol is "dATP [cytosol]";
  species IMP_cytosol in cytosol; IMP_cytosol is "IMP [cytosol]";
  species Dihydroceramide_cytosol in cytosol; Dihydroceramide_cytosol is "Dihydroceramide [cytosol]";
  species _5_7_24_28_Ergostatrienol_cytosol in cytosol; _5_7_24_28_Ergostatrienol_cytosol is "5,7,24(28)-Ergostatrienol [cytosol]";
  species Glutathionylspermidine_cytosol in cytosol; Glutathionylspermidine_cytosol is "Glutathionylspermidine [cytosol]";
  species Peptidylproline_omega_0_cytosol in cytosol; Peptidylproline_omega_0_cytosol is "Peptidylproline (omega=0) [cytosol]";
  species _1_Acylglycerol_cytosol in cytosol; _1_Acylglycerol_cytosol is "1-Acylglycerol [cytosol]";
  species C00043 in cytosol; C00043 is "UDP-N-acetyl-D-glucosamine [cytosol]";
  species Succinate_cytosol in cytosol; Succinate_cytosol is "Succinate [cytosol]";
  species L_Alanine_cytosol in cytosol; L_Alanine_cytosol is "L-Alanine [cytosol]";
  species Acyl_CoA_cytosol in cytosol; Acyl_CoA_cytosol is "Acyl-CoA [cytosol]";
  species L_Lysine_cytosol in cytosol; L_Lysine_cytosol is "L-Lysine [cytosol]";
  species RNA_cytosol in cytosol; RNA_cytosol is "RNA [cytosol]";
  species Amino_acid_cytosol in cytosol; Amino_acid_cytosol is "Amino acid [cytosol]";
  species GTP_cytosol in cytosol; GTP_cytosol is "GTP [cytosol]";
  species O_D_Mannosylprotein_cytosol in cytosol; O_D_Mannosylprotein_cytosol is "O-D-Mannosylprotein [cytosol]";
  species L_Aspartate_cytosol in cytosol; L_Aspartate_cytosol is "L-Aspartate [cytosol]";
  species Glyoxylate_cytosol in cytosol; Glyoxylate_cytosol is "Glyoxylate [cytosol]";
  species C05125 in cytosol; C05125 is "2-(alpha-Hydroxyethyl)thiamine diphosphate [cytosol]";
  species L_Seryl_tRNA_Sec_cytosol in cytosol; L_Seryl_tRNA_Sec_cytosol is "L-Seryl-tRNA(Sec) [cytosol]";
  species C04236 in cytosol; C04236 is "2S)-2-Isopropyl-3-oxosuccinate [cytosol]";
  species C04230 in cytosol; C04230 is "1-Acyl-sn-glycero-3-phosphocholine [cytosol]";
  species Choline_phosphate_cytosol in cytosol; Choline_phosphate_cytosol is "Choline phosphate [cytosol]";
  species C04232 in cytosol; C04232 is "2'-Deoxyribonucleoside diphosphate [cytosol]";
  species C04233 in cytosol; C04233 is "2-Acyl-sn-glycero-3-phosphocholine [cytosol]";
  species Pantetheine_4_phosphate_cytosol in cytosol; Pantetheine_4_phosphate_cytosol is "Pantetheine 4'-phosphate [cytosol]";
  species C05941 in cytosol; C05941 is "2-Oxo-4-hydroxy-5-aminovalerate [cytosol]";
  species R_5_Phosphomevalonate_cytosol in cytosol; R_5_Phosphomevalonate_cytosol is "R)-5-Phosphomevalonate [cytosol]";
  species Tetrangomycin_cytosol in cytosol; Tetrangomycin_cytosol is "Tetrangomycin [cytosol]";
  species Tetrangulol_cytosol in cytosol; Tetrangulol_cytosol is "Tetrangulol [cytosol]";
  species Betanin_cytosol in cytosol; Betanin_cytosol is "Betanin [cytosol]";
  species Cinnavalininate_cytosol in cytosol; Cinnavalininate_cytosol is "Cinnavalininate [cytosol]";
  species C17436 in cytosol; C17436 is "di-trans,poly-cis-Heptaprenyl diphosphate [cytosol]";
  species C17437 in cytosol; C17437 is "di-trans,poly-cis-Octaprenyl diphosphate [cytosol]";
  species C17434 in cytosol; C17434 is "di-trans,poly-cis-Hexaprenyl diphosphate [cytosol]";
  species C17435 in cytosol; C17435 is "di-trans,poly-cis-Pentaprenyl diphosphate [cytosol]";
  species _3_Dehydrosphinganine_cytosol in cytosol; _3_Dehydrosphinganine_cytosol is "3-Dehydrosphinganine [cytosol]";
  species C03680 in cytosol; C03680 is "4-Imidazolone-5-propanoate [cytosol]";
  species G_5_pppR_RNA_cytosol in cytosol; G_5_pppR_RNA_cytosol is "G(5')pppR-RNA [cytosol]";
  species Gibberellin_A19_cytosol in cytosol; Gibberellin_A19_cytosol is "Gibberellin A19 [cytosol]";
  species Glycylpeptide_cytosol in cytosol; Glycylpeptide_cytosol is "Glycylpeptide [cytosol]";
  species Aminoacetaldehyde_cytosol in cytosol; Aminoacetaldehyde_cytosol is "Aminoacetaldehyde [cytosol]";
  species C16255 in cytosol; C16255 is "Dihydrolipoyllysine-residue acetyltransferase] [cytosol]";
  species Aldosterone_cytosol in cytosol; Aldosterone_cytosol is "Aldosterone [cytosol]";
  species C05345 in cytosol; C05345 is "beta-D-Fructose 6-phosphate [cytosol]";
  species Triacylglycerol_cytosol in cytosol; Triacylglycerol_cytosol is "Triacylglycerol [cytosol]";
  species eIF5A_precursor_lysine_cytosol in cytosol; eIF5A_precursor_lysine_cytosol is "eIF5A-precursor]-lysine [cytosol]";
  species C07282 in cytosol; C07282 is "eIF5A-precursor]-deoxyhypusine [cytosol]";
  species Gibberellin_A44_cytosol in cytosol; Gibberellin_A44_cytosol is "Gibberellin A44 [cytosol]";
  species _11_cis_Retinyl_palmitate_cytosol in cytosol; _11_cis_Retinyl_palmitate_cytosol is "11-cis-Retinyl palmitate [cytosol]";
  species R_S_Lactoylglutathione_cytosol in cytosol; R_S_Lactoylglutathione_cytosol is "R)-S-Lactoylglutathione [cytosol]";
  species _2_3_6_Trihydroxypyridine_cytosol in cytosol; _2_3_6_Trihydroxypyridine_cytosol is "2,3,6-Trihydroxypyridine [cytosol]";
  species Iminoaspartate_cytosol in cytosol; Iminoaspartate_cytosol is "Iminoaspartate [cytosol]";
  species L_Urobilinogen_cytosol in cytosol; L_Urobilinogen_cytosol is "L-Urobilinogen [cytosol]";
  species C04501 in cytosol; C04501 is "N-Acetyl-alpha-D-glucosamine 1-phosphate [cytosol]";
  species Pyropheophorbide_a_cytosol in cytosol; Pyropheophorbide_a_cytosol is "Pyropheophorbide a [cytosol]";
  species _3_Oxopalmitoyl_CoA_cytosol in cytosol; _3_Oxopalmitoyl_CoA_cytosol is "3-Oxopalmitoyl-CoA [cytosol]";
  species C03912 in cytosol; C03912 is "S)-1-Pyrroline-5-carboxylate [cytosol]";
  species _3_Cyano_L_alanine_cytosol in cytosol; _3_Cyano_L_alanine_cytosol is "3-Cyano-L-alanine [cytosol]";
  species C18063 in cytosol; C18063 is "C-132-Carboxypyropheophorbide a [cytosol]";
  species C05545 in cytosol; C05545 is "Protein N6,N6-dimethyl-L-lysine [cytosol]";
  species C05544 in cytosol; C05544 is "Protein N6-methyl-L-lysine [cytosol]";
  species C05546 in cytosol; C05546 is "Protein N6,N6,N6-trimethyl-L-lysine [cytosol]";
  species C18069 in cytosol; C18069 is "N1,N5,N10-Tricoumaroyl spermidine [cytosol]";
  species tRNA_Asn_cytosol in cytosol; tRNA_Asn_cytosol is "tRNA(Asn) [cytosol]";
  species tRNA_Arg_cytosol in cytosol; tRNA_Arg_cytosol is "tRNA(Arg) [cytosol]";
  species tRNA_Ala_cytosol in cytosol; tRNA_Ala_cytosol is "tRNA(Ala) [cytosol]";
  species R_Lactate_cytosol in cytosol; R_Lactate_cytosol is "R)-Lactate [cytosol]";
  species Selenomethionyl_tRNA_Met_cytosol in cytosol; Selenomethionyl_tRNA_Met_cytosol is "Selenomethionyl-tRNA(Met) [cytosol]";
  species Chenodeoxycholoyl_CoA_cytosol in cytosol; Chenodeoxycholoyl_CoA_cytosol is "Chenodeoxycholoyl-CoA [cytosol]";
  species C16591 in cytosol; C16591 is "3-Carbamoyl-2-phenylpropionic acid [cytosol]";
  species C16596 in cytosol; C16596 is "5-Phenyl-1,3-oxazinane-2,4-dione [cytosol]";
  species Homocysteine_cytosol in cytosol; Homocysteine_cytosol is "Homocysteine [cytosol]";
  species tRNA_Asp_cytosol in cytosol; tRNA_Asp_cytosol is "tRNA(Asp) [cytosol]";
  species Thiamin_monophosphate_cytosol in cytosol; Thiamin_monophosphate_cytosol is "Thiamin monophosphate [cytosol]";
  species alpha_alpha_Trehalose_cytosol in cytosol; alpha_alpha_Trehalose_cytosol is "alpha,alpha-Trehalose [cytosol]";
  species C16389 in cytosol; C16389 is "6Z,9Z,12Z,15Z,18Z)-3-Oxotetracosapenta-6,9,12,15,18-enoyl-CoA [cytosol]";
  species OPC6_CoA_cytosol in cytosol; OPC6_CoA_cytosol is "OPC6-CoA [cytosol]";
  species _4_Aminobutyraldehyde_cytosol in cytosol; _4_Aminobutyraldehyde_cytosol is "4-Aminobutyraldehyde [cytosol]";
  species L_Alanyl_tRNA_cytosol in cytosol; L_Alanyl_tRNA_cytosol is "L-Alanyl-tRNA [cytosol]";
  species Dephospho_CoA_cytosol in cytosol; Dephospho_CoA_cytosol is "Dephospho-CoA [cytosol]";
  species Hydrochloric_acid_cytosol in cytosol; Hydrochloric_acid_cytosol is "Hydrochloric acid [cytosol]";
  species tRNA_Thr_cytosol in cytosol; tRNA_Thr_cytosol is "tRNA(Thr) [cytosol]";
  species Tryptophan_cytosol in cytosol; Tryptophan_cytosol is "Tryptophan [cytosol]";
  species L_Phenylalanine_cytosol in cytosol; L_Phenylalanine_cytosol is "L-Phenylalanine [cytosol]";
  species Sterol_cytosol in cytosol; Sterol_cytosol is "Sterol [cytosol]";
  species Ascorbate_cytosol in cytosol; Ascorbate_cytosol is "Ascorbate [cytosol]";
  species L_Methionine_cytosol in cytosol; L_Methionine_cytosol is "L-Methionine [cytosol]";
  species Aldehyde_cytosol in cytosol; Aldehyde_cytosol is "Aldehyde [cytosol]";
  species Glutaminyl_tRNA_cytosol in cytosol; Glutaminyl_tRNA_cytosol is "Glutaminyl-tRNA [cytosol]";
  species Phosphoenolpyruvate_cytosol in cytosol; Phosphoenolpyruvate_cytosol is "Phosphoenolpyruvate [cytosol]";
  species UTP_cytosol in cytosol; UTP_cytosol is "UTP [cytosol]";
  species Sulfite_cytosol in cytosol; Sulfite_cytosol is "Sulfite [cytosol]";
  species C16621 in cytosol; C16621 is "1-Methyl-4-nitroimidazole [cytosol]";
  species C03677 in cytosol; C03677 is "4,21-Dehydrogeissoschizine [cytosol]";
  species C04160 in cytosol; C04160 is "tRNA containing N7-methylguanine [cytosol]";
  species S_Allantoin_cytosol in cytosol; S_Allantoin_cytosol is "S)(+)-Allantoin [cytosol]";
  species D_Fructose_6_phosphate_cytosol in cytosol; D_Fructose_6_phosphate_cytosol is "D-Fructose 6-phosphate [cytosol]";
  species Acetaldehyde_cytosol in cytosol; Acetaldehyde_cytosol is "Acetaldehyde [cytosol]";
  species Malonyl_CoA_cytosol in cytosol; Malonyl_CoA_cytosol is "Malonyl-CoA [cytosol]";
  species L_Tyrosine_cytosol in cytosol; L_Tyrosine_cytosol is "L-Tyrosine [cytosol]";
  species ITP_cytosol in cytosol; ITP_cytosol is "ITP [cytosol]";
  species H_cytosol in cytosol; H_cytosol is "H+ [cytosol]";
  species C04332 in cytosol; C04332 is "6,7-Dimethyl-8-(1-D-ribityl)lumazine [cytosol]";
  species Leukotriene_A4_cytosol in cytosol; Leukotriene_A4_cytosol is "Leukotriene A4 [cytosol]";
  species C04644 in cytosol; C04644 is "3alpha,7alpha-Dihydroxy-5beta-cholestanoyl-CoA [cytosol]";
  species Glycerophosphodiester_cytosol in cytosol; Glycerophosphodiester_cytosol is "Glycerophosphodiester [cytosol]";
  species C00670 in cytosol; C00670 is "sn-glycero-3-Phosphocholine [cytosol]";
  species C00671 in cytosol; C00671 is "S)-3-Methyl-2-oxopentanoic acid [cytosol]";
  species C01250 in cytosol; C01250 is "N-Acetyl-L-glutamate 5-semialdehyde [cytosol]";
  species C01252 in cytosol; C01252 is "4-(2-Aminophenyl)-2,4-dioxobutanoate [cytosol]";
  species beta_Naphthol_cytosol in cytosol; beta_Naphthol_cytosol is "beta-Naphthol [cytosol]";
  species alpha_Naphthol_cytosol in cytosol; alpha_Naphthol_cytosol is "alpha-Naphthol [cytosol]";
  species C15496 in cytosol; C15496 is "Oxidized thiol-containing reductant [cytosol]";
  species IDP_cytosol in cytosol; IDP_cytosol is "IDP [cytosol]";
  species C06459 in cytosol; C06459 is "N-Trimethyl-2-aminoethylphosphonate [cytosol]";
  species D_Glucose_1_phosphate_cytosol in cytosol; D_Glucose_1_phosphate_cytosol is "D-Glucose 1-phosphate [cytosol]";
  species Propanoyl_CoA_cytosol in cytosol; Propanoyl_CoA_cytosol is "Propanoyl-CoA [cytosol]";
  species Tetrahydrofolate_cytosol in cytosol; Tetrahydrofolate_cytosol is "Tetrahydrofolate [cytosol]";
  species C15556 in cytosol; C15556 is "3,4-Dihydroxy-2-butanone 4-phosphate [cytosol]";
  species ROOH_cytosol in cytosol; ROOH_cytosol is "ROOH [cytosol]";
  species _2_Oxobutanoate_cytosol in cytosol; _2_Oxobutanoate_cytosol is "2-Oxobutanoate [cytosol]";
  species _2_Acetolactate_cytosol in cytosol; _2_Acetolactate_cytosol is "2-Acetolactate [cytosol]";
  species Retinyl_ester_cytosol in cytosol; Retinyl_ester_cytosol is "Retinyl ester [cytosol]";
  species Trypanothione_disulfide_cytosol in cytosol; Trypanothione_disulfide_cytosol is "Trypanothione disulfide [cytosol]";
  species Uroporphyrinogen_I_cytosol in cytosol; Uroporphyrinogen_I_cytosol is "Uroporphyrinogen I [cytosol]";
  species dAMP_cytosol in cytosol; dAMP_cytosol is "dAMP [cytosol]";
  species C15986 in cytosol; C15986 is "2,6-Dihydroxypseudooxynicotine [cytosol]";
  species RNA_circular_cytosol in cytosol; RNA_circular_cytosol is "RNA(circular) [cytosol]";
  species dGDP_cytosol in cytosol; dGDP_cytosol is "dGDP [cytosol]";
  species C06597 in cytosol; C06597 is "1,3,4,6-Tetrachloro-1,4-cyclohexadiene [cytosol]";
  species C05604 in cytosol; C05604 is "2-Carboxy-2,3-dihydro-5,6-dihydroxyindole [cytosol]";
  species _1_2_4_Trichlorobenzene_cytosol in cytosol; _1_2_4_Trichlorobenzene_cytosol is "1,2,4-Trichlorobenzene [cytosol]";
  species L_Threonyl_tRNA_Thr_cytosol in cytosol; L_Threonyl_tRNA_Thr_cytosol is "L-Threonyl-tRNA(Thr) [cytosol]";
  species C06356 in cytosol; C06356 is "2,4,6-Trihydroxybenzophenone [cytosol]";
  species _1_Alkyl_sn_glycerol_cytosol in cytosol; _1_Alkyl_sn_glycerol_cytosol is "1-Alkyl-sn-glycerol [cytosol]";
  species C01179 in cytosol; C01179 is "3-(4-Hydroxyphenyl)pyruvate [cytosol]";
  species _3_Oxo_OPC4_CoA_cytosol in cytosol; _3_Oxo_OPC4_CoA_cytosol is "3-Oxo-OPC4-CoA [cytosol]";
  species p_Benzoquinone_cytosol in cytosol; p_Benzoquinone_cytosol is "p-Benzoquinone [cytosol]";
  species C01172 in cytosol; C01172 is "beta-D-Glucose 6-phosphate [cytosol]";
  species C17500 in cytosol; C17500 is "6-Iminocyclohexa-2,4-dienone [cytosol]";
  species Retinol_cytosol in cytosol; Retinol_cytosol is "Retinol [cytosol]";
  species Cytochrome_c_cytosol in cytosol; Cytochrome_c_cytosol is "Cytochrome c [cytosol]";
  species _2_Aminoethylphosphonate_cytosol in cytosol; _2_Aminoethylphosphonate_cytosol is "2-Aminoethylphosphonate [cytosol]";
  species Thebaine_cytosol in cytosol; Thebaine_cytosol is "Thebaine [cytosol]";
  species _3_Oxo_OPC6_CoA_cytosol in cytosol; _3_Oxo_OPC6_CoA_cytosol is "3-Oxo-OPC6-CoA [cytosol]";
  species OPC4_CoA_cytosol in cytosol; OPC4_CoA_cytosol is "OPC4-CoA [cytosol]";
  species C16413 in cytosol; C16413 is "2,2',6,6'-Tetranitro-4,4'-azoxytoluene [cytosol]";
  species Portulacaxanthin_II_cytosol in cytosol; Portulacaxanthin_II_cytosol is "Portulacaxanthin II [cytosol]";
  species C14845 in cytosol; C14845 is "4-Bromophenol-2,3-epoxide [cytosol]";
  species C00681 in cytosol; C00681 is "1-Acyl-sn-glycerol 3-phosphate [cytosol]";
  species Carbamate_cytosol in cytosol; Carbamate_cytosol is "Carbamate [cytosol]";
  species _3_Oxo_OPC8_CoA_cytosol in cytosol; _3_Oxo_OPC8_CoA_cytosol is "3-Oxo-OPC8-CoA [cytosol]";
  species Histone_L_lysine_cytosol in cytosol; Histone_L_lysine_cytosol is "Histone-L-lysine [cytosol]";
  species C00689 in cytosol; C00689 is "alpha,alpha'-Trehalose 6-phosphate [cytosol]";
  species C05378 in cytosol; C05378 is "beta-D-Fructose 1,6-bisphosphate [cytosol]";
  species Hexanoyl_CoA_cytosol in cytosol; Hexanoyl_CoA_cytosol is "Hexanoyl-CoA [cytosol]";
  species L_Valyl_tRNA_Val_cytosol in cytosol; L_Valyl_tRNA_Val_cytosol is "L-Valyl-tRNA(Val) [cytosol]";
  species S_Benzoate_coenzyme_A_cytosol in cytosol; S_Benzoate_coenzyme_A_cytosol is "S-Benzoate coenzyme A [cytosol]";
  species C05696 in cytosol; C05696 is "3'-Phosphoadenylylselenate [cytosol]";
  species dCTP_cytosol in cytosol; dCTP_cytosol is "dCTP [cytosol]";
  species dTTP_cytosol in cytosol; dTTP_cytosol is "dTTP [cytosol]";
  species UMP_cytosol in cytosol; UMP_cytosol is "UMP [cytosol]";
  species Acrolein_cytosol in cytosol; Acrolein_cytosol is "Acrolein [cytosol]";
  species C04482 in cytosol; C04482 is "3-Phosphatidyl-1'-(3'-O-L-lysyl)glycerol [cytosol]";
  species C04480 in cytosol; C04480 is "3-Carboxy-2-hydroxymuconate semialdehyde [cytosol]";
  species Enzyme_N6_lipoyl_lysine_cytosol in cytosol; Enzyme_N6_lipoyl_lysine_cytosol is "Enzyme N6-(lipoyl)lysine [cytosol]";
  species C15975 in cytosol; C15975 is "Dihydrolipoyllysine-residue (2-methylpropanoyl)transferase] [cytosol]";
  species C15974 in cytosol; C15974 is "3-Methyl-1-hydroxybutyl-ThPP [cytosol]";
  species L_Dopachrome_cytosol in cytosol; L_Dopachrome_cytosol is "L-Dopachrome [cytosol]";
  species C15976 in cytosol; C15976 is "2-Methyl-1-hydroxypropyl-ThPP [cytosol]";
  species C15979 in cytosol; C15979 is "Dihydrolipoyllysine-residue (2-methylpropanoyl)transferase] [cytosol]";
  species C15978 in cytosol; C15978 is "2-Methyl-1-hydroxybutyl-ThPP [cytosol]";
  species Acetoacetyl_CoA_cytosol in cytosol; Acetoacetyl_CoA_cytosol is "Acetoacetyl-CoA [cytosol]";
  species _4_Aminobutanoate_cytosol in cytosol; _4_Aminobutanoate_cytosol is "4-Aminobutanoate [cytosol]";
  species C03735 in cytosol; C03735 is "alpha-D-Hexose 6-phosphate [cytosol]";
  species D_Mannose_1_phosphate_cytosol in cytosol; D_Mannose_1_phosphate_cytosol is "D-Mannose 1-phosphate [cytosol]";
  species _2_Phospho_D_glycerate_cytosol in cytosol; _2_Phospho_D_glycerate_cytosol is "2-Phospho-D-glycerate [cytosol]";
  species _3_Hydroxyanthranilate_cytosol in cytosol; _3_Hydroxyanthranilate_cytosol is "3-Hydroxyanthranilate [cytosol]";
  species C05977 in cytosol; C05977 is "2-Acyl-1-alkyl-sn-glycero-3-phosphate [cytosol]";
  species C05973 in cytosol; C05973 is "2-Acyl-sn-glycero-3-phosphoethanolamine [cytosol]";
  species FADH2_cytosol in cytosol; FADH2_cytosol is "FADH2 [cytosol]";
  species Carbonic_acid_cytosol in cytosol; Carbonic_acid_cytosol is "Carbonic acid [cytosol]";
  species Deacetylipecoside_cytosol in cytosol; Deacetylipecoside_cytosol is "Deacetylipecoside [cytosol]";
  species dADP_cytosol in cytosol; dADP_cytosol is "dADP [cytosol]";
  species Nucleoside_triphosphate_cytosol in cytosol; Nucleoside_triphosphate_cytosol is "Nucleoside triphosphate [cytosol]";
  species L_Glutamate_cytosol in cytosol; L_Glutamate_cytosol is "L-Glutamate [cytosol]";
  species Acetyl_CoA_cytosol in cytosol; Acetyl_CoA_cytosol is "Acetyl-CoA [cytosol]";
  species H2O2_cytosol in cytosol; H2O2_cytosol is "H2O2 [cytosol]";
  species _2_Oxoglutarate_cytosol in cytosol; _2_Oxoglutarate_cytosol is "2-Oxoglutarate [cytosol]";
  species C00021 in cytosol; C00021 is "S-Adenosyl-L-homocysteine [cytosol]";
  species AMP_cytosol in cytosol; AMP_cytosol is "AMP [cytosol]";
  species C05859 in cytosol; C05859 is "Dehydrodolichol diphosphate [cytosol]";
  species Pyruvate_cytosol in cytosol; Pyruvate_cytosol is "Pyruvate [cytosol]";
  species C00143 in cytosol; C00143 is "5,10-Methylenetetrahydrofolate [cytosol]";
  species N_Acetyl_D_glucosamine_cytosol in cytosol; N_Acetyl_D_glucosamine_cytosol is "N-Acetyl-D-glucosamine [cytosol]";
  species C00141 in cytosol; C00141 is "3-Methyl-2-oxobutanoic acid [cytosol]";
  species UDP_glucose_cytosol in cytosol; UDP_glucose_cytosol is "UDP-glucose [cytosol]";
  species GMP_cytosol in cytosol; GMP_cytosol is "GMP [cytosol]";
  species C04158 in cytosol; C04158 is "tRNA containing N2-methylguanine [cytosol]";
  species NDP_cytosol in cytosol; NDP_cytosol is "NDP [cytosol]";
  species C16173 in cytosol; C16173 is "4Z,7Z,10Z,13Z,16Z)-Docosapentaenoyl-CoA [cytosol]";
  species R_S_Cysteinylglycine_cytosol in cytosol; R_S_Cysteinylglycine_cytosol is "R-S-Cysteinylglycine [cytosol]";
  species Phosphatidylserine_cytosol in cytosol; Phosphatidylserine_cytosol is "Phosphatidylserine [cytosol]";
  species C04637 in cytosol; C04637 is "1-Phosphatidyl-D-myo-inositol 4,5-bisphosphate [cytosol]";
  species Formylisoglutamine_cytosol in cytosol; Formylisoglutamine_cytosol is "Formylisoglutamine [cytosol]";
  species S_Substituted_L_cysteine_cytosol in cytosol; S_Substituted_L_cysteine_cytosol is "S-Substituted L-cysteine [cytosol]";
  species XTP_cytosol in cytosol; XTP_cytosol is "XTP [cytosol]";
  species O2_cytosol in cytosol; O2_cytosol is "O2.- [cytosol]";
  species dCDP_cytosol in cytosol; dCDP_cytosol is "dCDP [cytosol]";
  species _5_Hydroxyisourate_cytosol in cytosol; _5_Hydroxyisourate_cytosol is "5-Hydroxyisourate [cytosol]";
  species R_S_Glutathione_cytosol in cytosol; R_S_Glutathione_cytosol is "R-S-Glutathione [cytosol]";
  species _5_L_Glutamyl_peptide_cytosol in cytosol; _5_L_Glutamyl_peptide_cytosol is "5-L-Glutamyl)-peptide [cytosol]";
  species C13378 in cytosol; C13378 is "alpha,beta-Dihydroxyethyl-TPP [cytosol]";
  species _3_Methylbutanoyl_CoA_cytosol in cytosol; _3_Methylbutanoyl_CoA_cytosol is "3-Methylbutanoyl-CoA [cytosol]";
  species Succinyl_CoA_cytosol in cytosol; Succinyl_CoA_cytosol is "Succinyl-CoA [cytosol]";
  species C04454 in cytosol; C04454 is "5-Amino-6-(5'-phosphoribitylamino)uracil [cytosol]";
  species Sphingosine_cytosol in cytosol; Sphingosine_cytosol is "Sphingosine [cytosol]";
  species _6_Hydroxyhexan_6_olide_cytosol in cytosol; _6_Hydroxyhexan_6_olide_cytosol is "6-Hydroxyhexan-6-olide [cytosol]";
  species L_Phenylalanyl_tRNA_Phe_cytosol in cytosol; L_Phenylalanyl_tRNA_Phe_cytosol is "L-Phenylalanyl-tRNA(Phe) [cytosol]";
  species L_Tryptophanyl_tRNA_Trp_cytosol in cytosol; L_Tryptophanyl_tRNA_Trp_cytosol is "L-Tryptophanyl-tRNA(Trp) [cytosol]";
  species Phytoceramide_cytosol in cytosol; Phytoceramide_cytosol is "Phytoceramide [cytosol]";
  species Phytosphingosine_cytosol in cytosol; Phytosphingosine_cytosol is "Phytosphingosine [cytosol]";
  species C26_CoA_cytosol in cytosol; C26_CoA_cytosol is "C26-CoA [cytosol]";
  species D_Fructose_cytosol in cytosol; D_Fructose_cytosol is "D-Fructose [cytosol]";
  species _2_Hydroxy_carboxylate_cytosol in cytosol; _2_Hydroxy_carboxylate_cytosol is "2-Hydroxy carboxylate [cytosol]";
  species C01171 in cytosol; C01171 is "alpha-D-Hexose 1-phosphate [cytosol]";
  species L_Cysteinyl_tRNA_Cys_cytosol in cytosol; L_Cysteinyl_tRNA_Cys_cytosol is "L-Cysteinyl-tRNA(Cys) [cytosol]";
  species L_Isoleucyl_tRNA_Ile_cytosol in cytosol; L_Isoleucyl_tRNA_Ile_cytosol is "L-Isoleucyl-tRNA(Ile) [cytosol]";
  species L_xylo_Hexulonolactone_cytosol in cytosol; L_xylo_Hexulonolactone_cytosol is "L-xylo-Hexulonolactone [cytosol]";
  species Homomethionine_cytosol in cytosol; Homomethionine_cytosol is "Homomethionine [cytosol]";
  species C03997 in cytosol; C03997 is "5-Hydroxymethyldeoxycytidylate [cytosol]";
  species Salicylate_cytosol in cytosol; Salicylate_cytosol is "Salicylate [cytosol]";
  species C03722 in cytosol; C03722 is "Pyridine-2,3-dicarboxylate [cytosol]";
  species Bromobenzene_3_4_oxide_cytosol in cytosol; Bromobenzene_3_4_oxide_cytosol is "Bromobenzene-3,4-oxide [cytosol]";
  species R_Mevalonate_cytosol in cytosol; R_Mevalonate_cytosol is "R)-Mevalonate [cytosol]";
  species Dihydrofolate_cytosol in cytosol; Dihydrofolate_cytosol is "Dihydrofolate [cytosol]";
  species Phosphatidate_cytosol in cytosol; Phosphatidate_cytosol is "Phosphatidate [cytosol]";
  species Myosin_light_chain_cytosol in cytosol; Myosin_light_chain_cytosol is "Myosin light chain [cytosol]";
  species Fecosterol_cytosol in cytosol; Fecosterol_cytosol is "Fecosterol [cytosol]";
  species Adipate_semialdehyde_cytosol in cytosol; Adipate_semialdehyde_cytosol is "Adipate semialdehyde [cytosol]";
  species _6_Hydroxyhexanoic_acid_cytosol in cytosol; _6_Hydroxyhexanoic_acid_cytosol is "6-Hydroxyhexanoic acid [cytosol]";
  species _2_Methylacetoacetyl_CoA_cytosol in cytosol; _2_Methylacetoacetyl_CoA_cytosol is "2-Methylacetoacetyl-CoA [cytosol]";
  species C03862 in cytosol; C03862 is "Dolichyl phosphate D-mannose [cytosol]";
  species tRNA_Glu_cytosol in cytosol; tRNA_Glu_cytosol is "tRNA(Glu) [cytosol]";
  species _5_6_Dihydroxyindole_cytosol in cytosol; _5_6_Dihydroxyindole_cytosol is "5,6-Dihydroxyindole [cytosol]";
  species C04039 in cytosol; C04039 is "2,3-Dihydroxy-3-methylbutanoate [cytosol]";
  species _4_Oxoglutaramate_cytosol in cytosol; _4_Oxoglutaramate_cytosol is "4-Oxoglutaramate [cytosol]";
  species Hercynine_cytosol in cytosol; Hercynine_cytosol is "Hercynine [cytosol]";
  species tRNA_Gly_cytosol in cytosol; tRNA_Gly_cytosol is "tRNA(Gly) [cytosol]";
  species tRNA_His_cytosol in cytosol; tRNA_His_cytosol is "tRNA(His) [cytosol]";
  species tRNA_Gln_cytosol in cytosol; tRNA_Gln_cytosol is "tRNA(Gln) [cytosol]";
  species Guanine_cytosol in cytosol; Guanine_cytosol is "Guanine [cytosol]";
  species tRNA_Lys_cytosol in cytosol; tRNA_Lys_cytosol is "tRNA(Lys) [cytosol]";
  species _4_Bromocatechol_cytosol in cytosol; _4_Bromocatechol_cytosol is "4-Bromocatechol [cytosol]";
  species tRNA_Ile_cytosol in cytosol; tRNA_Ile_cytosol is "tRNA(Ile) [cytosol]";
  species tRNA_Leu_cytosol in cytosol; tRNA_Leu_cytosol is "tRNA(Leu) [cytosol]";
  species Hexadecanoic_acid_cytosol in cytosol; Hexadecanoic_acid_cytosol is "Hexadecanoic acid [cytosol]";
  species _2_Acylglycerol_cytosol in cytosol; _2_Acylglycerol_cytosol is "2-Acylglycerol [cytosol]";
  species tRNA_Phe_cytosol in cytosol; tRNA_Phe_cytosol is "tRNA(Phe) [cytosol]";
  species C11356 in cytosol; C11356 is "trans,trans,cis-Geranylgeranyl diphosphate [cytosol]";
  species _7_O_Acetylsalutaridinol_cytosol in cytosol; _7_O_Acetylsalutaridinol_cytosol is "7-O-Acetylsalutaridinol [cytosol]";
  species D_Tagatose_6_phosphate_cytosol in cytosol; D_Tagatose_6_phosphate_cytosol is "D-Tagatose 6-phosphate [cytosol]";
  species Sorbitol_6_phosphate_cytosol in cytosol; Sorbitol_6_phosphate_cytosol is "Sorbitol 6-phosphate [cytosol]";
  species D_Fructose_1_phosphate_cytosol in cytosol; D_Fructose_1_phosphate_cytosol is "D-Fructose 1-phosphate [cytosol]";
  species _8_Amino_7_oxononanoate_cytosol in cytosol; _8_Amino_7_oxononanoate_cytosol is "8-Amino-7-oxononanoate [cytosol]";
  species Alcohol_cytosol in cytosol; Alcohol_cytosol is "Alcohol [cytosol]";
  species Octanoyl_CoA_cytosol in cytosol; Octanoyl_CoA_cytosol is "Octanoyl-CoA [cytosol]";
  species Thioredoxin_cytosol in cytosol; Thioredoxin_cytosol is "Thioredoxin [cytosol]";
  species Thioredoxin_disulfide_cytosol in cytosol; Thioredoxin_disulfide_cytosol is "Thioredoxin disulfide [cytosol]";
  species Phosphatidylglycerol_cytosol in cytosol; Phosphatidylglycerol_cytosol is "Phosphatidylglycerol [cytosol]";
  species _6_Phospho_D_gluconate_cytosol in cytosol; _6_Phospho_D_gluconate_cytosol is "6-Phospho-D-gluconate [cytosol]";
  species Ethanolamine_phosphate_cytosol in cytosol; Ethanolamine_phosphate_cytosol is "Ethanolamine phosphate [cytosol]";
  species Carboxylate_cytosol in cytosol; Carboxylate_cytosol is "Carboxylate [cytosol]";
  species Demethylisoalangiside_cytosol in cytosol; Demethylisoalangiside_cytosol is "Demethylisoalangiside [cytosol]";
  species Se_Methylselenocysteine_cytosol in cytosol; Se_Methylselenocysteine_cytosol is "Se-Methylselenocysteine [cytosol]";
  species L_Serine_cytosol in cytosol; L_Serine_cytosol is "L-Serine [cytosol]";
  species L_Glutamine_cytosol in cytosol; L_Glutamine_cytosol is "L-Glutamine [cytosol]";
  species Formaldehyde_cytosol in cytosol; Formaldehyde_cytosol is "Formaldehyde [cytosol]";
  species tRNA_cytosol in cytosol; tRNA_cytosol is "tRNA [cytosol]";
  species _3_Aminopropanal_cytosol in cytosol; _3_Aminopropanal_cytosol is "3-Aminopropanal [cytosol]";
  species tRNA_Sec_cytosol in cytosol; tRNA_Sec_cytosol is "tRNA(Sec) [cytosol]";
  species C04673 in cytosol; C04673 is "1D-1-Guanidino-1-deoxy-3-dehydro-scyllo-inositol [cytosol]";
  species Aldosterone_hemiacetal_cytosol in cytosol; Aldosterone_hemiacetal_cytosol is "Aldosterone hemiacetal [cytosol]";
  species C03640 in cytosol; C03640 is "Sphingosyl-phosphocholine [cytosol]";
  species C04076 in cytosol; C04076 is "L-2-Aminoadipate 6-semialdehyde [cytosol]";
  species Sulfuric_monoester_cytosol in cytosol; Sulfuric_monoester_cytosol is "Sulfuric monoester [cytosol]";
  species C16736 in cytosol; C16736 is "Thiol-containing reductant [cytosol]";
  species _1_3_Diaminopropane_cytosol in cytosol; _1_3_Diaminopropane_cytosol is "1,3-Diaminopropane [cytosol]";
  species L_Prolyl_tRNA_Pro_cytosol in cytosol; L_Prolyl_tRNA_Pro_cytosol is "L-Prolyl-tRNA(Pro) [cytosol]";
  species C00668 in cytosol; C00668 is "alpha-D-Glucose 6-phosphate [cytosol]";
  species Leukotriene_C4_cytosol in cytosol; Leukotriene_C4_cytosol is "Leukotriene C4 [cytosol]";
  species L_Arginyl_tRNA_Arg_cytosol in cytosol; L_Arginyl_tRNA_Arg_cytosol is "L-Arginyl-tRNA(Arg) [cytosol]";
  species Isophenoxazine_cytosol in cytosol; Isophenoxazine_cytosol is "Isophenoxazine [cytosol]";
  species Choline_cytosol in cytosol; Choline_cytosol is "Choline [cytosol]";
  species D_Ribose_5_phosphate_cytosol in cytosol; D_Ribose_5_phosphate_cytosol is "D-Ribose 5-phosphate [cytosol]";
  species Glycerol_cytosol in cytosol; Glycerol_cytosol is "Glycerol [cytosol]";
  species Glycerone_phosphate_cytosol in cytosol; Glycerone_phosphate_cytosol is "Glycerone phosphate [cytosol]";
  species Dolichyl_phosphate_cytosol in cytosol; Dolichyl_phosphate_cytosol is "Dolichyl phosphate [cytosol]";
  species _6_Mercaptopurine_cytosol in cytosol; _6_Mercaptopurine_cytosol is "6-Mercaptopurine [cytosol]";
  species CDP_cytosol in cytosol; CDP_cytosol is "CDP [cytosol]";
  species _2_Aminobut_2_enoate_cytosol in cytosol; _2_Aminobut_2_enoate_cytosol is "2-Aminobut-2-enoate [cytosol]";
  species C00119 in cytosol; C00119 is "5-Phospho-alpha-D-ribose 1-diphosphate [cytosol]";
  species C00118 in cytosol; C00118 is "D-Glyceraldehyde 3-phosphate [cytosol]";
  species C04718 in cytosol; C04718 is "1,6,6-Trimethyl-2,7-dioxabicyclo[3.2.2]nonan-3-one [cytosol]";
  species _5_Deoxyadenosine_cytosol in cytosol; _5_Deoxyadenosine_cytosol is "5'-Deoxyadenosine [cytosol]";
  species dUDP_cytosol in cytosol; dUDP_cytosol is "dUDP [cytosol]";
  species Taurine_cytosol in cytosol; Taurine_cytosol is "Taurine [cytosol]";
  species _6_Hydroxyprotopine_cytosol in cytosol; _6_Hydroxyprotopine_cytosol is "6-Hydroxyprotopine [cytosol]";
  species tRNA_Met_cytosol in cytosol; tRNA_Met_cytosol is "tRNA(Met) [cytosol]";
  species Glycyl_tRNA_Gly_cytosol in cytosol; Glycyl_tRNA_Gly_cytosol is "Glycyl-tRNA(Gly) [cytosol]";
  species dIDP_cytosol in cytosol; dIDP_cytosol is "dIDP [cytosol]";
  species C17744 in cytosol; C17744 is "1-(4-Hydroxyphenyl)-1-decene-3,5-dione [cytosol]";
  species C17745 in cytosol; C17745 is "1-(3,4-Dihydroxyphenyl)-1-decene-3,5-dione [cytosol]";
  species _1_Dehydro_6_gingerdione_cytosol in cytosol; _1_Dehydro_6_gingerdione_cytosol is "1-Dehydro-[6]-gingerdione [cytosol]";
  species C00235 in cytosol; C00235 is "Dimethylallyl diphosphate [cytosol]";
  species C03798 in cytosol; C03798 is "Peptidylproline (omega=180) [cytosol]";
  species C00682 in cytosol; C00682 is "2-Hydroxymuconate semialdehyde [cytosol]";
  species L_Threonine_cytosol in cytosol; L_Threonine_cytosol is "L-Threonine [cytosol]";
  species Ethanolamine_cytosol in cytosol; Ethanolamine_cytosol is "Ethanolamine [cytosol]";
  species S_Lactate_cytosol in cytosol; S_Lactate_cytosol is "S)-Lactate [cytosol]";
  species Cholesterol_cytosol in cytosol; Cholesterol_cytosol is "Cholesterol [cytosol]";
  species Glycerone_cytosol in cytosol; Glycerone_cytosol is "Glycerone [cytosol]";
  species L_Valine_cytosol in cytosol; L_Valine_cytosol is "L-Valine [cytosol]";
  species D_Mannose_cytosol in cytosol; D_Mannose_cytosol is "D-Mannose [cytosol]";
  species tRNA_Pro_cytosol in cytosol; tRNA_Pro_cytosol is "tRNA(Pro) [cytosol]";
  species L_Tyrosyl_tRNA_Tyr_cytosol in cytosol; L_Tyrosyl_tRNA_Tyr_cytosol is "L-Tyrosyl-tRNA(Tyr) [cytosol]";
  species Isophosphamide_mustard_cytosol in cytosol; Isophosphamide_mustard_cytosol is "Isophosphamide mustard [cytosol]";
  species Homocystine_cytosol in cytosol; Homocystine_cytosol is "Homocystine [cytosol]";
  species C01167 in cytosol; C01167 is "Protein tyrosine phosphate [cytosol]";
  species L_Seryl_tRNA_Ser_cytosol in cytosol; L_Seryl_tRNA_Ser_cytosol is "L-Seryl-tRNA(Ser) [cytosol]";
  species C01165 in cytosol; C01165 is "L-Glutamate 5-semialdehyde [cytosol]";
  species C05981 in cytosol; C05981 is "Phosphatidylinositol-3,4,5-trisphosphate [cytosol]";
  species C03899 in cytosol; C03899 is "S-(2-Hydroxyacyl)glutathione [cytosol]";
  species C14849 in cytosol; C14849 is "Benzo[a]pyrene-9,10-oxide [cytosol]";
  species Monodehydroascorbate_cytosol in cytosol; Monodehydroascorbate_cytosol is "Monodehydroascorbate [cytosol]";
  species C04409 in cytosol; C04409 is "2-Amino-3-carboxymuconate semialdehyde [cytosol]";
  species Cardiolipin_cytosol in cytosol; Cardiolipin_cytosol is "Cardiolipin [cytosol]";
  species Propionyladenylate_cytosol in cytosol; Propionyladenylate_cytosol is "Propionyladenylate [cytosol]";
  species C06066 in cytosol; C06066 is "4,5-Dihydro-5,5-dimethyl-4-(3-oxobutyl)furan-2(3H)-one [cytosol]";
  species Decanoyl_CoA_cytosol in cytosol; Decanoyl_CoA_cytosol is "Decanoyl-CoA [cytosol]";
  species Nalpha_Acetylpeptide_cytosol in cytosol; Nalpha_Acetylpeptide_cytosol is "Nalpha-Acetylpeptide [cytosol]";
  species C16466 in cytosol; C16466 is "7-Methyl-3-oxo-6-octenoyl-CoA [cytosol]";
  species C16468 in cytosol; C16468 is "2E)-5-Methylhexa-2,4-dienoyl-CoA [cytosol]";
  species C16469 in cytosol; C16469 is "3-Hydroxy-5-methylhex-4-enoyl-CoA [cytosol]";
  species C00620 in cytosol; C00620 is "alpha-D-Ribose 1-phosphate [cytosol]";
  species C01298 in cytosol; C01298 is "1D-1-Guanidino-3-amino-1,3-dideoxy-scyllo-inositol [cytosol]";
  species C00447 in cytosol; C00447 is "Sedoheptulose 1,7-bisphosphate [cytosol]";
  species L_Glutamyl_tRNA_Glu_cytosol in cytosol; L_Glutamyl_tRNA_Glu_cytosol is "L-Glutamyl-tRNA(Glu) [cytosol]";
  species C00441 in cytosol; C00441 is "L-Aspartate 4-semialdehyde [cytosol]";
  species _7_Isojasmonic_acid_CoA_cytosol in cytosol; _7_Isojasmonic_acid_CoA_cytosol is "7-Isojasmonic acid CoA [cytosol]";
  species Sphinganine_cytosol in cytosol; Sphinganine_cytosol is "Sphinganine [cytosol]";
  species Deoxyuridine_cytosol in cytosol; Deoxyuridine_cytosol is "Deoxyuridine [cytosol]";
  species C04282 in cytosol; C04282 is "1-Pyrroline-4-hydroxy-2-carboxylate [cytosol]";
  species R_Pantoate_cytosol in cytosol; R_Pantoate_cytosol is "R)-Pantoate [cytosol]";
  species C00448 in cytosol; C00448 is "trans,trans-Farnesyl diphosphate [cytosol]";
  species Queuine_cytosol in cytosol; Queuine_cytosol is "Queuine [cytosol]";
  species C01198 in cytosol; C01198 is "3-(2-Hydroxyphenyl)propanoate [cytosol]";
  species Selenomethionine_cytosol in cytosol; Selenomethionine_cytosol is "Selenomethionine [cytosol]";
  species Deacetylisoipecoside_cytosol in cytosol; Deacetylisoipecoside_cytosol is "Deacetylisoipecoside [cytosol]";
  species C01194 in cytosol; C01194 is "1-Phosphatidyl-D-myo-inositol [cytosol]";
  species Thiamin_diphosphate_cytosol in cytosol; Thiamin_diphosphate_cytosol is "Thiamin diphosphate [cytosol]";
  species C05680 in cytosol; C05680 is "N-Dimethyl-2-aminoethylphosphonate [cytosol]";
  species C04133 in cytosol; C04133 is "N-Acetyl-L-glutamate 5-phosphate [cytosol]";
  species C03723 in cytosol; C03723 is "Ribonucleoside diphosphate [cytosol]";
  species Adenylylselenate_cytosol in cytosol; Adenylylselenate_cytosol is "Adenylylselenate [cytosol]";
  species C18125 in cytosol; C18125 is "1-Acyl-sn-glycero-3-phosphoserine [cytosol]";
  species Dolichyl_diphosphate_cytosol in cytosol; Dolichyl_diphosphate_cytosol is "Dolichyl diphosphate [cytosol]";
  species C18126 in cytosol; C18126 is "1-Acyl-sn-glycero-3-phosphoglycerol [cytosol]";
  species C01997 in cytosol; C01997 is "Histone N6-acetyl-L-lysine [cytosol]";
  species N_Acetyl_L_glutamate_cytosol in cytosol; N_Acetyl_L_glutamate_cytosol is "N-Acetyl-L-glutamate [cytosol]";
  species Monolysocardiolipin_cytosol in cytosol; Monolysocardiolipin_cytosol is "Monolysocardiolipin [cytosol]";
  species Cholesterol_ester_cytosol in cytosol; Cholesterol_ester_cytosol is "Cholesterol ester [cytosol]";
  species tRNA_Tyr_cytosol in cytosol; tRNA_Tyr_cytosol is "tRNA(Tyr) [cytosol]";
  species dCMP_cytosol in cytosol; dCMP_cytosol is "dCMP [cytosol]";
  species D_Xylulose_5_phosphate_cytosol in cytosol; D_Xylulose_5_phosphate_cytosol is "D-Xylulose 5-phosphate [cytosol]";
  species dITP_cytosol in cytosol; dITP_cytosol is "dITP [cytosol]";
  species _4_Methyl_2_oxopentanoate_cytosol in cytosol; _4_Methyl_2_oxopentanoate_cytosol is "4-Methyl-2-oxopentanoate [cytosol]";
  species CTP_cytosol in cytosol; CTP_cytosol is "CTP [cytosol]";
  species C00236 in cytosol; C00236 is "3-Phospho-D-glyceroyl phosphate [cytosol]";
  species D_Glucono_1_5_lactone_cytosol in cytosol; D_Glucono_1_5_lactone_cytosol is "D-Glucono-1,5-lactone [cytosol]";
  species CoA_cytosol in cytosol; CoA_cytosol is "CoA [cytosol]";
  species CO2_cytosol in cytosol; CO2_cytosol is "CO2 [cytosol]";
  species Peptide_cytosol in cytosol; Peptide_cytosol is "Peptide [cytosol]";
  species Diphosphate_cytosol in cytosol; Diphosphate_cytosol is "Diphosphate [cytosol]";
  species NH3_cytosol in cytosol; NH3_cytosol is "NH3 [cytosol]";
  species UDP_cytosol in cytosol; UDP_cytosol is "UDP [cytosol]";
  species FAD_cytosol in cytosol; FAD_cytosol is "FAD [cytosol]";
  species Lauroyl_CoA_cytosol in cytosol; Lauroyl_CoA_cytosol is "Lauroyl-CoA [cytosol]";
  species L_Amino_acid_cytosol in cytosol; L_Amino_acid_cytosol is "L-Amino acid [cytosol]";
  species S_Adenosyl_L_methionine_cytosol in cytosol; S_Adenosyl_L_methionine_cytosol is "S-Adenosyl-L-methionine [cytosol]";
  species L_Asparagine_cytosol in cytosol; L_Asparagine_cytosol is "L-Asparagine [cytosol]";
  species Palmitoyl_CoA_cytosol in cytosol; Palmitoyl_CoA_cytosol is "Palmitoyl-CoA [cytosol]";
  species Phosphatidylcholine_cytosol in cytosol; Phosphatidylcholine_cytosol is "Phosphatidylcholine [cytosol]";
  species Demethylalangiside_cytosol in cytosol; Demethylalangiside_cytosol is "Demethylalangiside [cytosol]";
  species C00450 in cytosol; C00450 is "S)-2,3,4,5-Tetrahydropyridine-2-carboxylate [cytosol]";
  species C05711 in cytosol; C05711 is "gamma-Glutamyl-beta-cyanoalanine [cytosol]";
  species C16169 in cytosol; C16169 is "4Z,7Z,10Z,13Z,16Z,19Z)-Docosahexaenoyl-CoA [cytosol]";
  species Fructose_cytosol in cytosol; Fructose_cytosol is "Fructose [cytosol]";
  species Dopamine_cytosol in cytosol; Dopamine_cytosol is "Dopamine [cytosol]";
  species C03785 in cytosol; C03785 is "D-Tagatose 1,6-bisphosphate [cytosol]";
  species _1_Alkyl_2_acylglycerol_cytosol in cytosol; _1_Alkyl_2_acylglycerol_cytosol is "1-Alkyl-2-acylglycerol [cytosol]";
  species m7G_5_pppR_RNA_cytosol in cytosol; m7G_5_pppR_RNA_cytosol is "m7G(5')pppR-RNA [cytosol]";
  species CDP_choline_cytosol in cytosol; CDP_choline_cytosol is "CDP-choline [cytosol]";
  species D_Arabinono_1_4_lactone_cytosol in cytosol; D_Arabinono_1_4_lactone_cytosol is "D-Arabinono-1,4-lactone [cytosol]";
  species Metarhodopsin_cytosol in cytosol; Metarhodopsin_cytosol is "Metarhodopsin [cytosol]";
  species Bathorhodopsin_cytosol in cytosol; Bathorhodopsin_cytosol is "Bathorhodopsin [cytosol]";
  species Lumirhodopsin_cytosol in cytosol; Lumirhodopsin_cytosol is "Lumirhodopsin [cytosol]";
  species _3_Oxoadipyl_CoA_cytosol in cytosol; _3_Oxoadipyl_CoA_cytosol is "3-Oxoadipyl-CoA [cytosol]";
  species D_Ribulose_cytosol in cytosol; D_Ribulose_cytosol is "D-Ribulose [cytosol]";
  species Dialdehyde_cytosol in cytosol; Dialdehyde_cytosol is "Dialdehyde [cytosol]";
  species C11679 in cytosol; C11679 is "4,21-Dehydrocorynantheine aldehyde [cytosol]";
  species S_Sulfanylglutathione_cytosol in cytosol; S_Sulfanylglutathione_cytosol is "S-Sulfanylglutathione [cytosol]";
  species Aldoifosfamide_cytosol in cytosol; Aldoifosfamide_cytosol is "Aldoifosfamide [cytosol]";
  species C04441 in cytosol; C04441 is "Peptide 2-(3-carboxy-3-aminopropyl)-L-histidine [cytosol]";
  species Sphinganine_1_phosphate_cytosol in cytosol; Sphinganine_1_phosphate_cytosol is "Sphinganine 1-phosphate [cytosol]";
  species C15977 in cytosol; C15977 is "Dihydrolipoyllysine-residue (2-methylpropanoyl)transferase] [cytosol]";
  species Xanthosine_5_phosphate_cytosol in cytosol; Xanthosine_5_phosphate_cytosol is "Xanthosine 5'-phosphate [cytosol]";
  species _2_Chloroethanol_cytosol in cytosol; _2_Chloroethanol_cytosol is "2-Chloroethanol [cytosol]";
  species C17438 in cytosol; C17438 is "di-trans,poly-cis-Nonaprenyl diphosphate [cytosol]";
  species Chloroacetaldehyde_cytosol in cytosol; Chloroacetaldehyde_cytosol is "Chloroacetaldehyde [cytosol]";
  species Retinyl_palmitate_cytosol in cytosol; Retinyl_palmitate_cytosol is "Retinyl palmitate [cytosol]";
  species C16376 in cytosol; C16376 is "6Z,9Z,12Z,15Z,18Z,21Z)-3-Oxotetracosahexa-6,9,12,15,18,21-enoyl-CoA [cytosol]";
  species C11556 in cytosol; C11556 is "1-Phosphatidyl-1D-myo-inositol 3,5-bisphosphate [cytosol]";
  species Dihydroxyfumarate_cytosol in cytosol; Dihydroxyfumarate_cytosol is "Dihydroxyfumarate [cytosol]";
  species C04242 in cytosol; C04242 is "5-Fluorodeoxyuridine monophosphate [cytosol]";
  species Methanethiol_cytosol in cytosol; Methanethiol_cytosol is "Methanethiol [cytosol]";
  species C04438 in cytosol; C04438 is "1-Acyl-sn-glycero-3-phosphoethanolamine [cytosol]";
  species C01159 in cytosol; C01159 is "2,3-Bisphospho-D-glycerate [cytosol]";
  species L_Isoleucine_cytosol in cytosol; L_Isoleucine_cytosol is "L-Isoleucine [cytosol]";
  species Feruloyl_CoA_cytosol in cytosol; Feruloyl_CoA_cytosol is "Feruloyl-CoA [cytosol]";
  species Phosphate_n_cytosol in cytosol; Phosphate_n_cytosol is "Phosphate)n [cytosol]";
  species Episterol_cytosol in cytosol; Episterol_cytosol is "Episterol [cytosol]";
  species C06114 in cytosol; C06114 is "gamma-Glutamyl-beta-aminopropiononitrile [cytosol]";
  species C03871 in cytosol; C03871 is "L-2-Amino-6-oxoheptanedioate [cytosol]";
  species Dopaxanthin_cytosol in cytosol; Dopaxanthin_cytosol is "Dopaxanthin [cytosol]";
  species C03875 in cytosol; C03875 is "Myosin light chain phosphate [cytosol]";
  species C05440 in cytosol; C05440 is "Ergosta-5,7,22,24(28)-tetraen-3beta-ol [cytosol]";
  species Protein_tyrosine_cytosol in cytosol; Protein_tyrosine_cytosol is "Protein tyrosine [cytosol]";
  species C03972 in cytosol; C03972 is "2,3,4,5-Tetrahydrodipicolinate [cytosol]";
  species D_Glyceraldehyde_cytosol in cytosol; D_Glyceraldehyde_cytosol is "D-Glyceraldehyde [cytosol]";
  species tRNA_Ser_cytosol in cytosol; tRNA_Ser_cytosol is "tRNA(Ser) [cytosol]";
  species tRNA_Val_cytosol in cytosol; tRNA_Val_cytosol is "tRNA(Val) [cytosol]";
  species tRNA_Trp_cytosol in cytosol; tRNA_Trp_cytosol is "tRNA(Trp) [cytosol]";
  species D_Erythrose_4_phosphate_cytosol in cytosol; D_Erythrose_4_phosphate_cytosol is "D-Erythrose 4-phosphate [cytosol]";
  species C01304 in cytosol; C01304 is "2,5-Diamino-6-(5'-phosphoribosylamino)-4-pyrimidineone [cytosol]";
  species D_Mannose_6_phosphate_cytosol in cytosol; D_Mannose_6_phosphate_cytosol is "D-Mannose 6-phosphate [cytosol]";
  species Tetrahydrobiopterin_cytosol in cytosol; Tetrahydrobiopterin_cytosol is "Tetrahydrobiopterin [cytosol]";
  species C12350 in cytosol; C12350 is "3,5,7,9,11,13,15-Heptaoxo-octadecanoyl-[acp] [cytosol]";
  species _9_Hydroxybenzo_a_pyrene_cytosol in cytosol; _9_Hydroxybenzo_a_pyrene_cytosol is "9-Hydroxybenzo[a]pyrene [cytosol]";
  species Amaranthin_cytosol in cytosol; Amaranthin_cytosol is "Amaranthin [cytosol]";
  species C06598 in cytosol; C06598 is "2,4,5-Trichloro-2,5-cyclohexadiene-1-ol [cytosol]";
  species Betanidin_cytosol in cytosol; Betanidin_cytosol is "Betanidin [cytosol]";
  species Betalamic_acid_cytosol in cytosol; Betalamic_acid_cytosol is "Betalamic acid [cytosol]";
  species C12215 in cytosol; C12215 is "Iminoerythrose 4-phosphate [cytosol]";
  species C12214 in cytosol; C12214 is "Aminofructose 6-phosphate [cytosol]";
  species C01717 in cytosol; C01717 is "4-Hydroxy-2-quinolinecarboxylic acid [cytosol]";
  species C05695 in cytosol; C05695 is "gamma-Glutamyl-Se-methylselenocysteine [cytosol]";
  species Selenate_cytosol in cytosol; Selenate_cytosol is "Selenate [cytosol]";
  species tRNA_guanine_cytosol in cytosol; tRNA_guanine_cytosol is "tRNA guanine [cytosol]";
  species tRNA_queuine_cytosol in cytosol; tRNA_queuine_cytosol is "tRNA queuine [cytosol]";
  species C00356 in cytosol; C00356 is "S)-3-Hydroxy-3-methylglutaryl-CoA [cytosol]";
  species C00355 in cytosol; C00355 is "3,4-Dihydroxy-L-phenylalanine [cytosol]";
  species C00354 in cytosol; C00354 is "D-Fructose 1,6-bisphosphate [cytosol]";
  species C00353 in cytosol; C00353 is "Geranylgeranyl diphosphate [cytosol]";
  species C00352 in cytosol; C00352 is "D-Glucosamine 6-phosphate [cytosol]";
  species Phosphatidylethanolamine_cytosol in cytosol; Phosphatidylethanolamine_cytosol is "Phosphatidylethanolamine [cytosol]";
  species C01268 in cytosol; C01268 is "5-Amino-6-(5'-phosphoribosylamino)uracil [cytosol]";
  species C03658 in cytosol; C03658 is "1-Hydroxyalkyl-sn-glycerol [cytosol]";
  species C15854 in cytosol; C15854 is "N-(4-Aminobutylidene)-[eIF5A-precursor]-lysine [cytosol]";
  species Dehydrospermidine_cytosol in cytosol; Dehydrospermidine_cytosol is "Dehydrospermidine [cytosol]";
  species Squalene_cytosol in cytosol; Squalene_cytosol is "Squalene [cytosol]";
  species Leukotriene_D4_cytosol in cytosol; Leukotriene_D4_cytosol is "Leukotriene D4 [cytosol]";
  species _5_Fluorodeoxyuridine_cytosol in cytosol; _5_Fluorodeoxyuridine_cytosol is "5-Fluorodeoxyuridine [cytosol]";
  species Peptide_diphthine_cytosol in cytosol; Peptide_diphthine_cytosol is "Peptide diphthine [cytosol]";
  species C16720 in cytosol; C16720 is "Peptide 2-[3-carboxy-3-(dimethylammonio)propyl]-L-histidine [cytosol]";
  species C11638 in cytosol; C11638 is "3-Amino-2-oxopropyl phosphate [cytosol]";
  species _5_Aminopentanamide_cytosol in cytosol; _5_Aminopentanamide_cytosol is "5-Aminopentanamide [cytosol]";
  species C01277 in cytosol; C01277 is "1-Phosphatidyl-1D-myo-inositol 4-phosphate [cytosol]";
  species _16_Epivellosimine_cytosol in cytosol; _16_Epivellosimine_cytosol is "16-Epivellosimine [cytosol]";
  species C05382 in cytosol; C05382 is "Sedoheptulose 7-phosphate [cytosol]";
  species Vellosimine_cytosol in cytosol; Vellosimine_cytosol is "Vellosimine [cytosol]";
  species L_Leucine_cytosol in cytosol; L_Leucine_cytosol is "L-Leucine [cytosol]";
  species Ferricytochrome_c_cytosol in cytosol; Ferricytochrome_c_cytosol is "Ferricytochrome c [cytosol]";
  species Ferrocytochrome_c_cytosol in cytosol; Ferrocytochrome_c_cytosol is "Ferrocytochrome c [cytosol]";
  species Glutathione_disulfide_cytosol in cytosol; Glutathione_disulfide_cytosol is "Glutathione disulfide [cytosol]";
  species CDP_ethanolamine_cytosol in cytosol; CDP_ethanolamine_cytosol is "CDP-ethanolamine [cytosol]";
  species Isopentenyl_diphosphate_cytosol in cytosol; Isopentenyl_diphosphate_cytosol is "Isopentenyl diphosphate [cytosol]";
  species _2_Descarboxy_betanidin_cytosol in cytosol; _2_Descarboxy_betanidin_cytosol is "2-Descarboxy-betanidin [cytosol]";
  species _2_Descarboxy_cyclo_dopa_cytosol in cytosol; _2_Descarboxy_cyclo_dopa_cytosol is "2-Descarboxy-cyclo-dopa [cytosol]";
  species Dopamine_quinone_cytosol in cytosol; Dopamine_quinone_cytosol is "Dopamine quinone [cytosol]";
  species C17754 in cytosol; C17754 is "3-Methoxytyramine-betaxanthin [cytosol]";
  species Dopaxanthin_quinone_cytosol in cytosol; Dopaxanthin_quinone_cytosol is "Dopaxanthin quinone [cytosol]";
  species C17752 in cytosol; C17752 is "cyclo-Dopa-glucuronylglucoside [cytosol]";
  species cyclo_Dopa_5_O_glucoside_cytosol in cytosol; cyclo_Dopa_5_O_glucoside_cytosol is "cyclo-Dopa 5-O-glucoside [cytosol]";
  species _4_5_seco_Dopa_cytosol in cytosol; _4_5_seco_Dopa_cytosol is "4,5-seco-Dopa [cytosol]";
  species C04574 in cytosol; C04574 is "di-trans,poly-cis-Undecaprenyl diphosphate [cytosol]";
  species Blue_pigment_cytosol in cytosol; Blue_pigment_cytosol is "Blue pigment [cytosol]";
  species C16151 in cytosol; C16151 is "2,6-Dihydroxy-N-methylmyosmine [cytosol]";
  species Trypanothione_cytosol in cytosol; Trypanothione_cytosol is "Trypanothione [cytosol]";
  species CMP_cytosol in cytosol; CMP_cytosol is "CMP [cytosol]";
  species Lipoate_cytosol in cytosol; Lipoate_cytosol is "Lipoate [cytosol]";
  species D_Ribulose_5_phosphate_cytosol in cytosol; D_Ribulose_5_phosphate_cytosol is "D-Ribulose 5-phosphate [cytosol]";
  species Glutathione_cytosol in cytosol; Glutathione_cytosol is "Glutathione [cytosol]";
  species C00053 in cytosol; C00053 is "3'-Phosphoadenylyl sulfate [cytosol]";
  species N_Acylsphingosine_cytosol in cytosol; N_Acylsphingosine_cytosol is "N-Acylsphingosine [cytosol]";
  species _3_Phospho_D_glycerate_cytosol in cytosol; _3_Phospho_D_glycerate_cytosol is "3-Phospho-D-glycerate [cytosol]";
  species Phosphocreatine_cytosol in cytosol; Phosphocreatine_cytosol is "Phosphocreatine [cytosol]";
  species Formate_cytosol in cytosol; Formate_cytosol is "Formate [cytosol]";
  species Sulfate_cytosol in cytosol; Sulfate_cytosol is "Sulfate [cytosol]";
  species Ubiquinone_cytosol in cytosol; Ubiquinone_cytosol is "Ubiquinone [cytosol]";
  species C01110 in cytosol; C01110 is "5-Amino-2-oxopentanoic acid [cytosol]";
  species S_2_3_Epoxysqualene_cytosol in cytosol; S_2_3_Epoxysqualene_cytosol is "S)-2,3-Epoxysqualene [cytosol]";
  species C06156 in cytosol; C06156 is "alpha-D-Glucosamine 1-phosphate [cytosol]";
  species C01288 in cytosol; C01288 is "N-Acetyl-D-glucosaminylphosphatidylinositol [cytosol]";
  species D_4_Phosphopantothenate_cytosol in cytosol; D_4_Phosphopantothenate_cytosol is "D-4'-Phosphopantothenate [cytosol]";
  // Reactions:
  R04126: _1_Alkyl_sn_glycerol_cytosol + ATP_cytosol -> C03968 + ADP_cytosol; R04126_dummy;  // kegg.reaction:R04126
    R04126_dummy = 1 time;
  R06637: 7 Malonyl_CoA_cytosol + Butanoyl_CoA_cytosol + Acyl_carrier_protein_cytosol -> 8 CoA_cytosol + 7 CO2_cytosol + C12350; R06637_dummy;  // kegg.reaction:R06637
    R06637_dummy = 1 time;
  R03038: tRNA_Ala_cytosol + ATP_cytosol + L_Alanine_cytosol -> Diphosphate_cytosol + AMP_cytosol + L_Alanyl_tRNA_cytosol; R03038_dummy;  // kegg.reaction:R03038
    R03038_dummy = 1 time;
  R00746: NADP_cytosol + Ethanol_cytosol + H_cytosol -> NADPH_cytosol + Acetaldehyde_cytosol; R00746_dummy;  // kegg.reaction:R00746
    R00746_dummy = 1 time;
  R00748: Ethanolamine_phosphate_cytosol + 2 H_cytosol + H2O_cytosol -> Acetaldehyde_cytosol + NH3_cytosol + Orthophosphate_cytosol; R00748_dummy;  // kegg.reaction:R00748
    R00748_dummy = 1 time;
  R03035: Pantetheine_4_phosphate_cytosol + ATP_cytosol -> Diphosphate_cytosol + Dephospho_CoA_cytosol; R03035_dummy;  // kegg.reaction:R03035
    R03035_dummy = 1 time;
  R00571: NH3_cytosol + ATP_cytosol + UTP_cytosol -> Orthophosphate_cytosol + ADP_cytosol + CTP_cytosol + 3 H_cytosol; R00571_dummy;  // kegg.reaction:R00571
    R00571_dummy = 1 time;
  R01914: Oxygen_cytosol + H2O_cytosol + Spermidine_cytosol -> H2O2_cytosol + H_cytosol + _1_3_Diaminopropane_cytosol + _4_Aminobutyraldehyde_cytosol; R01914_dummy;  // kegg.reaction:R01914
    R01914_dummy = 1 time;
  R01917: ATP_cytosol + Glutathione_cytosol + Spermidine_cytosol -> Orthophosphate_cytosol + ADP_cytosol + Glutathionylspermidine_cytosol; R01917_dummy;  // kegg.reaction:R01917
    R01917_dummy = 1 time;
  R01440: D_Xylulose_5_phosphate_cytosol + Formaldehyde_cytosol -> Glycerone_cytosol + C00118 + H_cytosol; R01440_dummy;  // kegg.reaction:R01440
    R01440_dummy = 1 time;
  R00426: H2O_cytosol + GTP_cytosol -> 2 H_cytosol + Diphosphate_cytosol + GMP_cytosol; R00426_dummy;  // kegg.reaction:R00426
    R00426_dummy = 1 time;
  R00425: 3 H2O_cytosol + GTP_cytosol -> Diphosphate_cytosol + C01304 + 5 H_cytosol + Formate_cytosol; R00425_dummy;  // kegg.reaction:R00425
    R00425_dummy = 1 time;
  R02962: Dopaquinone_cytosol -> C05604; R02962_dummy;  // kegg.reaction:R02962
    R02962_dummy = 1 time;
  R03867: Leukotriene_C4_cytosol + Amino_acid_cytosol -> _5_L_Glutamyl_amino_acid_cytosol + Leukotriene_D4_cytosol; R03867_dummy;  // kegg.reaction:R03867
    R03867_dummy = 1 time;
  R06447: 8 Isopentenyl_diphosphate_cytosol + C00448 -> 8 Diphosphate_cytosol + C04574; R06447_dummy;  // kegg.reaction:R06447
    R06447_dummy = 1 time;
  R01310: Phosphatidylcholine_cytosol + H2O_cytosol -> Choline_cytosol + Phosphatidate_cytosol + 2 H_cytosol; R01310_dummy;  // kegg.reaction:R01310
    R01310_dummy = 1 time;
  R01641: C00118 + C05382 -> D_Xylulose_5_phosphate_cytosol + D_Ribose_5_phosphate_cytosol + H_cytosol; R01641_dummy;  // kegg.reaction:R01641
    R01641_dummy = 1 time;
  R08827: C00355 + Betalamic_acid_cytosol + 2 H_cytosol -> Dopaxanthin_cytosol + H2O_cytosol; R08827_dummy;  // kegg.reaction:R08827
    R08827_dummy = 1 time;
  R04546: Propanoyl_CoA_cytosol + Chenodeoxycholoyl_CoA_cytosol -> CoA_cytosol + 2 H_cytosol + C04644 + H2O_cytosol; R04546_dummy;  // kegg.reaction:R04546
    R04546_dummy = 1 time;
  R08820: Betalamic_acid_cytosol + cyclo_Dopa_5_O_glucoside_cytosol + 2 H_cytosol -> Betanin_cytosol + H2O_cytosol; R08820_dummy;  // kegg.reaction:R08820
    R08820_dummy = 1 time;
  R08821: Betalamic_acid_cytosol + C05604 + 2 H_cytosol -> Betanidin_cytosol + H2O_cytosol; R08821_dummy;  // kegg.reaction:R08821
    R08821_dummy = 1 time;
  R03531: dITP_cytosol + H2O_cytosol -> C06196 + Diphosphate_cytosol + 2 H_cytosol; R03531_dummy;  // kegg.reaction:R03531
    R03531_dummy = 1 time;
  R02291: C00441 + Orthophosphate_cytosol + NADP_cytosol -> _4_Phospho_L_aspartate_cytosol + H_cytosol + NADPH_cytosol; R02291_dummy;  // kegg.reaction:R02291
    R02291_dummy = 1 time;
  R06521: Sphingosine_1_phosphate_cytosol + H2O_cytosol -> Sphingosine_cytosol + Orthophosphate_cytosol + 2 H_cytosol; R06521_dummy;  // kegg.reaction:R06521
    R06521_dummy = 1 time;
  R06520: Sphinganine_1_phosphate_cytosol + H2O_cytosol -> Sphinganine_cytosol + Orthophosphate_cytosol + 2 H_cytosol; R06520_dummy;  // kegg.reaction:R06520
    R06520_dummy = 1 time;
  R07420: Phosphocreatine_cytosol -> Orthophosphate_cytosol + Creatinine_cytosol; R07420_dummy;  // kegg.reaction:R07420
    R07420_dummy = 1 time;
  R02590: CTP_cytosol + C06459 -> Diphosphate_cytosol + C05674; R02590_dummy;  // kegg.reaction:R02590
    R02590_dummy = 1 time;
  R00140: C11038 + ADP_cytosol -> C03997 + ATP_cytosol; R00140_dummy;  // kegg.reaction:R00140
    R00140_dummy = 1 time;
  R01169: 3 S_Adenosyl_L_methionine_cytosol + L_Histidine_cytosol -> 3 C00021 + Hercynine_cytosol; R01169_dummy;  // kegg.reaction:R01169
    R01169_dummy = 1 time;
  R01009: Dolichyl_phosphate_cytosol + GDP_mannose_cytosol -> C03862 + GDP_cytosol; R01009_dummy;  // kegg.reaction:R01009
    R01009_dummy = 1 time;
  R02186: 3 Dolichyl_diphosphate_cytosol + H2O_cytosol -> 2 H_cytosol + 3 Dolichyl_phosphate_cytosol + Phosphate_n_cytosol; R02186_dummy;  // kegg.reaction:R02186
    R02186_dummy = 1 time;
  R06063: _5_Hydroxyisourate_cytosol + H2O_cytosol -> CO2_cytosol + R_Allantoin_cytosol + 2 H_cytosol; R06063_dummy;  // kegg.reaction:R06063
    R06063_dummy = 1 time;
  R06064: _5_Hydroxyisourate_cytosol + H2O_cytosol -> CO2_cytosol + S_Allantoin_cytosol + 2 H_cytosol; R06064_dummy;  // kegg.reaction:R06064
    R06064_dummy = 1 time;
  R06590: D_Ribose_5_phosphate_cytosol + C12214 -> C12215 + C05382; R06590_dummy;  // kegg.reaction:R06590
    R06590_dummy = 1 time;
  R05889: Deacetylisoipecoside_cytosol + 2 H2O_cytosol -> Demethylisoalangiside_cytosol + Carbonic_acid_cytosol + 5 H_cytosol; R05889_dummy;  // kegg.reaction:R05889
    R05889_dummy = 1 time;
  R03469: C01277 + ATP_cytosol -> C04637 + ADP_cytosol; R03469_dummy;  // kegg.reaction:R03469
    R03469_dummy = 1 time;
  R05887: Deacetylipecoside_cytosol + 2 H2O_cytosol -> 5 H_cytosol + Carbonic_acid_cytosol + Demethylalangiside_cytosol; R05887_dummy;  // kegg.reaction:R05887
    R05887_dummy = 1 time;
  R03210: _6_Carboxyhexanoyl_CoA_cytosol + L_Alanine_cytosol -> CoA_cytosol + _8_Amino_7_oxononanoate_cytosol + CO2_cytosol; R03210_dummy;  // kegg.reaction:R03210
    R03210_dummy = 1 time;
  R01262: L_Amino_acid_cytosol + Glutathione_cytosol -> Cys_Gly_cytosol + C03740; R01262_dummy;  // kegg.reaction:R01262
    R01262_dummy = 1 time;
  R08095: C16471 + CoA_cytosol -> _3_Methylcrotonyl_CoA_cytosol + Acetyl_CoA_cytosol; R08095_dummy;  // kegg.reaction:R08095
    R08095_dummy = 1 time;
  R08094: C16469 + NAD_cytosol -> C16471 + NADH_cytosol; R08094_dummy;  // kegg.reaction:R08094
    R08094_dummy = 1 time;
  R08093: C16468 + H2O_cytosol -> C16469 + 2 H_cytosol; R08093_dummy;  // kegg.reaction:R08093
    R08093_dummy = 1 time;
  R08092: _5_Methylhex_4_enoyl_CoA_cytosol + FAD_cytosol -> C16468 + FADH2_cytosol; R08092_dummy;  // kegg.reaction:R08092
    R08092_dummy = 1 time;
  R08091: CoA_cytosol + C16466 -> _5_Methylhex_4_enoyl_CoA_cytosol + Acetyl_CoA_cytosol; R08091_dummy;  // kegg.reaction:R08091
    R08091_dummy = 1 time;
  R01461: Cholesterol_cytosol + Acyl_CoA_cytosol -> CoA_cytosol + Cholesterol_ester_cytosol; R01461_dummy;  // kegg.reaction:R01461
    R01461_dummy = 1 time;
  R01462: Cholesterol_ester_cytosol + H2O_cytosol -> Fatty_acid_cytosol + Cholesterol_cytosol + 2 H_cytosol; R01462_dummy;  // kegg.reaction:R01462
    R01462_dummy = 1 time;
  R00996: L_Threonine_cytosol + 3 H_cytosol -> _2_Oxobutanoate_cytosol + NH3_cytosol; R00996_dummy;  // kegg.reaction:R00996
    R00996_dummy = 1 time;
  R00494: Glutathione_cytosol + H2O_cytosol -> L_Glutamate_cytosol + Cys_Gly_cytosol + 2 H_cytosol; R00494_dummy;  // kegg.reaction:R00494
    R00494_dummy = 1 time;
  R04273: C03798 -> Peptidylproline_omega_0_cytosol; R04273_dummy;  // kegg.reaction:R04273
    R04273_dummy = 1 time;
  R00259: L_Glutamate_cytosol + Acetyl_CoA_cytosol -> CoA_cytosol + N_Acetyl_L_glutamate_cytosol; R00259_dummy;  // kegg.reaction:R00259
    R00259_dummy = 1 time;
  R00256: L_Glutamine_cytosol + H2O_cytosol + H_cytosol -> L_Glutamate_cytosol + NH3_cytosol; R00256_dummy;  // kegg.reaction:R00256
    R00256_dummy = 1 time;
  R00848: sn_Glycerol_3_phosphate_cytosol + FAD_cytosol -> FADH2_cytosol + Glycerone_phosphate_cytosol; R00848_dummy;  // kegg.reaction:R00848
    R00848_dummy = 1 time;
  R02273: _5_Aminopentanamide_cytosol + H2O_cytosol + H_cytosol -> _5_Aminopentanoate_cytosol + NH3_cytosol; R02273_dummy;  // kegg.reaction:R02273
    R02273_dummy = 1 time;
  R00842: sn_Glycerol_3_phosphate_cytosol + NAD_cytosol -> Glycerone_phosphate_cytosol + NADH_cytosol; R00842_dummy;  // kegg.reaction:R00842
    R00842_dummy = 1 time;
  R03920: Fructose_cytosol + ATP_cytosol -> C05345 + ADP_cytosol; R03920_dummy;  // kegg.reaction:R03920
    R03920_dummy = 1 time;
  R07604: C15978 + Enzyme_N6_lipoyl_lysine_cytosol -> C15979 + Thiamin_diphosphate_cytosol; R07604_dummy;  // kegg.reaction:R07604
    R07604_dummy = 1 time;
  R00196: S_Lactate_cytosol + 2 Ferricytochrome_c_cytosol -> Pyruvate_cytosol + 2 Ferrocytochrome_c_cytosol; R00196_dummy;  // kegg.reaction:R00196
    R00196_dummy = 1 time;
  R07602: Enzyme_N6_lipoyl_lysine_cytosol + C15974 -> Thiamin_diphosphate_cytosol + C15975; R07602_dummy;  // kegg.reaction:R07602
    R07602_dummy = 1 time;
  R07601: Thiamin_diphosphate_cytosol + _4_Methyl_2_oxopentanoate_cytosol -> C15974 + CO2_cytosol; R07601_dummy;  // kegg.reaction:R07601
    R07601_dummy = 1 time;
  R07600: Enzyme_N6_lipoyl_lysine_cytosol + C15976 -> Thiamin_diphosphate_cytosol + C15977; R07600_dummy;  // kegg.reaction:R07600
    R07600_dummy = 1 time;
  R04162: C05977 + H2O_cytosol -> _1_Alkyl_2_acylglycerol_cytosol + Orthophosphate_cytosol + 2 H_cytosol; R04162_dummy;  // kegg.reaction:R04162
    R04162_dummy = 1 time;
  R01212: H_cytosol + NADP_cytosol + H2O_cytosol + L_Valine_cytosol -> NH3_cytosol + NADPH_cytosol + C00141; R01212_dummy;  // kegg.reaction:R01212
    R01212_dummy = 1 time;
  R03771: Phosphatidylglycerol_cytosol + L_Lysyl_tRNA_cytosol -> C04482 + tRNA_cytosol; R03771_dummy;  // kegg.reaction:R03771
    R03771_dummy = 1 time;
  R08797: Malonyl_CoA_cytosol + Feruloyl_CoA_cytosol + H2O_cytosol + Hexanoyl_CoA_cytosol -> 3 CoA_cytosol + 2 CO2_cytosol + 2 H_cytosol + _1_Dehydro_6_gingerdione_cytosol; R08797_dummy;  // kegg.reaction:R08797
    R08797_dummy = 1 time;
  R03778: Octanoyl_CoA_cytosol + Acetyl_CoA_cytosol -> CoA_cytosol + _3_Oxodecanoyl_CoA_cytosol; R03778_dummy;  // kegg.reaction:R03778
    R03778_dummy = 1 time;
  R03674: L_Dopachrome_cytosol -> _5_6_Dihydroxyindole_cytosol + CO2_cytosol; R03674_dummy;  // kegg.reaction:R03674
    R03674_dummy = 1 time;
  R03672: C00355 + L_Dopachrome_cytosol -> C05604 + Dopaquinone_cytosol; R03672_dummy;  // kegg.reaction:R03672
    R03672_dummy = 1 time;
  R08311: C16596 + H2O_cytosol -> C16591 + 2 H_cytosol; R08311_dummy;  // kegg.reaction:R08311
    R08311_dummy = 1 time;
  R01818: D_Mannose_6_phosphate_cytosol -> D_Mannose_1_phosphate_cytosol; R01818_dummy;  // kegg.reaction:R01818
    R01818_dummy = 1 time;
  R01819: D_Mannose_6_phosphate_cytosol -> C05345; R01819_dummy;  // kegg.reaction:R01819
    R01819_dummy = 1 time;
  R07280: C04454 + H2O_cytosol -> C04732 + Orthophosphate_cytosol + 2 H_cytosol; R07280_dummy;  // kegg.reaction:R07280
    R07280_dummy = 1 time;
  R01328: C03862 + H2O_cytosol -> D_Mannose_cytosol + 2 H_cytosol + Dolichyl_phosphate_cytosol; R01328_dummy;  // kegg.reaction:R01328
    R01328_dummy = 1 time;
  R01957: L_Kynurenine_cytosol + Glyoxylate_cytosol -> Glycine_cytosol + C01252; R01957_dummy;  // kegg.reaction:R01957
    R01957_dummy = 1 time;
  R01956: L_Kynurenine_cytosol + _2_Oxoglutarate_cytosol -> L_Glutamate_cytosol + C01252; R01956_dummy;  // kegg.reaction:R01956
    R01956_dummy = 1 time;
  R07460: Enzyme_cysteine_cytosol + L_Cysteine_cytosol -> C15812 + L_Alanine_cytosol; R07460_dummy;  // kegg.reaction:R07460
    R07460_dummy = 1 time;
  R04935: Se_Methylselenocysteine_cytosol + _5_L_Glutamyl_peptide_cytosol -> Peptide_cytosol + C05695; R04935_dummy;  // kegg.reaction:R04935
    R04935_dummy = 1 time;
  R09366: Se_Methylselenocysteine_cytosol + H2O_cytosol + H_cytosol -> NH3_cytosol + Pyruvate_cytosol + Methaneselenol_cytosol; R09366_dummy;  // kegg.reaction:R09366
    R09366_dummy = 1 time;
  R07269: Isopentenyl_diphosphate_cytosol + C04509 -> Diphosphate_cytosol + C04574; R07269_dummy;  // kegg.reaction:R07269
    R07269_dummy = 1 time;
  R04504: C04549 + 2 ATP_cytosol -> C05981 + 2 ADP_cytosol; R04504_dummy;  // kegg.reaction:R04504
    R04504_dummy = 1 time;
  R04072: Protein_serine_cytosol + C03862 -> O_D_Mannosylprotein_cytosol + Dolichyl_phosphate_cytosol; R04072_dummy;  // kegg.reaction:R04072
    R04072_dummy = 1 time;
  R00105: NADH_cytosol + ATP_cytosol -> NADPH_cytosol + ADP_cytosol; R00105_dummy;  // kegg.reaction:R00105
    R00105_dummy = 1 time;
  R00104: NAD_cytosol + ATP_cytosol -> NADP_cytosol + ADP_cytosol; R00104_dummy;  // kegg.reaction:R00104
    R00104_dummy = 1 time;
  R03789: Queuine_cytosol + tRNA_guanine_cytosol -> tRNA_queuine_cytosol + Guanine_cytosol; R03789_dummy;  // kegg.reaction:R03789
    R03789_dummy = 1 time;
  R08893: S_Adenosyl_L_methionine_cytosol + _2_Deoxy_scyllo_inosamine_cytosol -> L_Methionine_cytosol + _5_Deoxyadenosine_cytosol + C17581; R08893_dummy;  // kegg.reaction:R08893
    R08893_dummy = 1 time;
  R00770: D_Fructose_6_phosphate_cytosol + ITP_cytosol -> C00354 + IDP_cytosol; R00770_dummy;  // kegg.reaction:R00770
    R00770_dummy = 1 time;
  R00771: D_Glucose_6_phosphate_cytosol -> D_Fructose_6_phosphate_cytosol; R00771_dummy;  // kegg.reaction:R00771
    R00771_dummy = 1 time;
  R01326: D_Mannose_cytosol + ATP_cytosol -> D_Mannose_6_phosphate_cytosol + ADP_cytosol; R01326_dummy;  // kegg.reaction:R01326
    R01326_dummy = 1 time;
  R01327: D_Mannose_cytosol + ITP_cytosol -> D_Mannose_6_phosphate_cytosol + IDP_cytosol; R01327_dummy;  // kegg.reaction:R01327
    R01327_dummy = 1 time;
  R01041: NADP_cytosol + Glycerol_cytosol + H_cytosol -> D_Glyceraldehyde_cytosol + NADPH_cytosol; R01041_dummy;  // kegg.reaction:R01041
    R01041_dummy = 1 time;
  R01736: R_S_Lactoylglutathione_cytosol + H2O_cytosol -> R_Lactate_cytosol + Glutathione_cytosol + 2 H_cytosol; R01736_dummy;  // kegg.reaction:R01736
    R01736_dummy = 1 time;
  R02918: ATP_cytosol + tRNA_Tyr_cytosol + L_Tyrosine_cytosol -> L_Tyrosyl_tRNA_Tyr_cytosol + Diphosphate_cytosol + AMP_cytosol; R02918_dummy;  // kegg.reaction:R02918
    R02918_dummy = 1 time;
  R03858: Acetyl_CoA_cytosol + Lauroyl_CoA_cytosol -> CoA_cytosol + _3_Oxotetradecanoyl_CoA_cytosol; R03858_dummy;  // kegg.reaction:R03858
    R03858_dummy = 1 time;
  R07947: C15986 + 2 H_cytosol -> C16151 + H2O_cytosol; R07947_dummy;  // kegg.reaction:R07947
    R07947_dummy = 1 time;
  R07941: C16365 + 2 H2O_cytosol -> C16366 + Carbonic_acid_cytosol + 4 H_cytosol; R07941_dummy;  // kegg.reaction:R07941
    R07941_dummy = 1 time;
  R07948: 2 Oxygen_cytosol + 2 _2_3_6_Trihydroxypyridine_cytosol -> Blue_pigment_cytosol + 2 H2O2_cytosol; R07948_dummy;  // kegg.reaction:R07948
    R07948_dummy = 1 time;
  R07866: _9_10_EOT_cytosol -> _10_OPDA_cytosol; R07866_dummy;  // kegg.reaction:R07866
    R07866_dummy = 1 time;
  R01600: ATP_cytosol + beta_D_Glucose_cytosol -> C01172 + ADP_cytosol; R01600_dummy;  // kegg.reaction:R01600
    R01600_dummy = 1 time;
  R00602: H2O2_cytosol + Methanol_cytosol + 6 H_cytosol -> Formaldehyde_cytosol + 2 H2O_cytosol; R00602_dummy;  // kegg.reaction:R00602
    R00602_dummy = 1 time;
  R00600: S_Adenosyl_L_methionine_cytosol + tRNA_guanine_cytosol -> C04160 + C00021; R00600_dummy;  // kegg.reaction:R00600
    R00600_dummy = 1 time;
  R04867: C05545 + S_Adenosyl_L_methionine_cytosol -> C05546 + C00021; R04867_dummy;  // kegg.reaction:R04867
    R04867_dummy = 1 time;
  R03150: Myosin_light_chain_cytosol + ATP_cytosol -> C03875 + ADP_cytosol; R03150_dummy;  // kegg.reaction:R03150
    R03150_dummy = 1 time;
  R01137: dADP_cytosol + ATP_cytosol -> dATP_cytosol + ADP_cytosol; R01137_dummy;  // kegg.reaction:R01137
    R01137_dummy = 1 time;
  R01134: NH3_cytosol + NADP_cytosol + IMP_cytosol -> 3 H_cytosol + NADPH_cytosol + GMP_cytosol; R01134_dummy;  // kegg.reaction:R01134
    R01134_dummy = 1 time;
  R05041: Bathorhodopsin_cytosol -> Lumirhodopsin_cytosol; R05041_dummy;  // kegg.reaction:R05041
    R05041_dummy = 1 time;
  R00959: D_Glucose_1_phosphate_cytosol -> C00668; R00959_dummy;  // kegg.reaction:R00959
    R00959_dummy = 1 time;
  R05824: C11679 -> H_cytosol + C03677; R05824_dummy;  // kegg.reaction:R05824
    R05824_dummy = 1 time;
  R01139: dATP_cytosol + D_Glucose_cytosol -> D_Glucose_6_phosphate_cytosol + dADP_cytosol; R01139_dummy;  // kegg.reaction:R01139
    R01139_dummy = 1 time;
  R01138: dATP_cytosol + Pyruvate_cytosol -> dADP_cytosol + Phosphoenolpyruvate_cytosol; R01138_dummy;  // kegg.reaction:R01138
    R01138_dummy = 1 time;
  R01786: alpha_D_Glucose_cytosol + ATP_cytosol -> C00668 + ADP_cytosol; R01786_dummy;  // kegg.reaction:R01786
    R01786_dummy = 1 time;
  R01030: C00670 + H2O_cytosol -> Choline_cytosol + sn_Glycerol_3_phosphate_cytosol + 2 H_cytosol; R01030_dummy;  // kegg.reaction:R01030
    R01030_dummy = 1 time;
  R04336: C03871 + 2 H_cytosol -> C03972 + H2O_cytosol; R04336_dummy;  // kegg.reaction:R04336
    R04336_dummy = 1 time;
  R03458: C04454 + NADP_cytosol -> NADPH_cytosol + C01268; R03458_dummy;  // kegg.reaction:R03458
    R03458_dummy = 1 time;
  R03459: C01304 + H2O_cytosol + H_cytosol -> C01268 + NH3_cytosol; R03459_dummy;  // kegg.reaction:R03459
    R03459_dummy = 1 time;
  R02239: Phosphatidate_cytosol + H2O_cytosol -> _1_2_Diacyl_sn_glycerol_cytosol + Orthophosphate_cytosol + 2 H_cytosol; R02239_dummy;  // kegg.reaction:R02239
    R02239_dummy = 1 time;
  R03321: C01172 -> C05345; R03321_dummy;  // kegg.reaction:R03321
    R03321_dummy = 1 time;
  R08825: Betalamic_acid_cytosol + L_Tyrosine_cytosol + 2 H_cytosol -> Portulacaxanthin_II_cytosol + H2O_cytosol; R08825_dummy;  // kegg.reaction:R08825
    R08825_dummy = 1 time;
  R00927: Acetyl_CoA_cytosol + Propanoyl_CoA_cytosol -> CoA_cytosol + _2_Methylacetoacetyl_CoA_cytosol; R00927_dummy;  // kegg.reaction:R00927
    R00927_dummy = 1 time;
  R00926: CoA_cytosol + Propionyladenylate_cytosol -> Propanoyl_CoA_cytosol + AMP_cytosol; R00926_dummy;  // kegg.reaction:R00926
    R00926_dummy = 1 time;
  R00925: CoA_cytosol + ATP_cytosol + Propanoate_cytosol -> Diphosphate_cytosol + AMP_cytosol + Propanoyl_CoA_cytosol; R00925_dummy;  // kegg.reaction:R00925
    R00925_dummy = 1 time;
  R02236: NADP_cytosol + Dihydrofolate_cytosol -> NADPH_cytosol + Folate_cytosol; R02236_dummy;  // kegg.reaction:R02236
    R02236_dummy = 1 time;
  R08619: Acetyl_CoA_cytosol + H2O_cytosol + C01180 -> CoA_cytosol + C17210 + 2 H_cytosol; R08619_dummy;  // kegg.reaction:R08619
    R08619_dummy = 1 time;
  R01258: H_cytosol + L_Amino_acid_cytosol + NAD_cytosol + H2O_cytosol -> NH3_cytosol + NADH_cytosol + _2_Oxo_acid_cytosol; R01258_dummy;  // kegg.reaction:R01258
    R01258_dummy = 1 time;
  R06527: Phytosphingosine_cytosol + C26_CoA_cytosol -> CoA_cytosol + Phytoceramide_cytosol; R06527_dummy;  // kegg.reaction:R06527
    R06527_dummy = 1 time;
  R01855: dGTP_cytosol + H2O_cytosol -> Diphosphate_cytosol + dGMP_cytosol + 2 H_cytosol; R01855_dummy;  // kegg.reaction:R01855
    R01855_dummy = 1 time;
  R01857: ATP_cytosol + dGDP_cytosol -> ADP_cytosol + dGTP_cytosol; R01857_dummy;  // kegg.reaction:R01857
    R01857_dummy = 1 time;
  R00509: Adenylyl_sulfate_cytosol + ATP_cytosol -> C00053 + ADP_cytosol; R00509_dummy;  // kegg.reaction:R00509
    R00509_dummy = 1 time;
  R02778: C00689 + H2O_cytosol -> alpha_alpha_Trehalose_cytosol + Orthophosphate_cytosol + 2 H_cytosol; R02778_dummy;  // kegg.reaction:R02778
    R02778_dummy = 1 time;
  R02670: 2 _3_Hydroxyanthranilate_cytosol + 4 Oxygen_cytosol -> 2 H2O2_cytosol + Cinnavalininate_cytosol + 2 O2_cytosol; R02670_dummy;  // kegg.reaction:R02670
    R02670_dummy = 1 time;
  R01858: dGTP_cytosol + Pyruvate_cytosol -> dGDP_cytosol + Phosphoenolpyruvate_cytosol; R01858_dummy;  // kegg.reaction:R01858
    R01858_dummy = 1 time;
  R08763: 2 C17500 -> Isophenoxazine_cytosol; R08763_dummy;  // kegg.reaction:R08763
    R08763_dummy = 1 time;
  R07009: C14786 -> alpha_Naphthol_cytosol; R07009_dummy;  // kegg.reaction:R07009
    R07009_dummy = 1 time;
  R06522: Ceramide_1_phosphate_cytosol + H2O_cytosol -> N_Acylsphingosine_cytosol + Orthophosphate_cytosol + 2 H_cytosol; R06522_dummy;  // kegg.reaction:R06522
    R06522_dummy = 1 time;
  R01090: _2_Oxoglutarate_cytosol + L_Leucine_cytosol -> _4_Methyl_2_oxopentanoate_cytosol + L_Glutamate_cytosol; R01090_dummy;  // kegg.reaction:R01090
    R01090_dummy = 1 time;
  R04159: _5_L_Glutamyl_peptide_cytosol + Amino_acid_cytosol -> _5_L_Glutamyl_amino_acid_cytosol + Peptide_cytosol; R04159_dummy;  // kegg.reaction:R04159
    R04159_dummy = 1 time;
  R07180: 2 H_cytosol + 2 C16736 + ROOH_cytosol -> Alcohol_cytosol + C15496 + H2O_cytosol; R07180_dummy;  // kegg.reaction:R07180
    R07180_dummy = 1 time;
  R07184: _2_Oxoglutarate_cytosol + Oxygen_cytosol + Gibberellin_A44_cytosol -> CO2_cytosol + H_cytosol + Succinate_cytosol + Gibberellin_A19_cytosol; R07184_dummy;  // kegg.reaction:R07184
    R07184_dummy = 1 time;
  R03186: 2 Monodehydroascorbate_cytosol + 2 H_cytosol -> Ascorbate_cytosol + Dehydroascorbate_cytosol; R03186_dummy;  // kegg.reaction:R03186
    R03186_dummy = 1 time;
  R03971: L_Glutamate_cytosol + beta_Aminopropionitrile_cytosol + 2 H_cytosol -> C06114 + H2O_cytosol; R03971_dummy;  // kegg.reaction:R03971
    R03971_dummy = 1 time;
  R03970: L_Glutamate_cytosol + _3_Cyano_L_alanine_cytosol + 2 H_cytosol -> H2O_cytosol + C05711; R03970_dummy;  // kegg.reaction:R03970
    R03970_dummy = 1 time;
  R02591: C00670 + H2O_cytosol -> Choline_phosphate_cytosol + Glycerol_cytosol + 2 H_cytosol; R02591_dummy;  // kegg.reaction:R02591
    R02591_dummy = 1 time;
  R00430: Pyruvate_cytosol + GTP_cytosol -> Phosphoenolpyruvate_cytosol + GDP_cytosol; R00430_dummy;  // kegg.reaction:R00430
    R00430_dummy = 1 time;
  R00434: GTP_cytosol -> _3_5_Cyclic_GMP_cytosol + Diphosphate_cytosol; R00434_dummy;  // kegg.reaction:R00434
    R00434_dummy = 1 time;
  R00436: ATP_cytosol + RNA_cytosol -> RNA_circular_cytosol + Diphosphate_cytosol + AMP_cytosol; R00436_dummy;  // kegg.reaction:R00436
    R00436_dummy = 1 time;
  R09036: C18126 + Acyl_CoA_cytosol -> CoA_cytosol + Phosphatidylglycerol_cytosol; R09036_dummy;  // kegg.reaction:R09036
    R09036_dummy = 1 time;
  R08834: _2_Descarboxy_cyclo_dopa_cytosol + Betalamic_acid_cytosol + 2 H_cytosol -> _2_Descarboxy_betanidin_cytosol + H2O_cytosol; R08834_dummy;  // kegg.reaction:R08834
    R08834_dummy = 1 time;
  R09034: Acyl_CoA_cytosol + C03819 -> CoA_cytosol + C01194; R09034_dummy;  // kegg.reaction:R09034
    R09034_dummy = 1 time;
  R09035: C18125 + Acyl_CoA_cytosol -> CoA_cytosol + Phosphatidylserine_cytosol; R09035_dummy;  // kegg.reaction:R09035
    R09035_dummy = 1 time;
  R08831: Betalamic_acid_cytosol + _3_Methoxytyramine_cytosol + 2 H_cytosol -> C17754 + H2O_cytosol; R08831_dummy;  // kegg.reaction:R08831
    R08831_dummy = 1 time;
  R08833: Dopamine_quinone_cytosol -> _2_Descarboxy_cyclo_dopa_cytosol; R08833_dummy;  // kegg.reaction:R08833
    R08833_dummy = 1 time;
  R04578: C04718 -> C06066; R04578_dummy;  // kegg.reaction:R04578
    R04578_dummy = 1 time;
  R06517: Sphinganine_cytosol + Acyl_CoA_cytosol -> CoA_cytosol + Dihydroceramide_cytosol; R06517_dummy;  // kegg.reaction:R06517
    R06517_dummy = 1 time;
  R02585: C01167 + H2O_cytosol -> Protein_tyrosine_cytosol + Orthophosphate_cytosol + 2 H_cytosol; R02585_dummy;  // kegg.reaction:R02585
    R02585_dummy = 1 time;
  R02584: ATP_cytosol + Protein_tyrosine_cytosol -> C01167 + ADP_cytosol; R02584_dummy;  // kegg.reaction:R02584
    R02584_dummy = 1 time;
  R00070: Oxygen_cytosol + 2 D_Urobilinogen_cytosol + 4 H_cytosol -> 2 D_Urobilin_cytosol + 2 H2O_cytosol; R00070_dummy;  // kegg.reaction:R00070
    R00070_dummy = 1 time;
  R05555: Isopentenyl_diphosphate_cytosol + C00448 -> Diphosphate_cytosol + C11356; R05555_dummy;  // kegg.reaction:R05555
    R05555_dummy = 1 time;
  R05556: 2 Isopentenyl_diphosphate_cytosol + C00448 -> 2 Diphosphate_cytosol + C05859; R05556_dummy;  // kegg.reaction:R05556
    R05556_dummy = 1 time;
  R00725: ITP_cytosol + D_Glucose_cytosol -> IDP_cytosol + D_Glucose_6_phosphate_cytosol; R00725_dummy;  // kegg.reaction:R00725
    R00725_dummy = 1 time;
  R00724: ITP_cytosol + Pyruvate_cytosol -> IDP_cytosol + Phosphoenolpyruvate_cytosol; R00724_dummy;  // kegg.reaction:R00724
    R00724_dummy = 1 time;
  R00720: ITP_cytosol + H2O_cytosol -> Diphosphate_cytosol + IMP_cytosol + 2 H_cytosol; R00720_dummy;  // kegg.reaction:R00720
    R00720_dummy = 1 time;
  R00722: IDP_cytosol + ATP_cytosol -> ITP_cytosol + ADP_cytosol; R00722_dummy;  // kegg.reaction:R00722
    R00722_dummy = 1 time;
  R06194: Lumirhodopsin_cytosol -> Metarhodopsin_cytosol; R06194_dummy;  // kegg.reaction:R06194
    R06194_dummy = 1 time;
  R00647: Ascorbate_cytosol -> L_xylo_Hexulonolactone_cytosol; R00647_dummy;  // kegg.reaction:R00647
    R00647_dummy = 1 time;
  R01070: C05378 + H_cytosol -> Glycerone_phosphate_cytosol + C00118; R01070_dummy;  // kegg.reaction:R01070
    R01070_dummy = 1 time;
  R04951: R_S_Cysteinylglycine_cytosol + H2O_cytosol -> Glycine_cytosol + S_Substituted_L_cysteine_cytosol + 2 H_cytosol; R04951_dummy;  // kegg.reaction:R04951
    R04951_dummy = 1 time;
  R02116: Carbonic_acid_cytosol + 7 Sterol_cytosol + 12 H_cytosol -> 4 S_2_3_Epoxysqualene_cytosol + 6 H2O_cytosol; R02116_dummy;  // kegg.reaction:R02116
    R02116_dummy = 1 time;
  R01177: Acetyl_CoA_cytosol + Butanoyl_CoA_cytosol -> CoA_cytosol + _3_Oxohexanoyl_CoA_cytosol; R01177_dummy;  // kegg.reaction:R01177
    R01177_dummy = 1 time;
  R03805: S_Adenosyl_L_methionine_cytosol + G_5_pppR_RNA_cytosol -> C00021 + m7G_5_pppR_RNA_cytosol; R03805_dummy;  // kegg.reaction:R03805
    R03805_dummy = 1 time;
  R03552: Acetyl_CoA_cytosol + Histone_L_lysine_cytosol -> CoA_cytosol + C01997; R03552_dummy;  // kegg.reaction:R03552
    R03552_dummy = 1 time;
  R00316: ATP_cytosol + Acetate_cytosol -> Diphosphate_cytosol + Acetyl_adenylate_cytosol; R00316_dummy;  // kegg.reaction:R00316
    R00316_dummy = 1 time;
  R05826: _16_Epivellosimine_cytosol -> Vellosimine_cytosol; R05826_dummy;  // kegg.reaction:R05826
    R05826_dummy = 1 time;
  R02825: _5_Aminopentanoate_cytosol + Lipoate_cytosol -> D_Proline_cytosol + Dihydrolipoate_cytosol; R02825_dummy;  // kegg.reaction:R02825
    R02825_dummy = 1 time;
  R03361: ATP_cytosol + C01194 -> C01277 + ADP_cytosol; R03361_dummy;  // kegg.reaction:R03361
    R03361_dummy = 1 time;
  R03362: ATP_cytosol + C01194 -> C04549 + ADP_cytosol; R03362_dummy;  // kegg.reaction:R03362
    R03362_dummy = 1 time;
  R03992: Glycylpeptide_cytosol + Tetradecanoyl_CoA_cytosol -> CoA_cytosol + C03881; R03992_dummy;  // kegg.reaction:R03992
    R03992_dummy = 1 time;
  R03416: C04438 + H2O_cytosol -> C01233 + Fatty_acid_cytosol + 2 H_cytosol; R03416_dummy;  // kegg.reaction:R03416
    R03416_dummy = 1 time;
  R03417: H2O_cytosol + C05973 -> C01233 + 2 H_cytosol + Fatty_acid_cytosol; R03417_dummy;  // kegg.reaction:R03417
    R03417_dummy = 1 time;
  R03166: Hydroxymethylbilane_cytosol + 2 H_cytosol -> Uroporphyrinogen_I_cytosol + H2O_cytosol; R03166_dummy;  // kegg.reaction:R03166
    R03166_dummy = 1 time;
  R08020: Oxygen_cytosol + 4 C16392 + 8 H_cytosol -> 2 C16413 + 4 H2O_cytosol; R08020_dummy;  // kegg.reaction:R08020
    R08020_dummy = 1 time;
  R00127: ATP_cytosol + AMP_cytosol -> 2 ADP_cytosol; R00127_dummy;  // kegg.reaction:R00127
    R00127_dummy = 1 time;
  R00829: Succinyl_CoA_cytosol + Acetyl_CoA_cytosol -> CoA_cytosol + _3_Oxoadipyl_CoA_cytosol; R00829_dummy;  // kegg.reaction:R00829
    R00829_dummy = 1 time;
  R07073: Bromobenzene_3_4_oxide_cytosol -> _4_Bromophenol_cytosol; R07073_dummy;  // kegg.reaction:R07073
    R07073_dummy = 1 time;
  R07076: C14845 -> _4_Bromocatechol_cytosol; R07076_dummy;  // kegg.reaction:R07076
    R07076_dummy = 1 time;
  R01518: _2_Phospho_D_glycerate_cytosol -> _3_Phospho_D_glycerate_cytosol; R01518_dummy;  // kegg.reaction:R01518
    R01518_dummy = 1 time;
  R02736: NADP_cytosol + C01172 -> C01236 + NADPH_cytosol; R02736_dummy;  // kegg.reaction:R02736
    R02736_dummy = 1 time;
  R02737: UDP_glucose_cytosol + C00668 -> C00689 + UDP_cytosol; R02737_dummy;  // kegg.reaction:R02737
    R02737_dummy = 1 time;
  R01512: _3_Phospho_D_glycerate_cytosol + ATP_cytosol -> C00236 + ADP_cytosol; R01512_dummy;  // kegg.reaction:R01512
    R01512_dummy = 1 time;
  R02739: C00668 -> C01172; R02739_dummy;  // kegg.reaction:R02739
    R02739_dummy = 1 time;
  R01516: H2O_cytosol + C01159 -> _3_Phospho_D_glycerate_cytosol + 2 H_cytosol + Orthophosphate_cytosol; R01516_dummy;  // kegg.reaction:R01516
    R01516_dummy = 1 time;
  R01890: CTP_cytosol + Choline_phosphate_cytosol -> CDP_choline_cytosol + Diphosphate_cytosol; R01890_dummy;  // kegg.reaction:R01890
    R01890_dummy = 1 time;
  R02082: CoA_cytosol + R_Mevalonate_cytosol + 2 NADP_cytosol -> 2 NADPH_cytosol + C00356; R02082_dummy;  // kegg.reaction:R02082
    R02082_dummy = 1 time;
  R00265: CoA_cytosol + _2_Oxoglutarate_cytosol + NADP_cytosol -> CO2_cytosol + NADPH_cytosol + Succinyl_CoA_cytosol; R00265_dummy;  // kegg.reaction:R00265
    R00265_dummy = 1 time;
  R02241: CoA_cytosol + Phosphatidate_cytosol -> C00681 + Acyl_CoA_cytosol; R02241_dummy;  // kegg.reaction:R02241
    R02241_dummy = 1 time;
  R00858: Hydrogen_sulfide_cytosol + 3 NADP_cytosol + 3 H2O_cytosol -> 8 H_cytosol + 3 NADPH_cytosol + Sulfite_cytosol; R00858_dummy;  // kegg.reaction:R00858
    R00858_dummy = 1 time;
  R02245: R_Mevalonate_cytosol + ATP_cytosol -> R_5_Phosphomevalonate_cytosol + ADP_cytosol; R02245_dummy;  // kegg.reaction:R02245
    R02245_dummy = 1 time;
  R00851: sn_Glycerol_3_phosphate_cytosol + Acyl_CoA_cytosol -> C00681 + CoA_cytosol; R00851_dummy;  // kegg.reaction:R00851
    R00851_dummy = 1 time;
  R08407: Acyl_phosphate_cytosol + D_Fructose_cytosol -> Carboxylate_cytosol + D_Fructose_1_phosphate_cytosol; R08407_dummy;  // kegg.reaction:R08407
    R08407_dummy = 1 time;
  R00857: Glycerophosphodiester_cytosol + H2O_cytosol -> Alcohol_cytosol + sn_Glycerol_3_phosphate_cytosol + 2 H_cytosol; R00857_dummy;  // kegg.reaction:R00857
    R00857_dummy = 1 time;
  R00917: beta_Alanine_cytosol + NH3_cytosol + H_cytosol -> beta_Aminopropionitrile_cytosol + 2 H2O_cytosol; R00917_dummy;  // kegg.reaction:R00917
    R00917_dummy = 1 time;
  R00181: AMP_cytosol + H2O_cytosol + H_cytosol -> IMP_cytosol + NH3_cytosol; R00181_dummy;  // kegg.reaction:R00181
    R00181_dummy = 1 time;
  R08375: C05859 -> Dolichyl_diphosphate_cytosol; R08375_dummy;  // kegg.reaction:R08375
    R08375_dummy = 1 time;
  R08372: C03658 + H_cytosol -> Glycerol_cytosol + Aldehyde_cytosol; R08372_dummy;  // kegg.reaction:R08372
    R08372_dummy = 1 time;
  R08279: Aldophosphamide_cytosol + H_cytosol -> Phosphoramide_mustard_cytosol + Acrolein_cytosol; R08279_dummy;  // kegg.reaction:R08279
    R08279_dummy = 1 time;
  R03938: S_Adenosyl_L_methionine_cytosol + Histone_L_lysine_cytosol -> C03702 + C00021; R03938_dummy;  // kegg.reaction:R03938
    R03938_dummy = 1 time;
  R07679: Ascorbate_cytosol + 2 Ferricytochrome_c_cytosol -> Dehydroascorbate_cytosol + 2 Ferrocytochrome_c_cytosol; R07679_dummy;  // kegg.reaction:R07679
    R07679_dummy = 1 time;
  R01206: Chitin_cytosol + H2O_cytosol -> 2 A00001 + N_Acetyl_D_glucosamine_cytosol + 2 H_cytosol; R01206_dummy;  // kegg.reaction:R01206
    R01206_dummy = 1 time;
  R01209: C04039 + 2 H_cytosol -> C00141 + H2O_cytosol; R01209_dummy;  // kegg.reaction:R01209
    R01209_dummy = 1 time;
  R01964: D_Glucosamine_cytosol + ITP_cytosol -> IDP_cytosol + C00352; R01964_dummy;  // kegg.reaction:R01964
    R01964_dummy = 1 time;
  R01965: D_Glucosamine_cytosol + dATP_cytosol -> C00352 + dADP_cytosol; R01965_dummy;  // kegg.reaction:R01965
    R01965_dummy = 1 time;
  R01961: D_Glucosamine_cytosol + ATP_cytosol -> C00352 + ADP_cytosol; R01961_dummy;  // kegg.reaction:R01961
    R01961_dummy = 1 time;
  R06748: C12482 -> Pyrrole_2_carboxyl_pcp_cytosol; R06748_dummy;  // kegg.reaction:R06748
    R06748_dummy = 1 time;
  R03665: tRNA_Val_cytosol + ATP_cytosol + L_Valine_cytosol -> Diphosphate_cytosol + AMP_cytosol + L_Valyl_tRNA_Val_cytosol; R03665_dummy;  // kegg.reaction:R03665
    R03665_dummy = 1 time;
  R03664: Tryptophan_cytosol + tRNA_Trp_cytosol + ATP_cytosol -> AMP_cytosol + L_Tryptophanyl_tRNA_Trp_cytosol + Diphosphate_cytosol; R03664_dummy;  // kegg.reaction:R03664
    R03664_dummy = 1 time;
  R03661: L_Proline_cytosol + tRNA_Pro_cytosol + ATP_cytosol -> Diphosphate_cytosol + AMP_cytosol + L_Prolyl_tRNA_Pro_cytosol; R03661_dummy;  // kegg.reaction:R03661
    R03661_dummy = 1 time;
  R03660: L_Phenylalanine_cytosol + tRNA_Phe_cytosol + ATP_cytosol -> L_Phenylalanyl_tRNA_Phe_cytosol + Diphosphate_cytosol + AMP_cytosol; R03660_dummy;  // kegg.reaction:R03660
    R03660_dummy = 1 time;
  R03663: tRNA_Thr_cytosol + ATP_cytosol + L_Threonine_cytosol -> Diphosphate_cytosol + AMP_cytosol + L_Threonyl_tRNA_Thr_cytosol; R03663_dummy;  // kegg.reaction:R03663
    R03663_dummy = 1 time;
  R03662: tRNA_Ser_cytosol + L_Serine_cytosol + ATP_cytosol -> Diphosphate_cytosol + AMP_cytosol + L_Seryl_tRNA_Ser_cytosol; R03662_dummy;  // kegg.reaction:R03662
    R03662_dummy = 1 time;
  R02017: Thioredoxin_disulfide_cytosol + H2O_cytosol + dADP_cytosol -> Thioredoxin_cytosol + 2 H_cytosol + ADP_cytosol; R02017_dummy;  // kegg.reaction:R02017
    R02017_dummy = 1 time;
  R02016: NADP_cytosol + Thioredoxin_cytosol -> Thioredoxin_disulfide_cytosol + NADPH_cytosol; R02016_dummy;  // kegg.reaction:R02016
    R02016_dummy = 1 time;
  R09254: L_Tyrosine_cytosol + Pyruvate_cytosol -> C01179 + L_Alanine_cytosol; R09254_dummy;  // kegg.reaction:R09254
    R09254_dummy = 1 time;
  R02019: dGDP_cytosol + H2O_cytosol + Thioredoxin_disulfide_cytosol -> Thioredoxin_cytosol + GDP_cytosol + 2 H_cytosol; R02019_dummy;  // kegg.reaction:R02019
    R02019_dummy = 1 time;
  R02018: Thioredoxin_disulfide_cytosol + H2O_cytosol + dUDP_cytosol -> Thioredoxin_cytosol + UDP_cytosol + 2 H_cytosol; R02018_dummy;  // kegg.reaction:R02018
    R02018_dummy = 1 time;
  R01800: CDP_diacylglycerol_cytosol + L_Serine_cytosol -> CMP_cytosol + Phosphatidylserine_cytosol; R01800_dummy;  // kegg.reaction:R01800
    R01800_dummy = 1 time;
  R04929: ATP_cytosol + Selenate_cytosol -> Diphosphate_cytosol + Adenylylselenate_cytosol; R04929_dummy;  // kegg.reaction:R04929
    R04929_dummy = 1 time;
  R06650: Tetrangomycin_cytosol + 2 H_cytosol -> Tetrangulol_cytosol + H2O_cytosol; R06650_dummy;  // kegg.reaction:R06650
    R06650_dummy = 1 time;
  R07497: Fecosterol_cytosol -> Episterol_cytosol; R07497_dummy;  // kegg.reaction:R07497
    R07497_dummy = 1 time;
  R04925: Carbonic_acid_cytosol + C05679 + 6 H_cytosol -> C05680 + 3 H2O_cytosol; R04925_dummy;  // kegg.reaction:R04925
    R04925_dummy = 1 time;
  R06223: NADPH_cytosol + 2 C00448 -> Squalene_cytosol + 2 Diphosphate_cytosol + NADP_cytosol; R06223_dummy;  // kegg.reaction:R06223
    R06223_dummy = 1 time;
  R00130: ATP_cytosol + Dephospho_CoA_cytosol -> CoA_cytosol + ADP_cytosol; R00130_dummy;  // kegg.reaction:R00130
    R00130_dummy = 1 time;
  R08976: C18063 -> Pyropheophorbide_a_cytosol + CO2_cytosol; R08976_dummy;  // kegg.reaction:R08976
    R08976_dummy = 1 time;
  R00139: C11038 + ATP_cytosol -> C11039 + ADP_cytosol; R00139_dummy;  // kegg.reaction:R00139
    R00139_dummy = 1 time;
  R07316: Carbamate_cytosol + 3 H_cytosol -> CO2_cytosol + NH3_cytosol; R07316_dummy;  // kegg.reaction:R07316
    R07316_dummy = 1 time;
  R03018: ATP_cytosol + Pantothenate_cytosol -> D_4_Phosphopantothenate_cytosol + ADP_cytosol; R03018_dummy;  // kegg.reaction:R03018
    R03018_dummy = 1 time;
  R07390: 2 Phosphatidylglycerol_cytosol -> Glycerol_cytosol + Cardiolipin_cytosol; R07390_dummy;  // kegg.reaction:R07390
    R07390_dummy = 1 time;
  R06861: Thiamin_diphosphate_cytosol + D_Xylulose_5_phosphate_cytosol + H_cytosol -> C13378 + C00118; R06861_dummy;  // kegg.reaction:R06861
    R06861_dummy = 1 time;
  R06862: C13378 + Formaldehyde_cytosol -> Thiamin_diphosphate_cytosol + Glycerone_cytosol + 2 H_cytosol; R06862_dummy;  // kegg.reaction:R06862
    R06862_dummy = 1 time;
  R06863: Thiamin_diphosphate_cytosol + C05382 -> D_Ribose_5_phosphate_cytosol + C13378; R06863_dummy;  // kegg.reaction:R06863
    R06863_dummy = 1 time;
  R00769: D_Fructose_6_phosphate_cytosol + UTP_cytosol -> C00354 + UDP_cytosol; R00769_dummy;  // kegg.reaction:R00769
    R00769_dummy = 1 time;
  R00768: D_Fructose_6_phosphate_cytosol + L_Glutamine_cytosol -> L_Glutamate_cytosol + C00352; R00768_dummy;  // kegg.reaction:R00768
    R00768_dummy = 1 time;
  R00444: 3 Nucleoside_triphosphate_cytosol + H2O_cytosol -> 3 Diphosphate_cytosol + RNA_cytosol + 2 H_cytosol; R00444_dummy;  // kegg.reaction:R00444
    R00444_dummy = 1 time;
  R00449: 2 H_cytosol + Oxygen_cytosol + L_Lysine_cytosol -> CO2_cytosol + H2O_cytosol + _5_Aminopentanamide_cytosol; R00449_dummy;  // kegg.reaction:R00449
    R00449_dummy = 1 time;
  R06255: Oxygen_cytosol + 2 L_Urobilinogen_cytosol + 4 H_cytosol -> 2 L_Urobilin_cytosol + 2 H2O_cytosol; R06255_dummy;  // kegg.reaction:R06255
    R06255_dummy = 1 time;
  R06254: Oxygen_cytosol + 2 I_Urobilinogen_cytosol + 4 H_cytosol -> 2 Urobilin_cytosol + 2 H2O_cytosol; R06254_dummy;  // kegg.reaction:R06254
    R06254_dummy = 1 time;
  R01330: D_Mannose_cytosol + dATP_cytosol -> D_Mannose_6_phosphate_cytosol + dADP_cytosol; R01330_dummy;  // kegg.reaction:R01330
    R01330_dummy = 1 time;
  R02868: D_Sorbitol_cytosol + dATP_cytosol -> Sorbitol_6_phosphate_cytosol + dADP_cytosol; R02868_dummy;  // kegg.reaction:R02868
    R02868_dummy = 1 time;
  R01701: C00141 + Enzyme_N6_lipoyl_lysine_cytosol -> CO2_cytosol + C15977; R01701_dummy;  // kegg.reaction:R01701
    R01701_dummy = 1 time;
  R01702: _4_Methyl_2_oxopentanoate_cytosol + Enzyme_N6_lipoyl_lysine_cytosol -> CO2_cytosol + C15975; R01702_dummy;  // kegg.reaction:R01702
    R01702_dummy = 1 time;
  R02867: D_Sorbitol_cytosol + ITP_cytosol -> Sorbitol_6_phosphate_cytosol + IDP_cytosol; R02867_dummy;  // kegg.reaction:R02867
    R02867_dummy = 1 time;
  R07953: Acetyl_CoA_cytosol + C16173 -> CoA_cytosol + C16389; R07953_dummy;  // kegg.reaction:R07953
    R07953_dummy = 1 time;
  R07406: C07335 -> C11638 + CO2_cytosol; R07406_dummy;  // kegg.reaction:R07406
    R07406_dummy = 1 time;
  R04404: H2O_cytosol + C04637 -> C01277 + 2 H_cytosol + Orthophosphate_cytosol; R04404_dummy;  // kegg.reaction:R04404
    R04404_dummy = 1 time;
  R07408: _4_Aminobutyraldehyde_cytosol + H_cytosol -> _1_Pyrroline_cytosol + H2O_cytosol; R07408_dummy;  // kegg.reaction:R07408
    R07408_dummy = 1 time;
  R00004: Diphosphate_cytosol + H2O_cytosol -> 2 Orthophosphate_cytosol + 2 H_cytosol; R00004_dummy;  // kegg.reaction:R00004
    R00004_dummy = 1 time;
  R02331: dUDP_cytosol + ATP_cytosol -> dUTP_cytosol + ADP_cytosol; R02331_dummy;  // kegg.reaction:R02331
    R02331_dummy = 1 time;
  R03249: C01110 + 2 H_cytosol -> C03564 + H2O_cytosol; R03249_dummy;  // kegg.reaction:R03249
    R03249_dummy = 1 time;
  R02335: C00043 + 2 A00001 -> Chitin_cytosol + UDP_cytosol; R02335_dummy;  // kegg.reaction:R02335
    R02335_dummy = 1 time;
  R00615: Thiamin_diphosphate_cytosol + H2O_cytosol -> Thiamin_monophosphate_cytosol + Orthophosphate_cytosol + 2 H_cytosol; R00615_dummy;  // kegg.reaction:R00615
    R00615_dummy = 1 time;
  R02480: Cytochrome_c_cytosol -> Apocytochrome_c_cytosol + Heme_cytosol; R02480_dummy;  // kegg.reaction:R02480
    R02480_dummy = 1 time;
  R01140: D_Fructose_cytosol + dATP_cytosol -> D_Fructose_6_phosphate_cytosol + dADP_cytosol; R01140_dummy;  // kegg.reaction:R01140
    R01140_dummy = 1 time;
  R00945: Glycine_cytosol + C00143 + H2O_cytosol -> Tetrahydrofolate_cytosol + 3 H_cytosol + L_Serine_cytosol; R00945_dummy;  // kegg.reaction:R00945
    R00945_dummy = 1 time;
  R08180: C16169 + H2O_cytosol -> CoA_cytosol + C06429 + 2 H_cytosol; R08180_dummy;  // kegg.reaction:R08180
    R08180_dummy = 1 time;
  R00940: 2 NADP_cytosol + Tetrahydrofolate_cytosol -> 2 NADPH_cytosol + Folate_cytosol; R00940_dummy;  // kegg.reaction:R00940
    R00940_dummy = 1 time;
  R01799: CTP_cytosol + Phosphatidate_cytosol -> Diphosphate_cytosol + CDP_diacylglycerol_cytosol; R01799_dummy;  // kegg.reaction:R01799
    R01799_dummy = 1 time;
  R01795: L_Phenylalanine_cytosol + 2 H_cytosol + Oxygen_cytosol + Tetrahydrobiopterin_cytosol -> L_Tyrosine_cytosol + Dihydrobiopterin_cytosol + H2O_cytosol; R01795_dummy;  // kegg.reaction:R01795
    R01795_dummy = 1 time;
  R00220: L_Serine_cytosol + 3 H_cytosol -> NH3_cytosol + Pyruvate_cytosol; R00220_dummy;  // kegg.reaction:R00220
    R00220_dummy = 1 time;
  R03445: C01252 + 2 H_cytosol -> C01717 + H2O_cytosol; R03445_dummy;  // kegg.reaction:R03445
    R03445_dummy = 1 time;
  R04248: H2O2_cytosol + _2_Aminoethylphosphonate_cytosol -> Ethanolamine_cytosol + Orthophosphate_cytosol; R04248_dummy;  // kegg.reaction:R04248
    R04248_dummy = 1 time;
  R03443: Orthophosphate_cytosol + NADP_cytosol + C01250 -> H_cytosol + NADPH_cytosol + C04133; R03443_dummy;  // kegg.reaction:R03443
    R03443_dummy = 1 time;
  R04247: CTP_cytosol + _2_Aminoethylphosphonate_cytosol -> Diphosphate_cytosol + C05673; R04247_dummy;  // kegg.reaction:R04247
    R04247_dummy = 1 time;
  R03822: Glutathionylspermidine_cytosol + ATP_cytosol + Glutathione_cytosol -> Orthophosphate_cytosol + ADP_cytosol + Trypanothione_cytosol; R03822_dummy;  // kegg.reaction:R03822
    R03822_dummy = 1 time;
  R03236: D_Tagatose_6_phosphate_cytosol + ATP_cytosol -> C03785 + ADP_cytosol; R03236_dummy;  // kegg.reaction:R03236
    R03236_dummy = 1 time;
  R03237: D_Tagatose_6_phosphate_cytosol + CTP_cytosol -> C03785 + CDP_cytosol; R03237_dummy;  // kegg.reaction:R03237
    R03237_dummy = 1 time;
  R04293: C03722 + H2O_cytosol -> C04409 + H_cytosol; R04293_dummy;  // kegg.reaction:R04293
    R04293_dummy = 1 time;
  R03238: D_Tagatose_6_phosphate_cytosol + UTP_cytosol -> C03785 + UDP_cytosol; R03238_dummy;  // kegg.reaction:R03238
    R03238_dummy = 1 time;
  R03239: D_Tagatose_6_phosphate_cytosol + ITP_cytosol -> IDP_cytosol + C03785; R03239_dummy;  // kegg.reaction:R03239
    R03239_dummy = 1 time;
  R04866: S_Adenosyl_L_methionine_cytosol + C05544 -> C05545 + C00021; R04866_dummy;  // kegg.reaction:R04866
    R04866_dummy = 1 time;
  R08621: C17212 -> CO2_cytosol + C17211; R08621_dummy;  // kegg.reaction:R08621
    R08621_dummy = 1 time;
  R08622: L_Amino_acid_cytosol + C17211 -> Homomethionine_cytosol + _2_Oxo_acid_cytosol; R08622_dummy;  // kegg.reaction:R08622
    R08622_dummy = 1 time;
  R04861: _3_Sulfinylpyruvate_cytosol + H2O_cytosol -> Sulfite_cytosol + Pyruvate_cytosol + 2 H_cytosol; R04861_dummy;  // kegg.reaction:R04861
    R04861_dummy = 1 time;
  R01248: L_Proline_cytosol + NAD_cytosol + H_cytosol -> NADH_cytosol + C03912; R01248_dummy;  // kegg.reaction:R01248
    R01248_dummy = 1 time;
  R01567: Thymidine_cytosol + ATP_cytosol -> dTMP_cytosol + ADP_cytosol; R01567_dummy;  // kegg.reaction:R01567
    R01567_dummy = 1 time;
  R01651: CoA_cytosol + NAD_cytosol + _4_Methyl_2_oxopentanoate_cytosol -> CO2_cytosol + NADH_cytosol + _3_Methylbutanoyl_CoA_cytosol; R01651_dummy;  // kegg.reaction:R01651
    R01651_dummy = 1 time;
  R02649: ATP_cytosol + N_Acetyl_L_glutamate_cytosol -> C04133 + ADP_cytosol; R02649_dummy;  // kegg.reaction:R02649
    R02649_dummy = 1 time;
  R01246: L_Proline_cytosol + NAD_cytosol -> C03564 + NADH_cytosol; R01246_dummy;  // kegg.reaction:R01246
    R01246_dummy = 1 time;
  R01843: ATP_cytosol + C05382 -> C00447 + ADP_cytosol; R01843_dummy;  // kegg.reaction:R01843
    R01843_dummy = 1 time;
  R02319: Nucleoside_triphosphate_cytosol + H2O_cytosol -> NDP_cytosol + Orthophosphate_cytosol + 2 H_cytosol; R02319_dummy;  // kegg.reaction:R02319
    R02319_dummy = 1 time;
  R02763: CO2_cytosol + C00682 + H_cytosol -> C04480; R02763_dummy;  // kegg.reaction:R02763
    R02763_dummy = 1 time;
  R00867: ATP_cytosol + D_Fructose_cytosol -> ADP_cytosol + C05345; R00867_dummy;  // kegg.reaction:R00867
    R00867_dummy = 1 time;
  R00864: Sulfur_cytosol + Sulfite_cytosol -> Thiosulfate_cytosol; R00864_dummy;  // kegg.reaction:R00864
    R00864_dummy = 1 time;
  R08750: Isopentenyl_diphosphate_cytosol + C17434 -> C17436 + Diphosphate_cytosol; R08750_dummy;  // kegg.reaction:R08750
    R08750_dummy = 1 time;
  R08751: C17436 + Isopentenyl_diphosphate_cytosol -> Diphosphate_cytosol + C17437; R08751_dummy;  // kegg.reaction:R08751
    R08751_dummy = 1 time;
  R08752: C17437 + Isopentenyl_diphosphate_cytosol -> Diphosphate_cytosol + C17438; R08752_dummy;  // kegg.reaction:R08752
    R08752_dummy = 1 time;
  R08753: Isopentenyl_diphosphate_cytosol + C17438 -> Diphosphate_cytosol + C04509; R08753_dummy;  // kegg.reaction:R08753
    R08753_dummy = 1 time;
  R08244: C16618 + ATP_cytosol + H2O_cytosol + L_Glutamine_cytosol -> C16619 + Diphosphate_cytosol + AMP_cytosol + L_Glutamate_cytosol + 2 H_cytosol; R08244_dummy;  // kegg.reaction:R08244
    R08244_dummy = 1 time;
  R08243: C16617 + H2O_cytosol -> C04646 + Diphosphate_cytosol + 2 H_cytosol; R08243_dummy;  // kegg.reaction:R08243
    R08243_dummy = 1 time;
  R08240: NAD_cytosol + H2O_cytosol + C04646 -> C16618 + 2 H_cytosol + NADH_cytosol; R08240_dummy;  // kegg.reaction:R08240
    R08240_dummy = 1 time;
  R06614: _3_Cyano_L_alanine_cytosol -> CO2_cytosol + beta_Aminopropionitrile_cytosol; R06614_dummy;  // kegg.reaction:R06614
    R06614_dummy = 1 time;
  R03050: Thiamin_diphosphate_cytosol + _2_Acetolactate_cytosol -> C05125 + Pyruvate_cytosol; R03050_dummy;  // kegg.reaction:R03050
    R03050_dummy = 1 time;
  R03051: NADPH_cytosol + _2_Acetolactate_cytosol -> NADP_cytosol + C04039; R03051_dummy;  // kegg.reaction:R03051
    R03051_dummy = 1 time;
  R03059: Glutathione_cytosol + Leukotriene_A4_cytosol -> Leukotriene_C4_cytosol; R03059_dummy;  // kegg.reaction:R03059
    R03059_dummy = 1 time;
  R00400: Oxaloacetate_cytosol + L_Alanine_cytosol -> L_Aspartate_cytosol + Pyruvate_cytosol; R00400_dummy;  // kegg.reaction:R00400
    R00400_dummy = 1 time;
  R08233: _5_Fluorodeoxyuridine_cytosol + ATP_cytosol -> C04242 + ADP_cytosol; R08233_dummy;  // kegg.reaction:R08233
    R08233_dummy = 1 time;
  R08983: 3 p_Coumaroyl_CoA_cytosol + Spermidine_cytosol -> 3 CoA_cytosol + C18069; R08983_dummy;  // kegg.reaction:R08983
    R08983_dummy = 1 time;
  R01830: C00118 + C05345 -> D_Xylulose_5_phosphate_cytosol + D_Erythrose_4_phosphate_cytosol; R01830_dummy;  // kegg.reaction:R01830
    R01830_dummy = 1 time;
  R08234: Azathioprine_cytosol -> C16621 + _6_Mercaptopurine_cytosol; R08234_dummy;  // kegg.reaction:R08234
    R08234_dummy = 1 time;
  R04446: C04282 + H2O_cytosol -> C05941 + 2 H_cytosol; R04446_dummy;  // kegg.reaction:R04446
    R04446_dummy = 1 time;
  R08657: Ubiquinone_cytosol + sn_Glycerol_3_phosphate_cytosol -> Glycerone_phosphate_cytosol + Ubiquinol_cytosol; R08657_dummy;  // kegg.reaction:R08657
    R08657_dummy = 1 time;
  R08801: C17744 + H2O_cytosol -> C17745 + 2 H_cytosol; R08801_dummy;  // kegg.reaction:R08801
    R08801_dummy = 1 time;
  R08803: S_Adenosyl_L_methionine_cytosol + C17745 -> C00021 + _1_Dehydro_6_gingerdione_cytosol; R08803_dummy;  // kegg.reaction:R08803
    R08803_dummy = 1 time;
  R02473: ATP_cytosol + R_Pantoate_cytosol + beta_Alanine_cytosol -> Diphosphate_cytosol + AMP_cytosol + Pantothenate_cytosol; R02473_dummy;  // kegg.reaction:R02473
    R02473_dummy = 1 time;
  R01015: C00118 -> Glycerone_phosphate_cytosol + H_cytosol; R01015_dummy;  // kegg.reaction:R01015
    R01015_dummy = 1 time;
  R07695: Carbonic_acid_cytosol + 2 _2_3_Dihydroxynaphthalene_cytosol + 2 H2O_cytosol -> 3 Salicylate_cytosol + 4 H_cytosol; R07695_dummy;  // kegg.reaction:R07695
    R07695_dummy = 1 time;
  R00659: Pyruvate_cytosol + UTP_cytosol -> UDP_cytosol + Phosphoenolpyruvate_cytosol; R00659_dummy;  // kegg.reaction:R00659
    R00659_dummy = 1 time;
  R02474: Pantothenate_cytosol + H2O_cytosol -> beta_Alanine_cytosol + R_Pantoate_cytosol + 2 H_cytosol; R02474_dummy;  // kegg.reaction:R02474
    R02474_dummy = 1 time;
  R00652: L_Methionine_cytosol + Glyoxylate_cytosol -> Glycine_cytosol + C01180; R00652_dummy;  // kegg.reaction:R00652
    R00652_dummy = 1 time;
  R00654: H_cytosol + L_Methionine_cytosol + H2O_cytosol -> Methanethiol_cytosol + NH3_cytosol + _2_Oxobutanoate_cytosol; R00654_dummy;  // kegg.reaction:R00654
    R00654_dummy = 1 time;
  R01061: Orthophosphate_cytosol + NAD_cytosol + C00118 -> H_cytosol + NADH_cytosol + C00236; R01061_dummy;  // kegg.reaction:R01061
    R01061_dummy = 1 time;
  R01063: Orthophosphate_cytosol + NADP_cytosol + C00118 -> H_cytosol + NADPH_cytosol + C00236; R01063_dummy;  // kegg.reaction:R01063
    R01063_dummy = 1 time;
  R01067: D_Fructose_6_phosphate_cytosol + C00118 -> D_Xylulose_5_phosphate_cytosol + D_Erythrose_4_phosphate_cytosol; R01067_dummy;  // kegg.reaction:R01067
    R01067_dummy = 1 time;
  R01069: C03785 + H_cytosol -> Glycerone_phosphate_cytosol + C00118; R01069_dummy;  // kegg.reaction:R01069
    R01069_dummy = 1 time;
  R01068: C00354 + H_cytosol -> Glycerone_phosphate_cytosol + C00118; R01068_dummy;  // kegg.reaction:R01068
    R01068_dummy = 1 time;
  R01699: Enzyme_N6_lipoyl_lysine_cytosol + Pyruvate_cytosol -> CO2_cytosol + C16255; R01699_dummy;  // kegg.reaction:R01699
    R01699_dummy = 1 time;
  R04282: C03680 + H2O_cytosol -> Formylisoglutamine_cytosol + H_cytosol; R04282_dummy;  // kegg.reaction:R04282
    R04282_dummy = 1 time;
  R04044: 8 H_cytosol + Oxygen_cytosol + Tetrahydrobiopterin_cytosol + Carbonic_acid_cytosol + _1_Alkyl_sn_glycerol_cytosol -> Dihydrobiopterin_cytosol + 4 H2O_cytosol + C03658; R04044_dummy;  // kegg.reaction:R04044
    R04044_dummy = 1 time;
  R04361: C03968 + Acyl_CoA_cytosol -> CoA_cytosol + C05977; R04361_dummy;  // kegg.reaction:R04361
    R04361_dummy = 1 time;
  R04928: Adenylylselenate_cytosol + ATP_cytosol -> C05696 + ADP_cytosol; R04928_dummy;  // kegg.reaction:R04928
    R04928_dummy = 1 time;
  R01665: dCMP_cytosol + ATP_cytosol -> dCDP_cytosol + ADP_cytosol; R01665_dummy;  // kegg.reaction:R01665
    R01665_dummy = 1 time;
  R01662: C00236 -> C01159; R01662_dummy;  // kegg.reaction:R01662
    R01662_dummy = 1 time;
  R03270: C05125 + Enzyme_N6_lipoyl_lysine_cytosol -> Thiamin_diphosphate_cytosol + C16255; R03270_dummy;  // kegg.reaction:R03270
    R03270_dummy = 1 time;
  R01669: C00143 + H2O_cytosol + dCMP_cytosol -> Tetrahydrofolate_cytosol + 3 H_cytosol + C03997; R01669_dummy;  // kegg.reaction:R01669
    R01669_dummy = 1 time;
  R01526: ATP_cytosol + D_Ribulose_cytosol -> ADP_cytosol + D_Ribulose_5_phosphate_cytosol; R01526_dummy;  // kegg.reaction:R01526
    R01526_dummy = 1 time;
  R01520: NAD_cytosol + beta_D_Glucose_cytosol -> NADH_cytosol + D_Glucono_1_5_lactone_cytosol; R01520_dummy;  // kegg.reaction:R01520
    R01520_dummy = 1 time;
  R01521: NADP_cytosol + beta_D_Glucose_cytosol -> NADPH_cytosol + D_Glucono_1_5_lactone_cytosol; R01521_dummy;  // kegg.reaction:R01521
    R01521_dummy = 1 time;
  R08468: S_Adenosyl_L_methionine_cytosol + C04692 -> C00021 + C16720; R08468_dummy;  // kegg.reaction:R08468
    R08468_dummy = 1 time;
  R08469: S_Adenosyl_L_methionine_cytosol + C16720 -> Peptide_diphthine_cytosol + C00021; R08469_dummy;  // kegg.reaction:R08469
    R08469_dummy = 1 time;
  R00835: NADP_cytosol + D_Glucose_6_phosphate_cytosol -> C01236 + NADPH_cytosol; R00835_dummy;  // kegg.reaction:R00835
    R00835_dummy = 1 time;
  R00834: NADP_cytosol + Sorbitol_6_phosphate_cytosol -> NADPH_cytosol + D_Glucose_6_phosphate_cytosol; R00834_dummy;  // kegg.reaction:R00834
    R00834_dummy = 1 time;
  R05845: Dialdehyde_cytosol + 2 H_cytosol -> C11679 + H2O_cytosol; R05845_dummy;  // kegg.reaction:R05845
    R05845_dummy = 1 time;
  R05844: Strictosidine_aglycone_cytosol -> Dialdehyde_cytosol; R05844_dummy;  // kegg.reaction:R05844
    R05844_dummy = 1 time;
  R01281: L_Serine_cytosol + Palmitoyl_CoA_cytosol -> CoA_cytosol + CO2_cytosol + _3_Dehydrosphinganine_cytosol; R01281_dummy;  // kegg.reaction:R01281
    R01281_dummy = 1 time;
  R01280: CoA_cytosol + Hexadecanoic_acid_cytosol + ATP_cytosol -> Diphosphate_cytosol + AMP_cytosol + Palmitoyl_CoA_cytosol; R01280_dummy;  // kegg.reaction:R01280
    R01280_dummy = 1 time;
  R02688: _1_2_Diacyl_sn_glycerol_cytosol + H2O_cytosol -> _2_Acylglycerol_cytosol + Fatty_acid_cytosol + 2 H_cytosol; R02688_dummy;  // kegg.reaction:R02688
    R02688_dummy = 1 time;
  R00275: 2 O2_cytosol -> Oxygen_cytosol + H2O2_cytosol; R00275_dummy;  // kegg.reaction:R00275
    R00275_dummy = 1 time;
  R02720: XTP_cytosol + H2O_cytosol -> Xanthosine_5_phosphate_cytosol + Diphosphate_cytosol + 2 H_cytosol; R02720_dummy;  // kegg.reaction:R02720
    R02720_dummy = 1 time;
  R00578: ATP_cytosol + H2O_cytosol + L_Glutamine_cytosol + L_Aspartate_cytosol -> L_Glutamate_cytosol + Diphosphate_cytosol + AMP_cytosol + 2 H_cytosol + L_Asparagine_cytosol; R00578_dummy;  // kegg.reaction:R00578
    R00578_dummy = 1 time;
  R00270: _2_Oxoglutarate_cytosol + NH3_cytosol -> _4_Oxoglutaramate_cytosol + H2O_cytosol + H_cytosol; R00270_dummy;  // kegg.reaction:R00270
    R00270_dummy = 1 time;
  R00570: ATP_cytosol + CDP_cytosol -> CTP_cytosol + ADP_cytosol; R00570_dummy;  // kegg.reaction:R00570
    R00570_dummy = 1 time;
  R01110: Homocystine_cytosol + 2 Glutathione_cytosol -> 2 Homocysteine_cytosol + Glutathione_disulfide_cytosol; R01110_dummy;  // kegg.reaction:R01110
    R01110_dummy = 1 time;
  R00572: CTP_cytosol + Pyruvate_cytosol -> CDP_cytosol + Phosphoenolpyruvate_cytosol; R00572_dummy;  // kegg.reaction:R00572
    R00572_dummy = 1 time;
  R00573: L_Glutamine_cytosol + H2O_cytosol + UTP_cytosol + ATP_cytosol -> L_Glutamate_cytosol + Orthophosphate_cytosol + ADP_cytosol + CTP_cytosol + 2 H_cytosol; R00573_dummy;  // kegg.reaction:R00573
    R00573_dummy = 1 time;
  R09805: C00441 + NAD_cytosol + H2O_cytosol -> 3 H_cytosol + NADH_cytosol + L_Aspartate_cytosol; R09805_dummy;  // kegg.reaction:R09805
    R09805_dummy = 1 time;
  R02099: Deoxyuridine_cytosol + ATP_cytosol -> dUMP_cytosol + ADP_cytosol; R02099_dummy;  // kegg.reaction:R02099
    R02099_dummy = 1 time;
  R03530: dIDP_cytosol + ATP_cytosol -> dITP_cytosol + ADP_cytosol; R03530_dummy;  // kegg.reaction:R03530
    R03530_dummy = 1 time;
  R02094: dTMP_cytosol + ATP_cytosol -> dTDP_cytosol + ADP_cytosol; R02094_dummy;  // kegg.reaction:R02094
    R02094_dummy = 1 time;
  R08381: _11_cis_Retinol_cytosol + Palmitoyl_CoA_cytosol -> CoA_cytosol + _11_cis_Retinyl_palmitate_cytosol; R08381_dummy;  // kegg.reaction:R08381
    R08381_dummy = 1 time;
  R02090: dGMP_cytosol + ATP_cytosol -> dGDP_cytosol + ADP_cytosol; R02090_dummy;  // kegg.reaction:R02090
    R02090_dummy = 1 time;
  R02093: ATP_cytosol + dTDP_cytosol -> dTTP_cytosol + ADP_cytosol; R02093_dummy;  // kegg.reaction:R02093
    R02093_dummy = 1 time;
  R00904: _3_Aminopropanal_cytosol + NAD_cytosol + H2O_cytosol -> 2 H_cytosol + NADH_cytosol + beta_Alanine_cytosol; R00904_dummy;  // kegg.reaction:R00904
    R00904_dummy = 1 time;
  R09371: S_Adenosyl_L_methionine_cytosol + Selenide_cytosol -> Methaneselenol_cytosol + C00021; R09371_dummy;  // kegg.reaction:R09371
    R09371_dummy = 1 time;
  R02251: CoA_cytosol + Triacylglycerol_cytosol -> _1_2_Diacyl_sn_glycerol_cytosol + Acyl_CoA_cytosol; R02251_dummy;  // kegg.reaction:R02251
    R02251_dummy = 1 time;
  R02250: Triacylglycerol_cytosol + H2O_cytosol -> _1_2_Diacyl_sn_glycerol_cytosol + Fatty_acid_cytosol + 2 H_cytosol; R02250_dummy;  // kegg.reaction:R02250
    R02250_dummy = 1 time;
  R04747: Acetyl_CoA_cytosol + Hexanoyl_CoA_cytosol -> CoA_cytosol + _3_Oxooctanoyl_CoA_cytosol; R04747_dummy;  // kegg.reaction:R04747
    R04747_dummy = 1 time;
  R08364: Trypanothione_disulfide_cytosol + C04232 + H2O_cytosol -> 2 H_cytosol + Trypanothione_cytosol + C03723; R08364_dummy;  // kegg.reaction:R08364
    R08364_dummy = 1 time;
  R04742: Acetyl_CoA_cytosol + Decanoyl_CoA_cytosol -> CoA_cytosol + _3_Oxododecanoyl_CoA_cytosol; R04742_dummy;  // kegg.reaction:R04742
    R04742_dummy = 1 time;
  R08362: Trypanothione_cytosol + 2 H_cytosol + ROOH_cytosol -> Trypanothione_disulfide_cytosol + H2O_cytosol + ROH_cytosol; R08362_dummy;  // kegg.reaction:R08362
    R08362_dummy = 1 time;
  R05209: Diacylglycerol_cytosol + H2O_cytosol -> Carboxylate_cytosol + _1_Acylglycerol_cytosol + 2 H_cytosol; R05209_dummy;  // kegg.reaction:R05209
    R05209_dummy = 1 time;
  R01231: ATP_cytosol + H2O_cytosol + L_Glutamine_cytosol + Xanthosine_5_phosphate_cytosol -> L_Glutamate_cytosol + Diphosphate_cytosol + AMP_cytosol + 2 H_cytosol + GMP_cytosol; R01231_dummy;  // kegg.reaction:R01231
    R01231_dummy = 1 time;
  R03658: tRNA_Lys_cytosol + ATP_cytosol + L_Lysine_cytosol -> Diphosphate_cytosol + AMP_cytosol + L_Lysyl_tRNA_cytosol; R03658_dummy;  // kegg.reaction:R03658
    R03658_dummy = 1 time;
  R03659: L_Methionine_cytosol + ATP_cytosol + tRNA_Met_cytosol -> Diphosphate_cytosol + AMP_cytosol + L_Methionyl_tRNA_cytosol; R03659_dummy;  // kegg.reaction:R03659
    R03659_dummy = 1 time;
  R00209: CoA_cytosol + NAD_cytosol + Pyruvate_cytosol -> Acetyl_CoA_cytosol + NADH_cytosol + CO2_cytosol; R00209_dummy;  // kegg.reaction:R00209
    R00209_dummy = 1 time;
  R03650: ATP_cytosol + tRNA_Cys_cytosol + L_Cysteine_cytosol -> Diphosphate_cytosol + AMP_cytosol + L_Cysteinyl_tRNA_Cys_cytosol; R03650_dummy;  // kegg.reaction:R03650
    R03650_dummy = 1 time;
  R03652: tRNA_Gln_cytosol + ATP_cytosol + L_Glutamine_cytosol -> Diphosphate_cytosol + AMP_cytosol + Glutaminyl_tRNA_cytosol; R03652_dummy;  // kegg.reaction:R03652
    R03652_dummy = 1 time;
  R01978: CoA_cytosol + 2 H_cytosol + C00356 -> Acetyl_CoA_cytosol + Acetoacetyl_CoA_cytosol + H2O_cytosol; R01978_dummy;  // kegg.reaction:R01978
    R01978_dummy = 1 time;
  R03654: tRNA_Gly_cytosol + Glycine_cytosol + ATP_cytosol -> Diphosphate_cytosol + AMP_cytosol + Glycyl_tRNA_Gly_cytosol; R03654_dummy;  // kegg.reaction:R03654
    R03654_dummy = 1 time;
  R03655: tRNA_His_cytosol + L_Histidine_cytosol + ATP_cytosol -> Diphosphate_cytosol + AMP_cytosol + L_Histidyl_tRNA_His_cytosol; R03655_dummy;  // kegg.reaction:R03655
    R03655_dummy = 1 time;
  R03656: tRNA_Ile_cytosol + L_Isoleucine_cytosol + ATP_cytosol -> Diphosphate_cytosol + AMP_cytosol + L_Isoleucyl_tRNA_Ile_cytosol; R03656_dummy;  // kegg.reaction:R03656
    R03656_dummy = 1 time;
  R03657: tRNA_Leu_cytosol + ATP_cytosol + L_Leucine_cytosol -> Diphosphate_cytosol + AMP_cytosol + L_Leucyl_tRNA_cytosol; R03657_dummy;  // kegg.reaction:R03657
    R03657_dummy = 1 time;
  R00289: D_Glucose_1_phosphate_cytosol + UTP_cytosol -> Diphosphate_cytosol + UDP_glucose_cytosol; R00289_dummy;  // kegg.reaction:R00289
    R00289_dummy = 1 time;
  R02024: Thioredoxin_disulfide_cytosol + H2O_cytosol + dCDP_cytosol -> Thioredoxin_cytosol + CDP_cytosol + 2 H_cytosol; R02024_dummy;  // kegg.reaction:R02024
    R02024_dummy = 1 time;
  R05329: eIF5A_precursor_lysine_cytosol + Spermidine_cytosol -> _1_3_Diaminopropane_cytosol + C07282; R05329_dummy;  // kegg.reaction:R05329
    R05329_dummy = 1 time;
  R07891: Acetyl_CoA_cytosol + OPC6_CoA_cytosol -> CoA_cytosol + _3_Oxo_OPC8_CoA_cytosol; R07891_dummy;  // kegg.reaction:R07891
    R07891_dummy = 1 time;
  R08512: Sulfuric_monoester_cytosol + Glutathione_cytosol -> R_S_Glutathione_cytosol + Sulfate_cytosol; R08512_dummy;  // kegg.reaction:R08512
    R08512_dummy = 1 time;
  R07895: Acetyl_CoA_cytosol + OPC4_CoA_cytosol -> CoA_cytosol + _3_Oxo_OPC6_CoA_cytosol; R07895_dummy;  // kegg.reaction:R07895
    R07895_dummy = 1 time;
  R04480: CoA_cytosol + Phosphatidylethanolamine_cytosol -> Acyl_CoA_cytosol + C04438; R04480_dummy;  // kegg.reaction:R04480
    R04480_dummy = 1 time;
  R04481: S_Adenosyl_L_methionine_cytosol + C04441 -> C04692 + C00021; R04481_dummy;  // kegg.reaction:R04481
    R04481_dummy = 1 time;
  R07899: Acetyl_CoA_cytosol + _7_Isojasmonic_acid_CoA_cytosol -> CoA_cytosol + _3_Oxo_OPC4_CoA_cytosol; R07899_dummy;  // kegg.reaction:R07899
    R07899_dummy = 1 time;
  R07328: Alcohol_cytosol + 7 H_cytosol + NADP_cytosol + Carbonic_acid_cytosol -> NADPH_cytosol + Aldehyde_cytosol + 3 H2O_cytosol; R07328_dummy;  // kegg.reaction:R07328
    R07328_dummy = 1 time;
  R00089: ATP_cytosol -> _3_5_Cyclic_AMP_cytosol + Diphosphate_cytosol; R00089_dummy;  // kegg.reaction:R00089
    R00089_dummy = 1 time;
  R03991: Acetyl_CoA_cytosol + Tetradecanoyl_CoA_cytosol -> CoA_cytosol + _3_Oxopalmitoyl_CoA_cytosol; R03991_dummy;  // kegg.reaction:R03991
    R03991_dummy = 1 time;
  R05331: _3_Methylbutanoyl_CoA_cytosol + 3 Malonyl_CoA_cytosol -> 4 CoA_cytosol + C07350 + 3 CO2_cytosol; R05331_dummy;  // kegg.reaction:R05331
    R05331_dummy = 1 time;
  R05332: Acetyl_CoA_cytosol + C06156 -> CoA_cytosol + C04501; R05332_dummy;  // kegg.reaction:R05332
    R05332_dummy = 1 time;
  R00086: ATP_cytosol + H2O_cytosol -> Orthophosphate_cytosol + ADP_cytosol + 2 H_cytosol; R00086_dummy;  // kegg.reaction:R00086
    R00086_dummy = 1 time;
  R00756: D_Fructose_6_phosphate_cytosol + ATP_cytosol -> C00354 + ADP_cytosol; R00756_dummy;  // kegg.reaction:R00756
    R00756_dummy = 1 time;
  R00698: Oxygen_cytosol + 2 L_Phenylalanine_cytosol -> 2 CO2_cytosol + 2 _2_Phenylacetamide_cytosol; R00698_dummy;  // kegg.reaction:R00698
    R00698_dummy = 1 time;
  R00695: L_Aspartate_cytosol + Phenylpyruvate_cytosol -> Oxaloacetate_cytosol + L_Phenylalanine_cytosol; R00695_dummy;  // kegg.reaction:R00695
    R00695_dummy = 1 time;
  R00597: S_Adenosyl_L_methionine_cytosol + tRNA_guanine_cytosol -> C04157 + C00021; R00597_dummy;  // kegg.reaction:R00597
    R00597_dummy = 1 time;
  R00238: 2 Acetyl_CoA_cytosol -> CoA_cytosol + Acetoacetyl_CoA_cytosol; R00238_dummy;  // kegg.reaction:R00238
    R00238_dummy = 1 time;
  R00598: S_Adenosyl_L_methionine_cytosol + tRNA_guanine_cytosol -> C00021 + C04158; R00598_dummy;  // kegg.reaction:R00598
    R00598_dummy = 1 time;
  R03875: S_Adenosyl_L_methionine_cytosol + Protein_lysine_cytosol -> C00021 + C05544; R03875_dummy;  // kegg.reaction:R03875
    R03875_dummy = 1 time;
  R01309: Phosphatidylcholine_cytosol + 2 H2O_cytosol -> C00670 + 2 Fatty_acid_cytosol + 4 H_cytosol; R01309_dummy;  // kegg.reaction:R01309
    R01309_dummy = 1 time;
  R01658: Isopentenyl_diphosphate_cytosol + C00235 -> Diphosphate_cytosol + Geranyl_diphosphate_cytosol; R01658_dummy;  // kegg.reaction:R01658
    R01658_dummy = 1 time;
  R00335: H2O_cytosol + GTP_cytosol -> 2 H_cytosol + GDP_cytosol + Orthophosphate_cytosol; R00335_dummy;  // kegg.reaction:R00335
    R00335_dummy = 1 time;
  R01652: CO2_cytosol + _4_Methyl_2_oxopentanoate_cytosol -> C04236; R01652_dummy;  // kegg.reaction:R01652
    R01652_dummy = 1 time;
  R02874: Squalene_cytosol + 2 H_cytosol + Oxygen_cytosol + NADPH_cytosol -> NADP_cytosol + H2O_cytosol + S_2_3_Epoxysqualene_cytosol; R02874_dummy;  // kegg.reaction:R02874
    R02874_dummy = 1 time;
  R02326: ATP_cytosol + dCDP_cytosol -> dCTP_cytosol + ADP_cytosol; R02326_dummy;  // kegg.reaction:R02326
    R02326_dummy = 1 time;
  R02320: Nucleoside_triphosphate_cytosol + Pyruvate_cytosol -> NDP_cytosol + Phosphoenolpyruvate_cytosol; R02320_dummy;  // kegg.reaction:R02320
    R02320_dummy = 1 time;
  R08620: C17210 -> C17212; R08620_dummy;  // kegg.reaction:R08620
    R08620_dummy = 1 time;
  R07603: C00671 + Thiamin_diphosphate_cytosol -> C15978 + CO2_cytosol; R07603_dummy;  // kegg.reaction:R07603
    R07603_dummy = 1 time;
  R00156: ATP_cytosol + UDP_cytosol -> ADP_cytosol + UTP_cytosol; R00156_dummy;  // kegg.reaction:R00156
    R00156_dummy = 1 time;
  R05537: CoA_cytosol + FAD_cytosol + NAD_cytosol + ATP_cytosol + 2 H2O_cytosol + C01198 -> Acetyl_CoA_cytosol + Diphosphate_cytosol + AMP_cytosol + 4 H_cytosol + NADH_cytosol + FADH2_cytosol + Salicylate_cytosol; R05537_dummy;  // kegg.reaction:R05537
    R05537_dummy = 1 time;
  R02447: S_Benzoate_coenzyme_A_cytosol + 3 Malonyl_CoA_cytosol -> 4 CoA_cytosol + C06356 + 3 CO2_cytosol; R02447_dummy;  // kegg.reaction:R02447
    R02447_dummy = 1 time;
  R00014: Thiamin_diphosphate_cytosol + Pyruvate_cytosol -> C05125 + CO2_cytosol; R00014_dummy;  // kegg.reaction:R00014
    R00014_dummy = 1 time;
  R00158: UMP_cytosol + ATP_cytosol -> UDP_cytosol + ADP_cytosol; R00158_dummy;  // kegg.reaction:R00158
    R00158_dummy = 1 time;
  R00010: alpha_alpha_Trehalose_cytosol + H2O_cytosol -> 2 D_Glucose_cytosol + 2 H_cytosol; R00010_dummy;  // kegg.reaction:R00010
    R00010_dummy = 1 time;
  R03139: H_cytosol + Oxygen_cytosol + H2O_cytosol + _1_3_Diaminopropane_cytosol -> H2O2_cytosol + NH3_cytosol + _3_Aminopropanal_cytosol; R03139_dummy;  // kegg.reaction:R03139
    R03139_dummy = 1 time;
  R00332: ATP_cytosol + GMP_cytosol -> GDP_cytosol + ADP_cytosol; R00332_dummy;  // kegg.reaction:R00332
    R00332_dummy = 1 time;
  R00330: GDP_cytosol + ATP_cytosol -> GTP_cytosol + ADP_cytosol; R00330_dummy;  // kegg.reaction:R00330
    R00330_dummy = 1 time;
  R01390: CO2_cytosol + Hydroxypyruvate_cytosol -> Dihydroxyfumarate_cytosol; R01390_dummy;  // kegg.reaction:R01390
    R01390_dummy = 1 time;
  R05577: ATP_cytosol + tRNA_Asp_cytosol + L_Aspartate_cytosol -> Diphosphate_cytosol + AMP_cytosol + L_Aspartyl_tRNA_Asp_cytosol; R05577_dummy;  // kegg.reaction:R05577
    R05577_dummy = 1 time;
  R00760: ATP_cytosol + D_Fructose_cytosol -> D_Fructose_6_phosphate_cytosol + ADP_cytosol; R00760_dummy;  // kegg.reaction:R00760
    R00760_dummy = 1 time;
  R00236: CoA_cytosol + Acetyl_adenylate_cytosol -> Acetyl_CoA_cytosol + AMP_cytosol; R00236_dummy;  // kegg.reaction:R00236
    R00236_dummy = 1 time;
  R00235: CoA_cytosol + ATP_cytosol + Acetate_cytosol -> Acetyl_CoA_cytosol + Diphosphate_cytosol + AMP_cytosol; R00235_dummy;  // kegg.reaction:R00235
    R00235_dummy = 1 time;
  R00234: Acetyl_CoA_cytosol + Peptide_cytosol -> CoA_cytosol + Nalpha_Acetylpeptide_cytosol; R00234_dummy;  // kegg.reaction:R00234
    R00234_dummy = 1 time;
  R07937: Acetyl_CoA_cytosol + C16169 -> CoA_cytosol + C16376; R07937_dummy;  // kegg.reaction:R07937
    R07937_dummy = 1 time;
  R04250: Carbonic_acid_cytosol + _2_Aminoethylphosphonate_cytosol + 6 H_cytosol -> C05679 + 3 H2O_cytosol; R04250_dummy;  // kegg.reaction:R04250
    R04250_dummy = 1 time;
  R03348: CO2_cytosol + Diphosphate_cytosol + C01185 -> C00119 + C03722; R03348_dummy;  // kegg.reaction:R03348
    R03348_dummy = 1 time;
  R00767: CTP_cytosol + D_Fructose_6_phosphate_cytosol -> C00354 + CDP_cytosol; R00767_dummy;  // kegg.reaction:R00767
    R00767_dummy = 1 time;
  R04769: _7_O_Acetylsalutaridinol_cytosol -> Thebaine_cytosol + Acetate_cytosol; R04769_dummy;  // kegg.reaction:R04769
    R04769_dummy = 1 time;
  R01496: Sphingosine_cytosol + Acyl_CoA_cytosol -> CoA_cytosol + N_Acylsphingosine_cytosol; R01496_dummy;  // kegg.reaction:R01496
    R01496_dummy = 1 time;
  R08796: Malonyl_CoA_cytosol + H2O_cytosol + p_Coumaroyl_CoA_cytosol + Hexanoyl_CoA_cytosol -> 3 CoA_cytosol + 2 CO2_cytosol + 2 H_cytosol + C17744; R08796_dummy;  // kegg.reaction:R08796
    R08796_dummy = 1 time;
  R07505: NADP_cytosol + Episterol_cytosol -> NADPH_cytosol + _5_7_24_28_Ergostatrienol_cytosol + H_cytosol; R07505_dummy;  // kegg.reaction:R07505
    R07505_dummy = 1 time;
  R04701: _6_Hydroxyprotopine_cytosol + 4 H_cytosol -> Dihydrosanguinarine_cytosol + 2 H2O_cytosol; R04701_dummy;  // kegg.reaction:R04701
    R04701_dummy = 1 time;
  R01470: C01233 + H2O_cytosol -> Ethanolamine_cytosol + sn_Glycerol_3_phosphate_cytosol + 2 H_cytosol; R01470_dummy;  // kegg.reaction:R01470
    R01470_dummy = 1 time;
  R02654: C00043 + C01194 -> C01288 + UDP_cytosol; R02654_dummy;  // kegg.reaction:R02654
    R02654_dummy = 1 time;
  R01577: D_Arabinose_cytosol -> D_Ribulose_cytosol; R01577_dummy;  // kegg.reaction:R01577
    R01577_dummy = 1 time;
  R01575: D_Arabinose_cytosol + NADP_cytosol -> NADPH_cytosol + D_Arabinono_1_4_lactone_cytosol; R01575_dummy;  // kegg.reaction:R01575
    R01575_dummy = 1 time;
  R01574: D_Arabinose_cytosol + NAD_cytosol -> D_Arabinono_1_4_lactone_cytosol + NADH_cytosol; R01574_dummy;  // kegg.reaction:R01574
    R01574_dummy = 1 time;
  R05098: _6_Hydroxyhexan_6_olide_cytosol -> Adipate_semialdehyde_cytosol; R05098_dummy;  // kegg.reaction:R05098
    R05098_dummy = 1 time;
  R00529: ATP_cytosol + Sulfate_cytosol -> Adenylyl_sulfate_cytosol + Diphosphate_cytosol; R00529_dummy;  // kegg.reaction:R00529
    R00529_dummy = 1 time;
  R00483: NH3_cytosol + ATP_cytosol + L_Aspartate_cytosol -> Diphosphate_cytosol + AMP_cytosol + 3 H_cytosol + L_Asparagine_cytosol; R00483_dummy;  // kegg.reaction:R00483
    R00483_dummy = 1 time;
  R02060: C06156 -> C00352; R02060_dummy;  // kegg.reaction:R02060
    R02060_dummy = 1 time;
  R02061: Isopentenyl_diphosphate_cytosol + C00448 -> Diphosphate_cytosol + C00353; R02061_dummy;  // kegg.reaction:R02061
    R02061_dummy = 1 time;
  R08829: Dopaxanthin_quinone_cytosol -> Betanidin_cytosol; R08829_dummy;  // kegg.reaction:R08829
    R08829_dummy = 1 time;
  R02865: D_Sorbitol_cytosol + ATP_cytosol -> Sorbitol_6_phosphate_cytosol + ADP_cytosol; R02865_dummy;  // kegg.reaction:R02865
    R02865_dummy = 1 time;
  R05802: C04549 + ATP_cytosol -> C11556 + ADP_cytosol; R05802_dummy;  // kegg.reaction:R05802
    R05802_dummy = 1 time;
  R08749: Isopentenyl_diphosphate_cytosol + C17435 -> C17434 + Diphosphate_cytosol; R08749_dummy;  // kegg.reaction:R08749
    R08749_dummy = 1 time;
  R08748: Isopentenyl_diphosphate_cytosol + C11356 -> Diphosphate_cytosol + C17435; R08748_dummy;  // kegg.reaction:R08748
    R08748_dummy = 1 time;
  R00876: D_Fructose_cytosol + ITP_cytosol -> D_Fructose_6_phosphate_cytosol + IDP_cytosol; R00876_dummy;  // kegg.reaction:R00876
    R00876_dummy = 1 time;
  R02101: C00143 + dUMP_cytosol -> dTMP_cytosol + Dihydrofolate_cytosol + H_cytosol; R02101_dummy;  // kegg.reaction:R02101
    R02101_dummy = 1 time;
  R02100: dUTP_cytosol + H2O_cytosol -> Diphosphate_cytosol + dUMP_cytosol + 2 H_cytosol; R02100_dummy;  // kegg.reaction:R02100
    R02100_dummy = 1 time;
  R05484: C06598 + H_cytosol -> _2_5_Dichlorophenol_cytosol + Hydrochloric_acid_cytosol; R05484_dummy;  // kegg.reaction:R05484
    R05484_dummy = 1 time;
  R05483: Hydrochloric_acid_cytosol + _1_2_4_Trichlorobenzene_cytosol -> H_cytosol + C06597; R05483_dummy;  // kegg.reaction:R05483
    R05483_dummy = 1 time;
  R04779: ATP_cytosol + C05345 -> C05378 + ADP_cytosol; R04779_dummy;  // kegg.reaction:R04779
    R04779_dummy = 1 time;
  R07599: Thiamin_diphosphate_cytosol + C00141 -> CO2_cytosol + C15976; R07599_dummy;  // kegg.reaction:R07599
    R07599_dummy = 1 time;
  R06830: C11822 + H_cytosol -> CO2_cytosol + Aminoacetaldehyde_cytosol; R06830_dummy;  // kegg.reaction:R06830
    R06830_dummy = 1 time;
  R04773: Selenomethionine_cytosol + ATP_cytosol + tRNA_Met_cytosol -> Diphosphate_cytosol + AMP_cytosol + Selenomethionyl_tRNA_Met_cytosol; R04773_dummy;  // kegg.reaction:R04773
    R04773_dummy = 1 time;
  R04770: H_cytosol + Selenomethionine_cytosol + H2O_cytosol -> NH3_cytosol + _2_Oxobutanoate_cytosol + Methaneselenol_cytosol; R04770_dummy;  // kegg.reaction:R04770
    R04770_dummy = 1 time;
  R01318: Acyl_CoA_cytosol + C04230 -> CoA_cytosol + Phosphatidylcholine_cytosol; R01318_dummy;  // kegg.reaction:R01318
    R01318_dummy = 1 time;
  R00416: C04501 + UTP_cytosol -> C00043 + Diphosphate_cytosol; R00416_dummy;  // kegg.reaction:R00416
    R00416_dummy = 1 time;
  R01547: ATP_cytosol + dAMP_cytosol -> dADP_cytosol + ADP_cytosol; R01547_dummy;  // kegg.reaction:R01547
    R01547_dummy = 1 time;
  R08637: _2_Aminobut_2_enoate_cytosol + H2O_cytosol + H_cytosol -> _2_Oxobutanoate_cytosol + NH3_cytosol; R08637_dummy;  // kegg.reaction:R08637
    R08637_dummy = 1 time;
  R01827: C05382 + C00118 -> C05345 + D_Erythrose_4_phosphate_cytosol; R01827_dummy;  // kegg.reaction:R01827
    R01827_dummy = 1 time;
  R01829: C00447 + H_cytosol -> Glycerone_phosphate_cytosol + D_Erythrose_4_phosphate_cytosol; R01829_dummy;  // kegg.reaction:R01829
    R01829_dummy = 1 time;
  R07291: C04230 + H2O_cytosol -> C00670 + Carboxylate_cytosol + 2 H_cytosol; R07291_dummy;  // kegg.reaction:R07291
    R07291_dummy = 1 time;
  R08639: D_Glucose_1_phosphate_cytosol -> D_Glucose_6_phosphate_cytosol; R08639_dummy;  // kegg.reaction:R08639
    R08639_dummy = 1 time;
  R07477: NAD_cytosol + Spermidine_cytosol -> NADH_cytosol + Dehydrospermidine_cytosol; R07477_dummy;  // kegg.reaction:R07477
    R07477_dummy = 1 time;
  R04457: 4 H_cytosol + C15556 + C04732 -> Orthophosphate_cytosol + 2 H2O_cytosol + C04332; R04457_dummy;  // kegg.reaction:R04457
    R04457_dummy = 1 time;
  R00899: Cys_Gly_cytosol + H2O_cytosol -> Glycine_cytosol + L_Cysteine_cytosol + 2 H_cytosol; R00899_dummy;  // kegg.reaction:R00899
    R00899_dummy = 1 time;
  R04458: 4 H2O_cytosol + p_Benzoquinone_cytosol + C04332 -> C05995 + 8 H_cytosol + p_Benzenediol_cytosol + Carbonic_acid_cytosol; R04458_dummy;  // kegg.reaction:R04458
    R04458_dummy = 1 time;
  R07478: C15854 + NADH_cytosol -> NAD_cytosol + C07282; R07478_dummy;  // kegg.reaction:R07478
    R07478_dummy = 1 time;
  R07479: eIF5A_precursor_lysine_cytosol + Dehydrospermidine_cytosol -> _1_3_Diaminopropane_cytosol + C15854; R07479_dummy;  // kegg.reaction:R07479
    R07479_dummy = 1 time;
  R00057: Oxygen_cytosol + 2 R_C_R_SH_cytosol -> H2O2_cytosol + R_C_R_S_S_R_CR_cytosol; R00057_dummy;  // kegg.reaction:R00057
    R00057_dummy = 1 time;
  R08953: Aldosterone_cytosol + H_cytosol -> Aldosterone_hemiacetal_cytosol; R08953_dummy;  // kegg.reaction:R08953
    R08953_dummy = 1 time;
  R08818: Betalamic_acid_cytosol + C17752 + 2 H_cytosol -> Amaranthin_cytosol + H2O_cytosol; R08818_dummy;  // kegg.reaction:R08818
    R08818_dummy = 1 time;
  R07376: L_Serine_cytosol + Phosphatidylethanolamine_cytosol -> Phosphatidylserine_cytosol + Ethanolamine_cytosol; R07376_dummy;  // kegg.reaction:R07376
    R07376_dummy = 1 time;
  R05578: L_Glutamate_cytosol + ATP_cytosol + tRNA_Glu_cytosol -> Diphosphate_cytosol + AMP_cytosol + L_Glutamyl_tRNA_Glu_cytosol; R05578_dummy;  // kegg.reaction:R05578
    R05578_dummy = 1 time;
  R02367: Palmitoyl_CoA_cytosol + Retinol_cytosol -> CoA_cytosol + Retinyl_palmitate_cytosol; R02367_dummy;  // kegg.reaction:R02367
    R02367_dummy = 1 time;
  R02366: Acyl_CoA_cytosol + Retinol_cytosol -> CoA_cytosol + Retinyl_ester_cytosol; R02366_dummy;  // kegg.reaction:R02366
    R02366_dummy = 1 time;
  R04090: C03899 + H2O_cytosol -> _2_Hydroxy_carboxylate_cytosol + Glutathione_cytosol + 2 H_cytosol; R04090_dummy;  // kegg.reaction:R04090
    R04090_dummy = 1 time;
  R02568: D_Fructose_1_phosphate_cytosol + H_cytosol -> D_Glyceraldehyde_cytosol + Glycerone_phosphate_cytosol; R02568_dummy;  // kegg.reaction:R02568
    R02568_dummy = 1 time;
  R00662: H2O_cytosol + UTP_cytosol -> UMP_cytosol + 2 H_cytosol + Diphosphate_cytosol; R00662_dummy;  // kegg.reaction:R00662
    R00662_dummy = 1 time;
  R04999: cis_2_Hydroxycinnamate_cytosol + 2 H_cytosol -> Coumarin_cytosol + H2O_cytosol; R04999_dummy;  // kegg.reaction:R04999
    R04999_dummy = 1 time;
  R03648: tRNA_Asn_cytosol + L_Asparagine_cytosol + ATP_cytosol -> Diphosphate_cytosol + AMP_cytosol + L_Asparaginyl_tRNA_Asn_cytosol; R03648_dummy;  // kegg.reaction:R03648
    R03648_dummy = 1 time;
  R07506: NADP_cytosol + _5_7_24_28_Ergostatrienol_cytosol -> NADPH_cytosol + C05440 + 3 H_cytosol; R07506_dummy;  // kegg.reaction:R07506
    R07506_dummy = 1 time;
  R02003: Geranyl_diphosphate_cytosol + Isopentenyl_diphosphate_cytosol -> C00448 + Diphosphate_cytosol; R02003_dummy;  // kegg.reaction:R02003
    R02003_dummy = 1 time;
  R01354: ATP_cytosol + Propanoate_cytosol -> Diphosphate_cytosol + Propionyladenylate_cytosol; R01354_dummy;  // kegg.reaction:R01354
    R01354_dummy = 1 time;
  R01056: D_Ribose_5_phosphate_cytosol -> D_Ribulose_5_phosphate_cytosol; R01056_dummy;  // kegg.reaction:R01056
    R01056_dummy = 1 time;
  R01057: C00620 -> D_Ribose_5_phosphate_cytosol; R01057_dummy;  // kegg.reaction:R01057
    R01057_dummy = 1 time;
  R03828: _5_ppPur_mRNA_cytosol + GTP_cytosol -> G_5_pppR_RNA_cytosol + Diphosphate_cytosol; R03828_dummy;  // kegg.reaction:R03828
    R03828_dummy = 1 time;
  R02235: Dihydrofolate_cytosol + NAD_cytosol -> NADH_cytosol + Folate_cytosol; R02235_dummy;  // kegg.reaction:R02235
    R02235_dummy = 1 time;
  R01687: _5_L_Glutamyl_peptide_cytosol + Taurine_cytosol -> _5_L_Glutamyl_taurine_cytosol + Peptide_cytosol; R01687_dummy;  // kegg.reaction:R01687
    R01687_dummy = 1 time;
  R04292: Orthophosphate_cytosol + 2 H2O_cytosol + C03722 -> Iminoaspartate_cytosol + Glycerone_phosphate_cytosol + 4 H_cytosol; R04292_dummy;  // kegg.reaction:R04292
    R04292_dummy = 1 time;
  R05506: CoA_cytosol + Benzoyl_acetyl_CoA_cytosol -> Acetyl_CoA_cytosol + S_Benzoate_coenzyme_A_cytosol; R05506_dummy;  // kegg.reaction:R05506
    R05506_dummy = 1 time;
  R08835: Betalamic_acid_cytosol + Dopamine_cytosol + 2 H_cytosol -> Miraxanthin_V_cytosol + H2O_cytosol; R08835_dummy;  // kegg.reaction:R08835
    R08835_dummy = 1 time;
  R02687: _1_2_Diacyl_sn_glycerol_cytosol + H2O_cytosol -> _1_Acylglycerol_cytosol + Fatty_acid_cytosol + 2 H_cytosol; R02687_dummy;  // kegg.reaction:R02687
    R02687_dummy = 1 time;
  R09037: Acyl_CoA_cytosol + Monolysocardiolipin_cytosol -> CoA_cytosol + Cardiolipin_cytosol; R09037_dummy;  // kegg.reaction:R09037
    R09037_dummy = 1 time;
  R02317: C00450 + H2O_cytosol -> C04076 + H_cytosol; R02317_dummy;  // kegg.reaction:R02317
    R02317_dummy = 1 time;
  R08837: _4_5_seco_Dopa_cytosol + H_cytosol -> Betalamic_acid_cytosol + H2O_cytosol; R08837_dummy;  // kegg.reaction:R08837
    R08837_dummy = 1 time;
  R02543: Acyl_CoA_cytosol + C03640 -> CoA_cytosol + Sphingomyelin_cytosol; R02543_dummy;  // kegg.reaction:R02543
    R02543_dummy = 1 time;
  R01128: H2O_cytosol + IMP_cytosol -> Hypoxanthine_cytosol + D_Ribose_5_phosphate_cytosol + 2 H_cytosol; R01128_dummy;  // kegg.reaction:R01128
    R01128_dummy = 1 time;
  R00200: ATP_cytosol + Pyruvate_cytosol -> ADP_cytosol + Phosphoenolpyruvate_cytosol; R00200_dummy;  // kegg.reaction:R00200
    R00200_dummy = 1 time;
  R01121: ATP_cytosol + R_5_Diphosphomevalonate_cytosol -> CO2_cytosol + Orthophosphate_cytosol + ADP_cytosol + Isopentenyl_diphosphate_cytosol; R01121_dummy;  // kegg.reaction:R01121
    R01121_dummy = 1 time;
  R01123: Isopentenyl_diphosphate_cytosol -> C00235; R01123_dummy;  // kegg.reaction:R01123
    R01123_dummy = 1 time;
  R00299: ATP_cytosol + D_Glucose_cytosol -> D_Glucose_6_phosphate_cytosol + ADP_cytosol; R00299_dummy;  // kegg.reaction:R00299
    R00299_dummy = 1 time;
  R03502: C01298 + Pyruvate_cytosol -> L_Alanine_cytosol + C04673; R03502_dummy;  // kegg.reaction:R03502
    R03502_dummy = 1 time;
  R04225: C00671 + Enzyme_N6_lipoyl_lysine_cytosol -> C15979 + CO2_cytosol; R04225_dummy;  // kegg.reaction:R04225
    R04225_dummy = 1 time;
  R03314: C01165 + 2 H_cytosol -> C03912 + H2O_cytosol; R03314_dummy;  // kegg.reaction:R03314
    R03314_dummy = 1 time;
  R00939: NADP_cytosol + Tetrahydrofolate_cytosol -> NADPH_cytosol + Dihydrofolate_cytosol; R00939_dummy;  // kegg.reaction:R00939
    R00939_dummy = 1 time;
  R05846: C03677 -> Cathenamine_cytosol; R05846_dummy;  // kegg.reaction:R05846
    R05846_dummy = 1 time;
  R00936: Tetrahydrofolate_cytosol + NAD_cytosol -> Dihydrofolate_cytosol + NADH_cytosol; R00936_dummy;  // kegg.reaction:R00936
    R00936_dummy = 1 time;
  R00937: Tetrahydrofolate_cytosol + 2 NAD_cytosol -> 2 NADH_cytosol + Folate_cytosol; R00937_dummy;  // kegg.reaction:R00937
    R00937_dummy = 1 time;
  R03319: C01171 -> C03735; R03319_dummy;  // kegg.reaction:R03319
    R03319_dummy = 1 time;
  R08218: L_Serine_cytosol + ATP_cytosol + tRNA_Sec_cytosol -> Diphosphate_cytosol + L_Seryl_tRNA_Sec_cytosol + AMP_cytosol; R08218_dummy;  // kegg.reaction:R08218
    R08218_dummy = 1 time;
  R00836: D_Glucose_6_phosphate_cytosol + UDP_glucose_cytosol -> C00689 + UDP_cytosol; R00836_dummy;  // kegg.reaction:R00836
    R00836_dummy = 1 time;
  R05231: NADP_cytosol + _6_Hydroxyhexanoic_acid_cytosol -> NADPH_cytosol + Adipate_semialdehyde_cytosol; R05231_dummy;  // kegg.reaction:R05231
    R05231_dummy = 1 time;
  R08358: Dehydroascorbate_cytosol + Trypanothione_cytosol -> Ascorbate_cytosol + Trypanothione_disulfide_cytosol; R08358_dummy;  // kegg.reaction:R08358
    R08358_dummy = 1 time;
  R01528: _6_Phospho_D_gluconate_cytosol + NADP_cytosol -> CO2_cytosol + NADPH_cytosol + D_Ribulose_5_phosphate_cytosol; R01528_dummy;  // kegg.reaction:R01528
    R01528_dummy = 1 time;
  R03916: R_S_Glutathione_cytosol + H2O_cytosol -> R_S_Cysteinylglycine_cytosol + L_Glutamate_cytosol + 2 H_cytosol; R03916_dummy;  // kegg.reaction:R03916
    R03916_dummy = 1 time;
  R00830: Succinyl_CoA_cytosol + Glycine_cytosol -> CoA_cytosol + _5_Aminolevulinate_cytosol + CO2_cytosol; R00830_dummy;  // kegg.reaction:R00830
    R00830_dummy = 1 time;
  R03646: tRNA_Arg_cytosol + L_Arginine_cytosol + ATP_cytosol -> Diphosphate_cytosol + AMP_cytosol + L_Arginyl_tRNA_Arg_cytosol; R03646_dummy;  // kegg.reaction:R03646
    R03646_dummy = 1 time;
  R01229: Diphosphate_cytosol + GMP_cytosol -> C00119 + Guanine_cytosol; R01229_dummy;  // kegg.reaction:R01229
    R01229_dummy = 1 time;
  R07086: C14849 -> _9_Hydroxybenzo_a_pyrene_cytosol; R07086_dummy;  // kegg.reaction:R07086
    R07086_dummy = 1 time;
  R02744: C00670 + Carboxylate_cytosol + 2 H_cytosol -> C04233 + H2O_cytosol; R02744_dummy;  // kegg.reaction:R02744
    R02744_dummy = 1 time;
  R02747: H2O_cytosol + C04233 -> C00670 + 2 H_cytosol + Fatty_acid_cytosol; R02747_dummy;  // kegg.reaction:R02747
    R02747_dummy = 1 time;
  R02746: C04230 + H2O_cytosol -> C00670 + Fatty_acid_cytosol + 2 H_cytosol; R02746_dummy;  // kegg.reaction:R02746
    R02746_dummy = 1 time;
  R02740: C00668 -> C05345; R02740_dummy;  // kegg.reaction:R02740
    R02740_dummy = 1 time;
  R01986: NADP_cytosol + H2O_cytosol + _4_Aminobutyraldehyde_cytosol -> 3 H_cytosol + NADPH_cytosol + _4_Aminobutanoate_cytosol; R01986_dummy;  // kegg.reaction:R01986
    R01986_dummy = 1 time;
  R08289: Aldoifosfamide_cytosol + H_cytosol -> Isophosphamide_mustard_cytosol + Acrolein_cytosol; R08289_dummy;  // kegg.reaction:R08289
    R08289_dummy = 1 time;
  R00512: CMP_cytosol + ATP_cytosol -> CDP_cytosol + ADP_cytosol; R00512_dummy;  // kegg.reaction:R00512
    R00512_dummy = 1 time;
  R07012: C14787 -> beta_Naphthol_cytosol; R07012_dummy;  // kegg.reaction:R07012
    R07012_dummy = 1 time;
  R07010: C14787 -> alpha_Naphthol_cytosol; R07010_dummy;  // kegg.reaction:R07010
    R07010_dummy = 1 time;
  R07011: C14786 -> beta_Naphthol_cytosol; R07011_dummy;  // kegg.reaction:R07011
    R07011_dummy = 1 time;
  R05285: 2 Cytochrome_c_cytosol + _2_Chloroethanol_cytosol -> Chloroacetaldehyde_cytosol + 2 Ferrocytochrome_c_cytosol; R05285_dummy;  // kegg.reaction:R05285
    R05285_dummy = 1 time;
  R02038: CTP_cytosol + Ethanolamine_phosphate_cytosol -> Diphosphate_cytosol + CDP_ethanolamine_cytosol; R02038_dummy;  // kegg.reaction:R02038
    R02038_dummy = 1 time;
  R02035: C01236 + H2O_cytosol -> 2 H_cytosol + _6_Phospho_D_gluconate_cytosol; R02035_dummy;  // kegg.reaction:R02035
    R02035_dummy = 1 time;
  R08677: Sulfur_cytosol + Glutathione_cytosol -> S_Sulfanylglutathione_cytosol; R08677_dummy;  // kegg.reaction:R08677
    R08677_dummy = 1 time;
  R02030: CDP_diacylglycerol_cytosol + Phosphatidylglycerol_cytosol -> CMP_cytosol + Cardiolipin_cytosol; R02030_dummy;  // kegg.reaction:R02030
    R02030_dummy = 1 time;
end
