// SBML level 2 version 4

function Constant_flux__irreversible(v)
  v;
end
Constant_flux__irreversible is "Constant flux (irreversible)";

function PBPK__blood____tissue(Qt, Ca, Vt)
  Qt/Vt*Ca;
end
PBPK__blood____tissue is "PBPK: blood -> tissue";

function PBPK__tissue____blood(Qt, Ct, Kp, BP, Vt)
  Qt/Vt*(Ct/(Kp/BP));
end
PBPK__tissue____blood is "PBPK: tissue -> blood";

function PBPK__Heterodimerisation(E2_Lung, s2, Kon, E2_Bone, koff)
  E2_Lung*s2*Kon - E2_Bone*koff;
end
PBPK__Heterodimerisation is "PBPK: Heterodimerisation";

function MM_with_Kcat(Ct, Ce, Kcat, km)
  Ct*Ce*Kcat/(Ct + km);
end

model E2_combined_v7_2()
  // E2_combined_v7.2
  // Using scaling from PhysB model
  // Blood flow in L/hr
  // Compartments in Kg
  // Baseline as ~0.003nM Free E2 in Blood_venous
  // E2 biosynthesis rate constant = 2
  // E2 biosynthesis species = 1nM
  // CLeh = 5
  // CLint = metabolic model
  // T:P = 0.286

  // Compartments:
  compartment default = 1;
  compartment Plasma_venous = 1;
  compartment Plasma_arterial = 1;
  compartment Lung = 1;
  compartment Bone = 1;
  compartment Heart = 1;
  compartment Liver_blood = 1;
  compartment Kidney = 1;
  compartment Intestine = 1;
  compartment Spleen = 1;
  compartment Thymus = 1;
  compartment Stomach = 1;
  compartment Rest_of_body = 1; Rest_of_body is "Rest-of-body";
  compartment Liver_cells = 1;
  compartment Brain = 1;
  compartment Gonads_cells = 1;
  compartment Skin = 1;
  compartment Muscle = 1;
  compartment Adipose = 1;
  compartment Dose_IV = 1;
  compartment Pancreas = 1;
  compartment Dose_oral = 1;
  compartment Gonads_blood = 1;

  // Species:
  species $CLEH in default = 0;
  species $E13S_default in default = 0;
  species $E217BG_default in default = 0;
  species Faeces in default = 1;
  species count in default = 3001;
  species default_0 in default = -2999;
  species E2_Plasma_venous in Plasma_venous = 0.02094375;
  species SHBG_Plasma_venous in Plasma_venous = 39.44919;
  species Albumin_Plasma_venous in Plasma_venous = 499999.4;
  species E2_SHBG_Plasma_venous in Plasma_venous = 0.5508092; E2_SHBG_Plasma_venous is "E2-SHBG";
  species E2_Albumin_Plasma_venous in Plasma_venous = 0.6159918; E2_Albumin_Plasma_venous is "E2-Albumin";
  species E2_Plasma_arterial in Plasma_arterial = 0.02032119;
  species SHBG_Plasma_arterial in Plasma_arterial = 39.46534;
  species Albumin_Plasma_arterial in Plasma_arterial = 499999.4;
  species E2_SHBG_Plasma_arterial in Plasma_arterial = 0.5346552; E2_SHBG_Plasma_arterial is "E2-SHBG";
  species E2_Albumin_Plasma_arterial in Plasma_arterial = 0.5976814; E2_Albumin_Plasma_arterial is "E2-Albumin";
  species E2_Lung in Lung = 0.02094375;
  species E2_Bone in Bone = 0.02032119;
  species E2_Heart in Heart = 0.02032119;
  species E2_Liver_blood in Liver_blood = 0.01268467;
  species $E217BG_Liver_blood in Liver_blood = 0;
  species E2_Kidney in Kidney = 0.0194968;
  species E2_Intestine in Intestine = 0.02032119;
  species E2_Spleen in Spleen = 0.02032119;
  species E2_Thymus in Thymus = 0.02032119;
  species E2_Stomach in Stomach = 0.02032119;
  species E2_Rest_of_body in Rest_of_body = 0.02032119;
  species E2_Liver_cells in Liver_cells = 4.426879e-6;
  species ER_Liver_cells in Liver_cells = 45.99919;
  species ER_E2_Liver_cells in Liver_cells = 0.0008145314; ER_E2_Liver_cells is "ER-E2";
  species E13S_Liver_cells in Liver_cells = 2.473349e-8;
  species E217BG_Liver_cells in Liver_cells = 2.499896e-8;
  species $COMT in Liver_cells;
  species $UGT1A3 in Liver_cells;
  species $UGT1A1 in Liver_cells;
  species $HSD17B1 in Liver_cells;
  species $UGT2B7 in Liver_cells;
  species $SULT1E1 in Liver_cells;
  species $HSD17B2 in Liver_cells;
  species $CYP1A2 in Liver_cells;
  species E2_NSB in Liver_cells = 2.516331e-6; E2_NSB is "E2-NSB";
  species NSB in Liver_cells = 13.5;
  species $E23G in Liver_cells = 0;
  species _4OHE2 in Liver_cells = 2.483618e-5;
  species $_4MeE2 in Liver_cells = 0;
  species _2OHE2 in Liver_cells = 0.0009183018;
  species $_2MeE2 in Liver_cells = 0;
  species $E23S in Liver_cells = 0;
  species $_16aOHE2 in Liver_cells = 0;
  species E1 in Liver_cells = 1.393737e-8;
  species $E13G in Liver_cells = 0;
  species _4OHE1 in Liver_cells = 3.141432e-7;
  species $_4MeE1 in Liver_cells = 0;
  species _2OHE1 in Liver_cells = 3.560594e-7;
  species $_2MeE1 in Liver_cells = 0;
  species $_16aOHE1 in Liver_cells = 0;
  species $MRP3 in Liver_cells;
  species $MRP4 in Liver_cells;
  species $ABCG2 in Liver_cells = 83;
  species $MRP2 in Liver_cells;
  species $MDR1 in Liver_cells;
  species E2_Brain in Brain = 0.02032119;
  species E2_Gonads_cells in Gonads_cells = 45.67776;
  species $CYP3A4 in Gonads_cells;
  species $Biosynthesis in Gonads_cells = 1;
  species ER_Gonads_cells in Gonads_cells = 0.762066384;
  species ER_E2_Gonads_cells in Gonads_cells = 139.237933; ER_E2_Gonads_cells is "ER-E2";
  species E2_Skin in Skin = 0.02032119;
  species $SULT2A1 in Skin;
  species E2_Muscle in Muscle = 0.02032119;
  species E2_Adipose in Adipose = 0.02032119;
  species E2_Dose_IV in Dose_IV = 1101;
  species E2_Pancreas in Pancreas = 0.02032119;
  species E2_Dose_oral in Dose_oral = 0;
  species E2_Gonads_blood in Gonads_blood = 4.565776;

  // Parameters:
  Body_weight__kg = 60; Body_weight__kg is "Body weight (kg)";
  var Cardiac_flow;
  var Blood_flow_adipose;
  var Blood_flow_bone;
  var Blood_flow_brain;
  var Blood_flow_intestine;
  var Blood_flow_heart;
  var Blood_flow_kidney;
  var Blood_flow_liver__venous; Blood_flow_liver__venous is "Blood flow_liver (venous)";
  var Blood_flow_lung;
  var Blood_flow_muscle;
  var Blood_flow_skin;
  var Blood_flow_spleen;
  var Blood_flow_thymus;
  var Blood_flow_stomach;
  var Blood_flow_gonads;
  var Blood_flow_liver__artery; Blood_flow_liver__artery is "Blood flow_liver (artery)";
  Blood_plasma_ratio = 1; Blood_plasma_ratio is "Blood:plasma ratio";
  Height__m = 1.63; Height__m is "Height (m)";
  Body_Surface_Area__m_2 = 0.007184*Body_weight__kg^0.425*(Height__m*100)^0.725; Body_Surface_Area__m_2 is "Body Surface Area (m^2)";
  Body_Mass_Index__Kg_m_2 = Body_weight__kg/Height__m^2; Body_Mass_Index__Kg_m_2 is "Body Mass Index (Kg/m^2)";
  Age__Years = 35; Age__Years is "Age (Years)";
  var Blood_flow_pancreas;
  var Blood_flow_Rest_of_body; Blood_flow_Rest_of_body is "Blood flow_Rest-of-body";
  var Volume_rest_of_body; Volume_rest_of_body is "Volume_rest-of-body";
  Protein_Expression_Factor = 1;
  Initial_for_Age_Years = Age__Years; Initial_for_Age_Years is "Initial for Age (Years)";
  ModelValue_69 = Blood_flow_Rest_of_body; ModelValue_69 is "Initial for Blood flow_Rest-of-body";
  Initial_for_Blood_flow_adipose = Blood_flow_adipose;
  Initial_for_Blood_flow_bone = Blood_flow_bone;
  Initial_for_Blood_flow_brain = Blood_flow_brain;
  Initial_for_Blood_flow_gonads = Blood_flow_gonads;
  Initial_for_Blood_flow_heart = Blood_flow_heart;
  Initial_for_Blood_flow_intestine = Blood_flow_intestine;
  Initial_for_Blood_flow_kidney = Blood_flow_kidney;
  ModelValue_62 = Blood_flow_liver__artery; ModelValue_62 is "Initial for Blood flow_liver (artery)";
  Initial_for_Blood_flow_muscle = Blood_flow_muscle;
  Initial_for_Blood_flow_pancreas = Blood_flow_pancreas;
  Initial_for_Blood_flow_skin = Blood_flow_skin;
  Initial_for_Blood_flow_spleen = Blood_flow_spleen;
  Initial_for_Blood_flow_stomach = Blood_flow_stomach;
  Initial_for_Blood_flow_thymus = Blood_flow_thymus;
  ModelValue_66 = Body_Mass_Index__Kg_m_2; ModelValue_66 is "Initial for Body Mass Index (Kg/m^2)";
  ModelValue_65 = Body_Surface_Area__m_2; ModelValue_65 is "Initial for Body Surface Area (m^2)";
  Initial_for_Body_weight_kg = Body_weight__kg; Initial_for_Body_weight_kg is "Initial for Body weight (kg)";
  Initial_for_Cardiac_flow = Cardiac_flow;
  Initial_for_Height_m = Height__m; Initial_for_Height_m is "Initial for Height (m)";
  ModelValue_92 = Protein_Expression_Factor; ModelValue_92 is "Initial for Protein Expression Factor";
  Initial_for_Volume_Intestine = Volume_Intestine;
  Initial_for_Volume_adipose = Volume_adipose;
  Initial_for_Volume_bone = Volume_bone;
  Initial_for_Volume_brain = Volume_brain;
  Initial_for_Volume_gonads = Volume_gonads;
  Initial_for_Volume_heart = Volume_heart;
  Initial_for_Volume_kidney = Volume_kidney;
  Initial_for_Volume_liver_cells = Volume_liver_cells;
  Initial_for_Volume_lung = Volume_lung;
  Initial_for_Volume_muscle = Volume_muscle;
  Initial_for_Volume_pancreas = Volume_pancreas;
  ModelValue_71 = Volume_plasma_arterial; ModelValue_71 is "Initial for Volume_plasma_arterial";
  Initial_for_Volume_plasma_venous = Volume_plasma_venous;
  Initial_for_Volume_rest_of_body = Volume_rest_of_body; Initial_for_Volume_rest_of_body is "Initial for Volume_rest-of-body";
  Initial_for_Volume_skin = Volume_skin;
  Initial_for_Volume_spleen = Volume_spleen;
  Initial_for_Volume_stomach = Volume_stomach;
  Initial_for_Volume_thymus = Volume_thymus;

  // Assignment rules:
  UGT1A1 := 1980*ModelValue_92;
  CYP3A4 := 10219*ModelValue_92;
  Volume_adipose := Initial_for_Body_weight_kg*((1.2*ModelValue_66 + 0.23*Initial_for_Age_Years - 10.8*0 - 5.4)/100)/0.916;
  HSD17B1 := 541*ModelValue_92;
  MRP2 := 153*ModelValue_92;
  Volume_heart := 2.718^(2.13*ln(Initial_for_Height_m) - 2.502)/1.03;
  Volume_Intestine := 2.718^(2.47*ln(Initial_for_Height_m) - 1.351)/1.042;
  Volume_kidney := 2.718^(1.93*ln(Initial_for_Height_m) - 2.306)/1.05;
  Volume_liver_cells := 2.718^(1.98*ln(Initial_for_Height_m) - 0.6786)/1.03;
  Volume_liver_blood := Initial_for_Volume_liver_cells*0.075;
  Volume_thymus := 14*(7.1 - 6.1*2.71^(-Initial_for_Age_Years/11.9))*(0.14 + 0.86*2.71^(-Initial_for_Age_Years/10.3))/1000/1.03;
  Blood_flow_thymus := Initial_for_Volume_thymus*18.5*0.55;
  Volume_brain := 0.373*(3.68 - 2.68*2.71^(-Initial_for_Age_Years/0.89))*2.71^(-Initial_for_Age_Years/629)/1.035;
  CYP1A2 := 13878*ModelValue_92;
  Volume_spleen := 2.718^(2.16*ln(Initial_for_Height_m) - 3.123)/1.054;
  MDR1 := 223*ModelValue_92;
  Volume_pancreas := 2.718^(2.43*ln(Initial_for_Height_m) - 3.431)/1.045;
  Blood_flow_kidney := Initial_for_Volume_kidney*215*0.55;
  Volume_stomach := 2.718^(2.45*ln(Initial_for_Height_m) - 3.266)/1.044;
  Weight_Liver := Initial_for_Volume_liver_cells*1.03;
  Volume_liver_basolateral_membrane := Initial_for_Volume_liver_cells/1000;
  Volume_liver_apical_membrane := Initial_for_Volume_liver_cells/1000;
  Volume_lung := 2.718^(2.1*ln(Initial_for_Height_m) - 2.092)/1.05;
  Volume_skin := 2.71^(1.63*ModelValue_65 - 1.93)/1.5;
  Blood_flow_skin := Initial_for_Volume_skin*7.7*0.55;
  SULT1E1 := 2932*ModelValue_92;
  Volume_rest_of_body := 2.718^(1.95*ln(Initial_for_Height_m) - 0.072)/1.03;
  MRP3 := 362*ModelValue_92;
  Blood_flow_stomach := Initial_for_Volume_stomach*25.3*0.55;
  UGT2B7 := 17959*ModelValue_92;
  Blood_flow_brain := Initial_for_Volume_brain*32.7*0.55;
  Volume_bone := 2.718^(2.67*ln(Initial_for_Height_m) + 0.0689)/1.99;
  Volume_gonads := (3.3 + 90*(1 - 2.71^(-(Initial_for_Age_Years/16.8)^6.7)))/1000/1.03;
  Blood_flow_gonads := Initial_for_Volume_gonads*0.8*0.55;
  Volume_plasma_venous := (2.66*ModelValue_65 - 0.46)*0.67*0.55/1.025;
  Volume_plasma_arterial := (2.66*ModelValue_65 - 0.46)*0.33*0.55/1.025;
  Volume_muscle := (Initial_for_Body_weight_kg*0.93 - (Initial_for_Volume_adipose + ModelValue_71 + Initial_for_Volume_plasma_venous + Initial_for_Volume_bone + Initial_for_Volume_brain + Initial_for_Volume_gonads + Initial_for_Volume_heart + Initial_for_Volume_Intestine + Initial_for_Volume_kidney + Initial_for_Volume_liver_cells + Initial_for_Volume_lung + Initial_for_Volume_pancreas + Initial_for_Volume_rest_of_body + Initial_for_Volume_skin + Initial_for_Volume_spleen + Initial_for_Volume_stomach + Initial_for_Volume_thymus))/1.041;
  Blood_flow_muscle := Initial_for_Volume_muscle*2.4*0.55;
  Blood_flow_intestine := Initial_for_Volume_Intestine*59*0.55;
  Blood_flow_heart := Initial_for_Volume_heart*70.8*0.55;
  Blood_flow_pancreas := Initial_for_Volume_pancreas*29.5*0.55;
  Blood_flow_adipose := Initial_for_Volume_adipose*1.4*0.55;
  Blood_flow_bone := Initial_for_Volume_bone*1.8*0.55;
  Blood_flow_Rest_of_body := Initial_for_Volume_rest_of_body*18.8*0.55;
  SULT2A1 := 64067*ModelValue_92;
  MRP4 := 100*ModelValue_92;
  UGT1A3 := 2684*ModelValue_92;
  Blood_flow_liver__artery := Initial_for_Volume_liver_cells*16.4*0.55;
  COMT := 596*ModelValue_92;
  HSD17B2 := 1435*ModelValue_92;
  Blood_flow_spleen := Initial_for_Volume_spleen*81.5*0.55;
  Cardiac_flow := Initial_for_Blood_flow_adipose + Initial_for_Blood_flow_bone + Initial_for_Blood_flow_brain + Initial_for_Blood_flow_gonads + Initial_for_Blood_flow_heart + Initial_for_Blood_flow_intestine + Initial_for_Blood_flow_kidney + ModelValue_62 + Initial_for_Blood_flow_muscle + Initial_for_Blood_flow_pancreas + ModelValue_69 + Initial_for_Blood_flow_skin + Initial_for_Blood_flow_spleen + Initial_for_Blood_flow_stomach + Initial_for_Blood_flow_thymus;
  Blood_flow_liver__venous := ModelValue_62 + Initial_for_Blood_flow_intestine + Initial_for_Blood_flow_stomach + Initial_for_Blood_flow_spleen + Initial_for_Blood_flow_pancreas;
  Blood_flow_lung := Initial_for_Cardiac_flow*0.55;

  // Reactions:
  Artery_SHBG_binding: E2_Plasma_arterial + SHBG_Plasma_arterial -> E2_SHBG_Plasma_arterial; Plasma_arterial*PBPK__Heterodimerisation(E2_Plasma_arterial, SHBG_Plasma_arterial, Artery_SHBG_binding_Kon, E2_SHBG_Plasma_arterial, Artery_SHBG_binding_koff); Artery_SHBG_binding is "Artery: SHBG binding";
    Artery_SHBG_binding_Kon = 3600; Artery_SHBG_binding_koff = 5400;
  Artery_Albumin_binding: E2_Plasma_arterial + Albumin_Plasma_arterial -> E2_Albumin_Plasma_arterial; Plasma_arterial*PBPK__Heterodimerisation(E2_Plasma_arterial, Albumin_Plasma_arterial, Artery_Albumin_binding_Kon, E2_Albumin_Plasma_arterial, Artery_Albumin_binding_koff); Artery_Albumin_binding is "Artery: Albumin binding";
    Artery_Albumin_binding_Kon = 3600; Artery_Albumin_binding_koff = 61200000;
  Venous_SHBG_binding: E2_Plasma_venous + SHBG_Plasma_venous -> E2_SHBG_Plasma_venous; Plasma_venous*PBPK__Heterodimerisation(E2_Plasma_venous, SHBG_Plasma_venous, Venous_SHBG_binding_Kon, E2_SHBG_Plasma_venous, Venous_SHBG_binding_koff); Venous_SHBG_binding is "Venous: SHBG binding";
    Venous_SHBG_binding_Kon = 3600; Venous_SHBG_binding_koff = 5400;
  Venous_Albumin_binding: E2_Plasma_venous + Albumin_Plasma_venous -> E2_Albumin_Plasma_venous; Plasma_venous*PBPK__Heterodimerisation(E2_Plasma_venous, Albumin_Plasma_venous, Venous_Albumin_binding_Kon, E2_Albumin_Plasma_venous, Venous_Albumin_binding_koff); Venous_Albumin_binding is "Venous: Albumin binding";
    Venous_Albumin_binding_Kon = 3600; Venous_Albumin_binding_koff = 61200000;
  Lung_Input_from_venous: E2_Plasma_venous => E2_Lung; PBPK__blood____tissue(Blood_flow_lung, E2_Plasma_venous, Volume_lung); Lung_Input_from_venous is "Lung: Input from venous";
  Lung_Exit_to_artery: E2_Lung => E2_Plasma_arterial; PBPK__tissue____blood(Blood_flow_lung, E2_Lung, Lung_Exit_to_artery_Kp, Blood_plasma_ratio, Volume_lung); Lung_Exit_to_artery is "Lung: Exit to artery";
    Lung_Exit_to_artery_Kp = 1;
  Adipose_Input_from_artery: E2_Plasma_arterial => E2_Adipose; PBPK__blood____tissue(Blood_flow_adipose, E2_Plasma_arterial, Volume_adipose); Adipose_Input_from_artery is "Adipose: Input from artery";
  Adipose_Exit_to_venous: E2_Adipose => E2_Plasma_venous; PBPK__tissue____blood(Blood_flow_adipose, E2_Adipose, Adipose_Exit_to_venous_Kp, Blood_plasma_ratio, Volume_adipose); Adipose_Exit_to_venous is "Adipose: Exit to venous";
    Adipose_Exit_to_venous_Kp = 1;
  Bone_Input_from_artery: E2_Plasma_arterial => E2_Bone; PBPK__blood____tissue(Blood_flow_bone, E2_Plasma_arterial, Volume_bone); Bone_Input_from_artery is "Bone: Input from artery";
  Bone_Exit_to_venous: E2_Bone => E2_Plasma_venous; PBPK__tissue____blood(Blood_flow_bone, E2_Bone, Bone_Exit_to_venous_Kp, Blood_plasma_ratio, Volume_bone); Bone_Exit_to_venous is "Bone: Exit to venous";
    Bone_Exit_to_venous_Kp = 1;
  Brain_Input_from_artery: E2_Plasma_arterial => E2_Brain; PBPK__blood____tissue(Blood_flow_brain, E2_Plasma_arterial, Volume_brain); Brain_Input_from_artery is "Brain: Input from artery";
  Brain_Exit_to_venous: E2_Brain => E2_Plasma_venous; PBPK__tissue____blood(Blood_flow_brain, E2_Brain, Brain_Exit_to_venous_Kp, Blood_plasma_ratio, Volume_brain); Brain_Exit_to_venous is "Brain: Exit to venous";
    Brain_Exit_to_venous_Kp = 1;
  Heart_Input_from_artery: E2_Plasma_arterial => E2_Heart; PBPK__blood____tissue(Blood_flow_heart, E2_Plasma_arterial, Volume_heart); Heart_Input_from_artery is "Heart: Input from artery";
  Heart_Exit_to_venous: E2_Heart => E2_Plasma_venous; PBPK__tissue____blood(Blood_flow_heart, E2_Heart, Heart_Exit_to_venous_Kp, Blood_plasma_ratio, Volume_heart); Heart_Exit_to_venous is "Heart: Exit to venous";
    Heart_Exit_to_venous_Kp = 1;
  Muscle_Input_from_artery: E2_Plasma_arterial => E2_Muscle; PBPK__blood____tissue(Blood_flow_muscle, E2_Plasma_arterial, Volume_muscle); Muscle_Input_from_artery is "Muscle: Input from artery";
  Muscle_Exit_to_venous: E2_Muscle => E2_Plasma_venous; PBPK__tissue____blood(Blood_flow_muscle, E2_Muscle, Muscle_Exit_to_venous_Kp, Blood_plasma_ratio, Volume_muscle); Muscle_Exit_to_venous is "Muscle: Exit to venous";
    Muscle_Exit_to_venous_Kp = 1;
  Skin_Input_from_artery: E2_Plasma_arterial => E2_Skin; PBPK__blood____tissue(Blood_flow_skin, E2_Plasma_arterial, Volume_skin); Skin_Input_from_artery is "Skin: Input from artery";
  Skin_Exit_to_venous: E2_Skin => E2_Plasma_venous; PBPK__tissue____blood(Blood_flow_skin, E2_Skin, Skin_Exit_to_venous_Kp, Blood_plasma_ratio, Volume_skin); Skin_Exit_to_venous is "Skin: Exit to venous";
    Skin_Exit_to_venous_Kp = 1;
  Intestine_Input_fron_artery: E2_Plasma_arterial => E2_Intestine; PBPK__blood____tissue(Blood_flow_intestine, E2_Plasma_arterial, Volume_Intestine); Intestine_Input_fron_artery is "Intestine: Input fron artery";
  Liver_Input_from_Intestine: E2_Intestine => E2_Liver_blood; PBPK__tissue____blood(Blood_flow_intestine, E2_Intestine, Liver_Input_from_Intestine_Kp, Blood_plasma_ratio, Volume_Intestine); Liver_Input_from_Intestine is "Liver: Input from Intestine";
    Liver_Input_from_Intestine_Kp = 1;
  Liver_Exit_to_venous: E2_Liver_blood => E2_Plasma_venous; PBPK__tissue____blood(Blood_flow_liver__venous, E2_Liver_blood, Liver_Exit_to_venous_Kp, Blood_plasma_ratio, Volume_liver_cells); Liver_Exit_to_venous is "Liver: Exit to venous";
    Liver_Exit_to_venous_Kp = 1;
  Liver_Input_from_artery: E2_Plasma_arterial => E2_Liver_blood; PBPK__blood____tissue(Blood_flow_liver__artery, E2_Plasma_arterial, Volume_liver_cells); Liver_Input_from_artery is "Liver: Input from artery";
  Spleen_Input_from_artery: E2_Plasma_arterial => E2_Spleen; PBPK__blood____tissue(Blood_flow_spleen, E2_Plasma_arterial, Volume_spleen); Spleen_Input_from_artery is "Spleen: Input from artery";
  Liver_Input_from_spleen: E2_Spleen => E2_Liver_blood; PBPK__tissue____blood(Blood_flow_spleen, E2_Spleen, Liver_Input_from_spleen_Kp, Blood_plasma_ratio, Volume_spleen); Liver_Input_from_spleen is "Liver: Input from spleen";
    Liver_Input_from_spleen_Kp = 1;
  Kidney_Input_from_artery: E2_Plasma_arterial => E2_Kidney; PBPK__blood____tissue(Blood_flow_kidney, E2_Plasma_arterial, Volume_kidney); Kidney_Input_from_artery is "Kidney: Input from artery";
  Kidney_Exit_to_venous: E2_Kidney => E2_Plasma_venous; PBPK__tissue____blood(Blood_flow_kidney, E2_Kidney, Kidney_Exit_to_venous_Kp, Blood_plasma_ratio, Volume_kidney); Kidney_Exit_to_venous is "Kidney: Exit to venous";
    Kidney_Exit_to_venous_Kp = 1;
  Thymus_Input_from_artery: E2_Plasma_arterial => E2_Thymus; PBPK__blood____tissue(Blood_flow_thymus, E2_Plasma_arterial, Volume_thymus); Thymus_Input_from_artery is "Thymus: Input from artery";
  Gonads_Input_from_artery: E2_Plasma_arterial => E2_Gonads_blood; PBPK__blood____tissue(Blood_flow_gonads, E2_Plasma_arterial, Volume_gonads); Gonads_Input_from_artery is "Gonads: Input from artery";
  Gonads_Exit_to_venous: E2_Gonads_blood => E2_Plasma_venous; PBPK__tissue____blood(Blood_flow_gonads, E2_Gonads_blood, Gonads_Exit_to_venous_Kp, Blood_plasma_ratio, Volume_gonads); Gonads_Exit_to_venous is "Gonads: Exit to venous";
    Gonads_Exit_to_venous_Kp = 1;
  Thymus_Exit_to_venous: E2_Thymus => E2_Plasma_venous; PBPK__tissue____blood(Blood_flow_thymus, E2_Thymus, Thymus_Exit_to_venous_Kp, Blood_plasma_ratio, Volume_thymus); Thymus_Exit_to_venous is "Thymus: Exit to venous";
    Thymus_Exit_to_venous_Kp = 1;
  CLeh: E2_Kidney => $CLEH; CLeh_k1*E2_Kidney;
    CLeh_k1 = 5;
  Liver__Binding__ER_binding: ER_Liver_cells + E2_Liver_cells -> ER_E2_Liver_cells; Liver_cells*PBPK__Heterodimerisation(ER_Liver_cells, E2_Liver_cells, Liver__Binding__ER_binding_Kon, ER_E2_Liver_cells, Liver__Binding__ER_binding_koff); Liver__Binding__ER_binding is "Liver: Binding, ER binding";
    Liver__Binding__ER_binding_Kon = 3600; Liver__Binding__ER_binding_koff = 900;
  Stomach__Input_from_artery: E2_Plasma_arterial -> E2_Stomach; PBPK__blood____tissue(Blood_flow_stomach, E2_Plasma_arterial, Volume_stomach); Stomach__Input_from_artery is "Stomach: Input from artery";
  Gonads__E2_Biosynthesis: $Biosynthesis => E2_Gonads_cells; Gonads_cells*Gonads__E2_Biosynthesis_k1*Biosynthesis; Gonads__E2_Biosynthesis is "Gonads: E2 Biosynthesis";
    Gonads__E2_Biosynthesis_k1 = 2;
  Dose_IV_bolus: E2_Dose_IV => E2_Plasma_venous; Dose_IV_bolus_k1*E2_Dose_IV;
    Dose_IV_bolus_k1 = 250;
  Liver__Input_from_Stomach: E2_Stomach => E2_Liver_blood; PBPK__tissue____blood(Blood_flow_stomach, E2_Stomach, Liver__Input_from_Stomach_Kp, Blood_plasma_ratio, Volume_stomach); Liver__Input_from_Stomach is "Liver: Input from Stomach";
    Liver__Input_from_Stomach_Kp = 1;
  Liver__Input_from_pancreas: E2_Pancreas => E2_Liver_blood; PBPK__tissue____blood(Blood_flow_pancreas, E2_Pancreas, Liver__Input_from_pancreas_Kp, Blood_plasma_ratio, Volume_pancreas); Liver__Input_from_pancreas is "Liver: Input from pancreas";
    Liver__Input_from_pancreas_Kp = 1;
  Pancreas__Input_from_artery: E2_Plasma_arterial => E2_Pancreas; PBPK__blood____tissue(Blood_flow_pancreas, E2_Plasma_arterial, Volume_pancreas); Pancreas__Input_from_artery is "Pancreas: Input from artery";
  Rest_of_Body__Input_from_artery: E2_Plasma_arterial => E2_Rest_of_body; PBPK__blood____tissue(Blood_flow_Rest_of_body, E2_Plasma_arterial, Volume_rest_of_body); Rest_of_Body__Input_from_artery is "Rest of Body: Input from artery";
  Rest_of_body__Exit_to_venous: E2_Rest_of_body => E2_Plasma_venous; PBPK__tissue____blood(Blood_flow_Rest_of_body, E2_Rest_of_body, Rest_of_body__Exit_to_venous_Kp, Blood_plasma_ratio, Volume_rest_of_body); Rest_of_body__Exit_to_venous is "Rest-of-body: Exit to venous";
    Rest_of_body__Exit_to_venous_Kp = 1;
  Liver__Transport__E13S__hep______bile___ABCG2: E13S_Liver_cells => $E13S_default; MM_with_Kcat(E13S_Liver_cells, ABCG2, Liver__Transport__E13S__hep______bile___ABCG2_Kcat, Liver__Transport__E13S__hep______bile___ABCG2_km); Liver__Transport__E13S__hep______bile___ABCG2 is "Liver: Transport, E13S {hep} -> {bile}; ABCG2";  // modifiers: ABCG2
    Liver__Transport__E13S__hep______bile___ABCG2_Kcat = 8460000; Liver__Transport__E13S__hep______bile___ABCG2_km = 17000;
  Liver__Transport__E217BG_hep______Liver_blood___MRP4: E217BG_Liver_cells => $E217BG_Liver_blood; MM_with_Kcat(E217BG_Liver_cells, MRP4, Liver__Transport__E217BG_hep______Liver_blood___MRP4_Kcat, Liver__Transport__E217BG_hep______Liver_blood___MRP4_km); Liver__Transport__E217BG_hep______Liver_blood___MRP4 is "Liver: Transport, E217BG{hep} -> {Liver_blood}; MRP4";  // modifiers: MRP4
    Liver__Transport__E217BG_hep______Liver_blood___MRP4_Kcat = 305035; Liver__Transport__E217BG_hep______Liver_blood___MRP4_km = 30000;
  Liver__Transport__E217BG_hep______Liver_blood___MRP3: E217BG_Liver_cells => $E217BG_Liver_blood; MM_with_Kcat(E217BG_Liver_cells, MRP3, Liver__Transport__E217BG_hep______Liver_blood___MRP3_Kcat, Liver__Transport__E217BG_hep______Liver_blood___MRP3_km); Liver__Transport__E217BG_hep______Liver_blood___MRP3 is "Liver: Transport, E217BG{hep} -> {Liver_blood}; MRP3";  // modifiers: MRP3
    Liver__Transport__E217BG_hep______Liver_blood___MRP3_Kcat = 62976; Liver__Transport__E217BG_hep______Liver_blood___MRP3_km = 26000;
  Liver__Transport__E217BG_hep______bile___MRP2: E217BG_Liver_cells => $E217BG_default; MM_with_Kcat(E217BG_Liver_cells, MRP2, Liver__Transport__E217BG_hep______bile___MRP2_Kcat, Liver__Transport__E217BG_hep______bile___MRP2_km); Liver__Transport__E217BG_hep______bile___MRP2 is "Liver: Transport, E217BG{hep} -> {bile}; MRP2";  // modifiers: MRP2
    Liver__Transport__E217BG_hep______bile___MRP2_Kcat = 19000000; Liver__Transport__E217BG_hep______bile___MRP2_km = 98000;
  Liver__Transport__E217BG_hep______bile___MDR1: E217BG_Liver_cells => $E217BG_default; MM_with_Kcat(E217BG_Liver_cells, MDR1, Liver__Transport__E217BG_hep______bile___MDR1_Kcat, Liver__Transport__E217BG_hep______bile___MDR1_km); Liver__Transport__E217BG_hep______bile___MDR1 is "Liver: Transport, E217BG{hep} -> {bile}; MDR1";  // modifiers: MDR1
    Liver__Transport__E217BG_hep______bile___MDR1_Kcat = 61981; Liver__Transport__E217BG_hep______bile___MDR1_km = 62000;
  Liver__Transport__E217BG_hep______bile___ABCG2: E217BG_Liver_cells => $E217BG_default; MM_with_Kcat(E217BG_Liver_cells, ABCG2, Liver__Transport__E217BG_hep______bile___ABCG2_Kcat, Liver__Transport__E217BG_hep______bile___ABCG2_km); Liver__Transport__E217BG_hep______bile___ABCG2 is "Liver: Transport, E217BG{hep} -> {bile}; ABCG2";  // modifiers: ABCG2
    Liver__Transport__E217BG_hep______bile___ABCG2_Kcat = 372417; Liver__Transport__E217BG_hep______bile___ABCG2_km = 44200;
  Liver__Transport__E2_Liver_blood_____hep: E2_Liver_blood -> E2_Liver_cells; Liver__Transport__E2_Liver_blood_____hep_k1*E2_Liver_blood - Liver__Transport__E2_Liver_blood_____hep_k2*E2_Liver_cells; Liver__Transport__E2_Liver_blood_____hep is "Liver: Transport, E2{Liver_blood} = {hep}";
    Liver__Transport__E2_Liver_blood_____hep_k1 = 150; Liver__Transport__E2_Liver_blood_____hep_k2 = 41.7;
  Liver__Binding__NSB_binding: E2_Liver_cells + NSB -> E2_NSB; Liver_cells*(Liver__Binding__NSB_binding_k1*E2_Liver_cells*NSB - Liver__Binding__NSB_binding_k2*E2_NSB); Liver__Binding__NSB_binding is "Liver: Binding, NSB binding";
    Liver__Binding__NSB_binding_k1 = 3600; Liver__Binding__NSB_binding_k2 = 85500;
  Liver__Metabolism__E2____E23G__UGT1A1: E2_Liver_cells => $E23G; Liver_cells*MM_with_Kcat(E2_Liver_cells, UGT1A1, Liver__Metabolism__E2____E23G__UGT1A1_Kcat, Liver__Metabolism__E2____E23G__UGT1A1_km); Liver__Metabolism__E2____E23G__UGT1A1 is "Liver: Metabolism, E2 -> E23G; UGT1A1";  // modifiers: UGT1A1
    Liver__Metabolism__E2____E23G__UGT1A1_Kcat = 470.6; Liver__Metabolism__E2____E23G__UGT1A1_km = 23000;
  Liver__Metabolism__E2____E23G__UGT1A3: E2_Liver_cells => $E23G; Liver_cells*MM_with_Kcat(E2_Liver_cells, UGT1A3, Liver__Metabolism__E2____E23G__UGT1A3_Kcat, Liver__Metabolism__E2____E23G__UGT1A3_km); Liver__Metabolism__E2____E23G__UGT1A3 is "Liver: Metabolism, E2 -> E23G; UGT1A3";  // modifiers: UGT1A3
    Liver__Metabolism__E2____E23G__UGT1A3_Kcat = 145.5; Liver__Metabolism__E2____E23G__UGT1A3_km = 47000;
  Liver__Metabolism__E2____4OHE2__CYP3A4: E2_Liver_cells => _4OHE2; Liver_cells*MM_with_Kcat(E2_Liver_cells, CYP3A4, Liver__Metabolism__E2____4OHE2__CYP3A4_Kcat, Liver__Metabolism__E2____4OHE2__CYP3A4_km); Liver__Metabolism__E2____4OHE2__CYP3A4 is "Liver: Metabolism, E2 -> 4OHE2; CYP3A4";  // modifiers: CYP3A4
    Liver__Metabolism__E2____4OHE2__CYP3A4_Kcat = 18; Liver__Metabolism__E2____4OHE2__CYP3A4_km = 111000;
  Liver__Metabolism__E2____4OHE2__CYP1A2: E2_Liver_cells => _4OHE2; Liver_cells*MM_with_Kcat(E2_Liver_cells, CYP1A2, Liver__Metabolism__E2____4OHE2__CYP1A2_Kcat, Liver__Metabolism__E2____4OHE2__CYP1A2_km); Liver__Metabolism__E2____4OHE2__CYP1A2 is "Liver: Metabolism, E2 -> 4OHE2; CYP1A2";  // modifiers: CYP1A2
    Liver__Metabolism__E2____4OHE2__CYP1A2_Kcat = 54; Liver__Metabolism__E2____4OHE2__CYP1A2_km = 28000;
  Liver__Metabolism__4OHE2____4MeE2__COMT: _4OHE2 => $_4MeE2; Liver_cells*MM_with_Kcat(_4OHE2, COMT, Liver__Metabolism__4OHE2____4MeE2__COMT_Kcat, Liver__Metabolism__4OHE2____4MeE2__COMT_km); Liver__Metabolism__4OHE2____4MeE2__COMT is "Liver: Metabolism, 4OHE2 -> 4MeE2; COMT";  // modifiers: COMT
    Liver__Metabolism__4OHE2____4MeE2__COMT_Kcat = 204; Liver__Metabolism__4OHE2____4MeE2__COMT_km = 24000;
  Liver__Metabolism__E2____E217BG__UGT1A1: E2_Liver_cells => E217BG_Liver_cells; Liver_cells*MM_with_Kcat(E2_Liver_cells, UGT1A1, Liver__Metabolism__E2____E217BG__UGT1A1_Kcat, Liver__Metabolism__E2____E217BG__UGT1A1_km); Liver__Metabolism__E2____E217BG__UGT1A1 is "Liver: Metabolism, E2 -> E217BG; UGT1A1";  // modifiers: UGT1A1
    Liver__Metabolism__E2____E217BG__UGT1A1_Kcat = 212.5; Liver__Metabolism__E2____E217BG__UGT1A1_km = 35000;
  Liver__Metabolism__E2____E217BG__UGT1A3: E2_Liver_cells => E217BG_Liver_cells; Liver_cells*MM_with_Kcat(E2_Liver_cells, UGT1A3, Liver__Metabolism__E2____E217BG__UGT1A3_Kcat, Liver__Metabolism__E2____E217BG__UGT1A3_km); Liver__Metabolism__E2____E217BG__UGT1A3 is "Liver: Metabolism, E2 -> E217BG; UGT1A3";  // modifiers: UGT1A3
    Liver__Metabolism__E2____E217BG__UGT1A3_Kcat = 48.5; Liver__Metabolism__E2____E217BG__UGT1A3_km = 35000;
  Liver__Metabolism__E2____E217BG__UGT2B7: E2_Liver_cells => E217BG_Liver_cells; Liver_cells*MM_with_Kcat(E2_Liver_cells, UGT2B7, Liver__Metabolism__E2____E217BG__UGT2B7_Kcat, Liver__Metabolism__E2____E217BG__UGT2B7_km); Liver__Metabolism__E2____E217BG__UGT2B7 is "Liver: Metabolism, E2 -> E217BG; UGT2B7";  // modifiers: UGT2B7
    Liver__Metabolism__E2____E217BG__UGT2B7_Kcat = 102.7; Liver__Metabolism__E2____E217BG__UGT2B7_km = 11000;
  Liver__Metabolism__E2____2OHE2__CYP3A4: E2_Liver_cells => _2OHE2; Liver_cells*MM_with_Kcat(E2_Liver_cells, CYP3A4, Liver__Metabolism__E2____2OHE2__CYP3A4_Kcat, Liver__Metabolism__E2____2OHE2__CYP3A4_km); Liver__Metabolism__E2____2OHE2__CYP3A4 is "Liver: Metabolism, E2 -> 2OHE2; CYP3A4";  // modifiers: CYP3A4
    Liver__Metabolism__E2____2OHE2__CYP3A4_Kcat = 48; Liver__Metabolism__E2____2OHE2__CYP3A4_km = 54000;
  Liver__Metabolism__E2____2OHE2__CYP1A2: E2_Liver_cells => _2OHE2; Liver_cells*MM_with_Kcat(E2_Liver_cells, CYP1A2, Liver__Metabolism__E2____2OHE2__CYP1A2_Kcat, Liver__Metabolism__E2____2OHE2__CYP1A2_km); Liver__Metabolism__E2____2OHE2__CYP1A2 is "Liver: Metabolism, E2 -> 2OHE2; CYP1A2";  // modifiers: CYP1A2
    Liver__Metabolism__E2____2OHE2__CYP1A2_Kcat = 660; Liver__Metabolism__E2____2OHE2__CYP1A2_km = 20000;
  Liver__Metabolism__2OHE2____2MeE2__COMT: _2OHE2 => $_2MeE2; Liver_cells*MM_with_Kcat(_2OHE2, COMT, Liver__Metabolism__2OHE2____2MeE2__COMT_Kcat, Liver__Metabolism__2OHE2____2MeE2__COMT_km); Liver__Metabolism__2OHE2____2MeE2__COMT is "Liver: Metabolism, 2OHE2 -> 2MeE2; COMT";  // modifiers: COMT
    Liver__Metabolism__2OHE2____2MeE2__COMT_Kcat = 408; Liver__Metabolism__2OHE2____2MeE2__COMT_km = 108000;
  Liver__Metabolism__E2____E23S__SULT2A1: E2_Liver_cells => $E23S; Liver_cells*MM_with_Kcat(E2_Liver_cells, SULT2A1, Liver__Metabolism__E2____E23S__SULT2A1_Kcat, Liver__Metabolism__E2____E23S__SULT2A1_km); Liver__Metabolism__E2____E23S__SULT2A1 is "Liver: Metabolism, E2 -> E23S; SULT2A1";  // modifiers: SULT2A1
    Liver__Metabolism__E2____E23S__SULT2A1_Kcat = 93.7; Liver__Metabolism__E2____E23S__SULT2A1_km = 14;
  Liver__Metabolism__E2____16aOHE2__CYP3A4: E2_Liver_cells => $_16aOHE2; Liver_cells*MM_with_Kcat(E2_Liver_cells, CYP3A4, Liver__Metabolism__E2____16aOHE2__CYP3A4_Kcat, Liver__Metabolism__E2____16aOHE2__CYP3A4_km); Liver__Metabolism__E2____16aOHE2__CYP3A4 is "Liver: Metabolism, E2 -> 16aOHE2; CYP3A4";  // modifiers: CYP3A4
    Liver__Metabolism__E2____16aOHE2__CYP3A4_Kcat = 24; Liver__Metabolism__E2____16aOHE2__CYP3A4_km = 75000;
  Liver__Metabolism__E2____16aOHE2__CYP1A2: E2_Liver_cells => $_16aOHE2; Liver_cells*MM_with_Kcat(E2_Liver_cells, CYP1A2, Liver__Metabolism__E2____16aOHE2__CYP1A2_Kcat, Liver__Metabolism__E2____16aOHE2__CYP1A2_km); Liver__Metabolism__E2____16aOHE2__CYP1A2 is "Liver: Metabolism, E2 -> 16aOHE2; CYP1A2";  // modifiers: CYP1A2
    Liver__Metabolism__E2____16aOHE2__CYP1A2_Kcat = 42; Liver__Metabolism__E2____16aOHE2__CYP1A2_km = 58000;
  Liver__Metabolism__E1____E13G__UGT1A1: E1 => $E13G; Liver_cells*MM_with_Kcat(E1, UGT1A1, Liver__Metabolism__E1____E13G__UGT1A1_Kcat, Liver__Metabolism__E1____E13G__UGT1A1_km); Liver__Metabolism__E1____E13G__UGT1A1 is "Liver: Metabolism, E1 -> E13G; UGT1A1";  // modifiers: UGT1A1
    Liver__Metabolism__E1____E13G__UGT1A1_Kcat = 15.2; Liver__Metabolism__E1____E13G__UGT1A1_km = 38000;
  Liver__Metabolism__E1____E13G__UGT1A3: E1 => $E13G; Liver_cells*MM_with_Kcat(E1, UGT1A3, Liver__Metabolism__E1____E13G__UGT1A3_Kcat, Liver__Metabolism__E1____E13G__UGT1A3_km); Liver__Metabolism__E1____E13G__UGT1A3 is "Liver: Metabolism, E1 -> E13G; UGT1A3";  // modifiers: UGT1A3
    Liver__Metabolism__E1____E13G__UGT1A3_Kcat = 186.6; Liver__Metabolism__E1____E13G__UGT1A3_km = 77000;
  Liver__Metabolism__E1____4OHE1__CYP3A4: E1 => _4OHE1; Liver_cells*MM_with_Kcat(E1, CYP3A4, Liver__Metabolism__E1____4OHE1__CYP3A4_Kcat, Liver__Metabolism__E1____4OHE1__CYP3A4_km); Liver__Metabolism__E1____4OHE1__CYP3A4 is "Liver: Metabolism, E1 -> 4OHE1; CYP3A4";  // modifiers: CYP3A4
    Liver__Metabolism__E1____4OHE1__CYP3A4_Kcat = 30; Liver__Metabolism__E1____4OHE1__CYP3A4_km = 78000;
  Liver__Metabolism__E1____4OHE1__CYP1A2: E1 => _4OHE1; Liver_cells*MM_with_Kcat(E1, CYP1A2, Liver__Metabolism__E1____4OHE1__CYP1A2_Kcat, Liver__Metabolism__E1____4OHE1__CYP1A2_km); Liver__Metabolism__E1____4OHE1__CYP1A2 is "Liver: Metabolism, E1 -> 4OHE1; CYP1A2";  // modifiers: CYP1A2
    Liver__Metabolism__E1____4OHE1__CYP1A2_Kcat = 120; Liver__Metabolism__E1____4OHE1__CYP1A2_km = 17000;
  Liver__Metabolism__4OHE1____4MeE1__COMT: _4OHE1 => $_4MeE1; Liver_cells*MM_with_Kcat(_4OHE1, COMT, Liver__Metabolism__4OHE1____4MeE1__COMT_Kcat, Liver__Metabolism__4OHE1____4MeE1__COMT_km); Liver__Metabolism__4OHE1____4MeE1__COMT is "Liver: Metabolism, 4OHE1 -> 4MeE1; COMT";  // modifiers: COMT
    Liver__Metabolism__4OHE1____4MeE1__COMT_Kcat = 402; Liver__Metabolism__4OHE1____4MeE1__COMT_km = 53000;
  Liver__Metabolism__E1____2OHE1__CYP3A4: E1 => _2OHE1; Liver_cells*MM_with_Kcat(E1, CYP3A4, Liver__Metabolism__E1____2OHE1__CYP3A4_Kcat, Liver__Metabolism__E1____2OHE1__CYP3A4_km); Liver__Metabolism__E1____2OHE1__CYP3A4 is "Liver: Metabolism, E1 -> 2OHE1; CYP3A4";  // modifiers: CYP3A4
    Liver__Metabolism__E1____2OHE1__CYP3A4_Kcat = 42; Liver__Metabolism__E1____2OHE1__CYP3A4_km = 102000;
  Liver__Metabolism__E1____2OHE1__CYP1A2: E1 => _2OHE1; Liver_cells*MM_with_Kcat(E1, CYP1A2, Liver__Metabolism__E1____2OHE1__CYP1A2_Kcat, Liver__Metabolism__E1____2OHE1__CYP1A2_km); Liver__Metabolism__E1____2OHE1__CYP1A2 is "Liver: Metabolism, E1 -> 2OHE1; CYP1A2";  // modifiers: CYP1A2
    Liver__Metabolism__E1____2OHE1__CYP1A2_Kcat = 552; Liver__Metabolism__E1____2OHE1__CYP1A2_km = 19000;
  Liver__Metabolism__2OHE1____2MeE1__COMT: _2OHE1 => $_2MeE1; Liver_cells*MM_with_Kcat(_2OHE1, COMT, Liver__Metabolism__2OHE1____2MeE1__COMT_Kcat, Liver__Metabolism__2OHE1____2MeE1__COMT_km); Liver__Metabolism__2OHE1____2MeE1__COMT is "Liver: Metabolism, 2OHE1 -> 2MeE1; COMT";  // modifiers: COMT
    Liver__Metabolism__2OHE1____2MeE1__COMT_Kcat = 198; Liver__Metabolism__2OHE1____2MeE1__COMT_km = 7400;
  Liver__Metabolism__E1____E13S__SULT1E1: E1 => E13S_Liver_cells; Liver_cells*MM_with_Kcat(E1, SULT1E1, Liver__Metabolism__E1____E13S__SULT1E1_Kcat, Liver__Metabolism__E1____E13S__SULT1E1_km); Liver__Metabolism__E1____E13S__SULT1E1 is "Liver: Metabolism, E1 -> E13S; SULT1E1";  // modifiers: SULT1E1
    Liver__Metabolism__E1____E13S__SULT1E1_Kcat = 150; Liver__Metabolism__E1____E13S__SULT1E1_km = 6;
  Liver__Metabolism__E1____16aOHE1__CYP3A4: E1 => $_16aOHE1; Liver_cells*MM_with_Kcat(E1, CYP3A4, Liver__Metabolism__E1____16aOHE1__CYP3A4_Kcat, Liver__Metabolism__E1____16aOHE1__CYP3A4_km); Liver__Metabolism__E1____16aOHE1__CYP3A4 is "Liver: Metabolism, E1 -> 16aOHE1; CYP3A4";  // modifiers: CYP3A4
    Liver__Metabolism__E1____16aOHE1__CYP3A4_Kcat = 30; Liver__Metabolism__E1____16aOHE1__CYP3A4_km = 64000;
  Liver__Metabolism__E2____E1__HSD17B2: E2_Liver_cells => E1; Liver_cells*MM_with_Kcat(E2_Liver_cells, HSD17B2, Liver__Metabolism__E2____E1__HSD17B2_Kcat, Liver__Metabolism__E2____E1__HSD17B2_km); Liver__Metabolism__E2____E1__HSD17B2 is "Liver: Metabolism, E2 -> E1; HSD17B2";  // modifiers: HSD17B2
    Liver__Metabolism__E2____E1__HSD17B2_Kcat = 16926; Liver__Metabolism__E2____E1__HSD17B2_km = 110000;
  Liver__metabolism__E1____E2__HSD17B1: E1 => E2_Liver_cells; Liver_cells*MM_with_Kcat(E1, HSD17B1, Liver__metabolism__E1____E2__HSD17B1_Kcat, Liver__metabolism__E1____E2__HSD17B1_km); Liver__metabolism__E1____E2__HSD17B1 is "Liver: metabolism, E1 -> E2; HSD17B1";  // modifiers: HSD17B1
    Liver__metabolism__E1____E2__HSD17B1_Kcat = 5400; Liver__metabolism__E1____E2__HSD17B1_km = 70000;
  Liver__Metabolism__E2____E1__HSD17B1: E2_Liver_cells => E1; Liver_cells*MM_with_Kcat(E2_Liver_cells, HSD17B1, Liver__Metabolism__E2____E1__HSD17B1_Kcat, Liver__Metabolism__E2____E1__HSD17B1_km); Liver__Metabolism__E2____E1__HSD17B1 is "Liver: Metabolism, E2 -> E1; HSD17B1";  // modifiers: HSD17B1
    Liver__Metabolism__E2____E1__HSD17B1_Kcat = 43.4; Liver__Metabolism__E2____E1__HSD17B1_km = 2000;
  Dose_IV_infusion: E2_Dose_IV => E2_Plasma_venous; Constant_flux__irreversible(Dose_IV_infusion_v);
    Dose_IV_infusion_v = 0;
  Dose_oral_0: E2_Dose_oral => E2_Intestine; Dose_oral_0_k1*E2_Dose_oral;
    Dose_oral_0_k1 = 0.025;
  Oral_elimination: E2_Dose_oral => Faeces; Oral_elimination_k1*E2_Dose_oral;
    Oral_elimination_k1 = 0.01;
  Counter: default_0 => count; default*Constant_flux__irreversible(Counter_v);
    Counter_v = 1;
  Gonads__ER_binding: E2_Gonads_cells + ER_Gonads_cells -> ER_E2_Gonads_cells; Gonads_cells*(Gonads__ER_binding_k1*E2_Gonads_cells*ER_Gonads_cells - Gonads__ER_binding_k2*ER_E2_Gonads_cells); Gonads__ER_binding is "Gonads: ER binding";
    Gonads__ER_binding_k1 = 3600; Gonads__ER_binding_k2 = 900;
  Gonads__Permeability_limited_access: E2_Gonads_blood -> E2_Gonads_cells; Gonads__Permeability_limited_access_k1*E2_Gonads_blood - Gonads__Permeability_limited_access_k2*E2_Gonads_cells; Gonads__Permeability_limited_access is "Gonads: Permeability-limited access";
    Gonads__Permeability_limited_access_k1 = 1000; Gonads__Permeability_limited_access_k2 = 100;

  // Unit definitions:
  unit time = 3600 second;
  unit substance = 1e-9 mole;
end
