// SBML level 2 version 4

function Function_for_o2_tp(default, k1_o2tp, o2, o2_ext)
  -k1_o2tp*(o2 - o2_ext)/default;
end

function Function_for_GAPDH(Keq_GAPDH, bpg, default, gap, km_gapdh_bpg, km_gapdh_gap, km_gapdh_nad, km_gapdh_nadh, km_gapdh_p, nad, nadh, p_i, vmf_GAPDH)
  vmf_GAPDH*(gap*nad*p_i - bpg*nadh/Keq_GAPDH)/(km_gapdh_p*km_gapdh_nad*km_gapdh_gap*(nad/km_gapdh_nad + nadh/km_gapdh_nadh + bpg*nadh/(km_gapdh_bpg*km_gapdh_nadh) + gap*nad/(km_gapdh_nad*km_gapdh_gap) + gap*nad*p_i/(km_gapdh_p*km_gapdh_nad*km_gapdh_gap) + 1))/default;
end

function Function_for_lac_tp(Keq_lactp, default, k_lactp, lac, lac_ext, vmf_lactp)
  vmf_lactp*(lac - lac_ext/Keq_lactp)/(k_lactp*(lac/k_lactp + lac_ext/k_lactp + 1))/default;
end

function Function_for_TPI(default, dhap, gap, keq_TPI, km_tpi_dhap, km_tpi_gap, vmf_TPI)
  vmf_TPI*(dhap - gap/keq_TPI)/(km_tpi_dhap*(dhap/km_tpi_dhap + gap/km_tpi_gap + 1))/default;
end

function Function_for_ALD(default, dhap, fru16bp, gap, keq_ALD, km_ald_dhap, km_ald_f16bp, km_ald_gap, vmf_ALD)
  vmf_ALD*(fru16bp - dhap*gap/keq_ALD)/(km_ald_f16bp*(dhap/km_ald_dhap + fru16bp/km_ald_f16bp + gap/km_ald_gap + dhap*gap/(km_ald_gap*km_ald_dhap) + 1))/default;
end

function Function_for_HK(adp, atp, default, glc, glc6p, keq_HK, ki_hk_g6p, km_hk_adp, km_hk_atp, km_hk_g6p, km_hk_glc, vmf_HK)
  ki_hk_g6p*vmf_HK*(atp*glc - adp*glc6p/keq_HK)/(km_hk_glc*km_hk_atp*(glc6p + ki_hk_g6p)*(adp/km_hk_adp + atp/km_hk_atp + glc/km_hk_glc + glc6p/km_hk_g6p + adp*glc6p/(km_hk_g6p*km_hk_adp) + atp*glc/(km_hk_glc*km_hk_atp) + 1))/default;
end

function Function_for_PFK1(adp, atp, default, fru16bp, fru6p, keq_PFK1, ki_pfk_atp, km_pfk_adp, km_pfk_atp, km_pfk_f16bp, km_pfk_f6p, vmf_PFK1)
  ki_pfk_atp*vmf_PFK1*(atp*fru6p - adp*fru16bp/keq_PFK1)/(km_pfk_f6p*km_pfk_atp*(atp + ki_pfk_atp)*(adp/km_pfk_adp + atp/km_pfk_atp + fru6p/km_pfk_f6p + fru16bp/km_pfk_f16bp + adp*fru16bp/(km_pfk_adp*km_pfk_f16bp) + atp*fru6p/(km_pfk_f6p*km_pfk_atp) + 1))/default;
end

function Function_for_PK(adp, atp, default, fru16bp, ka_pk_f16bp, keq_PK, km_pk_adp, km_pk_atp, km_pk_pep, km_pk_pyr, pep, pyr, vmf_PK)
  vmf_PK*(adp*pep - atp*pyr/keq_PK)*(fru16bp/ka_pk_f16bp + 1)/(km_pk_adp*km_pk_pep*(adp/km_pk_adp + atp/km_pk_atp + pep/km_pk_pep + pyr/km_pk_pyr + adp*pep/(km_pk_adp*km_pk_pep) + atp*pyr/(km_pk_atp*km_pk_pyr) + 1))/default;
end

function Function_for_GPI(default, fru6p, glc6p, keq_GPI, km_gpi_f6p, km_gpi_g6p, vmf_GPI)
  vmf_GPI*(glc6p - fru6p/keq_GPI)/(km_gpi_g6p*(fru6p/km_gpi_f6p + glc6p/km_gpi_g6p + 1))/default;
end

function Function_for_ENO(default, keq_ENO, km_eno_2pg, km_eno_pep, pep, pg2, vmf_ENO)
  vmf_ENO*(pg2 - pep/keq_ENO)/(km_eno_2pg*(pep/km_eno_pep + pg2/km_eno_2pg + 1))/default;
end

function Function_for_ATP_cons(atp, default, k1_atp_cons)
  atp*k1_atp_cons/default;
end

function Function_for_LDH(default, keq_LDH, km_ldh_lac, km_ldh_nad, km_ldh_nadh, km_ldh_pyr, lac, nad, nadh, pyr, vmf_LDH)
  vmf_LDH*(nadh*pyr - lac*nad/keq_LDH)/(km_ldh_pyr*km_ldh_nadh*(lac/km_ldh_lac + nad/km_ldh_nad + nadh/km_ldh_nadh + pyr/km_ldh_pyr + lac*nad/(km_ldh_lac*km_ldh_nad) + nadh*pyr/(km_ldh_pyr*km_ldh_nadh) + 1))/default;
end

function Function_for_glc_tp(Keq_glctp, Km_glctp, default, glc, glc_ext, vmf_glctp)
  vmf_glctp*(glc_ext - glc/Keq_glctp)/(Km_glctp*(glc/Km_glctp + glc_ext/Km_glctp + 1))/default;
end

function Function_for_Resp(adp, default, km_resp_adp, km_resp_nadh, km_resp_o2, km_resp_p_i, nadh, o2, p_i, vmax_resp)
  adp*nadh*o2*p_i*vmax_resp/(km_resp_o2*km_resp_adp*km_resp_p_i*km_resp_nadh*(adp/km_resp_adp + 1)*(nadh/km_resp_nadh + 1)*(o2/km_resp_o2 + 1)*(p_i/km_resp_p_i + 1))/default;
end

function Function_for_TCA(acoa, adp, default, km_cc_acoa, km_cc_adp, km_cc_nad, km_cc_p_i, nad, p_i, vmax_CC)
  acoa*adp*nad*p_i*vmax_CC/(km_cc_nad*km_cc_adp*km_cc_p_i*km_cc_acoa*(acoa/km_cc_acoa + 1)*(adp/km_cc_adp + 1)*(nad/km_cc_nad + 1)*(p_i/km_cc_p_i + 1))/default;
end

function Function_for_PGK(adp, atp, bpg, default, keq_PGK, km_pgk_3pg, km_pgk_adp, km_pgk_atp, km_pgk_bpg, pg3, vmf_PGK)
  vmf_PGK*(adp*bpg - atp*pg3/keq_PGK)/(km_pgk_adp*km_pgk_bpg*(adp/km_pgk_adp + atp/km_pgk_atp + bpg/km_pgk_bpg + pg3/km_pgk_3pg + adp*bpg/(km_pgk_adp*km_pgk_bpg) + atp*pg3/(km_pgk_3pg*km_pgk_atp) + 1))/default;
end

function Function_for_PDH(default, km_pdh_nad, km_pdh_pyr, nad, pyr, vmax_PDH)
  nad*pyr*vmax_PDH/(km_pdh_nad*km_pdh_pyr + km_pdh_pyr*nad + km_pdh_nad*pyr + nad*pyr)/default;
end

function Function_for_PGM(default, keq_PGM, km_pgm_2pg, km_pgm_3pg, pg2, pg3, vmf_PGM)
  vmf_PGM*(pg3 - pg2/keq_PGM)/(km_pgm_3pg*(pg2/km_pgm_2pg + pg3/km_pgm_3pg + 1))/default;
end

model lowMYCN()
  // Simon2025 - Neuroblastoma energy metabolism
  // biomodels.db:MODEL2502190001
  // hasProperty mamo:MAMO_0000046
  // isDescribedBy doi:10.1038/s41598-025-18656-w

  // Compartments:
  compartment default = 1;

  // Species:
  species glc in default = init_glc;
  species adp in default = init_adp;
  species atp in default = init_atp;
  species glc6p in default = init_glc6p;
  species fru6p in default = init_fru6p;
  species dhap in default = init_dhap;
  species fru16bp in default = init_fru16bp;
  species gap in default = init_gap;
  species bpg in default = init_bpg;
  species nad in default = init_nad;
  species nadh in default = init_nadh;
  species p_i in default = init_p_i;
  species pg3 in default = init_pg3;
  species pg2 in default = init_pg2;
  species pep in default = init_pep;
  species pyr in default = init_pyr;
  species lac in default = init_lac;
  species acoa in default = init_acoa;
  species o2 in default = init_o2;

  // Parameters:
  Keq_GAPDH = 0.000192;
  Keq_glctp = 1;
  Keq_lactp = 1;
  Km_glctp = 1.5;
  init_acoa = 0.07246187;
  init_adp = 4.799447;
  init_atp = 8.144668;
  init_bpg = 0.004269299;
  init_dhap = 0.3167675;
  init_fru16bp = 0.1491557;
  init_fru6p = 0.04995638;
  init_gap = 0.1900592;
  init_glc = 2.729881;
  init_glc6p = 0.6016794;
  init_lac = 6.666803;
  init_nad = 2.198034;
  init_nadh = 0.01325047;
  init_o2 = 0.0766387;
  init_p_i = 5.070683;
  init_pep = 0.1289418;
  init_pg2 = 0.0373778;
  init_pg3 = 0.08986848;
  init_pyr = 0.04130184;
  k1_atp_cons = 1.106829;
  k1_o2tp = 10.28019;
  k_lactp = 4.68;
  ka_pk_f16bp = 0.1;
  keq_ALD = 0.114;
  keq_ENO = 1.7;
  keq_GPI = 0.3922;
  keq_HK = 3900;
  keq_LDH = 9090;
  keq_PFK1 = 100000;
  keq_PGK = 1460;
  keq_PGM = 0.1449;
  keq_PK = 13800;
  keq_TPI = 0.0407;
  ki_hk_g6p = 0.24;
  ki_pfk_atp = 1.6;
  km_ald_dhap = 0.095;
  km_ald_f16bp = 0.0107;
  km_ald_gap = 1.17;
  km_cc_acoa = 0.2775363;
  km_cc_adp = 3.59855;
  km_cc_nad = 0.07077589;
  km_cc_p_i = 0.2894402;
  km_eno_2pg = 0.03;
  km_eno_pep = 0.702;
  km_gapdh_bpg = 0.01;
  km_gapdh_gap = 0.149;
  km_gapdh_nad = 0.071;
  km_gapdh_nadh = 0.01;
  km_gapdh_p = 4;
  km_gpi_f6p = 0.0635;
  km_gpi_g6p = 0.445;
  km_hk_adp = 11.1;
  km_hk_atp = 0.46;
  km_hk_g6p = 2;
  km_hk_glc = 0.064;
  km_ldh_lac = 0.94;
  km_ldh_nad = 0.311;
  km_ldh_nadh = 0.014;
  km_ldh_pyr = 0.08;
  km_pdh_nad = 0.033;
  km_pdh_pyr = 0.03;
  km_pfk_adp = 0.49;
  km_pfk_atp = 0.05;
  km_pfk_f16bp = 16.7;
  km_pfk_f6p = 0.45;
  km_pgk_3pg = 0.009;
  km_pgk_adp = 0.2;
  km_pgk_atp = 0.07;
  km_pgk_bpg = 0.024;
  km_pgm_2pg = 0.041;
  km_pgm_3pg = 0.4;
  km_pk_adp = 0.17;
  km_pk_atp = 0.35;
  km_pk_pep = 1.1;
  km_pk_pyr = 0.48;
  km_resp_adp = 0.001;
  km_resp_nadh = 0.001;
  km_resp_o2 = 0.001;
  km_resp_p_i = 10;
  km_tpi_dhap = 0.17;
  km_tpi_gap = 1.76;
  lac_ext = 0.5;
  o2_ext = 0.181;
  vmax_CC = 3.787565;
  vmax_PDH = 1.894965;
  vmax_resp = 3.481837;
  vmf_ALD = 5474.59;
  vmf_ENO = 5906.756;
  vmf_GAPDH = 10000;
  vmf_GPI = 9998.713;
  vmf_HK = 4.890353;
  vmf_LDH = 9999.806;
  vmf_PFK1 = 4.977332;
  vmf_PGK = 9999.408;
  vmf_PGM = 8057.648;
  vmf_PK = 22.99529;
  vmf_TPI = 8665.748;
  vmf_glctp = 1.788365;
  vmf_lactp = 10000;
  glc_ext has mM;

  // Assignment rules:
  glc_ext := 11.11;

  // Reactions:
  v1_glc_tp: => glc; default*Function_for_glc_tp(Keq_glctp, Km_glctp, default, glc, glc_ext, vmf_glctp);
  v2_HK: glc + atp -> adp + glc6p; default*Function_for_HK(adp, atp, default, glc, glc6p, keq_HK, ki_hk_g6p, km_hk_adp, km_hk_atp, km_hk_g6p, km_hk_glc, vmf_HK);
  v3_GPI: glc6p -> fru6p; default*Function_for_GPI(default, fru6p, glc6p, keq_GPI, km_gpi_f6p, km_gpi_g6p, vmf_GPI);
  v4_PFK1: atp + fru6p -> adp + fru16bp; default*Function_for_PFK1(adp, atp, default, fru16bp, fru6p, keq_PFK1, ki_pfk_atp, km_pfk_adp, km_pfk_atp, km_pfk_f16bp, km_pfk_f6p, vmf_PFK1);
  v5_ALD: fru16bp -> dhap + gap; default*Function_for_ALD(default, dhap, fru16bp, gap, keq_ALD, km_ald_dhap, km_ald_f16bp, km_ald_gap, vmf_ALD);
  v6_TPI: dhap -> gap; default*Function_for_TPI(default, dhap, gap, keq_TPI, km_tpi_dhap, km_tpi_gap, vmf_TPI);
  v7_GAPDH: gap + nad + p_i -> bpg + nadh; default*Function_for_GAPDH(Keq_GAPDH, bpg, default, gap, km_gapdh_bpg, km_gapdh_gap, km_gapdh_nad, km_gapdh_nadh, km_gapdh_p, nad, nadh, p_i, vmf_GAPDH);
  v8_PGK: adp + bpg -> atp + pg3; default*Function_for_PGK(adp, atp, bpg, default, keq_PGK, km_pgk_3pg, km_pgk_adp, km_pgk_atp, km_pgk_bpg, pg3, vmf_PGK);
  v9_PGM: pg3 -> pg2; default*Function_for_PGM(default, keq_PGM, km_pgm_2pg, km_pgm_3pg, pg2, pg3, vmf_PGM);
  v10_ENO: pg2 -> pep; default*Function_for_ENO(default, keq_ENO, km_eno_2pg, km_eno_pep, pep, pg2, vmf_ENO);
  v11_PK: adp + pep -> atp + pyr; default*Function_for_PK(adp, atp, default, fru16bp, ka_pk_f16bp, keq_PK, km_pk_adp, km_pk_atp, km_pk_pep, km_pk_pyr, pep, pyr, vmf_PK);  // modifiers: fru16bp
  v12_LDH: nadh + pyr -> nad + lac; default*Function_for_LDH(default, keq_LDH, km_ldh_lac, km_ldh_nad, km_ldh_nadh, km_ldh_pyr, lac, nad, nadh, pyr, vmf_LDH);
  v13_lac_tp: lac => ; default*Function_for_lac_tp(Keq_lactp, default, k_lactp, lac, lac_ext, vmf_lactp);
  v14_PDH: nad + pyr => nadh + acoa; default*Function_for_PDH(default, km_pdh_nad, km_pdh_pyr, nad, pyr, vmax_PDH);
  v15_o2_tp: => o2; default*Function_for_o2_tp(default, k1_o2tp, o2, o2_ext);
  v16_TCA: adp + 4 nad + p_i + acoa => atp + 4 nadh; default*Function_for_TCA(acoa, adp, default, km_cc_acoa, km_cc_adp, km_cc_nad, km_cc_p_i, nad, p_i, vmax_CC);
  v17_Resp: 14 adp + 6 nadh + 14 p_i + 3 o2 => 14 atp + 6 nad; default*Function_for_Resp(adp, default, km_resp_adp, km_resp_nadh, km_resp_o2, km_resp_p_i, nadh, o2, p_i, vmax_resp);
  v18_ATP_cons: atp => adp + p_i; default*Function_for_ATP_cons(atp, default, k1_atp_cons);

  // Unit definitions:
  unit substance = 1e-3 mole;
  unit length = metre;
  unit area = metre^2;
  unit volume = litre;
  unit time = 0.06 second;
end
