// SBML level 2 version 4

function Reversible_Michaelis_Menten(substrate, product, Kms, Kmp, Vf, Vr)
  (Vf*substrate/Kms - Vr*product/Kmp)/(1 + substrate/Kms + product/Kmp);
end
Reversible_Michaelis_Menten is "Reversible Michaelis-Menten";

// enzymatic rate law for irreversible non-modulated non-interacting bireactant enzymes
function Bi__irreversible(vmax, A, B, Kma, Kmb)
  vmax*A*B/(Kma*Kmb + A*Kmb + B*Kma + A*B);
end
Bi__irreversible is "Bi (irreversible)";  // SBO:0000151

model New_Model()
  // Sokol2025 - Kinetic model of the first three reactions of glycolysis
  // Kinetic model of the first three reactions of glycolysis
  // biomodels.db:MODEL2502210002
  // hasProperty mamo:MAMO_0000046
  // isDescribedBy doi:10.1101/2025.07.22.666125

  // Compartments:
  compartment compartment = 1;

  // Species:
  species ADP in compartment = 1.028764e-6;
  species ATP in compartment = 24.99998;
  species G6P in compartment = 0.1253874;
  species GLC in compartment = 5.138141;
  species F6P in compartment = 0.9999981;
  species FBP in compartment = 1.000036e-6;

  // Parameters:
  sf_F6P = 0.9160999;
  sf_FBP = 1.00288;
  Initial_for_sf_F6P = sf_F6P;
  Initial_for_sf_FBP = sf_FBP;

  // Assignment rules:
  scaled_F6P := F6P*Initial_for_sf_F6P;
  scaled_FBP := Initial_for_sf_FBP*FBP;
  v_HXK := HXK;
  v_PGI := PGI;
  v_PFK := PFK;

  // Reactions:
  HXK: GLC + ATP => ADP + G6P; compartment*Bi__irreversible(HXK_vmax, GLC, ATP, HXK_Kma, HXK_Kmb);
    HXK_vmax = 0.2385; HXK_Kma = 2.19109; HXK_Kmb = 118.287;
  PGI: G6P -> F6P; compartment*Reversible_Michaelis_Menten(G6P, F6P, Kms, Kmp, Vf, Vr);
    Kms = 101.348; Kmp = 2.50273; Vf = 756.09; Vr = 411.169;
  PFK: F6P + ATP => FBP + ADP; compartment*Bi__irreversible(PFK_vmax, F6P, ATP, PFK_Kma, PFK_Kmb);
    PFK_vmax = 7.55439; PFK_Kma = 85.6328; PFK_Kmb = 2.79411;

  // Unit definitions:
  unit length = metre;
  unit area = metre^2;
  unit volume = 1e-3 litre;
  unit time = second;
  unit substance = 1e-3 mole;
end
