// SBML level 2 version 4

model Gnu_gge2016_Synthetic_switch_Open_loop_circuit_in_yeast()
  // Gnügge2016 - Synthetic switch Open loop circuit in yeast
  // This model was used to describe the behaviour of the synthetic open loop circuit in yeast, published in [1]. The accompanying script will simulate the model as used in main Figure 2c. Additional scaling and preprocessing was done to compare the model with data used in the experiment and can be obtained from the authors upon request. [1] Gnügge, Robert, et al. "An Orthogonal Permease–Inducer–Repressor Feedback Loop Shows Bistability." ACS synthetic biology 5.10 (2016): 1098-1107.

  // Compartments:
  compartment cell = 70 MWDERIVEDUNIT_micrometer___3;

  // Species:
  substanceOnly species L0 in cell = 0;  // substance in MWBUILTINUNIT_molecule
  substanceOnly species L1 in cell = 0;  // substance in MWBUILTINUNIT_molecule
  substanceOnly species L2 in cell = 0;  // substance in MWBUILTINUNIT_molecule
  substanceOnly species IPTGint in cell = 0;  // substance in MWBUILTINUNIT_molecule
  substanceOnly species Cit in cell = 0;  // substance in MWBUILTINUNIT_molecule
  substanceOnly species G2 in cell = 1;  // substance in MWBUILTINUNIT_molecule
  substanceOnly species G2_1 in cell = 0;  // substance in MWBUILTINUNIT_molecule
  substanceOnly species G2_2 in cell = 0;  // substance in MWBUILTINUNIT_molecule
  substanceOnly species Lac12 in cell = 0;  // substance in MWBUILTINUNIT_molecule
  substanceOnly species Lac12m in cell = 0;  // substance in MWBUILTINUNIT_molecule
  substanceOnly species G1 in cell = 1;  // substance in MWBUILTINUNIT_molecule
  substanceOnly species y in cell = 0;  // substance in MWUSERUNIT_AU

  // Parameters:
  klaci = 0.005 MWDERIVEDUNIT_molecule__second;
  k1 = 0.00027 MWDERIVEDUNIT_1__molecule_second;
  k_1 = 0.005 MWDERIVEDUNIT_1__second;
  k2 = 2.78e-6 MWDERIVEDUNIT_1__molecule_second;
  k_2 = 0.012 MWDERIVEDUNIT_1__second;
  kc = 0.05 MWDERIVEDUNIT_1__second;
  kout = 5 dimensionless;
  kd = 7.7e-5 MWDERIVEDUNIT_1__second;
  klac12 = 0.05 MWDERIVEDUNIT_1__second;
  kcat = 3.57 MWDERIVEDUNIT_1__second;
  Km = 2800 MWBUILTINUNIT_molarity;
  IPTGext = 1000 MWBUILTINUNIT_molarity;
  ktp1 = 0.00054 MWDERIVEDUNIT_1__second;
  scale_molec = 27.185 MWDERIVEDUNIT_AU__molecule;
  lk = 1e-10 dimensionless;
  scale_lacI = 1.6 dimensionless;
  scale_Citrine = 0.869 dimensionless;

  // Algebraic rules:
  0 = y - scale_molec*Lac12m;

  // Reactions:
  Production_of_LacI: => L0; klaci*scale_lacI;
  LacI_binds_Gene: L0 + G2 => G2_1; 2*k1*L0*G2;
  reverse_of_LacI_binds_Gene: G2_1 => G2 + L0; k_1*G2_1;
  LacI_binds_G2_1: L0 + G2_1 => G2_2; k1*L0*G2_1;
  reverse_of_LacI_binds_G2_1: G2_2 => G2_1 + L0; 2*k_1*G2_2;
  LacI_binds_IPTGint: L0 + IPTGint => L1; 2*k2*L0*IPTGint;
  reverse_of_LacI_binds_IPTGint: L1 => IPTGint + L0; k_2*L1;
  dimer_complex_of_LacI_and_IPTG: L1 + IPTGint => L2; k2*L1*IPTGint;
  reverse_of_dimerisation: L2 => L1 + IPTGint; 2*k_2*L2;
  production_of_citrine: G2 => Cit + G2; scale_Citrine*kc*G2;
  IPTG_uptake: Lac12m => IPTGint + Lac12m; kcat*Lac12m*IPTGext/(Km + IPTGext);
  diffusion_ofIPTG: IPTGint => ; kout*kd*IPTGint;
  leaky: G2_1 => Cit + G2_1; lk*kc*G2_1*scale_Citrine;
  leaky_2: G2_2 => Cit + G2_2; lk*kc*G2_2*scale_Citrine;
  degradation: G2_1 => G2; kd*G2_1;
  degradarion_2: G2_2 => G2_1; 2*kd*G2_2;
  degradation_3: L0 => ; kd*L0;
  degradation_4: L1 => IPTGint; kd*L1;
  degradation_5: L2 => IPTGint + IPTGint; kd*L2;
  degradation_6: Cit => ; kd*Cit;
  Lac12_transport: Lac12 => Lac12m; ktp1*Lac12;
  Lac12_constituitive: G1 => Lac12 + G1; klac12*G1;
  Lac12_degradation: Lac12 => ; kd*Lac12;
  Lac12m_degradation: Lac12m => ; kd*Lac12m;

  // Unit definitions:
  unit MWDERIVEDUNIT_micrometer___3 = metre^3 * 1e-18 dimensionless; MWDERIVEDUNIT_micrometer___3 is "micrometer^3";
  unit MWBUILTINUNIT_molecule = 1.660539e-24 mole;
  unit MWUSERUNIT_AU = mole;
  unit MWDERIVEDUNIT_molecule__second = mole * 1.660539e-24 dimensionless / second; MWDERIVEDUNIT_molecule__second is "molecule/second";
  unit MWDERIVEDUNIT_1__molecule_second = 6.022142e23 dimensionless / (mole * second); MWDERIVEDUNIT_1__molecule_second is "1/(molecule*second)";
  unit MWDERIVEDUNIT_1__second = dimensionless / second; MWDERIVEDUNIT_1__second is "1/second";
  unit MWBUILTINUNIT_molarity = mole * 1000 dimensionless / metre^3;
  unit MWDERIVEDUNIT_AU__molecule = 6.022142e23 dimensionless; MWDERIVEDUNIT_AU__molecule is "AU/molecule";
end
