// SBML level 2 version 4

model YeastTernary()
  // Shaw 2018 - Yeast GPCR Ternary Complex Model
  // SBML model exported from PottersWheel on 2019-01-17 12:49:15.
  // This model was created via Matlab and automatically converted to SBML.

  // Compartments:
  compartment cell = 1;

  // Species:
  species R in cell = 4.15e-10;
  species LR in cell = 0;
  species Rstar in cell = 0;
  species LRstar in cell = 0;
  species RG in cell = 0;
  species LRG in cell = 0;
  species RstarG in cell = 0;
  species LRstarG in cell = 0;
  species G in cell = 4.15e-10;
  species aGDP in cell = 4.15e-10;
  species bg in cell = 4.15e-10;
  species aGTP in cell = 0;
  species bgstar in cell = 0;
  species Ste5 in cell = 4.15e-10;
  species bgstarSte5 in cell = 0;
  species bgSte5 in cell = 0;
  species L in cell = 0.0001;
  species observable in cell;

  // Parameters:
  kLp = 40000000;
  kLm = 0.31;
  kactp = 1;
  kactm = 1000;
  kGp = 100000000;
  kGm = 0.1;
  kGRAp = 700000000;
  kGRAm = 0.0013;
  khydp = 0.0001;
  khydm = 0.0001;
  kGTPp = 0.01;
  nup = 1;
  num = 1;
  zetap = 1000;
  zetam = 1;
  mup = 1;
  mum = 1;
  kconact = 1e-10;
  krev = 1e-10;
  kEp1 = 1000;
  kEp2 = 1000000000;
  kEm1 = 1;
  kEm2 = 1;

  // Assignment rules:
  observable := bgstarSte5;

  // Rate rules:
  R' = kLm*LR - kLp*L*R + kactm*Rstar - kactp*R + kGm*RG - kGp*R*G;
  LR' = kLp*L*R - kLm*LR + zetam*kactm*LRstar - zetap*kactp*LR + num*kGm*LRG - nup*kGp*LR*G;
  Rstar' = kactp*R - kactm*Rstar + zetam*kLm*LRstar - zetap*kLp*L*Rstar + mum*kGm*RstarG - mup*kGp*Rstar*G + kGTPp*RstarG;
  LRstar' = zetap*kactp*LR - zetam*kactm*LRstar + zetap*kLp*L*Rstar - zetam*kLm*LRstar + mum*num*kGm*LRstarG - mup*nup*kGp*LRstar*G + num*kGTPp*LRstarG;
  RG' = kGp*R*G - kGm*RG + num*kLm*LRG - nup*kLp*L*RG + mum*kactm*RstarG - mup*kactp*RG;
  LRG' = nup*kGp*LR*G - num*kGm*LRG + nup*kLp*L*RG - num*kLm*LRG + mum*zetam*kactm*LRstarG - mup*zetap*kactp*LRG;
  RstarG' = mup*kGp*Rstar*G - mum*kGm*RstarG + zetam*num*kLm*LRstarG - zetap*nup*kLp*L*RstarG + mup*kactp*RG - mum*kactm*RstarG - kGTPp*RstarG;
  LRstarG' = mup*nup*kGp*LRstar*G - mum*num*kGm*LRstarG + zetap*nup*kLp*L*RstarG - zetam*num*kLm*LRstarG + mup*zetap*kactp*LRG - mum*zetam*kactm*LRstarG - num*kGTPp*LRstarG;
  G' = kGm*RG - kGp*R*G + num*kGm*LRG - nup*kGp*LR*G + kGRAp*aGDP*bg + kGRAp*aGDP*bgstar - kGRAm*G + mum*kGm*RstarG - mup*kGp*Rstar*G + mum*num*kGm*LRstarG - mup*nup*kGp*LRstar*G;
  aGDP' = khydp*aGTP - khydm*aGDP + kGRAm*G - kGRAp*aGDP*bg - kGRAp*aGDP*bgstar;
  bg' = -(kGRAp*aGDP*bg) + krev*bgstar - kconact*bgstar - kEp2*Ste5*bg + kEm2*bgSte5;
  aGTP' = khydm*aGDP - khydp*aGTP + kGTPp*RstarG + num*kGTPp*LRstarG;
  bgstar' = kGRAm*G + kGTPp*RstarG + num*kGTPp*LRstarG - krev*bgstar + kconact*bgstar - kGRAp*aGDP*bgstar - kEp1*Ste5*bgstar + kEm1*bgstarSte5;
  Ste5' = -(kEp1*Ste5*bgstar) + kEm1*bgstarSte5 - kEp2*Ste5*bg + kEm2*bgSte5;
  bgstarSte5' = kEp1*Ste5*bgstar - kEm1*bgstarSte5;
  bgSte5' = kEp2*Ste5*bg - kEm2*bgSte5;
  L' = kLm*LR - kLp*L*R + zetam*kLm*LRstar - zetap*kLp*L*Rstar + num*kLm*LRG - nup*kLp*L*RG + zetam*num*kLm*LRstarG - zetap*nup*kLp*L*RstarG;
end
