// SBML level 2 version 4

model double_yeast_reduced_enz_second_pw()
  // Shaw2019 - Digital biosensor model from Yeast
  // SBML model exported from PottersWheel on 2018-06-29 21:50:11.

  // Compartments:
  compartment cell = 1;

  // Species:
  species $R1 in cell = 1.6e-7;
  species $Rstar1 in cell = 0;
  species $Goff1 in cell = 1.6e-7;
  species $Gon1 in cell = 0;
  species $Effector1 in cell = 1.6e-7;
  species $Gon1Effector1 in cell = 0;
  species $z11 in cell = 0;
  species $z21 in cell = 0;
  species $preafactor in cell = 4.661913e-8;
  species $afactor in cell = 0;
  species $R2 in cell = 1.6e-7;
  species $Rstar2 in cell = 0;
  species $Goff2 in cell = 1.6e-7;
  species $Gon2 in cell = 0;
  species $Effector2 in cell = 1.6e-7;
  species $Gon2Effector2 in cell = 0;
  species $z12 in cell = 0;
  species $z22 in cell = 0;
  species $preGFP in cell = 2.252328e-8;
  species $z32 in cell = 4.39606e-9;
  species $L in cell = 0;
  species $Bar1 in cell = 1.683835e-10;
  species $inactiveBar1 in cell = 0;
  species $GFP in cell;

  // Parameters:
  k11 = 2.75132e8;
  k21 = 2726.236;
  k31 = 0.004;
  k41 = 1.060404e-7;
  k51 = 1044444;
  k61 = 0.09424167;
  k71 = 86.97859;
  a1 = 17.75;
  a11 = 42.41;
  a21 = 2796540;
  b1 = 1859.57;
  b11 = 0.93;
  b21 = 6.321369e-7;
  k12 = 140003.1;
  k22 = 12101.85;
  k32 = 0.004;
  k42 = 3.080644e-8;
  k52 = 1044444;
  k62 = 0.09424167;
  k72 = 2.1428e-7;
  a2 = 17.75;
  a12 = 42.41;
  a22 = 6.626108e9;
  b2 = 1859.57;
  b12 = 0.93;
  b22 = 4.898505e-8;
  k8 = 4.193002e9;
  k9 = 4.357832e-6;
  k10 = 33825.93;

  // Assignment rules:
  GFP := z32;

  // Rate rules:
  R1' = Rstar1*k71 - L*R1*k11;
  Rstar1' = L*R1*k11 - Rstar1*k71 - Rstar1*k41;
  Goff1' = Gon1*k31 - Rstar1*Goff1*k21;
  Gon1' = Rstar1*Goff1*k21 + Gon1Effector1*k61 - Gon1*k31 - Gon1*Effector1*k51;
  Effector1' = Gon1Effector1*k61 - Gon1*Effector1*k51;
  Gon1Effector1' = Gon1*Effector1*k51 - Gon1Effector1*k61;
  z11' = Gon1Effector1*a1 - z11*b1;
  z21' = z11*a11 - z21*b11;
  preafactor' = afactor*b21 - preafactor*z21*a21;
  afactor' = preafactor*z21*a21 - afactor*b21 - afactor*R2*k12 + Rstar2*k72 - Bar1*afactor*k8 + inactiveBar1*k9;
  R2' = Rstar2*k72 - afactor*R2*k12;
  Rstar2' = afactor*R2*k12 - Rstar2*k72 - Rstar2*k42;
  Goff2' = Gon2*k32 - Rstar2*Goff2*k22;
  Gon2' = Rstar2*Goff2*k22 + Gon2Effector2*k62 - Gon2*k32 - Gon2*Effector2*k52;
  Effector2' = Gon2Effector2*k62 - Gon2*Effector2*k52;
  Gon2Effector2' = Gon2*Effector2*k52 - Gon2Effector2*k62;
  z12' = Gon2Effector2*a2 - z12*b2;
  z22' = z12*a12 - z22*b12;
  preGFP' = z32*b22 - preGFP*z22*a22;
  z32' = preGFP*z22*a22 - z32*b22;
  L' = Rstar1*k71 - L*k11*R1;
  Bar1' = -(Bar1*afactor*k8) + inactiveBar1*k9 + inactiveBar1*k10;
  inactiveBar1' = Bar1*afactor*k8 - inactiveBar1*k9 - inactiveBar1*k10;
end
