// SBML level 2 version 4
// dcterms:bibliographicCitation: Interactions between macrophages and T-lymphocytes: tumor sneaking through intrinsic to helper T cell dynamics urn:miriam:pubmed:2946899

function Function_for_removal_of_debris(ED, DEBRIS)
  ED*DEBRIS;
end

function Function_for_removal_of_active_cytotoxic_T_lymphocyte(DL, CTL)
  DL*CTL;
end

function Function_for_formation_of_active_macrophage(A, MPH, FACTOR)
  A*MPH*FACTOR;
end

function Function_for_debris_formation(KILL, ANGRY, CTL, TUMOR, KMK)
  KILL*(ANGRY + CTL)*TUMOR/(KMK + TUMOR);
end

function Function_for_removal_of_inacitve_helper_T_lymphocyte(A, HTLP, APC, EL)
  A*HTLP*APC + EL*HTLP;
end

function Function_for_removal_of_tumor(KILL, ANGRY, CTL, TUMOR, KMK)
  KILL*(ANGRY + CTL)*TUMOR/(KMK + TUMOR);
end

function Function_for_formation_of_helper_T_cell(I2, INFLAM)
  I2 + I2*INFLAM;
end

function Function_for_formation_of_inactive_cytotoxic_T_lymphocyte(I1, INFLAM)
  I1 + I1*INFLAM;
end

function Function_for_removal_of_inactive_macrophages(A, MPH, FACTOR, EM)
  A*MPH*FACTOR + EM*MPH;
end

function Function_for_removal_of_helper_T_cell(DL, HTL)
  DL*HTL;
end

function Function_for_removal_of_active_macrophage(DM, MPH)
  DM*MPH;
end

function Function_for_change_of_cytotoxic_T_lymphocyte(A, CTLP, TUMOR, EL)
  A*CTLP*TUMOR + EL*CTLP;
end

function Function_for_induction_of_tumor(R, TUMOR, KR)
  R*TUMOR/(1 + TUMOR/KR);
end

function Function_for_formation_of_inactive_Macrophages(I3, INFLAM)
  I3 + I3*INFLAM;
end

function Function_for_formation_of_active_helper_T_cell(A, HTLP, APC, P, FACTOR, KMF, HTL)
  A*HTLP*APC + P*HTL*FACTOR/(KMF + FACTOR);
end

function Function_for_formation_of_active_cytotoxic_lymphocyte(A, CTLP, TUMOR, P, CTL, FACTOR, KMF)
  A*CTLP*TUMOR + P*CTL*FACTOR/(KMF + FACTOR);
end

model Boer1986___Interactions_between_Macrophages_and_T_lymphocytes__Tumor_Sneaking_Through_Intrinsic_to_Helper_T_cell_Dynamics()
  // Boer1986 - Interactions between Macrophages and T-lymphocytes: Tumor Sneaking Through Intrinsic to Helper T cell Dynamics
  // Interactions between Macrophages and T-lymphocytes: Tumor
  // Sneaking Through Intrinsic to Helper T cell Dynamics
  // ROB J. DE BOER AND PAULINE HOGEWEG
  // Bioinformatics Group, University of Utrecht, Padualaan 8, 3584 CH Utrecht,
  // The Netherlands
  // Abstract
  // In a mathematical model of the cellular immune response we investigate immune
  // reactions to tumors that are introduced in various doses. The model represents
  // macrophage T-lymphocyte interactions that generate cytotoxic macrophages and
  // cytotoxic T-lymphocytes. In this model antigens (tumors) can induce infinitely large
  // T-lymphocyte effector populations because (a) effector T-lymphocytes are capable
  // of repeated proliferation and (b) we have omitted immunosuppression. In this
  // (proliferative) model small doses of weakly antigenic tumors grow infinitely large
  // (i.e. sneak through) eliciting an immune response of limited magnitude. Intermediate
  // doses of the same tumor induce larger immune responses and are hence rejected.
  // Large doses of the tumor break through, but their progressive growth is accompanied
  // by a strong immune response involving extensive lymphocyte proliferation. Similarly
  // a more antigenic tumor is rejected in intermediate doses and breaks through in large
  // doses. Initially small doses however lead to tumor dormancy. Thus although the
  // model is devoid of explicit regulatory mechanisms that limit the magnitude of its
  // response (immunosuppression is such a mechanism), the immune response to large
  // increasing tumors may either be (a) a stable reaction of limited magnitude (experimentally known as tolerance or unresponsiveness) or (b) a strong and ever increasing
  // reaction. Unresponsiveness can evolve because in this model net T-lymphocyte
  // proliferation requires the presence of a minimum number of helper T cells (i.e. a
  // proliferation threshold). Unresponsiveness is caused by depletion of helper T cell
  // precursors.
  // isDescribedBy pubmed:2946899

  // Compartments:
  compartment compartment = 1;

  // Species:
  species CTLP in compartment = 1;
  species HTLP in compartment = 15;
  species MPH in compartment = 3000000;
  species CTL in compartment = 3909;
  species HTL in compartment = 2072;
  species ANGRY in compartment = 6351;
  species TUMOR in compartment = 1000;
  species DEBRIS in compartment = 1000;

  // Parameters:
  KMD = 10000000;
  KMT = 1000;
  H = 9;
  KMF = 50;
  A = 0.001;
  DL = 0.2;
  DM = 1;
  ED = 2;
  EL = 0.02;
  EM = 0.05;
  I1 = 1;
  I2 = 0.2;
  I3 = 125000;
  KILL = 10;
  KR = 1000000000;
  P = 1;
  R = 1;
  KMK = 100000;

  // Assignment rules:
  APC := (MPH + ANGRY)*DEBRIS/(KMD + DEBRIS);
  FACTOR := HTL*TUMOR/(KMT + TUMOR);
  INFLAM := H*FACTOR/(KMF + FACTOR);

  // Reactions:
  Formation_of_inactive_cytotoxic_T_lymphocyte: => CTLP; compartment*Function_for_formation_of_inactive_cytotoxic_T_lymphocyte(I1, INFLAM);
  Change_of_inactive_cytotoxic_T_lymphocyte_to_active_and_other_cmponent: CTLP => ; compartment*Function_for_change_of_cytotoxic_T_lymphocyte(A, CTLP, TUMOR, EL);  // modifiers: TUMOR
  Formation_of_inactive_Helper_T_cell: => HTLP; compartment*Function_for_formation_of_helper_T_cell(I2, INFLAM);
  Removal_of_inactive_Helper_T_lymphocyte: HTLP => ; compartment*Function_for_removal_of_inacitve_helper_T_lymphocyte(A, HTLP, APC, EL);
  Formation_inactive_Macrophages: => MPH; compartment*Function_for_formation_of_inactive_Macrophages(I3, INFLAM);
  Removal_of_inactive_Macrophage: MPH => ; compartment*Function_for_removal_of_inactive_macrophages(A, MPH, FACTOR, EM);
  Formation_of_active_cytotoxic_T_lymphocyte: => CTL; compartment*Function_for_formation_of_active_cytotoxic_lymphocyte(A, CTLP, TUMOR, P, CTL, FACTOR, KMF);  // modifiers: CTLP, TUMOR
  Removal_of_active_cytotoxic_T_lymphocyte: CTL => ; compartment*Function_for_removal_of_active_cytotoxic_T_lymphocyte(DL, CTL);
  Formation_of_active_helper_T_cell: => HTL; compartment*Function_for_formation_of_active_helper_T_cell(A, HTLP, APC, P, FACTOR, KMF, HTL);  // modifiers: HTLP
  Formation_of_active_macrophage: => ANGRY; compartment*Function_for_formation_of_active_macrophage(A, MPH, FACTOR);  // modifiers: MPH
  Removal_of_active_macrophage: ANGRY => ; compartment*Function_for_removal_of_active_macrophage(DM, MPH);  // modifiers: MPH
  Induction_of_tumor: => TUMOR; compartment*Function_for_induction_of_tumor(R, TUMOR, KR);
  Removal_of_tumor: TUMOR => ; compartment*Function_for_removal_of_tumor(KILL, ANGRY, CTL, TUMOR, KMK);  // modifiers: ANGRY, CTL
  Debris_formation: => DEBRIS; compartment*Function_for_debris_formation(KILL, ANGRY, CTL, TUMOR, KMK);  // modifiers: ANGRY, CTL, TUMOR
  Removal_of_Debris: DEBRIS => ; compartment*Function_for_removal_of_debris(ED, DEBRIS);
  Removal_of_active_helper_T_cell: HTL => ; compartment*Function_for_removal_of_helper_T_cell(DL, HTL);

  // Unit definitions:
  unit volume = 1e-3 litre;
  unit time = 86400 second;
  unit substance = 1e-3 mole;
end
