// SBML level 2 version 4

function Function_for_Upregulation_of_signalling_by_concentration_of_EGFR_ERK_signalling(alpha1, Gf, xi_t, E_0, Ei, beta_1, Ie)
  alpha1*Gf*xi_t*(E_0 - Ei)/(1 + beta_1*Ie*xi_t);
end
Function_for_Upregulation_of_signalling_by_concentration_of_EGFR_ERK_signalling is "Function for Upregulation of signalling by concentration of EGFR/ERK signalling";

function Function_for_inactivation_of_transcription_factor_in_nucleous(d2, Ti)
  d2*Ti;
end

function Function_for_inactivation_of_ERK(d_1, Ei)
  d_1*Ei;
end

function Function_for_production_of_NADPH_by_reduction_of_NADP__and_resistance_to_EGFR_inhibitors(beta_e, N_0, Ni, alpha_3, Ie, xi_t)
  beta_e*(N_0 - Ni) + alpha_3*Ie*xi_t*(N_0 - Ni);
end
Function_for_production_of_NADPH_by_reduction_of_NADP__and_resistance_to_EGFR_inhibitors is "Function for production of NADPH by reduction of NADP+ and resistance to EGFR inhibitors";

function Function_for_degradation_of_intracellular_6_AN_by_the_cell(d5, Ai)
  d5*Ai;
end
Function_for_degradation_of_intracellular_6_AN_by_the_cell is "Function for degradation of intracellular 6-AN by the cell";

function Function_for_formation_of_epidermal_growth_factor(D_gf, GF)
  D_gf*GF;
end

function Function_for_accumulation_of_intracellular_6_AN_by_the_cell(alpha_5, Ae)
  alpha_5*Ae;
end
Function_for_accumulation_of_intracellular_6_AN_by_the_cell is "Function for accumulation of intracellular 6-AN by the cell";

function Function_for_activation_of_transcription_factor_in_nucleous(alpha_2, Ei, T_0, Ti)
  alpha_2*Ei*(T_0 - Ti);
end

function Function_for_decrease_in_6_AN(n2, Ae)
  n2*Ae;
end
Function_for_decrease_in_6_AN is "Function for decrease in 6-AN";

function Function_for_Increase_the_concentration_of_EGF_inhibitor(D_ie, Ie)
  D_ie*Ie;
end

function Function_for_increase_in_the_inhibitor_based_treatment_protocol(m1, I)
  m1*I;
end

function Function_for_removal_of_epidermal_growth_factor(W_gf, GF, b1)
  W_gf*GF + b1*GF;
end

function Function_for_Decrease_in_the_concentration_of_inhibitor_of_EGF(W_ie, Ie, b2)
  W_ie*Ie + b2*Ie;
end

function Function_for_Decrease_in_inhibition_based_treatment_protocol(n1, I0)
  n1*I0;
end

function Function_for_increase_in_6_AN(m2, A)
  m2*A;
end
Function_for_increase_in_6_AN is "Function for increase in 6-AN";

model Bouchnita2019___A_multiscale_model_to_design_therapeutic_strategies_that_overcome_drug_resistance_to_tyrosine_kinase_inhibitors_in_multiple_myeloma()
  // Bouchnita2019 - A multiscale model to design therapeutic strategies that overcome drug resistance to tyrosine kinase inhibitors in multiple myeloma
  // Drug resistance (DR) is a phenomenon characterized by the tolerance of a disease to pharmaceutical treatment. In cancer patients, DR is one of the main challenges that limit the therapeutic potential of the existing treatments. Therefore, overcoming DR by restoring the sensitivity of cancer cells would be greatly beneficial. In this context, mathematical modeling can be used to provide novel therapeutic strategies that maximize the efficiency of anti-cancer agents and potentially overcome DR. In this paper, we present a new multiscale model devoted to the interaction of potential treatments with multiple myeloma (MM) development. In this model, MM cells are represented as individual objects that move, divide, and die by apoptosis. The fate of each cell depends on intracellular and extracellular regulation, as well as the administered treatment. The model is used to explore the combined effects of a tyrosine-kinase inhibitor (TKI) with a pentose phosphate pathway (PPP) inhibitor. We use numerical simulations to tailor effective and safe treatment regimens that may eradicate the MM tumors. The model suggests that an interval for the daily dose of the PPP inhibitor can maximize the responsiveness of MM cells to the treatment with TKIs. Then, it demonstrates that the combination of high-dose pulsatile TKI treatment with high-dose daily PPP inhibitor therapy can potentially eradicate the tumor.The predictions of numerical simulations using such a model can be considered as testable hypotheses in future pre-clinical experiments and clinical studies.

  // Compartments:
  compartment compartment = 1;

  // Species:
  species Ei in compartment = 1;
  species Ti in compartment = 1;
  species Ni in compartment = 1;
  species Di in compartment = 1;
  species Ai in compartment = 1;
  species Gf in compartment = 1;
  species GF in compartment = 1;
  species Ie in compartment = 1;
  species I0 in compartment = 1;
  species Ae in compartment = 1;

  // Parameters:
  D_gf = 0.86;
  D_ie = 1.5;
  W_gf = 0.05;
  W_ie = 0.05;
  b1 = 0.001;
  b2 = 0.001;
  m1 = 0.0045;
  m2 = 0.0315;
  n2 = 0.0215;
  n1 = 0.00277;
  alpha_1 = 0.08;
  d1 = 0.001;
  beta_1 = 5;
  alpha_2 = 0.2;
  d2 = 0.1;
  beta_3 = 0.1;
  alpha_3 = 1;
  gamma_3 = 0.3;
  d3 = 0.1;
  alpha_4_1 = 0.2;
  E_0 = 1;
  T_0 = 1;
  N_0 = 1;
  d5 = 1;
  A = 1;
  I = 1;
  k1 = 1;
  xi_t = 1;
  alpha_5 = 1;

  // Reactions:
  Upregulation_of_signalling_by_concentration_of_EGFR_ERK_signalling_and_Blocking_of_signalling_by_external_EGFR_inhibitors: => Ei; compartment*Function_for_Upregulation_of_signalling_by_concentration_of_EGFR_ERK_signalling(alpha_1, Gf, xi_t, E_0, Ei, beta_1, Ie); Upregulation_of_signalling_by_concentration_of_EGFR_ERK_signalling_and_Blocking_of_signalling_by_external_EGFR_inhibitors is "Upregulation of signalling by concentration of EGFR/ERK signalling and Blocking of signalling by external EGFR inhibitors";  // modifiers: Gf, Ie
  Inactivation_of_ERK: Ei => ; compartment*Function_for_inactivation_of_ERK(d1, Ei);
  Activation_of_transcription_factor_in_nucleous: => Ti; compartment*Function_for_activation_of_transcription_factor_in_nucleous(alpha_2, Ei, T_0, Ti);  // modifiers: Ei
  Inactivation_of_transcription_factor_in_nucleous: Ti => ; compartment*Function_for_inactivation_of_transcription_factor_in_nucleous(d2, Ti);
  Production_of_NADPH_by_reduction_of_NADP__and_resistance_to_EGFR_inhibitors: => Ni; compartment*Function_for_production_of_NADPH_by_reduction_of_NADP__and_resistance_to_EGFR_inhibitors(beta_3, N_0, Ni, alpha_3, Ie, xi_t); Production_of_NADPH_by_reduction_of_NADP__and_resistance_to_EGFR_inhibitors is "Production of NADPH by reduction of NADP+ and resistance to EGFR inhibitors";  // modifiers: Ie
  Reduction_of_NADPH_by_PPI_and_due_to_oxidation: Ni => ; compartment*Reduction_of_NADPH_by_PPI_and_due_to_oxidation_k1*Ni;
    Reduction_of_NADPH_by_PPI_and_due_to_oxidation_k1 = 0.1;
  Accumulation_of_intracellular_6_AN_by_the_cell: => Ai; compartment*Function_for_accumulation_of_intracellular_6_AN_by_the_cell(alpha_5, Ae); Accumulation_of_intracellular_6_AN_by_the_cell is "Accumulation of intracellular 6-AN by the cell";  // modifiers: Ae
  Degradation_of_intracellular_6_AN_by_the_cell: Ai => ; compartment*Function_for_degradation_of_intracellular_6_AN_by_the_cell(d5, Ai); Degradation_of_intracellular_6_AN_by_the_cell is "Degradation of intracellular 6-AN by the cell";
  Formation_of_epidermal_growth_factor: => Gf; compartment*Function_for_formation_of_epidermal_growth_factor(D_gf, Gf);
  Removal_of_epidermal_growth_factor: GF => ; compartment*Function_for_removal_of_epidermal_growth_factor(W_gf, GF, b1);
  Increase_the_concentration_of_EGF_inhibitor: => Ie; compartment*Function_for_Increase_the_concentration_of_EGF_inhibitor(D_ie, Ie);
  Decrease_in_the_concentration_of_inhibitor_of_EGF: Ie => ; compartment*Function_for_Decrease_in_the_concentration_of_inhibitor_of_EGF(W_ie, Ie, b2);
  increase_in_the_inhibitor_based_treatment_protocol: => I0; compartment*Function_for_increase_in_the_inhibitor_based_treatment_protocol(m1, I);
  Decrease_in_inhibition_based_treatment_protocol: I0 => ; compartment*Function_for_Decrease_in_inhibition_based_treatment_protocol(n1, I0);
  increase_in_6_AN: => Ae; compartment*Function_for_increase_in_6_AN(m2, A); increase_in_6_AN is "increase in 6-AN";
  Decrease_in_6_AN: Ae => ; compartment*Function_for_decrease_in_6_AN(n2, Ae); Decrease_in_6_AN is "Decrease in 6-AN";

  // Unit definitions:
  unit volume = 1e-3 litre;
  unit substance = 1e-3 mole;
end
