// SBML level 2 version 4
// dcterms:bibliographicCitation: urn:miriam:pubmed:30764845

function sTM_syn(c1, TM)
  c1*TM;
end

function TM_mRNA_synthesis_0(I, I0)
  I + I0;
end

function TM_protein_synthesis_0(Ktrans, TMR)
  Ktrans*TMR;
end

model Ghaffari2019_TM_gene_expression()
  // Ghaffari2019 - Thrombomodulin Gene Expression after Retinoic Acid Treatment for Cancer Patients with Coagulation Disorders
  // isDescribedBy pubmed:30764845
  // hasProperty mamo:MAMO_0000045

  // Compartments:
  compartment compartment = 1e-12;

  // Species:
  // Thrombomodulin mRNA
  species TM_mRNA in compartment = 0;
  // Thrombomodulin protein
  species TM in compartment = 1.9e-5;
  // Retinoic acid
  species RA in compartment = 1e-5;
  // molar concentration of all RA binding receptor.
  species REC1t in compartment = 1e-6;
  species sTM in compartment = 1;

  // Parameters:
  Imax = 1.6e-9 unit_0;
  Kd2 = 1.5e-8 unit_1;
  Kd1 = 8e-9 unit_1;
  Kdp = 0.0845 unit_2;
  Kdm = 0.256 unit_2;
  I0 has unit_0;
  Ktrans has unit_2;
  ICtmr = 1.6e-8 unit_1;
  ICtm = 2.14e-5 unit_3;
  c2 = 0.11 unit_2;

  // Assignment rules:
  c1 := c2*sTM/TM;
  I := Imax*(RA*REC1t/(RA*REC1t + Kd2*(RA + Kd1)));
  I0 := Kdm*ICtmr;
  Ktrans := Kdp*ICtm/ICtmr;

  // Reactions:
  // TM mRNA synthesis depedent on RA and Retinoic acid receptor
  TM_mRNA_synthesis: => TM_mRNA; compartment*TM_mRNA_synthesis_0(I, I0);
  // TM protein synthesis
  TM_protein_synthesis: => TM; compartment*TM_protein_synthesis_0(Ktrans, TM_mRNA);  // modifiers: TM_mRNA
  TM_mRNA_Degradation: TM_mRNA => ; compartment*Kdm*TM_mRNA;
  TM_Degradation: TM => ; compartment*Kdp*TM;
  sTM_synthesis: => sTM; compartment*sTM_syn(c1, TM); sTM_synthesis is "sTM-synthesis";  // modifiers: TM
  sTM_utilisation: sTM => ; compartment*k1*sTM; sTM_utilisation is "sTM-utilisation";
    k1 = 0.1;

  // Unit definitions:
  unit time = 3600 second;
  unit unit_0 = mole / (litre * 360000 second); unit_0 is "mol/(l*h)";
  unit unit_1 = mole / litre; unit_1 is "mol/l";
  unit unit_2 = 1 / (360000 second); unit_2 is "1/h";
  unit unit_3 = mole / litre; unit_3 is "mole/l";
end
