// SBML level 2 version 1

model Gulhane2022_Sphingolipid_metabolism_and_PI3K_AKT_axis_in_NSCLC()
  // Gulhane2022 - Sphingolipid metabolism and PI3K-AKT axis in NSCLC
  // In this model, we demonstrated that the increased expression of sphingolipids enzyme affects PI3K-AKT signaling axis and its downstream signaling mediators resulting in cancer progression
  // isDescribedBy pubmed:35977046
  // hasProperty mamo:MAMO_0000003
  // biomodels.db:MODEL2402290001

  // Compartments:
  compartment PLASMA_MEMBRANE = 1;
  compartment CYTOSOL = 1;
  compartment EXTERNAL_Env = 1; EXTERNAL_Env is "EXTERNAL Env.";
  compartment NUCLEUS in CYTOSOL = 1;
  compartment ENDOPLASMIC_RETICULUM in CYTOSOL = 1;
  compartment GOLGI_COMPLEX in CYTOSOL = 1;

  // Species:
  substanceOnly species $EGFR in PLASMA_MEMBRANE = 1000;  // substance in MWBUILTINUNIT_molecule
  substanceOnly species $EGF in PLASMA_MEMBRANE = 1000;  // substance in MWBUILTINUNIT_molecule
  substanceOnly species $VEGFR in PLASMA_MEMBRANE = 1000;  // substance in MWBUILTINUNIT_molecule
  substanceOnly species $VEGF in PLASMA_MEMBRANE = 1000;  // substance in MWBUILTINUNIT_molecule
  substanceOnly species $S1Ps in PLASMA_MEMBRANE = 75000;  // substance in MWBUILTINUNIT_molecule
  substanceOnly species $S1P1_5 in PLASMA_MEMBRANE = 75000; S1P1_5 is "S1P1-5";  // substance in MWBUILTINUNIT_molecule
  substanceOnly species $ABCC1 in PLASMA_MEMBRANE = 76000;  // substance in MWBUILTINUNIT_molecule
  substanceOnly species $EGFRC in CYTOSOL = 990;  // substance in MWBUILTINUNIT_molecule
  substanceOnly species Ras in CYTOSOL = 100000;  // substance in MWBUILTINUNIT_molecule
  substanceOnly species PI3K in CYTOSOL = 216000;  // substance in MWBUILTINUNIT_molecule
  substanceOnly species GRB2 in CYTOSOL = 986;  // substance in MWBUILTINUNIT_molecule
  substanceOnly species SOS in CYTOSOL = 986;  // substance in MWBUILTINUNIT_molecule
  substanceOnly species IRS in CYTOSOL = 986;  // substance in MWBUILTINUNIT_molecule
  substanceOnly species PIP3 in CYTOSOL = 693000;  // substance in MWBUILTINUNIT_molecule
  substanceOnly species PDK1 in CYTOSOL = 305000;  // substance in MWBUILTINUNIT_molecule
  substanceOnly species PIP2 in CYTOSOL = 440000;  // substance in MWBUILTINUNIT_molecule
  substanceOnly species AKT in CYTOSOL = 930000;  // substance in MWBUILTINUNIT_molecule
  substanceOnly species mTORC2 in CYTOSOL = 5000;  // substance in MWBUILTINUNIT_molecule
  substanceOnly species TSC_Complex in CYTOSOL = 0;  // substance in MWBUILTINUNIT_molecule
  substanceOnly species Rheb in CYTOSOL = 22000;  // substance in MWBUILTINUNIT_molecule
  substanceOnly species mTOR in CYTOSOL = 42000;  // substance in MWBUILTINUNIT_molecule
  substanceOnly species S6K1_2 in CYTOSOL = 84000; S6K1_2 is "S6K1/2";  // substance in MWBUILTINUNIT_molecule
  substanceOnly species S6 in CYTOSOL = 82000;  // substance in MWBUILTINUNIT_molecule
  substanceOnly species eIF4B in CYTOSOL = 82000;  // substance in MWBUILTINUNIT_molecule
  substanceOnly species _4EBPs in CYTOSOL = 0;  // substance in MWBUILTINUNIT_molecule
  substanceOnly species eIF4E in CYTOSOL = 20000;  // substance in MWBUILTINUNIT_molecule
  substanceOnly species Protein_Synthesis in CYTOSOL = 312000;  // substance in MWBUILTINUNIT_molecule
  substanceOnly species MDM2 in CYTOSOL = 48000;  // substance in MWBUILTINUNIT_molecule
  substanceOnly species JAK in CYTOSOL = 986;  // substance in MWBUILTINUNIT_molecule
  substanceOnly species $VEGFRC in CYTOSOL = 1000;  // substance in MWBUILTINUNIT_molecule
  substanceOnly species P21 in CYTOSOL = 0;  // substance in MWBUILTINUNIT_molecule
  substanceOnly species P27 in CYTOSOL = 0;  // substance in MWBUILTINUNIT_molecule
  substanceOnly species $Cyclin_D1 in CYTOSOL = 149000;  // substance in MWBUILTINUNIT_molecule
  substanceOnly species $CDK_4_6 in CYTOSOL = 149000; CDK_4_6 is "CDK 4/6";  // substance in MWBUILTINUNIT_molecule
  substanceOnly species CDK_Cyclin in CYTOSOL = 148000; CDK_Cyclin is "CDK-Cyclin";  // substance in MWBUILTINUNIT_molecule
  substanceOnly species GSK_3 in CYTOSOL = 0;  // substance in MWBUILTINUNIT_molecule
  substanceOnly species GYS in CYTOSOL = 520000;  // substance in MWBUILTINUNIT_molecule
  substanceOnly species Cell_cycle_progression in CYTOSOL = 295000;  // substance in MWBUILTINUNIT_molecule
  substanceOnly species IKK_A in CYTOSOL = 5000; IKK_A is "IKK-A";  // substance in MWBUILTINUNIT_molecule
  substanceOnly species BAD in CYTOSOL = 0;  // substance in MWBUILTINUNIT_molecule
  substanceOnly species XIAP in CYTOSOL = 200000;  // substance in MWBUILTINUNIT_molecule
  substanceOnly species Anti_apoptosis in CYTOSOL = 200000;  // substance in MWBUILTINUNIT_molecule
  substanceOnly species IKK_B in CYTOSOL = 5000; IKK_B is "IKK-B";  // substance in MWBUILTINUNIT_molecule
  substanceOnly species IKK_G in CYTOSOL = 5000; IKK_G is "IKK-G";  // substance in MWBUILTINUNIT_molecule
  substanceOnly species NEMO_Complex in CYTOSOL = 4000;  // substance in MWBUILTINUNIT_molecule
  substanceOnly species IKB_P50_P65 in CYTOSOL = 8000; IKB_P50_P65 is "IKB P50-P65";  // substance in MWBUILTINUNIT_molecule
  substanceOnly species P50_RelA in CYTOSOL = 150000; P50_RelA is "P50-RelA";  // substance in MWBUILTINUNIT_molecule
  substanceOnly species JNK in CYTOSOL = 1800;  // substance in MWBUILTINUNIT_molecule
  substanceOnly species Glucose_Metabolism in CYTOSOL = 518000;  // substance in MWBUILTINUNIT_molecule
  substanceOnly species Sphingomyelin_CYTOSOL in CYTOSOL = 10000;  // substance in MWBUILTINUNIT_molecule
  substanceOnly species Ceramide_CYTOSOL in CYTOSOL = 19000;  // substance in MWBUILTINUNIT_molecule
  substanceOnly species SMPD in CYTOSOL = 10000;  // substance in MWBUILTINUNIT_molecule
  substanceOnly species CDASE in CYTOSOL = 19000;  // substance in MWBUILTINUNIT_molecule
  substanceOnly species Sphingosine in CYTOSOL = 38000;  // substance in MWBUILTINUNIT_molecule
  substanceOnly species SPHK_1_2 in CYTOSOL = 636000; SPHK_1_2 is "SPHK 1/2";  // substance in MWBUILTINUNIT_molecule
  substanceOnly species MDM2_P in CYTOSOL = 46000; MDM2_P is "MDM2-P";  // substance in MWBUILTINUNIT_molecule
  substanceOnly species P38 in CYTOSOL = 1800;  // substance in MWBUILTINUNIT_molecule
  substanceOnly species $S1PC in CYTOSOL = 74000;  // substance in MWBUILTINUNIT_molecule
  substanceOnly species RAF in CYTOSOL = 82000;  // substance in MWBUILTINUNIT_molecule
  substanceOnly species MEK1_2 in CYTOSOL = 154000; MEK1_2 is "MEK1/2";  // substance in MWBUILTINUNIT_molecule
  substanceOnly species ERK1_2 in CYTOSOL = 306000; ERK1_2 is "ERK1/2";  // substance in MWBUILTINUNIT_molecule
  substanceOnly species STAT3 in CYTOSOL = 52000;  // substance in MWBUILTINUNIT_molecule
  substanceOnly species G_12_13 in CYTOSOL = 72000; G_12_13 is "G 12/13";  // substance in MWBUILTINUNIT_molecule
  substanceOnly species P53_P in CYTOSOL = 0; P53_P is "P53-P";  // substance in MWBUILTINUNIT_molecule
  substanceOnly species PLD_1_2 in CYTOSOL = 12000; PLD_1_2 is "PLD 1/2";  // substance in MWBUILTINUNIT_molecule
  substanceOnly species Rho in CYTOSOL = 72000;  // substance in MWBUILTINUNIT_molecule
  substanceOnly species ROCK in CYTOSOL = 72000;  // substance in MWBUILTINUNIT_molecule
  substanceOnly species TNFA in CYTOSOL = 149000;  // substance in MWBUILTINUNIT_molecule
  substanceOnly species GTP in CYTOSOL = 20000;  // substance in MWBUILTINUNIT_molecule
  substanceOnly species MAPK_1_2 in CYTOSOL = 20000; MAPK_1_2 is "MAPK 1/2";  // substance in MWBUILTINUNIT_molecule
  substanceOnly species Angiogenesis_Lymphangiogenesis in CYTOSOL = 186000; Angiogenesis_Lymphangiogenesis is "Angiogenesis/Lymphangiogenesis";  // substance in MWBUILTINUNIT_molecule
  substanceOnly species STAT3_P_CYTOSOL in CYTOSOL = 52000; STAT3_P_CYTOSOL is "STAT3-P";  // substance in MWBUILTINUNIT_molecule
  substanceOnly species HIF1a_CYTOSOL in CYTOSOL = 47000;  // substance in MWBUILTINUNIT_molecule
  substanceOnly species $S1Ps_1 in CYTOSOL = 76000;  // substance in MWBUILTINUNIT_molecule
  substanceOnly species Stress in EXTERNAL_Env = 20000;  // substance in MWBUILTINUNIT_molecule
  substanceOnly species P53 in NUCLEUS = 0;  // substance in MWBUILTINUNIT_molecule
  substanceOnly species NFKB in NUCLEUS = 149000;  // substance in MWBUILTINUNIT_molecule
  substanceOnly species $Cell_survival_gene in NUCLEUS = 200000;  // substance in MWBUILTINUNIT_molecule
  substanceOnly species DNA_Damage in NUCLEUS = 16000;  // substance in MWBUILTINUNIT_molecule
  substanceOnly species ATM in NUCLEUS = 38000;  // substance in MWBUILTINUNIT_molecule
  substanceOnly species ATR in NUCLEUS = 38000;  // substance in MWBUILTINUNIT_molecule
  substanceOnly species Chk1 in NUCLEUS = 38000;  // substance in MWBUILTINUNIT_molecule
  substanceOnly species Chk2 in NUCLEUS = 38000;  // substance in MWBUILTINUNIT_molecule
  substanceOnly species MDM2_gene in NUCLEUS = 50000;  // substance in MWBUILTINUNIT_molecule
  substanceOnly species STAT3_P_NUCLEUS in NUCLEUS = 51000; STAT3_P_NUCLEUS is "STAT3-P";  // substance in MWBUILTINUNIT_molecule
  species HIF1a_NUCLEUS in NUCLEUS = 47000/NUCLEUS;
  substanceOnly species Serine_Palmitoyl in ENDOPLASMIC_RETICULUM = 1000; Serine_Palmitoyl is "Serine/Palmitoyl";  // substance in MWBUILTINUNIT_molecule
  substanceOnly species _3_ketodihydrosphinganine in ENDOPLASMIC_RETICULUM = 1000; _3_ketodihydrosphinganine is "3-ketodihydrosphinganine";  // substance in MWBUILTINUNIT_molecule
  substanceOnly species SPT in ENDOPLASMIC_RETICULUM = 1000;  // substance in MWBUILTINUNIT_molecule
  substanceOnly species KDSR in ENDOPLASMIC_RETICULUM = 1000;  // substance in MWBUILTINUNIT_molecule
  substanceOnly species Dihydrosphingosine in ENDOPLASMIC_RETICULUM = 2000;  // substance in MWBUILTINUNIT_molecule
  substanceOnly species CERS1_6 in ENDOPLASMIC_RETICULUM = 2000; CERS1_6 is "CERS1-6";  // substance in MWBUILTINUNIT_molecule
  substanceOnly species Dihydroceramide in ENDOPLASMIC_RETICULUM = 4000;  // substance in MWBUILTINUNIT_molecule
  substanceOnly species Ceramide_ENDOPLASMIC_RETICULUM in ENDOPLASMIC_RETICULUM = 8000;  // substance in MWBUILTINUNIT_molecule
  substanceOnly species DEGS1_2 in ENDOPLASMIC_RETICULUM = 4000; DEGS1_2 is "DEGS1-2";  // substance in MWBUILTINUNIT_molecule
  substanceOnly species Ceramide_G in GOLGI_COMPLEX = 8000;  // substance in MWBUILTINUNIT_molecule
  substanceOnly species Glucosyl_Ceramide in GOLGI_COMPLEX = 5700;  // substance in MWBUILTINUNIT_molecule
  substanceOnly species Complex_glycosphingolipid in GOLGI_COMPLEX = 11300;  // substance in MWBUILTINUNIT_molecule
  substanceOnly species UGCG in GOLGI_COMPLEX = 8000;  // substance in MWBUILTINUNIT_molecule
  substanceOnly species Sphingomyelin_GOLGI_COMPLEX in GOLGI_COMPLEX = 10000;  // substance in MWBUILTINUNIT_molecule
  substanceOnly species SGMS in GOLGI_COMPLEX = 8000;  // substance in MWBUILTINUNIT_molecule

  // Reactions:
  _1: $EGF + $EGFR => $EGFRC; _1_kForward1*EGF*EGFR;
    _1_kForward1 = 8.76e-5 MWDERIVEDUNIT_1__molecule_second;
  _2: PI3K => PIP2; _2_Vm1*PI3K/(_2_Km1 + PI3K);
    _2_Vm1 = 5000 MWDERIVEDUNIT_molecule__second; _2_Km1 = 2500 MWBUILTINUNIT_molecule;
  _3: $EGFRC => GRB2; _3_Vm1*EGFRC/(_3_Km1 + EGFRC);
    _3_Vm1 = 9.91 MWDERIVEDUNIT_molecule__second; _3_Km1 = 4.95 MWBUILTINUNIT_molecule;
  _4: GRB2 => SOS; _4_Vm1*GRB2/(_4_Km1 + GRB2);
    _4_Vm1 = 9.91 MWDERIVEDUNIT_molecule__second; _4_Km1 = 4.95 MWBUILTINUNIT_molecule;
  _5: SOS => Ras; _5_Vm1*SOS/(_5_Km1 + SOS);
    _5_Vm1 = 9.91 MWDERIVEDUNIT_molecule__second; _5_Km1 = 4.95 MWBUILTINUNIT_molecule;
  _6: Ras => PI3K; _6_Vm1*Ras/(_6_Km1 + Ras);
    _6_Vm1 = 1200 MWDERIVEDUNIT_molecule__second; _6_Km1 = 600 MWBUILTINUNIT_molecule;
  _7: $EGFRC => IRS; _7_Vm1*EGFRC/(_7_Km1 + EGFRC);
    _7_Vm1 = 9.91 MWDERIVEDUNIT_molecule__second; _7_Km1 = 4.95 MWBUILTINUNIT_molecule;
  _8: IRS => PI3K; _8_Vm1*IRS/(_8_Km1 + IRS);
    _8_Vm1 = 25 MWDERIVEDUNIT_molecule__second; _8_Km1 = 12.5 MWBUILTINUNIT_molecule;
  _9: PIP2 => PIP3; _9_Vm1*PIP2/(_9_Km1 + PIP2);
    _9_Vm1 = 7000 MWDERIVEDUNIT_molecule__second; _9_Km1 = 3500 MWBUILTINUNIT_molecule;
  _10: PIP3 => PDK1; _10_Vm1*PIP3/(_10_Km1 + PIP3);
    _10_Vm1 = 8000 MWDERIVEDUNIT_molecule__second; _10_Km1 = 4000 MWBUILTINUNIT_molecule;
  _11: PDK1 => AKT; _11_Vm1*PDK1/(_11_Km1 + PDK1);
    _11_Vm1 = 10000 MWDERIVEDUNIT_molecule__second; _11_Km1 = 5000 MWBUILTINUNIT_molecule;
  _12: mTORC2 => AKT; _12_Vm1*mTORC2/(_12_Km1 + mTORC2);
    _12_Vm1 = 50 MWDERIVEDUNIT_molecule__second; _12_Km1 = 25 MWBUILTINUNIT_molecule;
  _13: PIP3 => AKT; _13_Vm1*PIP3/(_13_Km1 + PIP3);
    _13_Vm1 = 3500 MWDERIVEDUNIT_molecule__second; _13_Km1 = 1750 MWBUILTINUNIT_molecule;
  _14: AKT + TSC_Complex => Rheb + AKT; _14_Vm1*TSC_Complex/((_14_Ks1 + TSC_Complex)*(1 + AKT/_14_Ki1));
    _14_Vm1 = 100 MWDERIVEDUNIT_molecule__second; _14_Ks1 = 50 MWBUILTINUNIT_molecule; _14_Ki1 = 50 MWBUILTINUNIT_molecule;
  _15: Rheb => mTOR; _15_Vm1*Rheb/(_15_Km1 + Rheb);
    _15_Vm1 = 500 MWDERIVEDUNIT_molecule__second; _15_Km1 = 250 MWBUILTINUNIT_molecule;
  _16: mTOR + _4EBPs => eIF4E + mTOR; _16_Vm1*_4EBPs/((_16_Ks1 + _4EBPs)*(1 + mTOR/Ki));
    _16_Vm1 = 100 MWDERIVEDUNIT_molecule__second; _16_Ks1 = 50 MWBUILTINUNIT_molecule; Ki = 50 MWBUILTINUNIT_molecule;
  _17: mTOR => S6K1_2; _17_Vm1*mTOR/(_17_Km1 + mTOR);
    _17_Vm1 = 1000 MWDERIVEDUNIT_molecule__second; _17_Km1 = 500 MWBUILTINUNIT_molecule;
  _18: $EGFRC => JAK; _18_Vm1*EGFRC/(_18_Km1 + EGFRC);
    _18_Vm1 = 9.91 MWDERIVEDUNIT_molecule__second; _18_Km1 = 4.95 MWBUILTINUNIT_molecule;
  _19: JAK => PI3K; _19_Vm1*JAK/(_19_Km1 + JAK);
    _19_Vm1 = 25 MWDERIVEDUNIT_molecule__second; _19_Km1 = 12.5 MWBUILTINUNIT_molecule;
  _20: $VEGF + $VEGFR => $VEGFRC; _20_kForward1*VEGF*VEGFR;
    _20_kForward1 = 1e-5 MWDERIVEDUNIT_1__molecule_second;
  _21: $VEGFRC => PI3K; _21_Vm1*VEGFRC/(_21_Km1 + VEGFRC);
    _21_Vm1 = 50 MWDERIVEDUNIT_molecule__second; _21_Km1 = 25 MWBUILTINUNIT_molecule;
  _22: AKT + P21 => CDK_Cyclin + AKT; _22_Vm1*P21/((_22_Ks1 + P21)*(1 + AKT/_22_Ki1));
    _22_Ks1 = 50 MWBUILTINUNIT_molecule; _22_Ki1 = 50 MWBUILTINUNIT_molecule; _22_Vm1 = 100 MWDERIVEDUNIT_molecule__second;
  _23: AKT + P27 => CDK_Cyclin + AKT; _23_Vm1*P27/((_23_Ks1 + P27)*(1 + AKT/_23_Ki1));
    _23_Vm1 = 100 MWDERIVEDUNIT_molecule__second; _23_Ks1 = 50 MWBUILTINUNIT_molecule; _23_Ki1 = 50 MWBUILTINUNIT_molecule;
  _24: $CDK_4_6 + $Cyclin_D1 => CDK_Cyclin; _24_kForward1*CDK_4_6*Cyclin_D1;
    _24_kForward1 = 6.7e-8 MWDERIVEDUNIT_1__molecule_second;
  _25: AKT + GSK_3 => GYS + AKT; _25_Vm1*GSK_3/((_25_Ks1 + GSK_3)*(1 + AKT/_25_Ki1));
    _25_Vm1 = 100 MWDERIVEDUNIT_molecule__second; _25_Ks1 = 50 MWBUILTINUNIT_molecule; _25_Ki1 = 50 MWBUILTINUNIT_molecule;
  _26: BAD + AKT => Anti_apoptosis + AKT; _26_Vm1*BAD/((_26_Km1 + BAD)*(1 + AKT/_26_Ki1));
    _26_Vm1 = 100 MWDERIVEDUNIT_molecule__second; _26_Km1 = 50 MWBUILTINUNIT_molecule; _26_Ki1 = 50 MWBUILTINUNIT_molecule;
  _27: IKK_G + IKK_A + IKK_B => NEMO_Complex + IKK_A + IKK_G + IKK_B; _27_kForward1*IKK_G*IKK_A*IKK_B;
    _27_kForward1 = 1e-10 MWDERIVEDUNIT_1__molecule_molecule_second;
  _28: IKB_P50_P65 => P50_RelA; _28_kForward*IKB_P50_P65;
    _28_kForward = 0.006 MWDERIVEDUNIT_1__second;
  _29: P50_RelA => NFKB; _29_kForward*P50_RelA;
    _29_kForward = 0.00982 MWDERIVEDUNIT_1__second;
  _30: Stress => JNK; _30_Vm1*Stress/(_30_Km1 + Stress);
    _30_Vm1 = 20 MWDERIVEDUNIT_molecule__second; _30_Km1 = 10 MWBUILTINUNIT_molecule;
  _31: CDK_Cyclin => Cell_cycle_progression; _31_Vm1*CDK_Cyclin/(_31_Km1 + CDK_Cyclin);
    _31_Vm1 = 3200 MWDERIVEDUNIT_molecule__second; _31_Km1 = 1600 MWBUILTINUNIT_molecule;
  _32: JNK => IKB_P50_P65; _32_Vm1*JNK/(_32_Km1 + JNK);
    _32_Vm1 = 40 MWDERIVEDUNIT_molecule__second; _32_Km1 = 20 MWBUILTINUNIT_molecule;
  _33: NFKB + $Cell_survival_gene => TNFA + $Cyclin_D1 + $Cell_survival_gene; _33_Vm1*NFKB^_33_n1/(km1 + NFKB^_33_n1);
    _33_Vm1 = 1500 MWDERIVEDUNIT_molecule__second; _33_n1 = 1; km1 = 750 MWBUILTINUNIT_molecule;
  _34: Stress => DNA_Damage; _34_Vm1*Stress/(_34_Km1 + Stress);
    _34_Vm1 = 160 MWDERIVEDUNIT_molecule__second; _34_Km1 = 80 MWBUILTINUNIT_molecule;
  _35: DNA_Damage => ATM + ATR; _35_Vm1*DNA_Damage^_35_n1/(_35_Km1 + DNA_Damage^_35_n1);
    _35_Vm1 = 300 MWDERIVEDUNIT_molecule__second; _35_n1 = 1; _35_Km1 = 150 MWBUILTINUNIT_molecule;
  _36: ATM => Chk2; _36_Vm1*ATM/(_36_Km1 + ATM);
    _36_Vm1 = 400 MWDERIVEDUNIT_molecule__second; _36_Km1 = 200 MWBUILTINUNIT_molecule;
  _37: ATR => Chk1; _37_Vm1*ATR/(_37_Km1 + ATR);
    _37_Vm1 = 400 MWDERIVEDUNIT_molecule__second; _37_Km1 = 200 MWBUILTINUNIT_molecule;
  _38: eIF4E => Protein_Synthesis; _38_Vm1*eIF4E/(_38_Km1 + eIF4E);
    _38_Vm1 = 500 MWDERIVEDUNIT_molecule__second; _38_Km1 = 250 MWBUILTINUNIT_molecule;
  _39: S6 => HIF1a_CYTOSOL; _39_Vm1*S6/(_39_Km1 + S6);
    _39_Vm1 = 500 MWDERIVEDUNIT_molecule__second; _39_Km1 = 250 MWBUILTINUNIT_molecule;
  _40: Serine_Palmitoyl + SPT => _3_ketodihydrosphinganine + SPT; _40_Vm1*Serine_Palmitoyl/(_40_Km1 + Serine_Palmitoyl);
    _40_Vm1 = 11 MWDERIVEDUNIT_molecule__second; _40_Km1 = 5.5 MWBUILTINUNIT_molecule;
  _41: _3_ketodihydrosphinganine + KDSR => Dihydrosphingosine + KDSR; _41_Vm1*_3_ketodihydrosphinganine/(_41_Km1 + _3_ketodihydrosphinganine);
    _41_Vm1 = 22.2 MWDERIVEDUNIT_molecule__second; _41_Km1 = 11 MWBUILTINUNIT_molecule;
  _42: Dihydrosphingosine + CERS1_6 => Dihydroceramide + CERS1_6; _42_Vm1*Dihydrosphingosine/(_42_Km1 + Dihydrosphingosine);
    _42_Vm1 = 45 MWDERIVEDUNIT_molecule__second; _42_Km1 = 22.5 MWBUILTINUNIT_molecule;
  _43: Dihydroceramide + DEGS1_2 => Ceramide_ENDOPLASMIC_RETICULUM + DEGS1_2; _43_Vm1*Dihydroceramide/(_43_Km1 + Dihydroceramide);
    _43_Vm1 = 88 MWDERIVEDUNIT_molecule__second; _43_Km1 = 44 MWBUILTINUNIT_molecule;
  _44: Ceramide_ENDOPLASMIC_RETICULUM => Ceramide_G; _44_kForward*Ceramide_ENDOPLASMIC_RETICULUM;
    _44_kForward = 0.00962 MWDERIVEDUNIT_1__second;
  _45: UGCG + Ceramide_G => Glucosyl_Ceramide + UGCG; _45_Vm1*Ceramide_G/(_45_Km1 + Ceramide_G);
    _45_Vm1 = 60 MWDERIVEDUNIT_molecule__second; _45_Km1 = 30 MWBUILTINUNIT_molecule;
  _46: Glucosyl_Ceramide => Complex_glycosphingolipid; _46_Vm1*Glucosyl_Ceramide/(_46_Km1 + Glucosyl_Ceramide);
    _46_Vm1 = 120 MWDERIVEDUNIT_molecule__second; _46_Km1 = 60 MWBUILTINUNIT_molecule;
  _47: Sphingomyelin_CYTOSOL + SMPD => Ceramide_CYTOSOL + SMPD; _47_Vm1*Sphingomyelin_CYTOSOL/(_47_Km1 + Sphingomyelin_CYTOSOL);
    _47_Vm1 = 220 MWDERIVEDUNIT_molecule__second; _47_Km1 = 110 MWBUILTINUNIT_molecule;
  _48: Ceramide_CYTOSOL + CDASE => Sphingosine + CDASE; _48_Vm1*Ceramide_CYTOSOL/(_48_Km1 + Ceramide_CYTOSOL);
    _48_Vm1 = 420 MWDERIVEDUNIT_molecule__second; _48_Km1 = 210 MWBUILTINUNIT_molecule;
  _49: SPHK_1_2 + Sphingosine => SPHK_1_2 + $S1Ps_1; _49_Vm1*Sphingosine/(_49_Km1 + Sphingosine);
    _49_Vm1 = 820 MWDERIVEDUNIT_molecule__second; _49_Km1 = 410 MWBUILTINUNIT_molecule;
  _50: $S1Ps + $S1P1_5 => $S1PC; _50_kForward*S1Ps*S1P1_5;
    _50_kForward = 1.325e-7 MWDERIVEDUNIT_1__molecule_second;
  _51: $S1Ps_1 + $ABCC1 => $S1Ps; _51_kForward*S1Ps_1*ABCC1;
    _51_kForward = 1.27e-7 MWDERIVEDUNIT_1__molecule_second;
  _52: MDM2_gene => MDM2; _52_Vm1*MDM2_gene^_52_n1/(_52_Km1 + MDM2_gene^_52_n1);
    _52_Vm1 = 500 MWDERIVEDUNIT_molecule__second; _52_n1 = 1; _52_Km1 = 250 MWBUILTINUNIT_molecule;
  _53: Stress => P38; _53_Vm1*Stress/(_53_Km1 + Stress);
    _53_Vm1 = 20 MWDERIVEDUNIT_molecule__second; _53_Km1 = 10 MWBUILTINUNIT_molecule;
  _54: P38 => IKB_P50_P65; _54_Vm1*P38/(_54_Km1 + P38);
    _54_Vm1 = 40 MWDERIVEDUNIT_molecule__second; _54_Km1 = 20 MWBUILTINUNIT_molecule;
  _55: $S1PC => PI3K + Ras; _55_Vm1*S1PC/(_55_Km1 + S1PC);
    _55_Vm1 = 900 MWDERIVEDUNIT_molecule__second; _55_Km1 = 450 MWBUILTINUNIT_molecule;
  _56: Ceramide_G + SGMS => Sphingomyelin_GOLGI_COMPLEX + SGMS; _56_Vm1*Ceramide_G/(_56_Km1 + Ceramide_G);
    _56_Vm1 = 110 MWDERIVEDUNIT_molecule__second; _56_Km1 = 50.5 MWBUILTINUNIT_molecule;
  _57: Sphingomyelin_GOLGI_COMPLEX => Sphingomyelin_CYTOSOL; _57_kForward*Sphingomyelin_GOLGI_COMPLEX;
    _57_kForward = 0.00957 MWDERIVEDUNIT_1__second;
  _58: Ras => RAF; _58_Vm1*Ras/(_58_Km1 + Ras);
    _58_Vm1 = 900 MWDERIVEDUNIT_molecule__second; _58_Km1 = 450 MWBUILTINUNIT_molecule;
  _59: RAF => MEK1_2; _59_Vm1*RAF/(_59_Km1 + RAF);
    _59_Vm1 = 1600 MWDERIVEDUNIT_molecule__second; _59_Km1 = 800 MWBUILTINUNIT_molecule;
  _60: MEK1_2 => ERK1_2; _60_Vm1*MEK1_2/(_60_Km1 + MEK1_2);
    _60_Vm1 = 4000 MWDERIVEDUNIT_molecule__second; _60_Km1 = 2000 MWBUILTINUNIT_molecule;
  _61: AKT + STAT3 => STAT3_P_CYTOSOL + AKT; _61_Vm1*STAT3/(_61_Km1 + STAT3);
    _61_Vm1 = 600 MWDERIVEDUNIT_molecule__second; _61_Km1 = 300 MWBUILTINUNIT_molecule;
  _62: NEMO_Complex + AKT => IKB_P50_P65 + AKT; _62_Vm1*NEMO_Complex/(_62_Km1 + NEMO_Complex);
    _62_Vm1 = 100 MWDERIVEDUNIT_molecule__second; _62_Km1 = 50 MWBUILTINUNIT_molecule;
  _63: AKT + MDM2 => MDM2_P + AKT; _63_Vm1*MDM2/(_63_Km1 + MDM2);
    _63_Vm1 = 480 MWDERIVEDUNIT_molecule__second; _63_Km1 = 240 MWBUILTINUNIT_molecule;
  _64: MDM2_P + P53_P => Cell_cycle_progression + MDM2_P + Anti_apoptosis; _64_Vm1*P53_P/((_64_Ks1 + P53_P)*(1 + MDM2_P/_64_Ki1));
    _64_Vm1 = 100 MWDERIVEDUNIT_molecule__second; _64_Ks1 = 50 MWBUILTINUNIT_molecule; _64_Ki1 = 50 MWBUILTINUNIT_molecule;
  _65: PIP3 => PLD_1_2; _65_Vm1*PIP3/(_65_Km1 + PIP3);
    _65_Vm1 = 120 MWDERIVEDUNIT_molecule__second; _65_Km1 = 60 MWBUILTINUNIT_molecule;
  _66: PLD_1_2 => SPHK_1_2; _66_Vm1*PLD_1_2/(_66_Km1 + PLD_1_2);
    _66_Vm1 = 300 MWDERIVEDUNIT_molecule__second; _66_Km1 = 150 MWBUILTINUNIT_molecule;
  _67: ERK1_2 => SPHK_1_2; _67_Vm1*ERK1_2/(_67_Km1 + ERK1_2);
    _67_Vm1 = 7000 MWDERIVEDUNIT_molecule__second; _67_Km1 = 3500 MWBUILTINUNIT_molecule;
  _68: $S1PC => G_12_13; _68_Vm1*S1PC/(_68_Km1 + S1PC);
    _68_Vm1 = 740 MWDERIVEDUNIT_molecule__second; _68_Km1 = 340 MWBUILTINUNIT_molecule;
  _69: G_12_13 => Rho; _69_Vm1*G_12_13/(_69_Km1 + G_12_13);
    _69_Vm1 = 730 MWDERIVEDUNIT_molecule__second; _69_Km1 = 365 MWBUILTINUNIT_molecule;
  _70: Rho => ROCK; _70_Vm1*Rho/(_70_Km1 + Rho);
    _70_Vm1 = 725 MWDERIVEDUNIT_molecule__second; _70_Km1 = 362.5 MWBUILTINUNIT_molecule;
  _71: ROCK => P50_RelA; _71_Vm1*ROCK/(_71_Km1 + ROCK);
    _71_Vm1 = 1500 MWDERIVEDUNIT_molecule__second; _71_Km1 = 750 MWBUILTINUNIT_molecule;
  _72: P53 + Chk2 + Chk1 => P53_P + Chk2 + Chk1; _72_Vm1*P53/(_72_Km1 + P53);
    _72_Vm1 = 10 MWDERIVEDUNIT_molecule__second; _72_Km1 = 5 MWBUILTINUNIT_molecule;
  _73: S6 => Protein_Synthesis; _73_Vm1*S6/(_73_Km1 + S6);
    _73_Vm1 = 1200 MWDERIVEDUNIT_molecule__second; _73_Km1 = 600 MWBUILTINUNIT_molecule;
  _74: XIAP => Anti_apoptosis; _74_Vm1*XIAP/(_74_Km1 + XIAP);
    _74_Vm1 = 2200 MWDERIVEDUNIT_molecule__second; _74_Km1 = 1100 MWBUILTINUNIT_molecule;
  _75: GTP => Rheb; _75_Vm1*GTP/(_75_Km1 + GTP);
    _75_Vm1 = 200 MWDERIVEDUNIT_molecule__second; _75_Km1 = 100 MWBUILTINUNIT_molecule;
  _76: MAPK_1_2 => eIF4E; _76_Vm1*MAPK_1_2/(_76_Km1 + MAPK_1_2);
    _76_Vm1 = 220 MWDERIVEDUNIT_molecule__second; _76_Km1 = 110 MWBUILTINUNIT_molecule;
  _77: S6K1_2 => S6; _77_Vm1*S6K1_2/(_77_Km1 + S6K1_2);
    _77_Vm1 = 1000 MWDERIVEDUNIT_molecule__second; _77_Km1 = 500 MWBUILTINUNIT_molecule;
  _78: S6K1_2 => eIF4B; _78_Vm1*S6K1_2/(_78_Km1 + S6K1_2);
    _78_Vm1 = 1000 MWDERIVEDUNIT_molecule__second; _78_Km1 = 500 MWBUILTINUNIT_molecule;
  _79: eIF4B => Protein_Synthesis; _79_Vm1*eIF4B/(_79_Km1 + eIF4B);
    _79_Vm1 = 2000 MWDERIVEDUNIT_molecule__second; _79_Km1 = 1000 MWBUILTINUNIT_molecule;
  _80: eIF4E => HIF1a_CYTOSOL; _80_Vm1*eIF4E/(_80_Km1 + eIF4E);
    _80_Vm1 = 100 MWDERIVEDUNIT_molecule__second; _80_Km1 = 50 MWBUILTINUNIT_molecule;
  _81: GYS => Glucose_Metabolism; _81_Vm1*GYS/(_81_Km1 + GYS);
    _81_Vm1 = 5500 MWDERIVEDUNIT_molecule__second; _81_Km1 = 2525 MWBUILTINUNIT_molecule;
  _82: $Cell_survival_gene + HIF1a_NUCLEUS => Angiogenesis_Lymphangiogenesis + $Cell_survival_gene; _82_Vm1*HIF1a_CYTOSOL^_82_n1/(_82_Km1 + HIF1a_CYTOSOL^_82_n1);
    _82_Vm1 = 900 MWDERIVEDUNIT_molecule__second; _82_n1 = 1; _82_Km1 = 500 MWBUILTINUNIT_molecule;
  _83: $Cell_survival_gene + STAT3_P_NUCLEUS => Angiogenesis_Lymphangiogenesis + $Cell_survival_gene; _83_Vm1*STAT3_P_NUCLEUS^_83_n1/(_83_Km1 + STAT3_P_NUCLEUS^_83_n1);
    _83_Vm1 = 1000 MWDERIVEDUNIT_molecule__second; _83_Km1 = 500 MWBUILTINUNIT_molecule; _83_n1 = 1;
  _84: STAT3_P_CYTOSOL => STAT3_P_NUCLEUS; _84_kForward*STAT3_P_CYTOSOL;
    _84_kForward = 0.00934 MWDERIVEDUNIT_1__second;
  _85: HIF1a_CYTOSOL => HIF1a_NUCLEUS; _85_kForward*HIF1a_CYTOSOL;
    _85_kForward = 0.00898 MWDERIVEDUNIT_1__second;

  // Unit definitions:
  unit MWBUILTINUNIT_molecule = 1.660539e-24 mole;
  unit MWDERIVEDUNIT_1__molecule_second = 6.022142e23 dimensionless / (mole * second); MWDERIVEDUNIT_1__molecule_second is "1/(molecule*second)";
  unit MWDERIVEDUNIT_molecule__second = mole * 1.660539e-24 dimensionless / second; MWDERIVEDUNIT_molecule__second is "molecule/second";
  unit MWDERIVEDUNIT_1__molecule_molecule_second = 3.626619e47 dimensionless / (mole^2 * second); MWDERIVEDUNIT_1__molecule_molecule_second is "1/(molecule*molecule*second)";
  unit MWDERIVEDUNIT_1__second = dimensionless / second; MWDERIVEDUNIT_1__second is "1/second";
end
