// SBML level 2 version 4
// dcterms:bibliographicCitation: http://identifiers.org/pubmed/24199619

function function_4_MKK_MKKp_1_2_1(K, k, MKK, TAKTAB)
  k*MKK*TAKTAB/(K + MKK);
end
function_4_MKK_MKKp_1_2_1 is "function_4_MKK -> MKKp_1_2_1";

function Henri_Michaelis_Menten__irreversible__1_3(Km, V, MKKp)
  V*MKKp/(Km + MKKp);
end
Henri_Michaelis_Menten__irreversible__1_3 is "Henri-Michaelis-Menten (irreversible)_1_3_1";

function function_4_MAPK_MAPKp_1_2_1(K, k, MAPK, MKKpp)
  k*MAPK*MKKpp/(K + MAPK);
end
function_4_MAPK_MAPKp_1_2_1 is "function_4_MAPK -> MAPKp_1_2_1";

function function_4_MKKp_MKKpp_1_2_1(K, k, MKKp, TAKTAB)
  k*MKKp*TAKTAB/(K + MKKp);
end
function_4_MKKp_MKKpp_1_2_1 is "function_4_MKKp -> MKKpp_1_2_1";

function Henri_Michaelis_Menten__irreversible__1_1(Km, V, MAPKp)
  V*MAPKp/(Km + MAPKp);
end
Henri_Michaelis_Menten__irreversible__1_1 is "Henri-Michaelis-Menten (irreversible)_1_1_1";

function Henri_Michaelis_Menten__irreversible__1_2(Km, V, MAPKpp)
  V*MAPKpp/(Km + MAPKpp);
end
Henri_Michaelis_Menten__irreversible__1_2 is "Henri-Michaelis-Menten (irreversible)_1_2_1";

function Henri_Michaelis_Menten__irreversible__1_4(Km, V, MKKpp)
  V*MKKpp/(Km + MKKpp);
end
Henri_Michaelis_Menten__irreversible__1_4 is "Henri-Michaelis-Menten (irreversible)_1_4_1";

function function_4_MAPKp_MAPKpp_1_2_1(K, k, MAPKp, MKKpp)
  k*MAPKp*MKKpp/(K + MAPKp);
end
function_4_MAPKp_MAPKpp_1_2_1 is "function_4_MAPKp -> MAPKpp_1_2_1";

model Hayashi2013___Extended_TNF_induced_Signaling_model_with_Gene_Expression_Dynamics__Model_B()
  // Hayashi2013 - Extended TNF-induced Signaling with Gene Expression Dynamics (Model B)
  // Tumor necrosis factor (TNF) plays a crucial role in inflammation and is associated with diseases such as rheumatoid arthritis and cancer. While TNF signaling pathways are well studied, targeted regulation of proinflammatory responses remains a challenge. In this study, Hayashi et al., (2013) developed a computational model to simulate TNF-induced activation of MAP kinase (p38), NF-κB, and proinflammatory gene expression in murine fibroblast cells. The model parameters were optimized to fit experimental data, ensuring accurate representation of TNF signaling dynamics. The simulations using in silico knockouts identified receptor-interacting protein 1 (RIP1) as a key regulator of TNF-driven proinflammatory responses. Experimental validation using Necrostatin-1, a RIP1 inhibitor, confirmed these predictions and demonstrated its potential as a therapeutic target for regulating proinflammatory mediators in TNF-driven diseases.
  // This model is described in the article:
  // Hayashi K, Piras V, Tabata S, Tomita M, Selvarajoo K. A systems biology approach to suppress TNF-induced proinflammatory gene expressions. Cell Commun Signal. 2013 Nov 7;11:84. doi: 10.1186/1478-811X-11-84. PMID: 24199619; PMCID: PMC3832246.
  // Abstract:
  // Background: Tumor necrosis factor (TNF) is a widely studied cytokine (ligand) that induces proinflammatory signaling and regulates myriad cellular processes. In major illnesses, such as rheumatoid arthritis and certain cancers, the expression of TNF is elevated. Despite much progress in the field, the targeted regulation of TNF response for therapeutic benefits remains suboptimal. Here, to effectively regulate the proinflammatory response induced by TNF, a systems biology approach was adopted.
  // Results: We developed a computational model to investigate the temporal activations of MAP kinase (p38), nuclear factor (NF)-κB, and the kinetics of 3 groups of genes, defined by early, intermediate and late phases, in murine embryonic fibroblast (MEF) and 3T3 cells. To identify a crucial target that suppresses, and not abolishes, proinflammatory genes, the model was tested in several in silico knock out (KO) conditions. Among the candidate molecules tested, in silico RIP1 KO effectively regulated all groups of proinflammatory genes (early, middle and late). To validate this result, we experimentally inhibited TNF signaling in MEF and 3T3 cells with RIP1 inhibitor, Necrostatin-1 (Nec-1), and investigated 10 genes (Il6, Nfkbia, Jun, Tnfaip3, Ccl7, Vcam1, Cxcl10, Mmp3, Mmp13, Enpp2) belonging to the 3 major groups of upregulated genes. As predicted by the model, all measured genes were significantly impaired.
  // Conclusions: Our results demonstrate that Nec-1 modulates TNF-induced proinflammatory response, and may potentially be used as a therapeutic target for inflammatory diseases such as rheumatoid arthritis and osteoarthritis.
  // Figure S3, obtained from the simulation of TNFR1 Model B, is highlighted here.
  // This model was curated during the Hackathon hosted by BioMed X GmbH in 2024.
  // hasProperty MAMO:0000046
  // hasTaxon taxonomy:10090
  // isDescribedBy pubmed:24199619
  // isPartOf kegg.pathway:nt06516
  // isVersionOf omit:0016958
  // isVersionOf efo:0004040

  // Compartments:
  compartment compartment_1 = 1;

  // Species:
  species IkBa_NFkb in compartment_1 = 5;  // hasPart uniprot:P25799; hasPart uniprot:Q9Z1E3; hasPart uniprot:Q9WTK5; hasPart GO:0033256
  species NFkBc in compartment_1 = 0;  // hasPart uniprot:Q9WTK5; hasPart uniprot:P25799; isVersionOf GO:0033256
  species TNFR1 in compartment_1 = 1;  // uniprot:P25118
  species TRADD in compartment_1 = 0;  // uniprot:Q3U0V2
  species cIAP in compartment_1 = 0;  // hasVersion omit:0024646
  species TRAF6 in compartment_1 = 0;  // uniprot:P70196
  species TRAF5 in compartment_1 = 0;  // uniprot:P70191
  species RIP1 in compartment_1 = 0;  // uniprot:Q60855
  species TRAF2 in compartment_1 = 0;  // uniprot:P39429
  species TAK1 in compartment_1 = 0;  // uniprot:Q62073
  species LUBAC in compartment_1 = 0;  // hasPart uniprot:Q91WA6; hasPart uniprot:Q9WUB0; hasPart uniprot:Q924T7
  species SHARPIN in compartment_1 = 0;  // uniprot:Q91WA6
  species MKKpp in compartment_1 = 0;  // hasProperty PATO:0002220; isVersionOf uniprot:O09110; isVersionOf uniprot:P70236; hasProperty PATO:0002220
  species MAPKpp in compartment_1 = 0;  // hasProperty PATO:0002220; isVersionOf uniprot:P47811; isVersionOf omit:0023999; hasProperty PATO:0002220
  species IKK in compartment_1 = 0;  // hasVersion GO:0008385
  species NFkBn in compartment_1 = 0;  // hasPart uniprot:Q9WTK5; hasPart uniprot:P25799; isVersionOf GO:0033256
  species MAPKn in compartment_1 = 0;  // isVersionOf omit:0023999; isVersionOf uniprot:P47811
  species AP1 in compartment_1 = 0;  // hasVersion interpro:IPR000837
  species MAPK in compartment_1 = 46;  // hasVersion omit:0023999; uniprot:P47811
  species MAPKp in compartment_1 = 0;  // hasProperty PATO:0002220; isVersionOf uniprot:P47811; isVersionOf omit:0023999; hasProperty PATO:0002220
  species MKK in compartment_1 = 52;  // uniprot:P70236; uniprot:O09110
  species MKKp in compartment_1 = 0;  // hasProperty PATO:0002220; isVersionOf uniprot:P70236; isVersionOf uniprot:O09110; hasProperty PATO:0002220
  species TAKTAB in compartment_1 = 0;  // hasPart uniprot:Q8CF89; hasPart uniprot:Q62073
  species TAB in compartment_1 = 1;  // uniprot:Q8CF89
  species IKK_IkBa_NFkb in compartment_1 = 0;  // hasPart uniprot:Q9WTK5; hasPart uniprot:Q9Z1E3; hasPart GO:0008385; hasPart GO:0033256
  species IKB in compartment_1 = 0;  // uniprot:Q9Z1E3

  // Parameters:
  FB = 0.002;
  KO = 0;

  // Reactions:
  TNFR1_TRADD: TNFR1 => TRADD; compartment_1*TNFR1_TRADD_k1*TNFR1; TNFR1_TRADD is "TNFR1 -> TRADD";
    TNFR1_TRADD_k1 = 0.005;
  TRADD_cIAP1_2: TRADD => cIAP; compartment_1*TRADD_cIAP1_2_k1*TRADD; TRADD_cIAP1_2 is "TRADD -> cIAP1/2";
    TRADD_cIAP1_2_k1 = 0.02;
  TRADD_TRAF6: TRADD => TRAF6; compartment_1*TRADD_TRAF6_k1*TRADD; TRADD_TRAF6 is "TRADD -> TRAF6";
    TRADD_TRAF6_k1 = 0.02;
  cIAP1_2_TRAF5: cIAP => TRAF5; compartment_1*cIAP1_2_TRAF5_k1*cIAP; cIAP1_2_TRAF5 is "cIAP1/2 -> TRAF5";
    cIAP1_2_TRAF5_k1 = 0.008;
  TRAF2_RIP1: TRAF2 => RIP1; compartment_1*TRAF2_RIP1_k1*TRAF2; TRAF2_RIP1 is "TRAF2 -> RIP1";
    TRAF2_RIP1_k1 = 0.001;
  TRAF5_RIP1: TRAF5 => RIP1; compartment_1*TRAF5_RIP1_k1*TRAF5; TRAF5_RIP1 is "TRAF5 -> RIP1";
    TRAF5_RIP1_k1 = 0.001;
  TRAF6_RIP1: TRAF6 => RIP1; compartment_1*TRAF6_RIP1_k1*TRAF6; TRAF6_RIP1 is "TRAF6 -> RIP1";
    TRAF6_RIP1_k1 = 0.0001;
  TRAF6_TAK1: TRAF6 => TAK1; compartment_1*TRAF6_TAK1_k1*TRAF6; TRAF6_TAK1 is "TRAF6 -> TAK1";
    TRAF6_TAK1_k1 = 0.00013;
  RIP1_LUBAC: RIP1 => LUBAC; compartment_1*RIP1_LUBAC_k1*RIP1; RIP1_LUBAC is "RIP1 -> LUBAC";
    RIP1_LUBAC_k1 = 0.007;
  LUBAC_TAK1: LUBAC => TAK1; compartment_1*LUBAC_TAK1_k1*LUBAC; LUBAC_TAK1 is "LUBAC -> TAK1";
    LUBAC_TAK1_k1 = 0.1;
  RIP1_SHARPIN: RIP1 => SHARPIN; compartment_1*RIP1_SHARPIN_k1*RIP1; RIP1_SHARPIN is "RIP1 -> SHARPIN";
    RIP1_SHARPIN_k1 = 0.007;
  SHARPIN_IKK: SHARPIN => IKK; compartment_1*SHARPIN_IKK_k1*SHARPIN; SHARPIN_IKK is "SHARPIN -> IKK";
    SHARPIN_IKK_k1 = 0.01;
  TAK1_IKK: TAK1 => IKK; compartment_1*TAK1_IKK_k1*TAK1; TAK1_IKK is "TAK1 -> IKK";
    TAK1_IKK_k1 = 0.1;
  TAK1_TAB_TAK_TAB: TAB + TAK1 => TAKTAB; compartment_1*TAK1_TAB_TAK_TAB_k1*TAB*TAK1; TAK1_TAB_TAK_TAB is "TAK1 +TAB -> TAK/TAB";
    TAK1_TAB_TAK_TAB_k1 = 0.01;
  reaction_20: IKK + IkBa_NFkb => IKK_IkBa_NFkb; compartment_1*reaction_20_k1*IKK*IkBa_NFkb; reaction_20 is "IKK + IkBa/NFKb -> IKK/IkBa/NFKb";
    reaction_20_k1 = 0.0021;
  NFKBc_NFKBn: NFkBc => NFkBn; compartment_1*NFKBc_NFKBn_k1*NFkBc; NFKBc_NFKBn is "NFKBc -> NFKBn";
    NFKBc_NFKBn_k1 = 0.015;
  MAPKpp_MAPKn: MAPKpp => MAPKn; compartment_1*MAPKpp_MAPKn_k1*MAPKpp; MAPKpp_MAPKn is "MAPKpp -> MAPKn";
    MAPKpp_MAPKn_k1 = 0.082;
  MAPKn_AP1: MAPKn => AP1; compartment_1*MAPKn_AP1_k1*MAPKn; MAPKn_AP1 is "MAPKn -> AP1";
    MAPKn_AP1_k1 = 0.01;
  cIAP1_2_TRAF2: cIAP => TRAF2; compartment_1*cIAP1_2_TRAF2_k1*cIAP; cIAP1_2_TRAF2 is "cIAP1/2 -> TRAF2";
    cIAP1_2_TRAF2_k1 = 0.01;
  MAPK_MAPKp: MAPK => MAPKp; compartment_1*function_4_MAPK_MAPKp_1_2_1(MAPK_MAPKp_K, MAPK_MAPKp_k, MAPK, MKKpp); MAPK_MAPKp is "MAPK -> MAPKp";  // modifiers: MKKpp
    MAPK_MAPKp_K = 0.39; MAPK_MAPKp_k = 0.061;
  MAPKp_MAPK: MAPKp => MAPK; compartment_1*Henri_Michaelis_Menten__irreversible__1_1(MAPKp_MAPK_Km, MAPKp_MAPK_V, MAPKp); MAPKp_MAPK is "MAPKp -> MAPK";
    MAPKp_MAPK_Km = 0.00052; MAPKp_MAPK_V = 9.7e-5;
  MAPKp_MAPKpp: MAPKp => MAPKpp; compartment_1*function_4_MAPKp_MAPKpp_1_2_1(MAPKp_MAPKpp_K, MAPKp_MAPKpp_k, MAPKp, MKKpp); MAPKp_MAPKpp is "MAPKp -> MAPKpp";  // modifiers: MKKpp
    MAPKp_MAPKpp_K = 9.9e-7; MAPKp_MAPKpp_k = 0.25;
  MAPKpp_MAPKp: MAPKpp => MAPKp; compartment_1*Henri_Michaelis_Menten__irreversible__1_2(MAPKpp_MAPKp_Km, MAPKpp_MAPKp_V, MAPKpp); MAPKpp_MAPKp is "MAPKpp -> MAPKp";
    MAPKpp_MAPKp_Km = 0.44; MAPKpp_MAPKp_V = 2.6e-6;
  MKK_MKKp: MKK => MKKp; compartment_1*function_4_MKK_MKKp_1_2_1(MKK_MKKp_K, MKK_MKKp_k, MKK, TAKTAB); MKK_MKKp is "MKK -> MKKp";  // modifiers: TAKTAB
    MKK_MKKp_K = 0.059; MKK_MKKp_k = 0.027;
  MKKp_MKK: MKKp => MKK; compartment_1*Henri_Michaelis_Menten__irreversible__1_3(MKKp_MKK_Km, MKKp_MKK_V, MKKp); MKKp_MKK is "MKKp -> MKK";
    MKKp_MKK_Km = 0.029; MKKp_MKK_V = 0.00057;
  MKKp_MKKpp: MKKp => MKKpp; compartment_1*function_4_MKKp_MKKpp_1_2_1(MKKp_MKKpp_K, MKKp_MKKpp_k, MKKp, TAKTAB); MKKp_MKKpp is "MKKp -> MKKpp";  // modifiers: TAKTAB
    MKKp_MKKpp_K = 1.9e-7; MKKp_MKKpp_k = 0.026;
  MKKpp_MKKp: MKKpp => MKKp; compartment_1*Henri_Michaelis_Menten__irreversible__1_4(MKKpp_MKKp_Km, MKKpp_MKKp_V, MKKpp); MKKpp_MKKp is "MKKpp -> MKKp";
    MKKpp_MKKp_Km = 0.09; MKKpp_MKKp_V = 0.00038;
  reaction_26: IKK_IkBa_NFkb => IKK + IkBa_NFkb; compartment_1*reaction_26_k1*IKK_IkBa_NFkb; reaction_26 is "IKK/IkBa/NFKb -> IKK + IkBa/NFKb";
    reaction_26_k1 = 8.9e-7;
  IKK_IkBa_NFKb_NFKBc_IKB: IKK_IkBa_NFkb => NFkBc + IKB + IKK; compartment_1*IKK_IkBa_NFKb_NFKBc_IKB_k1*IKK_IkBa_NFkb; IKK_IkBa_NFKb_NFKBc_IKB is "IKK/IkBa/NFKb -> NFKBc + IKB";
    IKK_IkBa_NFKb_NFKBc_IKB_k1 = 2;
  IkB_degrad: IKB => ; compartment_1*IkB_degrad_k1*IKB;
    IkB_degrad_k1 = 0.017;
  TAK_TAB_degrad: TAKTAB => ; compartment_1*TAK_TAB_degrad_k1*TAKTAB; TAK_TAB_degrad is "TAK/TAB degrad";
    TAK_TAB_degrad_k1 = 0.071;
  IKK_degrad: IKK => ; compartment_1*IKK_degrad_k1*IKK;
    IKK_degrad_k1 = 0.0046;

  // Unit definitions:
  unit length = metre;
  unit area = metre^2;
  unit volume = 1e-3 litre;
  unit time = second;
  unit substance = 1e-9 mole;
end
