// SBML level 2 version 4

function HMM_Modified(Kcat, km, species_14, species_17)
  Kcat*species_14*species_17/(km + species_17);
end

function P90Rsk_Activation_0(KcatP90RSK, ERK_active, P90Rsk_inactive, kmP90Rsk)
  KcatP90RSK*ERK_active*P90Rsk_inactive/(kmP90Rsk + P90Rsk_inactive);
end

function RAS_Activation_0(KcatRAS, SOS_active, RAS_inactive, kmRAS)
  KcatRAS*SOS_active*RAS_inactive/(kmRAS + RAS_inactive);
end

function HMM_modified(Kcat, species_14, species_17, km)
  Kcat*species_14*species_17/(km + species_17);
end

function HMM_activation_and_inhibition_STAT1(Kcat, Activator, Inhibitor1, Ki1, Inhibitor2, Ki2, Inhibitor3, Ki3, Substrate, Km)
  Kcat*Activator/(1 + Inhibitor1/Ki1 + Inhibitor2/Ki2 + Inhibitor3/Ki3)*Substrate/(Km + Substrate);
end

function HMM_activation_and_inhibition_STAT3(Kcat, Activator, Inhibitor1, Ki1, Inhibitor2, Ki2, Inhibitor3, Ki3, Inhibitor4, Ki4, Substrate, Km)
  Kcat*Activator/(1 + Inhibitor1/Ki1 + Inhibitor2/Ki2 + Inhibitor3/Ki3 + Inhibitor4/Ki4)*Substrate/(Km + Substrate);
end

function Henri_Michaelis_Menten__irreversible(substrate, Km, V)
  V*substrate/(Km + substrate);
end
Henri_Michaelis_Menten__irreversible is "Henri-Michaelis-Menten (irreversible)";

function SOS_activation_by_EGFR(KEGF, EGFR_di_p, SOS_inactive, KmEGF)
  KEGF*EGFR_di_p*SOS_inactive/(SOS_inactive + KmEGF);
end

function SOS_activation_by_NGF_0(KNGF, bNGFR, SOS_inactive, KmNGF)
  KNGF*bNGFR*SOS_inactive/(SOS_inactive + KmNGF);
end

function SOS_deactivation_by_P90Rsk_0(kdSOS, P90Rsk_active, SOS_active, KmdSOS)
  kdSOS*P90Rsk_active*SOS_active/(SOS_active + KmdSOS);
end

function SOS_deactivation_by_ERK_0(KcatERK, ERK_active, SOS_active, KmERK)
  KcatERK*ERK_active*SOS_active/(KmERK + SOS_active);
end

model Neuroblastoma_ALKF1174L()
  // Lombardo2018 - Expression of PDL1 in Neuroblastoma Cancer Cell
  // The model reproduces the time profiles of PDL1 in a Neuroblastoma Cancer Cell, considering the activating mutation of ALK: ALKF1174L. We simulate the impact of two different therapy: Crizotinib and Gefitinib, in mono-therapy and in combination assesment.

  // Compartments:
  compartment Glioblastoma_Cell_Cytoplasm = 1; Glioblastoma_Cell_Cytoplasm is "Neuroblastoma Cell Cytoplasm";
  compartment Glioblastoma_Cell_Nucleus = 0.333; Glioblastoma_Cell_Nucleus is "Neuroblastoma Cell Nucleus";
  compartment Extracellular_Space = 100;

  // Species:
  species EGFR_f in Glioblastoma_Cell_Cytoplasm = 618; EGFR_f is "EGFR_free";
  species EGFR_di_p in Glioblastoma_Cell_Cytoplasm = 0; EGFR_di_p is "EGFR_bound";
  species SOS_active in Glioblastoma_Cell_Cytoplasm = 0;
  species SOS_inactive in Glioblastoma_Cell_Cytoplasm = 9456;
  species $EGF in Extracellular_Space = 10000000;
  species $NGF in Extracellular_Space = 1000000;
  species bNGFR in Glioblastoma_Cell_Cytoplasm = 0; bNGFR is "NGFR_bound";
  species NGFR in Glioblastoma_Cell_Cytoplasm = 14737;
  species P90Rsk_active in Glioblastoma_Cell_Cytoplasm = 0;
  species P90Rsk_inactive in Glioblastoma_Cell_Cytoplasm = 30899;
  species RAS_active in Glioblastoma_Cell_Cytoplasm = 0;
  species RAS_inactive in Glioblastoma_Cell_Cytoplasm = 12153;
  species $RasGap_active in Glioblastoma_Cell_Cytoplasm = 10143;
  species PTENActive in Glioblastoma_Cell_Cytoplasm = 0; PTENActive is "PTEN_active";
  species $TCL1Active in Glioblastoma_Cell_Cytoplasm = 123;
  species $CTMPActive in Glioblastoma_Cell_Cytoplasm = 9570;
  species S6K1Inactive in Glioblastoma_Cell_Cytoplasm = 9790; S6K1Inactive is "S6K1_inactive";
  species mTORC1Inactive in Glioblastoma_Cell_Cytoplasm = 13351; mTORC1Inactive is "mTORC1_inactive";
  species $Rap1Gap in Glioblastoma_Cell_Cytoplasm = 5334;
  species $HSP90_Cdc37Active in Glioblastoma_Cell_Cytoplasm = 79790; HSP90_Cdc37Active is "HSP90-Cdc37Active";
  species PDK1Inactive in Glioblastoma_Cell_Cytoplasm = 3120; PDK1Inactive is "PDK1_inactive";
  species IRS1Inactive in Glioblastoma_Cell_Cytoplasm = 1922; IRS1Inactive is "IRS1_inactive";
  species PDK1Active in Glioblastoma_Cell_Cytoplasm = 0; PDK1Active is "PDK1_active";
  species $PHLPPActive in Glioblastoma_Cell_Cytoplasm = 2584;
  species mTORC1Active in Glioblastoma_Cell_Cytoplasm = 0; mTORC1Active is "mTORC1_active";
  species S6K1Active in Glioblastoma_Cell_Cytoplasm = 0; S6K1Active is "S6K1_active";
  species $mTORC2Active in Glioblastoma_Cell_Cytoplasm = 3685; mTORC2Active is "mTORC2_active";
  species IRS1Active in Glioblastoma_Cell_Cytoplasm = 0; IRS1Active is "IRS1_active";
  species AktInactive in Glioblastoma_Cell_Cytoplasm = 0; AktInactive is "Akt_inactive";
  species C3GInactive in Glioblastoma_Cell_Cytoplasm = 15703; C3GInactive is "C3G_inactive";
  species Raf1Inactive in Glioblastoma_Cell_Cytoplasm = 34479; Raf1Inactive is "Raf1_inactive";
  species degradedEGFR in Glioblastoma_Cell_Cytoplasm = 0;
  species AktActive in Glioblastoma_Cell_Cytoplasm = 48554; AktActive is "Akt_active";
  species C3GActive in Glioblastoma_Cell_Cytoplasm = 0; C3GActive is "C3G_active";
  species Rap1Active in Glioblastoma_Cell_Cytoplasm = 0; Rap1Active is "Rap1_active";
  species Rap1Inactive in Glioblastoma_Cell_Cytoplasm = 15629; Rap1Inactive is "Rap1_inactive";
  species bRafActive in Glioblastoma_Cell_Cytoplasm = 0; bRafActive is "bRaf_active";
  // http://link.springer.com/article/10.1007%2Fs10555-008-9119-x
  species PP2AActive in Glioblastoma_Cell_Cytoplasm = 0; PP2AActive is "PP2A_active";
  species MekActive in Glioblastoma_Cell_Cytoplasm = 0; MekActive is "Mek_active";
  species $Raf1PPtase in Glioblastoma_Cell_Cytoplasm = 47458;
  species bRafInactive in Glioblastoma_Cell_Cytoplasm = 4857; bRafInactive is "bRaf_inactive";
  species ERK_inactive in Glioblastoma_Cell_Cytoplasm = 31120;
  species PI3KActive in Glioblastoma_Cell_Cytoplasm = 0; PI3KActive is "PI3K_active";
  species PI3KInactive in Glioblastoma_Cell_Cytoplasm = 3657; PI3KInactive is "PI3K_inactive";
  species ERK_active in Glioblastoma_Cell_Cytoplasm = 0;
  species Raf1Active in Glioblastoma_Cell_Cytoplasm = 0; Raf1Active is "Raf1_active";
  species MekInactive in Glioblastoma_Cell_Cytoplasm = 33361; MekInactive is "Mek_inactive";
  species degradedNGFR in Glioblastoma_Cell_Cytoplasm = 0;
  species $RHEB_active in Glioblastoma_Cell_Cytoplasm = 21021;
  species STAT1 in Glioblastoma_Cell_Nucleus = 17898;
  species STAT1_p in Glioblastoma_Cell_Nucleus = 0;
  species STAT3 in Glioblastoma_Cell_Nucleus = 30043;
  species STAT3_ac in Glioblastoma_Cell_Nucleus = 0;
  species $CREBBP in Glioblastoma_Cell_Nucleus = 9715;
  species STAT3_ac_p in Glioblastoma_Cell_Nucleus = 0;
  species $PIAS3 in Glioblastoma_Cell_Nucleus = 10445;
  species STAT3_p in Glioblastoma_Cell_Nucleus = 0;
  species PDL1_mRNA in Glioblastoma_Cell_Nucleus = 0;
  species degraded_PDL1_mRNA in Glioblastoma_Cell_Nucleus = 0;
  species ASK_MLK_active in Glioblastoma_Cell_Cytoplasm = 1; ASK_MLK_active is "ASK/MLK_active";
  species ASK_MLK_inactive in Glioblastoma_Cell_Cytoplasm = 11079; ASK_MLK_inactive is "ASK/MLK_inactive";
  species JNK_active in Glioblastoma_Cell_Cytoplasm = 1;
  species MKK3_6_active in Glioblastoma_Cell_Cytoplasm = 1; MKK3_6_active is "MKK3/6_active";
  species MKK3_6_inactive in Glioblastoma_Cell_Cytoplasm = 2235; MKK3_6_inactive is "MKK3/6_inactive";
  species p38_active in Glioblastoma_Cell_Nucleus = 0;
  species p38_inactive in Glioblastoma_Cell_Nucleus = 25347;
  species PP2A_inactive in Glioblastoma_Cell_Cytoplasm = 15532;
  species DUSP4_6_active in Glioblastoma_Cell_Nucleus = 0; DUSP4_6_active is "DUSP4/6_active";
  species DUSP4_6_inactive in Glioblastoma_Cell_Nucleus = 2764; DUSP4_6_inactive is "DUSP4/6_inactive";
  species JNK_inactive in Glioblastoma_Cell_Cytoplasm = 18643;
  species MKK4_7_active in Glioblastoma_Cell_Cytoplasm = 1; MKK4_7_active is "MKK4/7_active";
  species MKK4_7_inactive in Glioblastoma_Cell_Cytoplasm = 11269; MKK4_7_inactive is "MKK4/7_inactive";
  species DUSP2_active in Glioblastoma_Cell_Nucleus = 0;
  species DUSP2_inactive in Glioblastoma_Cell_Nucleus = 2334;
  species MYCN_mRNA in Glioblastoma_Cell_Nucleus = 0;
  species GSK3b_active in Glioblastoma_Cell_Cytoplasm = 0;
  species GSK3b_inactive in Glioblastoma_Cell_Cytoplasm = 11711;
  species N_MYC in Glioblastoma_Cell_Cytoplasm = 0; N_MYC is "N-MYC";
  species $MYCN in Glioblastoma_Cell_Cytoplasm = 17819;
  species MYCN_mRNA_degraded in Glioblastoma_Cell_Nucleus = 0;
  species N_MYC_pp in Glioblastoma_Cell_Cytoplasm = 0; N_MYC_pp is "N-MYC_pp";
  species ALK_Mutated in Glioblastoma_Cell_Cytoplasm = 8510;
  species Akt_Thr308 in Glioblastoma_Cell_Cytoplasm = 1;
  species Akt_conformational_change in Glioblastoma_Cell_Cytoplasm = 1;
  species PIP3 in Glioblastoma_Cell_Cytoplasm = 100000;
  species PIP2 in Glioblastoma_Cell_Cytoplasm = 0;
  species $SOCS1 in Glioblastoma_Cell_Cytoplasm = 1281;
  species $SOCS3 in Glioblastoma_Cell_Cytoplasm = 10186;
  species AMPK_active in Glioblastoma_Cell_Cytoplasm = 0;
  species AMPK_inactive in Glioblastoma_Cell_Cytoplasm = 1330;
  species PTEN_inactive in Glioblastoma_Cell_Cytoplasm = 10130;
  species $proNGFR in Glioblastoma_Cell_Cytoplasm = 14737;
  species Crizotinib in Glioblastoma_Cell_Cytoplasm = 1.4e-6;
  species EGFR_inhibited in Glioblastoma_Cell_Cytoplasm = 0;
  species Gefitinib in Glioblastoma_Cell_Cytoplasm = 3e-6;

  // Parameters:
  KcatEGF = 694.731 unit_0;
  KmEGF = 6086070 unit_1;
  KcatNGF = 389.428 unit_0;
  KmNGF = 2112.66 unit_1;
  KrbNGF = 1.38e-7;
  KruNGF = 0.0072;
  KcatSOS = 647.019 unit_0;
  KmSOS = 360000 unit_1;
  KcatERK = 0.0213697 unit_0;
  KmERK = 763523 unit_1;
  KcatP90Rsk = 0.0100758 unit_0;
  KmP90Rsk = 360000 unit_1;
  KcatRAS = 32.344 unit_0;
  KmRAS = 3.59543e4 unit_1;
  KcatRasGap = 77.6942 unit_0;
  KmRasGap = 7.37333e4 unit_1;
  KcatC3GNGF = 146.912 unit_0;
  KmC3GNGF = 1.28762e4 unit_1;
  KcatC3G = 1.40145 unit_0;
  KmC3G = 1.09656e4 unit_1;
  KcatRap1toBRaf = 0.776 unit_0;
  KmRap1toBraf = 360000 unit_1;

  // Reactions:
  // Binding of the ligand induces dimerization of the EGF receptor. The reaction has been modeled as a simple Michaelis-Menten equation, with the receptor as the substrate and ligand as the activator. ERKpp is an inhibitor of this reaction which is experimentally reported negative feedback loop
  Biding_EGF_with_EGFR: $EGF + EGFR_f -> EGFR_di_p; Biding_EGF_with_EGFR_k1*EGF*EGFR_f - Biding_EGF_with_EGFR_k2*EGFR_di_p;
    Biding_EGF_with_EGFR_k1 = 2.18503e-5; Biding_EGF_with_EGFR_k2 = 0.121008;
  SOS_activation_by_EGFR_di_p: SOS_inactive => SOS_active; Glioblastoma_Cell_Cytoplasm*SOS_activation_by_EGFR(KcatEGF, EGFR_di_p, SOS_inactive, KmEGF); SOS_activation_by_EGFR_di_p is "SOS_activation_by_EGFR_bound";  // modifiers: EGFR_di_p
  SOS_activation_by_NGF: SOS_inactive => SOS_active; Glioblastoma_Cell_Cytoplasm*SOS_activation_by_NGF_0(KcatNGF, bNGFR, SOS_inactive, KmNGF);  // modifiers: bNGFR
  Biding_NGF: $NGF + NGFR -> bNGFR; Biding_NGF_k1*NGF*NGFR - Biding_NGF_k2*bNGFR;
    Biding_NGF_k1 = 1.38e-7; Biding_NGF_k2 = 0.0072;
  SOS_deactivation_by_P90Rsk: SOS_active => SOS_inactive; Glioblastoma_Cell_Cytoplasm*SOS_deactivation_by_P90Rsk_0(KcatSOS, P90Rsk_active, SOS_active, KmSOS);  // modifiers: P90Rsk_active
  SOS_deactivation_by_ERK: SOS_active => SOS_inactive; Glioblastoma_Cell_Cytoplasm*SOS_deactivation_by_ERK_0(KcatERK, ERK_active, SOS_active, KmERK);  // modifiers: ERK_active
  P90Rsk_Activation: P90Rsk_inactive => P90Rsk_active; Glioblastoma_Cell_Cytoplasm*P90Rsk_Activation_0(KcatP90Rsk, ERK_active, P90Rsk_inactive, KmP90Rsk);  // modifiers: ERK_active
  RAS_Activation: RAS_inactive => RAS_active; Glioblastoma_Cell_Cytoplasm*RAS_Activation_0(KcatRAS, SOS_active, RAS_inactive, KmRAS);  // modifiers: SOS_active
  RAS_deactivation: RAS_active => RAS_inactive; Glioblastoma_Cell_Cytoplasm*HMM_modified(KcatRasGap, RasGap_active, RAS_active, KmRasGap);  // modifiers: RasGap_active
  Raf1_Feedback_Deactivation_Raf1PPtase: Raf1Active => Raf1Inactive; Glioblastoma_Cell_Cytoplasm*HMM_Modified(Raf1_Feedback_Deactivation_Raf1PPtase_Kcat, Raf1_Feedback_Deactivation_Raf1PPtase_km, Raf1PPtase, Raf1Active);  // modifiers: Raf1PPtase
    Raf1_Feedback_Deactivation_Raf1PPtase_Kcat = 0.126329; Raf1_Feedback_Deactivation_Raf1PPtase_km = 1061.71;
  Mek_Activation_Raf1: MekInactive => MekActive; Glioblastoma_Cell_Cytoplasm*HMM_Modified(Mek_Activation_Raf1_Kcat, Mek_Activation_Raf1_km, Raf1Active, MekInactive);  // modifiers: Raf1Active
    Mek_Activation_Raf1_Kcat = 70.122; Mek_Activation_Raf1_km = 1800000;
  Mek_Feedback_Deactivation_PP2A: MekActive => MekInactive; Glioblastoma_Cell_Cytoplasm*HMM_Modified(Mek_Feedback_Deactivation_PP2A_Kcat, Mek_Feedback_Deactivation_PP2A_km, PP2AActive, MekActive);  // modifiers: PP2AActive
    Mek_Feedback_Deactivation_PP2A_Kcat = 2.83243; Mek_Feedback_Deactivation_PP2A_km = 518753;
  Erk_Activation: ERK_inactive => ERK_active; Glioblastoma_Cell_Cytoplasm*HMM_Modified(Erk_Activation_Kcat, Erk_Activation_km, MekActive, ERK_inactive);  // modifiers: MekActive
    Erk_Activation_Kcat = 7.652; Erk_Activation_km = 782264;
  // http://link.springer.com/article/10.1007%2Fs10555-008-9119-x
  Erk_Feedback_Deactivation_PP2A: ERK_active => ERK_inactive; Glioblastoma_Cell_Cytoplasm*HMM_Modified(Erk_Feedback_Deactivation_PP2A_Kcat, Erk_Feedback_Deactivation_PP2A_km, PP2AActive, ERK_active);  // modifiers: PP2AActive
    Erk_Feedback_Deactivation_PP2A_Kcat = 4.14072; Erk_Feedback_Deactivation_PP2A_km = 1630000;
  C3G_Deactivation: C3GActive => C3GInactive; Glioblastoma_Cell_Cytoplasm*C3G_Deactivation_k1*C3GActive;
    C3G_Deactivation_k1 = 2.5;
  Mek_Activation_bRaf: MekInactive => MekActive; Glioblastoma_Cell_Cytoplasm*HMM_Modified(Mek_Activation_bRaf_Kcat, Mek_Activation_bRaf_km, bRafActive, MekInactive);  // modifiers: bRafActive
    Mek_Activation_bRaf_Kcat = 185.759; Mek_Activation_bRaf_km = 4768350;
  PIP3_Activation: PIP2 => PIP3; Glioblastoma_Cell_Cytoplasm*HMM_Modified(PIP3_Activation_Kcat, PIP3_Activation_km, PI3KActive, PIP2);  // modifiers: PI3KActive
    PIP3_Activation_Kcat = 0.0566279; PIP3_Activation_km = 653951;
  bRaf_Deactivation_Raf1PPtase: bRafActive => bRafInactive; Glioblastoma_Cell_Cytoplasm*HMM_Modified(bRaf_Deactivation_Raf1PPtase_Kcat, bRaf_Deactivation_Raf1PPtase_km, Raf1PPtase, bRafActive);  // modifiers: Raf1PPtase
    bRaf_Deactivation_Raf1PPtase_Kcat = 0.0832448; bRaf_Deactivation_Raf1PPtase_km = 2052.32;
  PIP3_Feedback_Deactivation_PTEN: PIP3 => PIP2; Glioblastoma_Cell_Cytoplasm*HMM_Modified(PIP3_Feedback_Deactivation_PTEN_Kcat, PIP3_Feedback_Deactivation_PTEN_km, PTENActive, PIP3);  // modifiers: PTENActive
    PIP3_Feedback_Deactivation_PTEN_Kcat = 2.83243; PIP3_Feedback_Deactivation_PTEN_km = 518753;
  PI3K_Deactivation: PI3KActive => PI3KInactive; Glioblastoma_Cell_Cytoplasm*PI3K_Deactivation_k1*PI3KActive;
    PI3K_Deactivation_k1 = 0.005;
  Rap1_Activation: Rap1Inactive => Rap1Active; Glioblastoma_Cell_Cytoplasm*HMM_Modified(KcatC3G, KmC3G, C3GActive, Rap1Inactive);  // modifiers: C3GActive
  bRaf_Activation_Rap1: bRafInactive => bRafActive; Glioblastoma_Cell_Cytoplasm*HMM_Modified(KcatRap1toBRaf, KmRap1toBraf, Rap1Active, bRafInactive);  // modifiers: Rap1Active
  Raf1_Deactivation_by_Akt: Raf1Active => Raf1Inactive; Glioblastoma_Cell_Cytoplasm*HMM_Modified(Raf1_Deactivation_by_Akt_Kcat, Raf1_Deactivation_by_Akt_km, AktActive, Raf1Active);  // modifiers: AktActive
    Raf1_Deactivation_by_Akt_Kcat = 1.99935; Raf1_Deactivation_by_Akt_km = 1.57813e4;
  Rap1_Feedback_Deactivation_Rap1Gap: Rap1Active => Rap1Inactive; Glioblastoma_Cell_Cytoplasm*HMM_Modified(Rap1_Feedback_Deactivation_Rap1Gap_Kcat, Rap1_Feedback_Deactivation_Rap1Gap_km, Rap1Gap, Rap1Active);  // modifiers: Rap1Gap
    Rap1_Feedback_Deactivation_Rap1Gap_Kcat = 4.04006; Rap1_Feedback_Deactivation_Rap1Gap_km = 4.38591e4;
  Akt_Activation_PIP3: AktInactive => Akt_conformational_change; Glioblastoma_Cell_Cytoplasm*HMM_Modified(Akt_Activation_PIP3_Kcat, Akt_Activation_PIP3_km, PIP3, AktInactive);  // modifiers: PIP3
    Akt_Activation_PIP3_Kcat = 0.0566279; Akt_Activation_PIP3_km = 653951;
  PI3K_Activation_IRS1: PI3KInactive => PI3KActive; Glioblastoma_Cell_Cytoplasm*HMM_Modified(PI3K_Activation_IRS1_Kcat, PI3K_Activation_IRS1_km, IRS1Active, PI3KInactive);  // modifiers: IRS1Active
    PI3K_Activation_IRS1_Kcat = 0.0771067; PI3K_Activation_IRS1_km = 272056;
  Akt_Feedback_Deactivation_PP2A: AktActive => AktInactive; Glioblastoma_Cell_Cytoplasm*HMM_Modified(Akt_Feedback_Deactivation_PP2A_Kcat, Akt_Feedback_Deactivation_PP2A_km, PP2AActive, AktActive); Akt_Feedback_Deactivation_PP2A is "Akt_Deactivation_PP2A";  // modifiers: PP2AActive
    Akt_Feedback_Deactivation_PP2A_Kcat = 0.296393; Akt_Feedback_Deactivation_PP2A_km = 2476.85;
  PDK1_Activation: PDK1Inactive => PDK1Active; Glioblastoma_Cell_Cytoplasm*HMM_Modified(PDK1_Activation_Kcat, PDK1_Activation_km, PIP3, PDK1Inactive);  // modifiers: PIP3
    PDK1_Activation_Kcat = 9.85367; PDK1_Activation_km = 1007340;
  Akt_Feedback_Deactivation_PHLPP: AktActive => AktInactive; Glioblastoma_Cell_Cytoplasm*HMM_Modified(Akt_Feedback_Deactivation_PHLPP_Kcat, Akt_Feedback_Deactivation_PHLPP_km, PHLPPActive, AktActive); Akt_Feedback_Deactivation_PHLPP is "Akt_Deactivation_PHLPP";  // modifiers: PHLPPActive
    Akt_Feedback_Deactivation_PHLPP_Kcat = 1423.62; Akt_Feedback_Deactivation_PHLPP_km = 2.47619e4;
  Akt_Feedback_Deactivation_CTMP: AktActive => AktInactive; Glioblastoma_Cell_Cytoplasm*HMM_Modified(Akt_Feedback_Deactivation_CTMP_Kcat, Akt_Feedback_Deactivation_CTMP_km, CTMPActive, AktActive); Akt_Feedback_Deactivation_CTMP is "Akt_Deactivation_CTMP";  // modifiers: CTMPActive
    Akt_Feedback_Deactivation_CTMP_Kcat = 0.0409454; Akt_Feedback_Deactivation_CTMP_km = 1.56701e4;
  PDK1_Deactivation: PDK1Active => PDK1Inactive; Glioblastoma_Cell_Cytoplasm*PDK1_Deactivation_k1*PDK1Active;
    PDK1_Deactivation_k1 = 2.5;
  Akt_Feedback_Activation_mTORC2: Akt_Thr308 => AktActive; Glioblastoma_Cell_Cytoplasm*HMM_Modified(Akt_Feedback_Activation_mTORC2_Kcat, Akt_Feedback_Activation_mTORC2_km, mTORC2Active, Akt_Thr308); Akt_Feedback_Activation_mTORC2 is "Akt_Activation_mTORC2";  // modifiers: mTORC2Active
    Akt_Feedback_Activation_mTORC2_Kcat = 0.00999962; Akt_Feedback_Activation_mTORC2_km = 1.49078;
  S6K1_Activation_mTORC1: S6K1Inactive => S6K1Active; Glioblastoma_Cell_Cytoplasm*HMM_Modified(S6K1_Activation_mTORC1_Kcat, S6K1_Activation_mTORC1_km, mTORC1Active, S6K1Inactive);  // modifiers: mTORC1Active
    S6K1_Activation_mTORC1_Kcat = 0.0213697; S6K1_Activation_mTORC1_km = 763523;
  Akt_Feedback_Activation_HSP90_Cdc37: AktInactive => AktActive; Glioblastoma_Cell_Cytoplasm*HMM_Modified(Akt_Feedback_Activation_HSP90_Cdc37_Kcat, Akt_Feedback_Activation_HSP90_Cdc37_km, HSP90_Cdc37Active, AktInactive); Akt_Feedback_Activation_HSP90_Cdc37 is "Akt_Activation_HSP90-Cdc37";  // modifiers: HSP90_Cdc37Active
    Akt_Feedback_Activation_HSP90_Cdc37_Kcat = 0.0566279; Akt_Feedback_Activation_HSP90_Cdc37_km = 653951;
  Akt_Activation_PDK1: Akt_conformational_change => Akt_Thr308; Glioblastoma_Cell_Cytoplasm*HMM_Modified(Akt_Activation_PDK1_Kcat, Akt_Activation_PDK1_km, PDK1Active, Akt_conformational_change);  // modifiers: PDK1Active
    Akt_Activation_PDK1_Kcat = 9.02054e-6; Akt_Activation_PDK1_km = 1.03355e4;
  Akt_Feedback_Activation_TCL1: AktInactive => AktActive; Glioblastoma_Cell_Cytoplasm*HMM_Modified(Akt_Feedback_Activation_TCL1_Kcat, Akt_Feedback_Activation_TCL1_km, TCL1Active, AktInactive); Akt_Feedback_Activation_TCL1 is "Akt_Activation_TCL1";  // modifiers: TCL1Active
    Akt_Feedback_Activation_TCL1_Kcat = 1.99092e4; Akt_Feedback_Activation_TCL1_km = 3.37626e-6;
  // http://link.springer.com/article/10.1007%2Fs10555-008-9119-x
  Erk_Feedback_Deactivation_Raf1: ERK_active => ERK_inactive; Glioblastoma_Cell_Cytoplasm*HMM_Modified(Erk_Feedback_Deactivation_Raf1_Kcat, Erk_Feedback_Deactivation_Raf1_km, Raf1Active, ERK_active);  // modifiers: Raf1Active
    Erk_Feedback_Deactivation_Raf1_Kcat = 8.8912; Erk_Feedback_Deactivation_Raf1_km = 3496490;
  mTORC1_Activation_RHEB: mTORC1Inactive => mTORC1Active; Glioblastoma_Cell_Cytoplasm*HMM_Modified(mTORC1_Activation_RHEB_Kcat, mTORC1_Activation_RHEB_km, RHEB_active, mTORC1Inactive);  // modifiers: RHEB_active
    mTORC1_Activation_RHEB_Kcat = 15.1212; mTORC1_Activation_RHEB_km = 119355;
  IRS1_Feedback_Deactivation_S6K1: IRS1Active => IRS1Inactive; Glioblastoma_Cell_Cytoplasm*HMM_Modified(IRS1_Feedback_Deactivation_S6K1_Kcat, IRS1_Feedback_Deactivation_S6K1_km, S6K1Active, IRS1Active);  // modifiers: S6K1Active
    IRS1_Feedback_Deactivation_S6K1_Kcat = 1611.97; IRS1_Feedback_Deactivation_S6K1_km = 896896;
  EGFR_f_degradation: EGFR_f => degradedEGFR; Glioblastoma_Cell_Cytoplasm*EGFR_f_degradation_k1*EGFR_f; EGFR_f_degradation is "EGFR_free degradation";
    EGFR_f_degradation_k1 = 0.00125;
  NGFR_degradation: NGFR => degradedNGFR; Glioblastoma_Cell_Cytoplasm*NGFR_degradation_k1*NGFR;
    NGFR_degradation_k1 = 0.2;
  bNGFR_degradation: bNGFR => degradedNGFR; Glioblastoma_Cell_Cytoplasm*bNGFR_degradation_k1*bNGFR;
    bNGFR_degradation_k1 = 0.2;
  Raf1_activation_by_Ras: Raf1Inactive => Raf1Active; Glioblastoma_Cell_Cytoplasm*HMM_Modified(Raf1_activation_by_Ras_Kcat, Raf1_activation_by_Ras_km, RAS_active, Raf1Inactive);  // modifiers: RAS_active
    Raf1_activation_by_Ras_Kcat = 1509.36; Raf1_activation_by_Ras_km = 1432410;
  Raf1_deactivation_by_ERK: Raf1Active => Raf1Inactive; Glioblastoma_Cell_Cytoplasm*HMM_Modified(Raf1_deactivation_by_ERK_Kcat, Raf1_deactivation_by_ERK_km, ERK_active, Raf1Active);  // modifiers: ERK_active
    Raf1_deactivation_by_ERK_Kcat = 3.928e-6; Raf1_deactivation_by_ERK_km = 6.83011e4;
  PI3K_Activation_Ras: PI3KInactive => PI3KActive; Glioblastoma_Cell_Cytoplasm*HMM_Modified(PI3K_Activation_Ras_Kcat, PI3K_Activation_Ras_km, RAS_active, PI3KInactive);  // modifiers: RAS_active
    PI3K_Activation_Ras_Kcat = 0.0771067; PI3K_Activation_Ras_km = 272056;
  PI3K_Activation_EGFR_di_p: PI3KInactive => PI3KActive; Glioblastoma_Cell_Cytoplasm*HMM_Modified(PI3K_Activation_EGFR_di_p_Kcat, PI3K_Activation_EGFR_di_p_km, EGFR_di_p, PI3KInactive);  // modifiers: EGFR_di_p
    PI3K_Activation_EGFR_di_p_Kcat = 10.6737; PI3K_Activation_EGFR_di_p_km = 184912;
  C3G_Activation_NGFR: C3GInactive => C3GActive; Glioblastoma_Cell_Cytoplasm*HMM_Modified(KcatC3GNGF, KmC3GNGF, bNGFR, C3GInactive);  // modifiers: bNGFR
  P90Rsk_deactivation: P90Rsk_active => P90Rsk_inactive; Glioblastoma_Cell_Cytoplasm*P90Rsk_deactivation_k1*P90Rsk_active;
    P90Rsk_deactivation_k1 = 0.005;
  bRAF_activation_RAS: bRafInactive => bRafActive; Glioblastoma_Cell_Cytoplasm*HMM_Modified(bRAF_activation_RAS_Kcat, bRAF_activation_RAS_km, RAS_active, bRafInactive);  // modifiers: RAS_active
    bRAF_activation_RAS_Kcat = 0.776; bRAF_activation_RAS_km = 360000;
  IRS1_Activation: IRS1Inactive => IRS1Active; Glioblastoma_Cell_Cytoplasm*HMM_Modified(IRS1_Activation_Kcat, IRS1_Activation_km, EGFR_di_p, IRS1Inactive);  // modifiers: EGFR_di_p
    IRS1_Activation_Kcat = 10.6737; IRS1_Activation_km = 184912;
  STAT1_activation: STAT1 => STAT1_p; HMM_activation_and_inhibition_STAT1(STAT1_activation_Kcat, EGFR_di_p, PIAS3, STAT1_activation_Ki1, SOCS1, STAT1_activation_Ki2, SOCS3, STAT1_activation_Ki3, STAT1, STAT1_activation_Km);  // modifiers: EGFR_di_p, PIAS3, SOCS1, SOCS3
    STAT1_activation_Kcat = 0.419; STAT1_activation_Ki1 = 0.1; STAT1_activation_Ki2 = 19; STAT1_activation_Ki3 = 0.3; STAT1_activation_Km = 1;
  STAT3_acetilation: STAT3 => STAT3_ac; Glioblastoma_Cell_Nucleus*HMM_Modified(STAT3_acetilation_Kcat, STAT3_acetilation_km, CREBBP, STAT3);  // modifiers: CREBBP
    STAT3_acetilation_Kcat = 37.7; STAT3_acetilation_km = 0.1;
  STAT3_phosphorilation: STAT3_ac => STAT3_ac_p; HMM_activation_and_inhibition_STAT3(STAT3_phosphorilation_Kcat, EGFR_di_p, PIAS3, STAT3_phosphorilation_Ki1, SOCS1, STAT3_phosphorilation_Ki2, SOCS3, STAT3_phosphorilation_Ki3, STAT3_p, Ki4, STAT3_ac, STAT3_phosphorilation_Km); STAT3_phosphorilation is "STAT3_phosphorilation_by_EGFR_bound";  // modifiers: EGFR_di_p, PIAS3, SOCS1, SOCS3, STAT3_p
    STAT3_phosphorilation_Kcat = 0.419; STAT3_phosphorilation_Ki1 = 0.1; STAT3_phosphorilation_Ki2 = 19; STAT3_phosphorilation_Ki3 = 0.3; Ki4 = 0.00062; STAT3_phosphorilation_Km = 1;
  STAT3_phosporilation_by_mTORC1: STAT3 => STAT3_p; HMM_modified(STAT3_phosporilation_by_mTORC1_Kcat, mTORC1Active, STAT3, STAT3_phosporilation_by_mTORC1_km);  // modifiers: mTORC1Active
    STAT3_phosporilation_by_mTORC1_Kcat = 20.3596; STAT3_phosporilation_by_mTORC1_km = 1467.82;
  PDL1_transcrition_by_STAT3_ac_p_di: STAT3_ac_p => PDL1_mRNA; Glioblastoma_Cell_Nucleus*Henri_Michaelis_Menten__irreversible(STAT3_ac_p, PDL1_transcrition_by_STAT3_ac_p_di_Km, PDL1_transcrition_by_STAT3_ac_p_di_V);
    PDL1_transcrition_by_STAT3_ac_p_di_Km = 0.918449; PDL1_transcrition_by_STAT3_ac_p_di_V = 0.0301143;
  PDL1_transcrition_by_STAT1_p_di: STAT1_p => PDL1_mRNA; Glioblastoma_Cell_Nucleus*Henri_Michaelis_Menten__irreversible(STAT1_p, PDL1_transcrition_by_STAT1_p_di_Km, PDL1_transcrition_by_STAT1_p_di_V);
    PDL1_transcrition_by_STAT1_p_di_Km = 0.00549287; PDL1_transcrition_by_STAT1_p_di_V = 154.143;
  PDL1_mRNA_degradation: PDL1_mRNA => degraded_PDL1_mRNA; Glioblastoma_Cell_Nucleus*PDL1_mRNA_degradation_k1*PDL1_mRNA;
    PDL1_mRNA_degradation_k1 = 1e-7;
  ASK_MLK_activation_by_JNK: ASK_MLK_inactive => ASK_MLK_active; Glioblastoma_Cell_Cytoplasm*HMM_Modified(ASK_MLK_activation_by_JNK_Kcat, ASK_MLK_activation_by_JNK_km, JNK_active, ASK_MLK_inactive); ASK_MLK_activation_by_JNK is "ASK/MLK_activation_by_JNK";  // modifiers: JNK_active
    ASK_MLK_activation_by_JNK_Kcat = 6.77718; ASK_MLK_activation_by_JNK_km = 193.443;
  MKK3_6_activation: MKK3_6_inactive => MKK3_6_active; Glioblastoma_Cell_Cytoplasm*Henri_Michaelis_Menten__irreversible(MKK3_6_inactive, MKK3_6_activation_Km, MKK3_6_activation_V); MKK3_6_activation is "MKK3/6_activation";
    MKK3_6_activation_Km = 0.0889526; MKK3_6_activation_V = 323.773;
  p38_activation: p38_inactive => p38_active; HMM_Modified(p38_activation_Kcat, p38_activation_km, MKK3_6_active, p38_inactive);  // modifiers: MKK3_6_active
    p38_activation_Kcat = 1751.2; p38_activation_km = 0.0288693;
  PP2A_activation_by_p38: PP2A_inactive => PP2AActive; HMM_Modified(PP2A_activation_by_p38_Kcat, PP2A_activation_by_p38_km, p38_active, PP2A_inactive);  // modifiers: p38_active
    PP2A_activation_by_p38_Kcat = 1.14398e-5; PP2A_activation_by_p38_km = 6.04219e4;
  DUSP4_6_activation_by_ERK: DUSP4_6_inactive => DUSP4_6_active; HMM_Modified(DUSP4_6_activation_by_ERK_Kcat, DUSP4_6_activation_by_ERK_km, ERK_active, DUSP4_6_inactive); DUSP4_6_activation_by_ERK is "DUSP4/6_activation_by_ERK";  // modifiers: ERK_active
    DUSP4_6_activation_by_ERK_Kcat = 9.15995e-5; DUSP4_6_activation_by_ERK_km = 3.35444e-5;
  JNK_inhibition_by_DUSP4_6: JNK_active => JNK_inactive; HMM_Modified(JNK_inhibition_by_DUSP4_6_Kcat, JNK_inhibition_by_DUSP4_6_km, DUSP4_6_active, JNK_active); JNK_inhibition_by_DUSP4_6 is "JNK_inhibition_by_DUSP4/6";  // modifiers: DUSP4_6_active
    JNK_inhibition_by_DUSP4_6_Kcat = 13732; JNK_inhibition_by_DUSP4_6_km = 9.03661e-6;
  MKK4_7_activation: MKK4_7_inactive => MKK4_7_active; Glioblastoma_Cell_Cytoplasm*HMM_Modified(MKK4_7_activation_Kcat, MKK4_7_activation_km, ASK_MLK_active, MKK4_7_inactive); MKK4_7_activation is "MKK4/7_activation";  // modifiers: ASK_MLK_active
    MKK4_7_activation_Kcat = 0.590759; MKK4_7_activation_km = 1e-6;
  JNK_activation_by_MKK4_7: JNK_inactive => JNK_active; Glioblastoma_Cell_Cytoplasm*HMM_Modified(JNK_activation_by_MKK4_7_Kcat, JNK_activation_by_MKK4_7_km, MKK4_7_active, JNK_inactive); JNK_activation_by_MKK4_7 is "JNK_activation_by_MKK4/7";  // modifiers: MKK4_7_active
    JNK_activation_by_MKK4_7_Kcat = 1.63455e4; JNK_activation_by_MKK4_7_km = 1e-6;
  MKK4_7_inhibition_by_Akt: MKK4_7_active => MKK4_7_inactive; Glioblastoma_Cell_Cytoplasm*HMM_Modified(MKK4_7_inhibition_by_Akt_Kcat, MKK4_7_inhibition_by_Akt_km, AktActive, MKK4_7_active); MKK4_7_inhibition_by_Akt is "MKK4/7_inhibition_by_Akt";  // modifiers: AktActive
    MKK4_7_inhibition_by_Akt_Kcat = 0.000188165; MKK4_7_inhibition_by_Akt_km = 0.466352;
  DUSP2_transcription_by_JNK: DUSP2_inactive => DUSP2_active; HMM_Modified(DUSP2_transcription_by_JNK_Kcat, DUSP2_transcription_by_JNK_km, JNK_active, DUSP2_inactive);  // modifiers: JNK_active
    DUSP2_transcription_by_JNK_Kcat = 2068.53; DUSP2_transcription_by_JNK_km = 0.30431;
  ERK_inhibition_by_DUSP2: ERK_active => ERK_inactive; HMM_Modified(ERK_inhibition_by_DUSP2_Kcat, ERK_inhibition_by_DUSP2_km, DUSP2_active, ERK_active);  // modifiers: DUSP2_active
    ERK_inhibition_by_DUSP2_Kcat = 0.246066; ERK_inhibition_by_DUSP2_km = 707382;
  p38_inhibition_by_DUSP2: p38_active => p38_inactive; Glioblastoma_Cell_Nucleus*HMM_Modified(p38_inhibition_by_DUSP2_Kcat, p38_inhibition_by_DUSP2_km, DUSP2_active, p38_active);  // modifiers: DUSP2_active
    p38_inhibition_by_DUSP2_Kcat = 2.0056e-6; p38_inhibition_by_DUSP2_km = 0.00181113;
  N_MYC_degradation_by_GSK3b: N_MYC => N_MYC_pp; Glioblastoma_Cell_Cytoplasm*HMM_Modified(N_MYC_degradation_by_GSK3b_Kcat, N_MYC_degradation_by_GSK3b_km, GSK3b_active, N_MYC); N_MYC_degradation_by_GSK3b is "N-MYC_degradation_by_GSK3b";  // modifiers: GSK3b_active
    N_MYC_degradation_by_GSK3b_Kcat = 0.4767; N_MYC_degradation_by_GSK3b_km = 2.32369e-6;
  GSK3b_inactivation_by_Akt: GSK3b_active => GSK3b_inactive; Glioblastoma_Cell_Cytoplasm*HMM_Modified(GSK3b_inactivation_by_Akt_Kcat, GSK3b_inactivation_by_Akt_km, AktActive, GSK3b_active);  // modifiers: AktActive
    GSK3b_inactivation_by_Akt_Kcat = 0.445559; GSK3b_inactivation_by_Akt_km = 6291.13;
  MYCN_transcription_by_STAT3_p: $MYCN => MYCN_mRNA; HMM_Modified(MYCN_transcription_by_STAT3_p_Kcat, MYCN_transcription_by_STAT3_p_km, STAT3_p, MYCN);  // modifiers: STAT3_p
    MYCN_transcription_by_STAT3_p_Kcat = 4358.93; MYCN_transcription_by_STAT3_p_km = 625.826;
  MYCN_mRNA_degradation: MYCN_mRNA => MYCN_mRNA_degraded; Glioblastoma_Cell_Nucleus*MYCN_mRNA_degradation_k1*MYCN_mRNA;
    MYCN_mRNA_degradation_k1 = 0.00177055;
  DUSP2_transcription_by_N_MYC: DUSP2_inactive => DUSP2_active; HMM_modified(DUSP2_transcription_by_N_MYC_Kcat, N_MYC, DUSP2_inactive, DUSP2_transcription_by_N_MYC_km); DUSP2_transcription_by_N_MYC is "DUSP2_transcription_by_N-MYC";  // modifiers: N_MYC
    DUSP2_transcription_by_N_MYC_Kcat = 0.00372918; DUSP2_transcription_by_N_MYC_km = 0.000713062;
  PI3K_activation_by_ALK: PI3KInactive => PI3KActive; Glioblastoma_Cell_Cytoplasm*HMM_Modified(PI3K_activation_by_ALK_Kcat, PI3K_activation_by_ALK_km, ALK_Mutated, PI3KInactive);  // modifiers: ALK_Mutated
    PI3K_activation_by_ALK_Kcat = 8.8; PI3K_activation_by_ALK_km = 6827.58;
  STAT3_phosphorilation_by_ALK: STAT3 => STAT3_p; HMM_Modified(STAT3_phosphorilation_by_ALK_Kcat, STAT3_phosphorilation_by_ALK_km, ALK_Mutated, STAT3);  // modifiers: ALK_Mutated
    STAT3_phosphorilation_by_ALK_Kcat = 5.452; STAT3_phosphorilation_by_ALK_km = 1.55479;
  EGFR_bound_degradation: EGFR_di_p => degradedEGFR; Glioblastoma_Cell_Cytoplasm*EGFR_bound_degradation_k1*EGFR_di_p;
    EGFR_bound_degradation_k1 = 0.1;
  PDL1_transcription_by_STAT3_p: STAT3_p => PDL1_mRNA; Glioblastoma_Cell_Nucleus*Henri_Michaelis_Menten__irreversible(STAT3_p, PDL1_transcription_by_STAT3_p_Km, PDL1_transcription_by_STAT3_p_V);
    PDL1_transcription_by_STAT3_p_Km = 0.918449; PDL1_transcription_by_STAT3_p_V = 0.0301143;
  AMPK_activation: AMPK_inactive -> AMPK_active; Glioblastoma_Cell_Cytoplasm*(AMPK_activation_k1*AMPK_inactive - AMPK_activation_k2*AMPK_active);
    AMPK_activation_k1 = 0.959653; AMPK_activation_k2 = 0.912883;
  mTORC1_inhibition_by_AMPK: mTORC1Active => mTORC1Inactive; Glioblastoma_Cell_Cytoplasm*HMM_Modified(mTORC1_inhibition_by_AMPK_Kcat, mTORC1_inhibition_by_AMPK_km, AMPK_active, mTORC1Active);  // modifiers: AMPK_active
    mTORC1_inhibition_by_AMPK_Kcat = 0.0487685; mTORC1_inhibition_by_AMPK_km = 0.0011625;
  PTEN_activation: PTEN_inactive -> PTENActive; Glioblastoma_Cell_Cytoplasm*(PTEN_activation_k1*PTEN_inactive - PTEN_activation_k2*PTENActive);
    PTEN_activation_k1 = 6.62893e-5; PTEN_activation_k2 = 0.00146868;
  ASK_MLK_inhibition_by_Akt: ASK_MLK_active => ASK_MLK_inactive; Glioblastoma_Cell_Cytoplasm*HMM_modified(ASK_MLK_inhibition_by_Akt_Kcat, AktActive, ASK_MLK_active, ASK_MLK_inhibition_by_Akt_km); ASK_MLK_inhibition_by_Akt is "ASK/MLK_inhibition_by_Akt";  // modifiers: AktActive
    ASK_MLK_inhibition_by_Akt_Kcat = 1e-6; ASK_MLK_inhibition_by_Akt_km = 815.976;
  N_MYC_translation_by_MYCN_mRNA: MYCN_mRNA => N_MYC; Henri_Michaelis_Menten__irreversible(MYCN_mRNA, N_MYC_translation_by_MYCN_mRNA_Km, N_MYC_translation_by_MYCN_mRNA_V); N_MYC_translation_by_MYCN_mRNA is "N-MYC_translation_by_MYCN_mRNA";
    N_MYC_translation_by_MYCN_mRNA_Km = 625.826; N_MYC_translation_by_MYCN_mRNA_V = 4358.93;
  ERK_activation_by_ALK: ERK_inactive => ERK_active; Glioblastoma_Cell_Cytoplasm*HMM_modified(ERK_activation_by_ALK_Kcat, ALK_Mutated, ERK_inactive, ERK_activation_by_ALK_km);  // modifiers: ALK_Mutated
    ERK_activation_by_ALK_Kcat = 0.038; ERK_activation_by_ALK_km = 2073.56;
  Crizotinib_0: ALK_Mutated => ; Glioblastoma_Cell_Cytoplasm*HMM_modified(Crizotinib_0_Kcat, Crizotinib, ALK_Mutated, Crizotinib_0_km);  // modifiers: Crizotinib
    Crizotinib_0_Kcat = 7e12; Crizotinib_0_km = 0.00319548;
  EGFR_inhibitor: EGFR_f => EGFR_inhibited; Glioblastoma_Cell_Cytoplasm*HMM_Modified(EGFR_inhibitor_Kcat, EGFR_inhibitor_km, Gefitinib, EGFR_f);  // modifiers: Gefitinib
    EGFR_inhibitor_Kcat = 524896000; EGFR_inhibitor_km = 0.0259114;
  Gefitinib_degradataion: Gefitinib => ; Glioblastoma_Cell_Cytoplasm*Gefitinib_degradataion_k1*Gefitinib;
    Gefitinib_degradataion_k1 = 2.9252e-7;
  Crizotinib_degradation: Crizotinib => ; Glioblastoma_Cell_Cytoplasm*Crizotinib_degradation_k1*Crizotinib;
    Crizotinib_degradation_k1 = 5.92527e-8;

  // Unit definitions:
  unit volume = 1e-3 litre;
  unit substance = 1e-3 mole;
  unit unit_0 = 1 / second; unit_0 is "1/s";
  unit unit_1 = 1e-3 mole / (1e-3 litre); unit_1 is "mmol/ml";
end
