// SBML level 2 version 4

function Constant_flux__irreversible(v)
  v;
end
Constant_flux__irreversible is "Constant flux (irreversible)";

model Lopes2025___NFkB_model_in_Breast_Cancer()
  // Lopes2025 - NFkB model in Breast Cancer
  // Model for the activation of SLUG, SIP1, TWIST1, and NF-κB (subunits p50 and p65). The model exhibits two stationary states (bistability), each corresponding to the gene expression profiles we determined from HER2+ and TNBC breast cancer cell lines.
  // isDescribedBy doi:10.1101/2024.07.10.602798
  // hasProperty mamo:MAMO_0000039
  // biomodels.db:MODEL2508260001

  // Compartments:
  compartment Cytoplasm = 1;

  // Species:
  species NFkB in Cytoplasm = 5893.42;
  species SLUG in Cytoplasm = 7789509;
  species TWIST1 in Cytoplasm = 2.00835e8;
  species N0TWIST1 in Cytoplasm = 0.96087;
  species SIP1 in Cytoplasm = 2.35811e7;
  species N0SIP1 in Cytoplasm = 0.6496083;
  species N0SLUG in Cytoplasm = 1.875731;
  species p65 in Cytoplasm = 115566.7;
  species p50 in Cytoplasm = 32491.59;
  species RNAp50 in Cytoplasm = 104.3766;
  species RNAp65 in Cytoplasm = 134.9932;
  species RNASLUG in Cytoplasm = 3220.819;
  species RNASIP1 in Cytoplasm = 9750.352;
  species RNATWIST1 in Cytoplasm = 83041.59;
  species N0p50 in Cytoplasm = 1.879384;
  species N0p65 in Cytoplasm = 1.904654;
  species N1p50 in Cytoplasm = 0.1206158;
  species N1p65 in Cytoplasm = 0.09534569;
  species N1SIP1 in Cytoplasm = 1.350392;
  species N1SLUG in Cytoplasm = 0.1242686;
  species N1TWIST1 in Cytoplasm = 1.03913;

  // Reactions:
  p65_protein_degradation: p65 => ; p65_protein_degradation_k1*p65;
    p65_protein_degradation_k1 = 0.052506;
  SIP1_protein_degradation: SIP1 => ; SIP1_protein_degradation_k1*SIP1;
    SIP1_protein_degradation_k1 = 0.0483112;
  SLUG_protein_degradation: SLUG => ; SLUG_protein_degradation_k1*SLUG;
    SLUG_protein_degradation_k1 = 0.0483112;
  TWIST1_protein_degradation: TWIST1 => ; TWIST1_protein_degradation_k1*TWIST1;
    TWIST1_protein_degradation_k1 = 0.0483112;
  SIP1_RNA_synthesis: N1SIP1 => N1SIP1 + RNASIP1; SIP1_RNA_synthesis_k1*N1SIP1;
    SIP1_RNA_synthesis_k1 = 730.761;
  SLUG_RNA_synthesis: N1SLUG => N1SLUG + RNASLUG; SLUG_RNA_synthesis_k1*N1SLUG;
    SLUG_RNA_synthesis_k1 = 2623.13;
  TWIST_RNA_synthesis: N1TWIST1 => N1TWIST1 + RNATWIST1; TWIST_RNA_synthesis_k1*N1TWIST1;
    TWIST_RNA_synthesis_k1 = 8087.99;
  NFkB_binds_SIP1_promoter__forward: NFkB + N0SIP1 => N1SIP1; NFkB_binds_SIP1_promoter__forward_k1*NFkB*N0SIP1; NFkB_binds_SIP1_promoter__forward is "NFkB binds SIP1 promoter (forward)";
    NFkB_binds_SIP1_promoter__forward_k1 = 0.000890887;
  NFkB_binds_SIP1_promoter__backward: N1SIP1 => NFkB + N0SIP1; NFkB_binds_SIP1_promoter__backward_k1*N1SIP1; NFkB_binds_SIP1_promoter__backward is "NFkB binds SIP1 promoter (backward)";
    NFkB_binds_SIP1_promoter__backward_k1 = 2.5257;
  NFkB_binds_SLUG_promoter__forward: NFkB + N0SLUG => N1SLUG; NFkB_binds_SLUG_promoter__forward_k1*NFkB*N0SLUG; NFkB_binds_SLUG_promoter__forward is "NFkB binds SLUG promoter (forward)";
    NFkB_binds_SLUG_promoter__forward_k1 = 0.000890887;
  NFkB_binds_SLUG_promoter__backward: N1SLUG => NFkB + N0SLUG; NFkB_binds_SLUG_promoter__backward_k1*N1SLUG; NFkB_binds_SLUG_promoter__backward is "NFkB binds SLUG promoter (backward)";
    NFkB_binds_SLUG_promoter__backward_k1 = 79.25;
  NFkB_binds_TWIST_promoter__forward: NFkB + N0TWIST1 => N1TWIST1; NFkB_binds_TWIST_promoter__forward_k1*NFkB*N0TWIST1; NFkB_binds_TWIST_promoter__forward is "NFkB binds TWIST promoter (forward)";
    NFkB_binds_TWIST_promoter__forward_k1 = 0.000890887;
  NFkB_binds_TWIST_promoter__backward: N1TWIST1 => NFkB + N0TWIST1; NFkB_binds_TWIST_promoter__backward_k1*N1TWIST1; NFkB_binds_TWIST_promoter__backward is "NFkB binds TWIST promoter (backward)";
    NFkB_binds_TWIST_promoter__backward_k1 = 4.85495;
  NFkB_dimer_formation__forward: p50 + p65 => NFkB; NFkB_dimer_formation__forward_k1*p50*p65; NFkB_dimer_formation__forward is "NFkB dimer formation (forward)";
    NFkB_dimer_formation__forward_k1 = 2.66319e-6;
  NFkB_dimer_formation__backward: NFkB => p50 + p65; NFkB_dimer_formation__backward_k1*NFkB; NFkB_dimer_formation__backward is "NFkB dimer formation (backward)";
    NFkB_dimer_formation__backward_k1 = 1.69683;
  NFkB_binds_p50_promoter__forward: NFkB + N0p50 => N1p50; NFkB_binds_p50_promoter__forward_k1*NFkB*N0p50; NFkB_binds_p50_promoter__forward is "NFkB binds p50 promoter (forward)";
    NFkB_binds_p50_promoter__forward_k1 = 0.902865;
  NFkB_binds_p50_promoter__backward: N1p50 => NFkB + N0p50; NFkB_binds_p50_promoter__backward_k1*N1p50; NFkB_binds_p50_promoter__backward is "NFkB binds p50 promoter (backward)";
    NFkB_binds_p50_promoter__backward_k1 = 82909;
  p50_RNA_synthesis: N1p50 => N1p50 + RNAp50; p50_RNA_synthesis_k1*N1p50;
    p50_RNA_synthesis_k1 = 37.0696;
  NFkB_binds_p65_promoter__forward: NFkB + N0p65 => N1p65; NFkB_binds_p65_promoter__forward_k1*NFkB*N0p65; NFkB_binds_p65_promoter__forward is "NFkB binds p65 promoter (forward)";
    NFkB_binds_p65_promoter__forward_k1 = 0.000890887;
  NFkB_binds_p65_promoter__backward: N1p65 => NFkB + N0p65; NFkB_binds_p65_promoter__backward_k1*N1p65; NFkB_binds_p65_promoter__backward is "NFkB binds p65 promoter (backward)";
    NFkB_binds_p65_promoter__backward_k1 = 104.883;
  p65_RNA_synthesis: N1p65 => N1p65 + RNAp65; p65_RNA_synthesis_k1*N1p65;
    p65_RNA_synthesis_k1 = 56.2307;
  p50_protein_degradation: p50 => ; p50_protein_degradation_k1*p50;
    p50_protein_degradation_k1 = 0.0301325;
  p50_RNA_degradation: RNAp50 => ; p50_RNA_degradation_k1*RNAp50;
    p50_RNA_degradation_k1 = 0.1015;
  p65_RNA_degradation: RNAp65 => ; p65_RNA_degradation_k1*RNAp65;
    p65_RNA_degradation_k1 = 0.107848;
  SIP1_RNA_degradation: RNASIP1 => ; SIP1_RNA_degradation_k1*RNASIP1;
    SIP1_RNA_degradation_k1 = 0.101208;
  SLUG_RNA_degradation: RNASLUG => ; SLUG_RNA_degradation_k1*RNASLUG;
    SLUG_RNA_degradation_k1 = 0.101208;
  TWIST1_RNA_degradation: RNATWIST1 => ; TWIST1_RNA_degradation_k1*RNATWIST1;
    TWIST1_RNA_degradation_k1 = 0.101208;
  p50_protein_synthesis: RNAp50 => RNAp50 + p50; p50_protein_synthesis_k1*RNAp50;
    p50_protein_synthesis_k1 = 9.38;
  p65_protein_synthesis: RNAp65 => RNAp65 + p65; p65_protein_synthesis_k1*RNAp65;
    p65_protein_synthesis_k1 = 44.95;
  SIP1_protein_synthesis: RNASIP1 => RNASIP1 + SIP1; SIP1_protein_synthesis_k1*RNASIP1;
    SIP1_protein_synthesis_k1 = 116.84;
  SLUG_protein_synthesis: RNASLUG => RNASLUG + SLUG; SLUG_protein_synthesis_k1*RNASLUG;
    SLUG_protein_synthesis_k1 = 116.84;
  TWIST1_protein_synthesis: RNATWIST1 => RNATWIST1 + TWIST1; TWIST1_protein_synthesis_k1*RNATWIST1;
    TWIST1_protein_synthesis_k1 = 116.84;
  p50_RNA_constitutive_synthesis: => RNAp50; Constant_flux__irreversible(p50_RNA_constitutive_synthesis_v);
    p50_RNA_constitutive_synthesis_v = 6.12305;
  p65_RNA_constitutive_synthesis: => RNAp65; Constant_flux__irreversible(p65_RNA_constitutive_synthesis_v);
    p65_RNA_constitutive_synthesis_v = 9.19739;

  // Unit definitions:
  unit length = metre;
  unit area = metre^2;
  unit volume = 1e-12 litre;
  unit time = 0.06 second;
  unit substance = item;
end
