// SBML level 3 version 2

model Melhem_2017_Neutropenia_Model()
  // The objective of the present study was to use pharmacokinetic–pharmacodynamic modelling to characterize the effects of chemotherapy on the granulopoietic system and to predict the absolute neutrophil counts (ANCs) for patients with chemotherapy-induced neutropenia
  // hasProperty mamo:OTHER
  // model units - time: second

  // Parameters:
  Chm = 0 milligram;
  Crt = 0 milligram;
  Dt = 0 mole;
  Mt = 1e-9*(kp/ktr); Mt has molePerliter;
  Pm1 = 1e-9*(kp/ktr); Pm1 has molePerliter;
  Pm2 = 1e-9*(kp/ktr); Pm2 has molePerliter;
  Rb = 1e-9*(kp/kc); Rb has molePerliter;
  Sc = 0 mole;
  Sm = 1e-9*(kp/ktr); Sm has molePerliter;
  ans has substance__countPerliter;
  blsd has nanomolePerliter;
  bodySurface has meterSquare;
  chmsl has Permilligram;
  cld has literPerhour;
  cldFil has literPerhour;
  cldPeg has literPerhour;
  conc has molePerliter;
  crt50 has milligramPerhour;
  crtm has dimensionless;
  dchm has milligramPerhour;
  dcrt has milligramPerhour;
  deltaChemotherapy has day;
  deltaCorticoids has day;
  deltaTreatment has day;
  dosisChemo has milligramPermeterSquare;
  dosisCorticoids has milligram;
  dosisTreatment has microgram;
  dosisTreatmentFIL has microgram;
  dosisTreatmentPEG has microgram;
  endChemotherapy has day;
  endCorticoids has day;
  endTreatment has day;
  fdc has molePerliter;
  filMolarMass has gramPermole;
  fsc has dimensionless;
  fscFil has dimensionless;
  fscPeg has dimensionless;
  kc has Perhour;
  kchm has Perhour;
  kcrt has Perhour;
  kd has nanomolePerliter;
  kdFil has nanomolePerliter;
  kdPeg has nanomolePerliter;
  ke has Perhour;
  kint has Perhour;
  kintC has Perhour;
  kintH has Perhour;
  kp has nanomolePerhourPerliter;
  ksc has Perhour;
  kscFil has Perhour;
  kscPeg has Perhour;
  ktr has Perhour;
  lag8 has hour;
  lag9 has hour;
  rdc has molePerliter;
  scenario__weight has dimensionless;
  sr has nanomolePersubstance__count;
  st1 has dimensionless;
  st2 has dimensionless;
  stm has Perhour;
  stm1 has dimensionless;
  stm2 has dimensionless;
  stm2C has dimensionless;
  stm2H has dimensionless;
  tChemotherapy has hour;
  tCorticoids has hour;
  tTreatment has hour;
  tdc has molePerliter;
  trc has molePerliter;
  vd has litre;
  vdFil has litre;
  vdPeg has litre;

  // Assignment rules:
  ans := 1000000000*(Rb/sr);
  blsd := 0.003;
  bodySurface := 1.9;
  chmsl := 668;
  cld := cldFil;
  cldFil := 0.833;
  cldPeg := 0.362;
  conc := fdc + blsd*1e-9;
  crt50 := 0.0015;
  crtm := dcrt/(crt50 + dcrt);
  dchm := Chm*kchm;
  dcrt := Crt*kcrt;
  deltaChemotherapy := 1;
  deltaCorticoids := 1;
  deltaTreatment := 1;
  dosisChemo := 75;
  dosisCorticoids := 20;
  dosisTreatment := dosisTreatmentFIL;
  dosisTreatmentFIL := 300;
  dosisTreatmentPEG := 1000;
  endChemotherapy := 4;
  endCorticoids := 2;
  endTreatment := 1;
  fdc := 0.5*(tdc - trc - kd*1e-9 + ((tdc - trc - kd*1e-9)*(tdc - trc - kd*1e-9) + 4*kd*tdc*1e-9)^0.5);
  filMolarMass := 18802.9;
  fsc := fscFil;
  fscFil := 1;
  fscPeg := 0.646;
  kc := 0.12;
  kchm := 0.0724;
  kcrt := 0.2;
  kd := kdFil;
  kdFil := 0.0237;
  kdPeg := 0.0959;
  ke := cld/vd;
  kint := kintH;
  kintC := 0.113;
  kintH := 0.197;
  kp := 0.0276;
  ksc := kscFil;
  kscFil := 0.123;
  kscPeg := 0.0188;
  ktr := 0.033;
  lag8 := 16.3;
  lag9 := 66.2;
  rdc := tdc - fdc;
  scenario__weight := 1;
  sr := 0.059;
  st1 := 1 + stm1*((1 - crtm)*(rdc/trc) + crtm);
  st2 := 1 + stm2*((1 - crtm)*(rdc/trc) + crtm);
  stm := chmsl*dchm;
  stm1 := 7.53;
  stm2 := stm2H;
  stm2C := 3.89;
  stm2H := 5.21;
  tChemotherapy := 9;
  tCorticoids := 8;
  tTreatment := 1;
  tdc := Dt/vd;
  trc := Rb;
  vd := vdFil;
  vdFil := 3.12;
  vdPeg := 5.76;

  // Rate rules:
  Chm' = 0.0002777778*(-(kchm*Chm));
  Crt' = 0.0002777778*(-(kcrt*Crt));
  Dt' = (ksc*Sc - ke*fdc*vd - kint*rdc*vd)*0.0002777778;
  Mt' = 0.0002777778*(ktr*st2*Sm - (ktr*st2 + stm)*Mt);
  Pm1' = 0.0002777778*(ktr*st2*Mt - ktr*st2*Pm1);
  Pm2' = 0.0002777778*(ktr*st2*Pm1 - ktr*st2*Pm2);
  Rb' = 0.0002777778*(ktr*st2*Pm2 - kc*Rb);
  Sc' = -(ksc*Sc)*0.0002777778;
  Sm' = 2.777778e-13*(kp*st1 - ktr*st2*Sm*1000000000);

  // Events:
  Chemotherapy: at (rem((time - (tChemotherapy + lag9)*3600)/(deltaChemotherapy*86400), 1) <= 0.5), t0=false, persistent=false: Chm = Chm + dosisChemo*bodySurface;
  Corticoids: at (rem((time - (tCorticoids + lag8)*3600)/(deltaCorticoids*86400), 1) <= 0.5), t0=false, persistent=false: Crt = Crt + dosisCorticoids;
  TreatmentInjection: at (rem((time - tTreatment*3600)/(deltaTreatment*86400), 1) <= 0.5), t0=false, persistent=false: Sc = Sc + fsc*dosisTreatment/filMolarMass*1e-6;

  // Unit definitions:
  unit Perhour = 1 / (3600 second);
  unit Permilligram = 1 / (1e-3 gram);
  unit day = 86400 second;
  unit gramPermole = gram / avogadro;
  unit hour = 3600 second;
  unit literPerhour = litre / (3600 second);
  unit meterSquare = metre^2;
  unit microgram = 1e-6 gram;
  unit milligram = 1e-3 gram;
  unit milligramPerhour = 1e-3 gram / (3600 second);
  unit milligramPermeterSquare = 1e-3 gram / metre^2;
  unit molePerliter = avogadro / litre;
  unit nanomolePerhourPerliter = 1e-9 avogadro / (3600 second * litre);
  unit nanomolePerliter = 1e-9 avogadro / litre;
  unit nanomolePersubstance__count = 1e-9 avogadro / (1.660539e-24 avogadro);
  unit substance__countPerliter = 1.660539e-24 avogadro / litre;
end
