// SBML level 2 version 4
// dcterms:bibliographicCitation: urn:miriam:pubmed:30719834

function function_for_EGFR_activation(k, Lig, S, Km, D, Ki)
  k*Lig*(S/Km/(1 + S/Km + D/Ki));
end

function function_for_general_activation(k, X, S, Km)
  k*X*(S/(Km + S));
end

function function_for_PI3K_activation(k, A1, k1, A2, S, Km, Ki, k5c, I)
  (k*A1 + k1*A2)*(S/(Km + S))*(1/(Ki^3 + (k5c*I)^3));
end

function function_for_dual_activation(k, A1, k1, A2, S, Km)
  (k*A1 + k1*A2)*(S/(Km + S));
end

model Park2019_Cituximab_resistance_in_colorectal_cancer()
  // Park2019 - Cetuximab resistance in colorectal cancer
  // It's an experimental + mathematical paper explaining probable targets for Cetixumab resistance in colorectal cancer.
  // isDescribedBy pubmed:30719834

  // Compartments:
  compartment Cell_cytosol = 1;

  // Species:
  species Cetuximab in Cell_cytosol = 0;
  species EGF in Cell_cytosol = 1;
  species EGFRa in Cell_cytosol = 0;
  species EGFRi in Cell_cytosol = 1;
  species GNB5 in Cell_cytosol = 0.5;
  species KRASa in Cell_cytosol = 0;
  species KRASi in Cell_cytosol = 1;
  species MEKa in Cell_cytosol = 0;
  species MEKi in Cell_cytosol = 1;
  species ERKa in Cell_cytosol = 0;
  species ERKi in Cell_cytosol = 1;
  species PI3Ka in Cell_cytosol = 0;
  species PI3Ki in Cell_cytosol = 1;
  species AKTa in Cell_cytosol = 0;
  species AKTi in Cell_cytosol = 1;

  // Parameters:
  k1 = 1;
  Km1 = 0.5;
  Ki1 = 0.1;
  kd1 = 0.5;
  k2a = 5;
  k2b = 2;
  Km2 = 10;
  kd2 = 5;
  k3 = 2;
  Km3 = 1;
  kd3 = 0.5;
  k4 = 1;
  Km4 = 1;
  kd4 = 0.5;
  k5a = 5;
  k5b = 2;
  k5c = 10;
  Km5 = 10;
  Ki5 = 10;
  kd5 = 0.5;
  k6 = 1;
  Km6 = 5;
  kd6 = 0.5;
  wERK = 0.5;
  wAKT = 0.5;
  k5d = 1;
  kd2_mut = 0.5;
  Initial_for_wAKT = wAKT;
  Initial_for_wERK = wERK;

  // Assignment rules:
  Survival := Initial_for_wERK*ERKa + Initial_for_wAKT*AKTa;

  // Reactions:
  EGFR_activation: EGFRi => EGFRa; Cell_cytosol*function_for_EGFR_activation(k1, EGF, EGFRi, Km1, Cetuximab, Ki1);  // modifiers: EGF, Cetuximab
  EGFRa_inactivation: EGFRa => EGFRi; Cell_cytosol*kd1*EGFRa;
  PI3K_activation: PI3Ki => PI3Ka; Cell_cytosol*function_for_PI3K_activation(k5a, KRASa, k5b, GNB5, PI3Ki, Km5, Ki5, k5c, ERKa);  // modifiers: KRASa, GNB5, ERKa
  PI3K_inactivation: PI3Ka => PI3Ki; Cell_cytosol*kd5*PI3Ka;
  AKT_activation: AKTi => AKTa; Cell_cytosol*function_for_general_activation(k6, PI3Ka, AKTi, Km6);  // modifiers: PI3Ka
  AKT_inactivation: AKTa => AKTi; Cell_cytosol*kd6*AKTa;
  KRAS_activation: KRASi => KRASa; Cell_cytosol*function_for_dual_activation(k2a, EGFRa, k2b, GNB5, KRASi, Km2);  // modifiers: EGFRa, GNB5
  KRAS_inactivation: KRASa => KRASi; Cell_cytosol*kd2*KRASa;
  MEK_activation: MEKi => MEKa; Cell_cytosol*function_for_general_activation(k3, KRASa, MEKi, Km3);  // modifiers: KRASa
  MEK_inactivation: MEKa => MEKi; Cell_cytosol*kd3*MEKa;
  ERK_activation: ERKi => ERKa; Cell_cytosol*function_for_general_activation(k4, MEKa, ERKi, Km4);  // modifiers: MEKa
  ERK_inactivation: ERKa => ERKi; Cell_cytosol*kd4*ERKa;

  // Unit definitions:
  unit volume = 1e-3 litre;
  unit substance = 1e-3 mole;
end
