// SBML level 2 version 4
// dcterms:bibliographicCitation: urn:miriam:doi:10.1158/1078-0432.CCR-17-2953

function Function_for_C_4_T_Elimination(k_e, C_4_T, Ag_e, K_D)
  k_e*C_4_T*(Ag_e/(Ag_e + K_D));
end

function Function_for_C_4_T_Formation(xi, P, R_Cap, R_K_grogh, A_1_b, V, K_D, Ag_e, C_4_T, epsilon)
  xi*(2*P*R_Cap/R_K_grogh^2)*(A_1_b/V - K_D/(Ag_e + K_D)*(C_4_T/epsilon));
end

function Function_for_A_1_b_Formation(xi, P, R_Cap, R_K_grogh, K_D, Ag_e, C_4_T, V, epsilon, A_1_b)
  xi*(2*P*R_Cap/R_K_grogh^2)*(K_D/(Ag_e + K_D)*(C_4_T*V/epsilon) - A_1_b);
end

model Ribba2018___Mathematical_Model_of_Tumor_Uptake_for_Immunocytokine_Based_Cancer_Immunotherapy()
  // Ribba2018 - Mathematical Model of Tumor Uptake for Immunocytokine-Based Cancer Immunotherapy
  // This is a model developed to predict concentrations of cergutuzumab amunaleukin (CEA-IL2v) after various systemic dosing intensities.
  // hasProperty mamo:MAMO_0000046
  // hasProperty ncit:C141459
  // isDescribedBy doi:10.1158/1078-0432.CCR-17-2953

  // Compartments:
  compartment compartment = 1;

  // Species:
  species A_1_b in compartment = 8;
  species C_4_T in compartment = 0;

  // Parameters:
  Ag = 150;
  epsilon = 0.25;
  P = 5e-6;
  R_Cap = 8;
  R_K_grogh = 75;
  K_D = 4e-8;
  k_clear_u = 0.02;
  V = 3.58;
  xi = 0.082;
  k_e = 0.002;
  Initial_for_Ag = Ag;
  Initial_for_epsilon = epsilon;

  // Assignment rules:
  Ag_e := Initial_for_Ag/Initial_for_epsilon;

  // Reactions:
  A_1_b_Formation: => A_1_b; compartment*Function_for_A_1_b_Formation(xi, P, R_Cap, R_K_grogh, K_D, Ag_e, C_4_T, V, epsilon, A_1_b);  // modifiers: C_4_T
  A_1_b_Clearance: A_1_b => ; compartment*k_clear_u*A_1_b;
  C_4_T_Formation: => C_4_T; compartment*Function_for_C_4_T_Formation(xi, P, R_Cap, R_K_grogh, A_1_b, V, K_D, Ag_e, C_4_T, epsilon);  // modifiers: A_1_b
  C_4_T_Elimination: C_4_T => ; compartment*Function_for_C_4_T_Elimination(k_e, C_4_T, Ag_e, K_D);

  // Unit definitions:
  unit volume = 1e-3 litre;
  unit substance = 1e-3 mole;
end
