// SBML level 2 version 4
// dcterms:bibliographicCitation: urn:miriam:pubmed:30050469

function Function_for_r19(mw289fed85_e6ee_43e6_a69f_77b5f487a452, pEGF_EGFR2_pShc_Grb2_SHP2, pEGF_EGFR2_pShc_Grb2, mw8768b5c7_b227_4825_aa55_a525b0d915c2, unnamed, SHP)
  (mw289fed85_e6ee_43e6_a69f_77b5f487a452*pEGF_EGFR2_pShc_Grb2*SHP - mw8768b5c7_b227_4825_aa55_a525b0d915c2*pEGF_EGFR2_pShc_Grb2_SHP2)/unnamed;
end

function Function_for_r84(pEGF_EGFR2_PI3K, pPI3K, mw901b5284_bdae_4040_b77d_10f1ec267f06, mw94cadd24_0432_4f89_a6fc_96cb0475c44e, pEGF_EGFR2, unnamed)
  (mw901b5284_bdae_4040_b77d_10f1ec267f06*pEGF_EGFR2_PI3K - mw94cadd24_0432_4f89_a6fc_96cb0475c44e*pEGF_EGFR2*pPI3K)/unnamed;
end

function Function_for_r20(pEGF_EGFR2_pShc_Grb2_SHP2, mwd12a67b3_6d98_40e9_a54b_282a577498eb, unnamed)
  mwd12a67b3_6d98_40e9_a54b_282a577498eb*pEGF_EGFR2_pShc_Grb2_SHP2/unnamed;
end

function Function_for_r23(pEGF_EGFR2_pShc_Grb2, mw6ac313e2_e8a9_42a9_b13a_27e55c1012a2, mw93f832d7_eefb_43dd_853c_a0d7a76023cf, SOS, unnamed, pEGF_EGFR2_pShc_Grb2_SOS)
  (mw6ac313e2_e8a9_42a9_b13a_27e55c1012a2*pEGF_EGFR2_pShc_Grb2*SOS - mw93f832d7_eefb_43dd_853c_a0d7a76023cf*pEGF_EGFR2_pShc_Grb2_SOS)/unnamed;
end

function Function_for_r26(Grb2_SOS, mw7ae1ee96_563e_4684_bc9a_8f4ef373620e, SOS, mwbb727dc5_30e8_45f4_9d15_3b34be5c1e93, unnamed, Grb2)
  (mwbb727dc5_30e8_45f4_9d15_3b34be5c1e93*Grb2*SOS - mw7ae1ee96_563e_4684_bc9a_8f4ef373620e*Grb2_SOS)/unnamed;
end

function Function_for_r27(mw0df80c0e_c32b_4f90_99bd_e8f90e4c8109, Grb2_SOS, pEGF_EGFR2_pShc, mwbc5340b6_06b7_4081_bd0c_e7a397f06a92, unnamed, pEGF_EGFR2_pShc_Grb2_SOS)
  (mwbc5340b6_06b7_4081_bd0c_e7a397f06a92*pEGF_EGFR2_pShc*Grb2_SOS - mw0df80c0e_c32b_4f90_99bd_e8f90e4c8109*pEGF_EGFR2_pShc_Grb2_SOS)/unnamed;
end

function Function_for_r44(mwb881f20a_cf8a_493a_aa84_59ee90f26dd9, pEGF_EGFR2_Ras_GAP_Ras_GTP, unnamed)
  mwb881f20a_cf8a_493a_aa84_59ee90f26dd9*pEGF_EGFR2_Ras_GAP_Ras_GTP/unnamed;
end

function Function_for_r45(mwb4c6ed27_c7ec_438f_bafd_4a09a9f356f1, mwba77a9ba_078d_4ec6_a8b8_d7042a2cefe7, pEGF_EGFR2_Ras_GAP_SHP2, pEGF_EGFR2_Ras_GAP, unnamed, SHP)
  (mwb4c6ed27_c7ec_438f_bafd_4a09a9f356f1*pEGF_EGFR2_Ras_GAP*SHP - mwba77a9ba_078d_4ec6_a8b8_d7042a2cefe7*pEGF_EGFR2_Ras_GAP_SHP2)/unnamed;
end

function Function_for_r46(pEGF_EGFR2_Ras_GAP_SHP2, unnamed, mwe1743f7b_ca2c_47d4_91d7_aed2748d98c5)
  mwe1743f7b_ca2c_47d4_91d7_aed2748d98c5*pEGF_EGFR2_Ras_GAP_SHP2/unnamed;
end

function Function_for_r47(Raf1, Raf1_Ras_GTP, mw9f1dbbe6_8aa3_4180_bcea_04343649d7ba, Ras_GTP, mwdf20ff60_f0b7_4c2a_b393_586ec1337e67, unnamed)
  (mw9f1dbbe6_8aa3_4180_bcea_04343649d7ba*Raf1*Ras_GTP - mwdf20ff60_f0b7_4c2a_b393_586ec1337e67*Raf1_Ras_GTP)/unnamed;
end

function Function_for_r48(Raf1_Ras_GTP, mw91f2ca92_9556_4fb8_ae12_0b72f3e3f261, unnamed)
  mw91f2ca92_9556_4fb8_ae12_0b72f3e3f261*Raf1_Ras_GTP/unnamed;
end

function Function_for_r49(MEK, mw2eed2db0_ba78_435b_b2c8_ee91efdba1b4, Raf1active_MEK, mw77c60377_28ae_4aad_b911_5768fc8b824f, Raf1active, unnamed)
  (mw77c60377_28ae_4aad_b911_5768fc8b824f*Raf1active*MEK - mw2eed2db0_ba78_435b_b2c8_ee91efdba1b4*Raf1active_MEK)/unnamed;
end

function Function_for_r50(Raf1active_MEK, mw7e974605_8d9c_4250_8f69_072aab1f24f7, unnamed)
  mw7e974605_8d9c_4250_8f69_072aab1f24f7*Raf1active_MEK/unnamed;
end

function Function_for_r51(mw11cdaca9_941c_4a59_ba2a_3bfeafb65aeb, Raf1active_pMEK, mw58c37b3e_91e7_445e_846e_77cd0b2320af, pMEK, Raf1active, unnamed)
  (mw11cdaca9_941c_4a59_ba2a_3bfeafb65aeb*Raf1active*pMEK - mw58c37b3e_91e7_445e_846e_77cd0b2320af*Raf1active_pMEK)/unnamed;
end

function Function_for_r52(Raf1active_pMEK, mw432640ec_11b9_484d_ba26_415538ab9a10, unnamed)
  mw432640ec_11b9_484d_ba26_415538ab9a10*Raf1active_pMEK/unnamed;
end

function Function_for_r53(mw11bb74b8_d908_46f0_ac4d_06e8dd1aa5ae, ERK, mwb44117f5_20b2_495e_adf3_3467cd119fd6, ppMEK_ERK, unnamed, ppMEK)
  (mw11bb74b8_d908_46f0_ac4d_06e8dd1aa5ae*ppMEK*ERK - mwb44117f5_20b2_495e_adf3_3467cd119fd6*ppMEK_ERK)/unnamed;
end

function Function_for_r54(mwa4c71b8d_fb74_465b_b76e_cec4e4c95484, ppMEK_ERK, unnamed)
  mwa4c71b8d_fb74_465b_b76e_cec4e4c95484*ppMEK_ERK/unnamed;
end

function Function_for_r55(ppMEK_pERK, mw8bff2fe0_b582_4020_8f05_83f14451b1c0, mwc40b3165_cc16_4f78_86b5_e34f2731dcbb, pERK, unnamed, ppMEK)
  (mwc40b3165_cc16_4f78_86b5_e34f2731dcbb*ppMEK*pERK - mw8bff2fe0_b582_4020_8f05_83f14451b1c0*ppMEK_pERK)/unnamed;
end

function Function_for_r56(mw3d07dc22_f821_49a5_9712_820ba9592353, ppMEK_pERK, unnamed)
  mw3d07dc22_f821_49a5_9712_820ba9592353*ppMEK_pERK/unnamed;
end

function Function_for_r57(Raf1active_Pase, mwa8f70790_9f44_4548_988e_49d13016d2f1, mwaad540b6_783e_4576_8862_ad522fd897db, Raf1active, Pase, unnamed)
  (mwa8f70790_9f44_4548_988e_49d13016d2f1*Raf1active*Pase - mwaad540b6_783e_4576_8862_ad522fd897db*Raf1active_Pase)/unnamed;
end

function Function_for_r58(Raf1active_Pase, unnamed, mwfbc395b5_05b8_4e27_9696_c3ba52edaf74)
  mwfbc395b5_05b8_4e27_9696_c3ba52edaf74*Raf1active_Pase/unnamed;
end

function Function_for_r59(mw56f1bdc0_66fd_47c0_806a_beeaf123e2f2, mwc489f472_68ce_44e7_aad1_f8d2f6dda4ff, ppMEK_Pase2, unnamed, ppMEK, Pase2)
  (mwc489f472_68ce_44e7_aad1_f8d2f6dda4ff*ppMEK*Pase2 - mw56f1bdc0_66fd_47c0_806a_beeaf123e2f2*ppMEK_Pase2)/unnamed;
end

function Function_for_r60(mwa17c895f_29d8_4977_a99f_cf9bf6216785, ppMEK_Pase2, unnamed)
  mwa17c895f_29d8_4977_a99f_cf9bf6216785*ppMEK_Pase2/unnamed;
end

function Function_for_r61(pMEK, mw9d9a7d08_b19a_44f1_a806_151597049345, pMEK_Pase2, mwafd23622_952d_44b3_a437_4aa12422add7, unnamed, Pase2)
  (mwafd23622_952d_44b3_a437_4aa12422add7*pMEK*Pase2 - mw9d9a7d08_b19a_44f1_a806_151597049345*pMEK_Pase2)/unnamed;
end

function Function_for_r62(pMEK_Pase2, mwac85fd83_4e73_43f1_9c42_01773349d50f, unnamed)
  mwac85fd83_4e73_43f1_9c42_01773349d50f*pMEK_Pase2/unnamed;
end

function Function_for_r63(ppERK_Pase3, Pase3, mwd23d026b_c5b7_4742_aab9_b9beb18ec9bc, ppERK, unnamed, mwf4c4d7a7_1498_4f6c_9d72_cd5cb012146c)
  (mwd23d026b_c5b7_4742_aab9_b9beb18ec9bc*ppERK*Pase3 - mwf4c4d7a7_1498_4f6c_9d72_cd5cb012146c*ppERK_Pase3)/unnamed;
end

function Function_for_r64(ppERK_Pase3, unnamed, mwe3e5abe4_9f92_43eb_92e4_cea771f5bf14)
  mwe3e5abe4_9f92_43eb_92e4_cea771f5bf14*ppERK_Pase3/unnamed;
end

function Function_for_r66(pERK_Pase3, mwa617804d_95cc_4197_a39b_264a2c66b5a3, unnamed)
  mwa617804d_95cc_4197_a39b_264a2c66b5a3*pERK_Pase3/unnamed;
end

function Function_for_r65(mw254868f8_c9fb_493c_bc1d_807cc83c18e6, pERK_Pase3, mw78a41659_4abc_4614_9e83_38cbfe1c5262, pERK, Pase3, unnamed)
  (mw254868f8_c9fb_493c_bc1d_807cc83c18e6*pERK*Pase3 - mw78a41659_4abc_4614_9e83_38cbfe1c5262*pERK_Pase3)/unnamed;
end

function Function_for_r67(mw54b0e5e9_710f_438e_a8d3_749c594667bc, ppERK_pEGF_EGFR2_pShc_Grb2_SOS, mwbc2119ce_ade3_4e2a_a3bc_a29cd77adf72, ppERK, unnamed, pEGF_EGFR2_pShc_Grb2_SOS)
  (mwbc2119ce_ade3_4e2a_a3bc_a29cd77adf72*ppERK*pEGF_EGFR2_pShc_Grb2_SOS - mw54b0e5e9_710f_438e_a8d3_749c594667bc*ppERK_pEGF_EGFR2_pShc_Grb2_SOS)/unnamed;
end

function Function_for_r68(mw1ddaf9f4_dcab_4dc2_a6fa_5ce85b9d7a3a, ppERK_pEGF_EGFR2_pShc_Grb2_SOS, unnamed)
  mw1ddaf9f4_dcab_4dc2_a6fa_5ce85b9d7a3a*ppERK_pEGF_EGFR2_pShc_Grb2_SOS/unnamed;
end

function Function_for_r69(ppERK_pEGF_EGFR2_Grb2_SOS, mw60892818_7ef4_4f65_8003_9700a708c66c, mw6843d346_6e9f_43d5_97f6_1059f164aa16, ppERK, unnamed, pEGF_EGFR2_Grb2_SOS)
  (mw60892818_7ef4_4f65_8003_9700a708c66c*ppERK*pEGF_EGFR2_Grb2_SOS - mw6843d346_6e9f_43d5_97f6_1059f164aa16*ppERK_pEGF_EGFR2_Grb2_SOS)/unnamed;
end

function Function_for_r70(ppERK_pEGF_EGFR2_Grb2_SOS, mwdaa378da_64fe_4ea4_b79d_c25733837b9f, unnamed)
  mwdaa378da_64fe_4ea4_b79d_c25733837b9f*ppERK_pEGF_EGFR2_Grb2_SOS/unnamed;
end

function Function_for_r71(pSOS, mw3f5e2165_9bb6_4ac3_992e_50943dd2ea05, unnamed)
  mw3f5e2165_9bb6_4ac3_992e_50943dd2ea05*pSOS/unnamed;
end

function Function_for_r72(ProEGFR, unnamed, mwe49ede89_014e_40f2_acfd_0d1a0cd11fe7)
  mwe49ede89_014e_40f2_acfd_0d1a0cd11fe7*ProEGFR/unnamed;
end

function Function_for_r73(cbl, mw90873203_7a5d_4fca_a789_5e989ff0c999, mw92d81b3b_fa59_4637_8540_8cb8482490d9, pEGF_EGFR2_pShc_Grb2_SOS_cbl, unnamed, pEGF_EGFR2_pShc_Grb2_SOS)
  (mw90873203_7a5d_4fca_a789_5e989ff0c999*pEGF_EGFR2_pShc_Grb2_SOS*cbl - mw92d81b3b_fa59_4637_8540_8cb8482490d9*pEGF_EGFR2_pShc_Grb2_SOS_cbl)/unnamed;
end

function Function_for_r74(pEGF_EGFR2_pShc_Grb2_SOS_cbl_EPn, mw1351daea_68be_404a_b7b0_105920ff3371, pEGF_EGFR2_pShc_Grb2_SOS_cbl, EPn, mwcc2a950d_261b_4fd7_9c08_9f3c194ba09d, unnamed)
  (mwcc2a950d_261b_4fd7_9c08_9f3c194ba09d*pEGF_EGFR2_pShc_Grb2_SOS_cbl*EPn - mw1351daea_68be_404a_b7b0_105920ff3371*pEGF_EGFR2_pShc_Grb2_SOS_cbl_EPn)/unnamed;
end

function Function_for_r75(pEGF_EGFR2_pShc_Grb2_SOS_cbl_EPn, mwc6b3c76f_af7b_488c_8751_28f1d9ab90a1, unnamed)
  mwc6b3c76f_af7b_488c_8751_28f1d9ab90a1*pEGF_EGFR2_pShc_Grb2_SOS_cbl_EPn/unnamed;
end

function Function_for_r76(cbl, pEGF_EGFR2_Grb2_SOS_cbl, mw587125c7_6092_4627_9cdd_2415b77a8307, unnamed, pEGF_EGFR2_Grb2_SOS, mwf9c81339_e73a_45b5_a714_0854b718d44f)
  (mwf9c81339_e73a_45b5_a714_0854b718d44f*pEGF_EGFR2_Grb2_SOS*cbl - mw587125c7_6092_4627_9cdd_2415b77a8307*pEGF_EGFR2_Grb2_SOS_cbl)/unnamed;
end

function Function_for_r77(pEGF_EGFR2_Grb2_SOS_cbl_EPn, pEGF_EGFR2_Grb2_SOS_cbl, mwa575cf96_3d57_4222_ac71_bd17006ef035, EPn, unnamed, mwf7658bc6_acb6_411e_ae2c_9d8de7738d5f)
  (mwa575cf96_3d57_4222_ac71_bd17006ef035*pEGF_EGFR2_Grb2_SOS_cbl*EPn - mwf7658bc6_acb6_411e_ae2c_9d8de7738d5f*pEGF_EGFR2_Grb2_SOS_cbl_EPn)/unnamed;
end

function Function_for_r78(pEGF_EGFR2_Grb2_SOS_cbl_EPn, mwa137184a_0eb0_4bcb_971c_8e19231b2c07, unnamed)
  mwa137184a_0eb0_4bcb_971c_8e19231b2c07*pEGF_EGFR2_Grb2_SOS_cbl_EPn/unnamed;
end

function Function_for_r79(cbl, mw97b9ab43_02ae_4e42_a524_6b781633a255, pEGF_EGFR2, unnamed, pEGF_EGFR2_cbl, mwfa680314_051c_4b10_afc9_7e7fbee49e3f)
  (mwfa680314_051c_4b10_afc9_7e7fbee49e3f*pEGF_EGFR2*cbl - mw97b9ab43_02ae_4e42_a524_6b781633a255*pEGF_EGFR2_cbl)/unnamed;
end

function Function_for_r80(mw56f1be7e_e303_4a72_be17_5bd08e3eb1f2, pEGF_EGFR2_cbl_EPn, EPn, mwcc0d3fcd_9b9e_4390_b588_e57b57d89d22, unnamed, pEGF_EGFR2_cbl)
  (mwcc0d3fcd_9b9e_4390_b588_e57b57d89d22*pEGF_EGFR2_cbl*EPn - mw56f1be7e_e303_4a72_be17_5bd08e3eb1f2*pEGF_EGFR2_cbl_EPn)/unnamed;
end

function Function_for_r81(mw1decb177_5075_41f3_a348_ca13b8f4497e, pEGF_EGFR2_cbl_EPn, unnamed)
  mw1decb177_5075_41f3_a348_ca13b8f4497e*pEGF_EGFR2_cbl_EPn/unnamed;
end

function Function_for_r28(pEGF_EGFR2, mwc585e0e4_b7e7_4290_8a6d_10fcd9759a2d, pEGF_EGFR2_Grb2, unnamed, Grb2, mwf44d37d0_fe7f_4e47_bf10_1e734fbc3391)
  (mwc585e0e4_b7e7_4290_8a6d_10fcd9759a2d*pEGF_EGFR2*Grb2 - mwf44d37d0_fe7f_4e47_bf10_1e734fbc3391*pEGF_EGFR2_Grb2)/unnamed;
end

function Function_for_r29(mw371642bb_3836_4ded_93a5_68fa9b464896, mw3d564c3c_aa54_4c16_90be_662cfcbf8bc8, pEGF_EGFR2_Grb2_SHP2, pEGF_EGFR2_Grb2, unnamed, SHP)
  (mw3d564c3c_aa54_4c16_90be_662cfcbf8bc8*pEGF_EGFR2_Grb2*SHP - mw371642bb_3836_4ded_93a5_68fa9b464896*pEGF_EGFR2_Grb2_SHP2)/unnamed;
end

function Function_for_r30(mw736e4a7b_4a25_4d32_b96b_b088e3bd41e7, pEGF_EGFR2_Grb2_SHP2, unnamed)
  mw736e4a7b_4a25_4d32_b96b_b088e3bd41e7*pEGF_EGFR2_Grb2_SHP2/unnamed;
end

function Function_for_r31(mw084cd67b_f328_48a7_8e16_1d6256c8c137, mw43f177dc_f522_4dd1_b8e5_21b2b8fdfdba, SOS, pEGF_EGFR2_Grb2, unnamed, pEGF_EGFR2_Grb2_SOS)
  (mw084cd67b_f328_48a7_8e16_1d6256c8c137*pEGF_EGFR2_Grb2*SOS - mw43f177dc_f522_4dd1_b8e5_21b2b8fdfdba*pEGF_EGFR2_Grb2_SOS)/unnamed;
end

function Function_for_r32(Grb2_SOS, mwb9547c37_09b7_4258_95ab_8039d4088298, pEGF_EGFR2, unnamed, pEGF_EGFR2_Grb2_SOS, mwfa6a58ab_0ca5_4c05_92b0_870593ac135d)
  (mwfa6a58ab_0ca5_4c05_92b0_870593ac135d*pEGF_EGFR2*Grb2_SOS - mwb9547c37_09b7_4258_95ab_8039d4088298*pEGF_EGFR2_Grb2_SOS)/unnamed;
end

function Function_for_r35(mw2dfc8a19_1792_4e12_af38_8bfbda31a577, mw7e09242b_bd80_4af0_90c8_e0cddace89fe, Ras_GDP, unnamed, pEGF_EGFR2_pShc_Grb2_SOS_Ras_GDP, pEGF_EGFR2_pShc_Grb2_SOS)
  (mw7e09242b_bd80_4af0_90c8_e0cddace89fe*pEGF_EGFR2_pShc_Grb2_SOS*Ras_GDP - mw2dfc8a19_1792_4e12_af38_8bfbda31a577*pEGF_EGFR2_pShc_Grb2_SOS_Ras_GDP)/unnamed;
end

function Function_for_r39(mw553c0b3c_af7f_4309_8c61_0f1e2c32347c, Ras_GTP, unnamed)
  mw553c0b3c_af7f_4309_8c61_0f1e2c32347c*Ras_GTP/unnamed;
end

function Function_for_r36(unnamed, pEGF_EGFR2_pShc_Grb2_SOS_Ras_GDP, mwfc146e94_8070_4727_8416_fb55829068cb)
  mwfc146e94_8070_4727_8416_fb55829068cb*pEGF_EGFR2_pShc_Grb2_SOS_Ras_GDP/unnamed;
end

function Function_for_r38(mw26688d02_8ab9_4123_89c4_022b981cb72c, pEGF_EGFR2_Grb2_SOS_Ras_GDP, unnamed)
  mw26688d02_8ab9_4123_89c4_022b981cb72c*pEGF_EGFR2_Grb2_SOS_Ras_GDP/unnamed;
end

function Function_for_r37(pEGF_EGFR2_Grb2_SOS_Ras_GDP, mw5639395a_a5cd_46dd_81b8_30fe72400a2e, Ras_GDP, mw9cc637fe_d9ca_47d2_a4dc_66009d458094, unnamed, pEGF_EGFR2_Grb2_SOS)
  (mw5639395a_a5cd_46dd_81b8_30fe72400a2e*pEGF_EGFR2_Grb2_SOS*Ras_GDP - mw9cc637fe_d9ca_47d2_a4dc_66009d458094*pEGF_EGFR2_Grb2_SOS_Ras_GDP)/unnamed;
end

function Function_for_r40(mw19173345_925d_427b_8658_add0978e5931, Ras_GAP, mw9f6790d7_19ce_41d9_b4de_a1658c047501, Ras_GTP, Ras_GTP_Ras_GAP, unnamed)
  (mw19173345_925d_427b_8658_add0978e5931*Ras_GTP*Ras_GAP - mw9f6790d7_19ce_41d9_b4de_a1658c047501*Ras_GTP_Ras_GAP)/unnamed;
end

function Function_for_r41(mw23e16d40_acbb_4658_a336_be5d0b0dd86a, Ras_GTP_Ras_GAP, unnamed)
  mw23e16d40_acbb_4658_a336_be5d0b0dd86a*Ras_GTP_Ras_GAP/unnamed;
end

function Function_for_r42(mw0b6eb5f7_b133_4b3d_bf15_9fd6c2e9332d, mw10c97b8e_72aa_4f56_b3b9_c94baad7e213, Ras_GAP, pEGF_EGFR2, pEGF_EGFR2_Ras_GAP, unnamed)
  (mw10c97b8e_72aa_4f56_b3b9_c94baad7e213*pEGF_EGFR2*Ras_GAP - mw0b6eb5f7_b133_4b3d_bf15_9fd6c2e9332d*pEGF_EGFR2_Ras_GAP)/unnamed;
end

function Function_for_r43(Ras_GTP, mwcf964aba_9db6_46c5_b687_beafc5d89169, pEGF_EGFR2_Ras_GAP, pEGF_EGFR2_Ras_GAP_Ras_GTP, unnamed, mwe483687f_b591_4c42_9abc_7ea9f47470bf)
  (mwe483687f_b591_4c42_9abc_7ea9f47470bf*pEGF_EGFR2_Ras_GAP*Ras_GTP - mwcf964aba_9db6_46c5_b687_beafc5d89169*pEGF_EGFR2_Ras_GAP_Ras_GTP)/unnamed;
end

function Function_for_r82(mw001b8124_b461_482a_8c8e_30bffc6718f7, pEGF_EGFR2_PI3K, PI3K, mw40eca7d6_80b2_4926_9c2f_330422db0814, pEGF_EGFR2, unnamed)
  (mw001b8124_b461_482a_8c8e_30bffc6718f7*pEGF_EGFR2*PI3K - mw40eca7d6_80b2_4926_9c2f_330422db0814*pEGF_EGFR2_PI3K)/unnamed;
end

function Function_for_r83(pEGF_EGFR2_PI3K, pEGF_EGFR2_pPI3K, mw91a84697_3231_4fa6_b6ff_d69ee86056dc, unnamed, mwf3d00ca5_89dc_4693_92ec_a47db8150144)
  (mwf3d00ca5_89dc_4693_92ec_a47db8150144*pEGF_EGFR2_PI3K - mw91a84697_3231_4fa6_b6ff_d69ee86056dc*pEGF_EGFR2_pPI3K)/unnamed;
end

function Function_for_129(mwc3426c7e_3452_4507_9189_4b83ab147bdd, pEGF_EGFR2_PI3K_cbl_EPn, unnamed)
  mwc3426c7e_3452_4507_9189_4b83ab147bdd*pEGF_EGFR2_PI3K_cbl_EPn/unnamed;
end

function Function_for_132(mw1af64e9c_72b1_4ffe_b0b6_88adfa151d71, Ga_GTP, unnamed)
  mw1af64e9c_72b1_4ffe_b0b6_88adfa151d71*Ga_GTP/unnamed;
end

function Function_for_133(mw2f7b55f2_f7c0_40e4_8d39_ef56ea4b4a79, Gq_trimer, unnamed, E2_GPR30)
  mw2f7b55f2_f7c0_40e4_8d39_ef56ea4b4a79*E2_GPR30*Gq_trimer/unnamed;
end

function Function_for_134(GRK2_3, mw831b73ec_b93b_4542_aa6b_e1afdbe43666, unnamed, E2_GPR30)
  mw831b73ec_b93b_4542_aa6b_e1afdbe43666*E2_GPR30*GRK2_3/unnamed;
end

function Function_for_135(E2_GPR30_p, barr1, unnamed, mwfc1607af_2d9a_4c97_ba63_ba1945921a9f)
  mwfc1607af_2d9a_4c97_ba63_ba1945921a9f*E2_GPR30_p*barr1/unnamed;
end

function Function_for_136(E2_barr1_GPR30_p, mwc9d7062a_3ba9_4ef5_b240_ffde9e734bee, unnamed)
  mwc9d7062a_3ba9_4ef5_b240_ffde9e734bee*E2_barr1_GPR30_p/unnamed;
end

function Function_for_137(mwabe7d224_f033_40ad_9c6c_65127337acd0, E2_barr1_GPR30_p, unnamed)
  mwabe7d224_f033_40ad_9c6c_65127337acd0*E2_barr1_GPR30_p/unnamed;
end

function Function_for_r123(mw9cafad09_6002_46e1_8336_bb91c3716d70, PIP3, unnamed)
  mw9cafad09_6002_46e1_8336_bb91c3716d70*PIP3/unnamed;
end

function Function_for_130(E2, mw3b221c57_3dac_4a3b_b79a_c491a07e3dca, GPR30, unnamed, E2_GPR30, mwf8350955_cda9_4ecf_bd1e_f71c4ab8ace8)
  (mwf8350955_cda9_4ecf_bd1e_f71c4ab8ace8*E2*GPR30 - mw3b221c57_3dac_4a3b_b79a_c491a07e3dca*E2_GPR30)/unnamed;
end

function Function_for_131(mw431b7716_d0e4_48bf_a4ed_854156c2c84f, Gq_trimer, unnamed)
  mw431b7716_d0e4_48bf_a4ed_854156c2c84f*Gq_trimer/unnamed;
end

function Function_for_r1(mw53c64fd3_9a1c_4947_a734_74a73554964c, mw575f7f49_3663_47f1_b492_5b92c1c4345d, EGF_EGFR, EGFR, unnamed, EGF)
  (mw575f7f49_3663_47f1_b492_5b92c1c4345d*EGF*EGFR - mw53c64fd3_9a1c_4947_a734_74a73554964c*EGF_EGFR)/unnamed;
end

function Function_for_r3(mw6b97a1ec_2cba_4bce_96f7_ec1d0fa2d16c, EGF_EGFR2, unnamed)
  mw6b97a1ec_2cba_4bce_96f7_ec1d0fa2d16c*EGF_EGFR2/unnamed;
end

function Function_for_r8(Shc, pEGF_EGFR2_Shc, mw880a5942_7549_4466_bd19_0e1768a3a533, pEGF_EGFR2, unnamed, mwf1697f55_a3f4_4fb6_ae1d_f96f09ad1daa)
  (mwf1697f55_a3f4_4fb6_ae1d_f96f09ad1daa*pEGF_EGFR2*Shc - mw880a5942_7549_4466_bd19_0e1768a3a533*pEGF_EGFR2_Shc)/unnamed;
end

function Function_for_128(pEGF_EGFR2_PI3K_cbl, mw2e0b4751_7227_4815_bf6f_fa5e2370b1d3, mwa8eec8e9_74b9_4afc_b6db_1116fe48e858, EPn, pEGF_EGFR2_PI3K_cbl_EPn, unnamed)
  (mw2e0b4751_7227_4815_bf6f_fa5e2370b1d3*pEGF_EGFR2_PI3K_cbl*EPn - mwa8eec8e9_74b9_4afc_b6db_1116fe48e858*pEGF_EGFR2_PI3K_cbl_EPn)/unnamed;
end

function Function_for_r2(EGF_EGFR, mw8cfaf07f_dabe_45de_93cc_ef2c7fd31104, EGF_EGFR2, mwab52aceb_4b19_4317_b2da_97ccbb973dab, unnamed)
  (mw8cfaf07f_dabe_45de_93cc_ef2c7fd31104*EGF_EGFR*EGF_EGFR - mwab52aceb_4b19_4317_b2da_97ccbb973dab*EGF_EGFR2)/unnamed;
end

function Function_for_r6(mw7e889122_d26c_4d09_bae4_d313b992dc8e, pEGF_EGFR2_SHP2, pEGF_EGFR2, unnamed, SHP, mwff6f49f7_268a_4f08_8d36_3ad8449d7472)
  (mw7e889122_d26c_4d09_bae4_d313b992dc8e*pEGF_EGFR2*SHP - mwff6f49f7_268a_4f08_8d36_3ad8449d7472*pEGF_EGFR2_SHP2)/unnamed;
end

function Function_for_r9(pEGF_EGFR2_Shc, unnamed, mwe645e76e_bb00_4c22_b25e_a2e77a6aada2)
  mwe645e76e_bb00_4c22_b25e_a2e77a6aada2*pEGF_EGFR2_Shc/unnamed;
end

function Function_for_r7(pEGF_EGFR2_SHP2, mwb0744746_88a2_488e_a483_266747a044c6, unnamed)
  mwb0744746_88a2_488e_a483_266747a044c6*pEGF_EGFR2_SHP2/unnamed;
end

function Function_for_r10(mw9e24066c_51a5_4c7a_af7c_4656155a4eb0, pShc, pEGF_EGFR2_pShc, mwab1ef4d4_2acc_4fa2_b07c_fac51fb7bfaf, pEGF_EGFR2, unnamed)
  (mw9e24066c_51a5_4c7a_af7c_4656155a4eb0*pEGF_EGFR2_pShc - mwab1ef4d4_2acc_4fa2_b07c_fac51fb7bfaf*pEGF_EGFR2*pShc)/unnamed;
end

function Function_for_r11(mw0f1d282f_1c6b_455c_8254_3760632c6ecc, pShc, mwc4824ff0_2b51_4d66_ad48_1145f670a6e1, unnamed, SHP, pShc_SHP2)
  (mwc4824ff0_2b51_4d66_ad48_1145f670a6e1*pShc*SHP - mw0f1d282f_1c6b_455c_8254_3760632c6ecc*pShc_SHP2)/unnamed;
end

function Function_for_r12(mw0aa92e25_f9aa_461e_92b8_23b1b5b3ab92, unnamed, pShc_SHP2)
  mw0aa92e25_f9aa_461e_92b8_23b1b5b3ab92*pShc_SHP2/unnamed;
end

function Function_for_r13(mw2a4ed8a2_fce4_44a4_adb9_edc24a06b4e1, pShc, unnamed)
  mw2a4ed8a2_fce4_44a4_adb9_edc24a06b4e1*pShc/unnamed;
end

function Function_for_r18(pEGF_EGFR2_pShc_Grb2, mwa18578d7_236f_4939_baca_52259e38fe15, pEGF_EGFR2_pShc, unnamed, mwe879a9ac_4b8d_4c9a_a157_a3751761cf63, Grb2)
  (mwe879a9ac_4b8d_4c9a_a157_a3751761cf63*pEGF_EGFR2_pShc*Grb2 - mwa18578d7_236f_4939_baca_52259e38fe15*pEGF_EGFR2_pShc_Grb2)/unnamed;
end

function Function_for_138(mwa25d4933_7b2c_4b1a_a09f_d4f53261d02f, E2_GPR30_p, barr2, unnamed)
  mwa25d4933_7b2c_4b1a_a09f_d4f53261d02f*E2_GPR30_p*barr2/unnamed;
end

function Function_for_139(mw7c321241_c341_4da6_abe2_565e93a7d678, E2_barr2_GPR30_p, unnamed)
  mw7c321241_c341_4da6_abe2_565e93a7d678*E2_barr2_GPR30_p/unnamed;
end

function Function_for_140(E2_barr2_GPR30_p, mwbef15dce_d7a7_4b07_8245_1e58b69b53ba, unnamed)
  mwbef15dce_d7a7_4b07_8245_1e58b69b53ba*E2_barr2_GPR30_p/unnamed;
end

function Function_for_141(mw35946fbc_6c77_4670_97f8_2fa8eaa38614, GRK5_6, unnamed, E2_GPR30)
  mw35946fbc_6c77_4670_97f8_2fa8eaa38614*E2_GPR30*GRK5_6/unnamed;
end

function Function_for_142(E2_GPR30_p2, mw718faf88_3ec1_4768_ae4c_9841d3643fec, unnamed)
  mw718faf88_3ec1_4768_ae4c_9841d3643fec*E2_GPR30_p2/unnamed;
end

function Function_for_143(mw1e780c42_0c04_4fa4_9a83_38c4c3cacbad, barr2, unnamed, E2_GPR30)
  mw1e780c42_0c04_4fa4_9a83_38c4c3cacbad*E2_GPR30*barr2/unnamed;
end

function Function_for_144(E2_barr2_GPR30, unnamed, mwffaba75e_b5fe_4500_a285_2aba97b8518e)
  mwffaba75e_b5fe_4500_a285_2aba97b8518e*E2_barr2_GPR30/unnamed;
end

function Function_for_145(mw0a060a64_655b_4e6b_8d45_9a32dc71ae48, E2_GPR30_p2, barr2, unnamed)
  mw0a060a64_655b_4e6b_8d45_9a32dc71ae48*E2_GPR30_p2*barr2/unnamed;
end

function Function_for_146(mw3f170a05_0269_4b2a_90df_5daec75763f7, E2_barr2_GPR30_p2, unnamed)
  mw3f170a05_0269_4b2a_90df_5daec75763f7*E2_barr2_GPR30_p2/unnamed;
end

function Function_for_147(ERK, E2_barr2_GPR30, unnamed, mwe634a6f1_fa16_4633_869f_071b77e2488d)
  mwe634a6f1_fa16_4633_869f_071b77e2488d*E2_barr2_GPR30*ERK/unnamed;
end

function Function_for_148(mw100dca7f_c6e2_471a_93e4_1e983d3930c3, ERK, E2_barr2_GPR30_p2, unnamed)
  mw100dca7f_c6e2_471a_93e4_1e983d3930c3*E2_barr2_GPR30_p2*ERK/unnamed;
end

function Function_for_149(mw1b44741d_9283_4e0e_8835_088d8534fa71, Ga_GTP, PIP2, unnamed)
  mw1b44741d_9283_4e0e_8835_088d8534fa71*Ga_GTP*PIP2/unnamed;
end

function Function_for_150(PKc, DAG, mwaf61bd57_4126_4a42_9165_98a808843f85, unnamed)
  mwaf61bd57_4126_4a42_9165_98a808843f85*DAG*PKc/unnamed;
end

function Function_for_151(mw4e76fedc_7f38_4ec7_8795_687a68ec06bc, PKc_active, unnamed)
  mw4e76fedc_7f38_4ec7_8795_687a68ec06bc*PKc_active/unnamed;
end

function Function_for_152(mw5a57c078_5c42_4c94_982b_b3c231d8cffc, DAG, unnamed)
  mw5a57c078_5c42_4c94_982b_b3c231d8cffc*DAG/unnamed;
end

function Function_for_153(mw6021d9b4_06fd_46d1_9b5a_bb4df502d625, SOS, PKc_active, unnamed)
  mw6021d9b4_06fd_46d1_9b5a_bb4df502d625*PKc_active*SOS/unnamed;
end

function Function_for_154(Ras_GAP, mw8e61dc82_2e82_49cb_bad2_d0c4506bd167, PKc_active, unnamed)
  mw8e61dc82_2e82_49cb_bad2_d0c4506bd167*PKc_active*Ras_GAP/unnamed;
end

function Function_for_155(Raf1, mw71bc088d_1d27_40b8_b5a1_516e8503615b, PKc_active, unnamed)
  mw71bc088d_1d27_40b8_b5a1_516e8503615b*PKc_active*Raf1/unnamed;
end

function Function_for_r92(mw3c3648cb_6d56_4d9d_be47_129483778fd6, Aktm_PDK1, unnamed)
  mw3c3648cb_6d56_4d9d_be47_129483778fd6*Aktm_PDK1/unnamed;
end

function Function_for_r93(mw11f8de84_6639_486d_bf17_8f7021f54b66, pAktm, PDK1, mw98405e53_330b_4a64_a700_a62bb3f21426, pAktm_PDK1, unnamed)
  (mw98405e53_330b_4a64_a700_a62bb3f21426*pAktm_PDK1 - mw11f8de84_6639_486d_bf17_8f7021f54b66*pAktm*PDK1)/unnamed;
end

function Function_for_r94(mw11e520e6_b1f1_4802_af71_92a2bd9cb644, pAkt, pAktm, mw65e1222f_39ad_4a29_ae76_04b7d591af38, PIP3, unnamed)
  (mw65e1222f_39ad_4a29_ae76_04b7d591af38*pAktm - mw11e520e6_b1f1_4802_af71_92a2bd9cb644*pAkt*PIP3)/unnamed;
end

function Function_for_r95(mw6a4e035b_11a7_4155_9a78_cfba13631cb1, pAkt_Takt, unnamed)
  mw6a4e035b_11a7_4155_9a78_cfba13631cb1*pAkt_Takt/unnamed;
end

function Function_for_r96(Takt, Akt_Takt, mw6eebbe41_cf28_46e8_930c_26f50e08d602, mw751c2663_d807_482f_991b_c8032cb6d996, Akt, unnamed)
  (mw6eebbe41_cf28_46e8_930c_26f50e08d602*Akt_Takt - mw751c2663_d807_482f_991b_c8032cb6d996*Akt*Takt)/unnamed;
end

function Function_for_r97(Takt, pAkt, pAkt_Takt, mwb1b46773_a218_4f99_a000_a98fbc1275d7, mwd2d0b340_bbdb_40bd_9eac_992a2a402b94, unnamed)
  (mwd2d0b340_bbdb_40bd_9eac_992a2a402b94*pAkt*Takt - mwb1b46773_a218_4f99_a000_a98fbc1275d7*pAkt_Takt)/unnamed;
end

function Function_for_r98(Takt, mw193f2553_1ab3_4b07_9b4b_201ee9e08c96, pAktm_Takt, pAktm, mwb7292ff5_dd13_41aa_b9b8_2c0c75d35fb1, unnamed)
  (mw193f2553_1ab3_4b07_9b4b_201ee9e08c96*pAktm*Takt - mwb7292ff5_dd13_41aa_b9b8_2c0c75d35fb1*pAktm_Takt)/unnamed;
end

function Function_for_r101(Takt, mw3676a900_b098_4a74_a511_e15984ca0cd2, pAktm_PDK1_Takt, pAktm_PDK1, unnamed, mwf68a0726_94b5_4be1_933f_1ac48053601d)
  (mw3676a900_b098_4a74_a511_e15984ca0cd2*pAktm_PDK1*Takt - mwf68a0726_94b5_4be1_933f_1ac48053601d*pAktm_PDK1_Takt)/unnamed;
end

function Function_for_r88(pPI3K_PIP2, mw0573df9d_f365_40b7_83d4_3846a05aefdc, mw64664eb9_353a_4f1d_a8dc_e22bcb06e2c2, pPI3K, PIP2, unnamed)
  (mw64664eb9_353a_4f1d_a8dc_e22bcb06e2c2*pPI3K*PIP2 - mw0573df9d_f365_40b7_83d4_3846a05aefdc*pPI3K_PIP2)/unnamed;
end

function Function_for_r89(pPI3K_PIP2, mw134431c3_e8e5_4375_89a0_2c51a03d65dd, unnamed)
  mw134431c3_e8e5_4375_89a0_2c51a03d65dd*pPI3K_PIP2/unnamed;
end

function Function_for_r90(mw22510791_ef7e_4373_907c_9eecbc8adda7, Aktm, Akt, PIP3, unnamed, mwf59d397b_cfee_4a84_9279_134cc951db8c)
  (mw22510791_ef7e_4373_907c_9eecbc8adda7*Akt*PIP3 - mwf59d397b_cfee_4a84_9279_134cc951db8c*Aktm)/unnamed;
end

function Function_for_r91(Aktm, Aktm_PDK1, PDK1, mw8d6eacb6_7184_4564_8cde_53e93add2146, unnamed, mwe2aded94_f2b5_4513_8670_71a86abf7968)
  (mwe2aded94_f2b5_4513_8670_71a86abf7968*Aktm*PDK1 - mw8d6eacb6_7184_4564_8cde_53e93add2146*Aktm_PDK1)/unnamed;
end

function Function_for_r102(pAktm_PDK1_Takt, mwb4f0353c_d140_44cc_ab75_566fcc2909c5, unnamed)
  mwb4f0353c_d140_44cc_ab75_566fcc2909c5*pAktm_PDK1_Takt/unnamed;
end

function Function_for_r103(Takt, mw6165953d_ce44_4b21_a18a_c401c04993f1, Aktm_PDK1, mw99a30aef_212a_4577_bcfd_8c5764057cca, Aktm_PDK1_Takt, unnamed)
  (mw6165953d_ce44_4b21_a18a_c401c04993f1*Aktm_PDK1_Takt - mw99a30aef_212a_4577_bcfd_8c5764057cca*Aktm_PDK1*Takt)/unnamed;
end

function Function_for_r104(mw2034bbe7_27cc_410c_9870_1f8a5986dfa5, mw94b0216f_3353_4b36_b9b7_fd34a0510b08, pAkt_total, Raf1active, unnamed)
  mw94b0216f_3353_4b36_b9b7_fd34a0510b08*pAkt_total*Raf1active/(mw2034bbe7_27cc_410c_9870_1f8a5986dfa5 + Raf1active)/unnamed;
end

function Function_for_r105(mw0cea56f3_1cdb_410e_a5a4_f3635ba5c94b, pRaf1active, unnamed)
  mw0cea56f3_1cdb_410e_a5a4_f3635ba5c94b*pRaf1active/unnamed;
end

function Function_for_106(STAT3c, mw2c88e0e2_e9c3_4e4c_bb2e_b0cd1f6420f4, pEGF_EGFR2_STAT3c, mw50a0e884_a88c_46a7_b985_788868bc1029, pEGF_EGFR2, unnamed)
  (mw50a0e884_a88c_46a7_b985_788868bc1029*pEGF_EGFR2*STAT3c - mw2c88e0e2_e9c3_4e4c_bb2e_b0cd1f6420f4*pEGF_EGFR2_STAT3c)/unnamed;
end

function Function_for_r100(Takt, mw4d614bfc_3e20_450e_8890_6326afd0a0d7, Aktm, mw6d852e8c_c64a_4926_80c4_781a9c04b20e, Aktm_Takt, unnamed)
  (mw6d852e8c_c64a_4926_80c4_781a9c04b20e*Aktm_Takt - mw4d614bfc_3e20_450e_8890_6326afd0a0d7*Aktm*Takt)/unnamed;
end

function Function_for_r86(mw4f6f44d9_408e_49b2_bedf_d34b2448725e, TP4_pPI3K, unnamed)
  mw4f6f44d9_408e_49b2_bedf_d34b2448725e*TP4_pPI3K/unnamed;
end

function Function_for_r87(PI3K, TP4_PI3K, mwbd416b7b_f9b6_4464_b9e8_be4ac001d13d, mwd3e2533f_8d57_407c_834d_e0dde30b7f4a, unnamed, TP4)
  (mwd3e2533f_8d57_407c_834d_e0dde30b7f4a*TP4_PI3K - mwbd416b7b_f9b6_4464_b9e8_be4ac001d13d*TP4*PI3K)/unnamed;
end

function Function_for_r85(mw688106ee_719d_4995_b1a0_faeefdb0af5a, pPI3K, mw85c8ff7d_8d7c_4403_8a58_4996a3e6ac28, TP4_pPI3K, unnamed, TP4)
  (mw688106ee_719d_4995_b1a0_faeefdb0af5a*TP4*pPI3K - mw85c8ff7d_8d7c_4403_8a58_4996a3e6ac28*TP4_pPI3K)/unnamed;
end

function Function_for_111(pSTAT3c_pSTAT3c, mw74ea5b55_ead0_4b6f_8da0_fd1dcf7e231d, mw9fe16c2b_7271_4e4f_b6de_c149721a3198, pSTAT3c, unnamed)
  (mw9fe16c2b_7271_4e4f_b6de_c149721a3198*pSTAT3c*pSTAT3c - mw74ea5b55_ead0_4b6f_8da0_fd1dcf7e231d*pSTAT3c_pSTAT3c)/unnamed;
end

function Function_for_109(mwa5016035_3f9f_44fc_9f69_1d7a0155eb36, mwb6701ead_d3f2_4eb3_8b08_341cea49a4b2, pSTAT3c, PP1, pSTAT3c_PP1, unnamed)
  (mwb6701ead_d3f2_4eb3_8b08_341cea49a4b2*pSTAT3c*PP1 - mwa5016035_3f9f_44fc_9f69_1d7a0155eb36*pSTAT3c_PP1)/unnamed;
end

function Function_for_113(pSTAT3c_pSTAT3c_PP1, mw81384973_14a0_4498_ab21_f70666d46d7f, unnamed)
  mw81384973_14a0_4498_ab21_f70666d46d7f*pSTAT3c_pSTAT3c_PP1/unnamed;
end

function Function_for_107(pEGF_EGFR2_STAT3c, mw95e2190d_8e39_419b_ad26_7cc141f7b87b, unnamed)
  mw95e2190d_8e39_419b_ad26_7cc141f7b87b*pEGF_EGFR2_STAT3c/unnamed;
end

function Function_for_112(mw21d22acd_ddd4_4794_9700_52201984f75b, pSTAT3c_pSTAT3c_PP1, pSTAT3c_pSTAT3c, mw8cbe6595_6f16_4704_afe2_0dd043a175fa, PP1, unnamed)
  (mw8cbe6595_6f16_4704_afe2_0dd043a175fa*pSTAT3c_pSTAT3c*PP1 - mw21d22acd_ddd4_4794_9700_52201984f75b*pSTAT3c_pSTAT3c_PP1)/unnamed;
end

function Function_for_r99(pAktm_Takt, unnamed, mwf4069175_b898_4633_ac1e_20f44431c36a)
  mwf4069175_b898_4633_ac1e_20f44431c36a*pAktm_Takt/unnamed;
end

function Function_for_110(mw26164d03_adda_4a21_b5ac_59e1d5a8d8ab, pSTAT3c_PP1, unnamed)
  mw26164d03_adda_4a21_b5ac_59e1d5a8d8ab*pSTAT3c_PP1/unnamed;
end

function Function_for_108(pEGF_EGFR2_pSTAT3c, mw76d68ace_272d_4178_bba2_74dfdf260c70, pSTAT3c, pEGF_EGFR2, unnamed, mwe37b936f_7781_4a01_b59b_96bd7db0c49e)
  (mw76d68ace_272d_4178_bba2_74dfdf260c70*pEGF_EGFR2*pSTAT3c - mwe37b936f_7781_4a01_b59b_96bd7db0c49e*pEGF_EGFR2_pSTAT3c)/unnamed;
end

function Function_for_118(pSTAT3n_pSTAT3n_PP2, mw90b25c4b_ad1a_4ee5_ae20_c60451484516, unnamed)
  mw90b25c4b_ad1a_4ee5_ae20_c60451484516*pSTAT3n_pSTAT3n_PP2/unnamed;
end

function Function_for_119(mw95cb9071_56e2_447d_b7c7_59ac96baa623, STAT3n, STAT3n_pSTAT3n, mwa0806e7a_a90d_4187_9c37_6d9ea569a447, unnamed, pSTAT3n)
  (mwa0806e7a_a90d_4187_9c37_6d9ea569a447*STAT3n*pSTAT3n - mw95cb9071_56e2_447d_b7c7_59ac96baa623*STAT3n_pSTAT3n)/unnamed;
end

function Function_for_120(mw01c5ceef_57a1_4baa_b2cd_fd39e9588a10, PP2, pSTAT3n_PP2, mwba545ecf_c7d4_4a6c_8c47_9e91f052d5a9, unnamed, pSTAT3n)
  (mwba545ecf_c7d4_4a6c_8c47_9e91f052d5a9*pSTAT3n*PP2 - mw01c5ceef_57a1_4baa_b2cd_fd39e9588a10*pSTAT3n_PP2)/unnamed;
end

function Function_for_121(mw7aba6db3_c7ec_4192_bb5e_0ac4b466c1a5, pSTAT3n_PP2, unnamed)
  mw7aba6db3_c7ec_4192_bb5e_0ac4b466c1a5*pSTAT3n_PP2/unnamed;
end

function Function_for_122(mw31eb851a_c381_419d_b694_f158b7f5cfb6, STAT3n, unnamed)
  mw31eb851a_c381_419d_b694_f158b7f5cfb6*STAT3n/unnamed;
end

function Function_for_124(cbl, pEGF_EGFR2_STAT3c, pEGF_EGFR2_STAT3c_cbl, mw77a6c207_ff8c_463c_9b4e_8a7d96652b79, mwe09b67b9_0d2a_4b82_91ef_5284216beb94, unnamed)
  (mwe09b67b9_0d2a_4b82_91ef_5284216beb94*pEGF_EGFR2_STAT3c*cbl - mw77a6c207_ff8c_463c_9b4e_8a7d96652b79*pEGF_EGFR2_STAT3c_cbl)/unnamed;
end

function Function_for_125(pEGF_EGFR2_STAT3c_cbl_EPn, mw1df53838_48e5_4331_9084_3790409ad5ff, pEGF_EGFR2_STAT3c_cbl, EPn, unnamed, mwe4573b2c_5f99_40d0_9f9e_c238caa5ccbe)
  (mw1df53838_48e5_4331_9084_3790409ad5ff*pEGF_EGFR2_STAT3c_cbl*EPn - mwe4573b2c_5f99_40d0_9f9e_c238caa5ccbe*pEGF_EGFR2_STAT3c_cbl_EPn)/unnamed;
end

function Function_for_126(pEGF_EGFR2_STAT3c_cbl_EPn, mw8ed5885f_774e_48a0_9338_fe8cdd512023, unnamed)
  mw8ed5885f_774e_48a0_9338_fe8cdd512023*pEGF_EGFR2_STAT3c_cbl_EPn/unnamed;
end

function Function_for_127(pEGF_EGFR2_PI3K, cbl, pEGF_EGFR2_PI3K_cbl, mwa6ef5f75_f152_414d_811c_dd037d4b3ca1, unnamed, mwee51df1b_3f69_43f8_a1d5_5a8c5d0215f2)
  (mwa6ef5f75_f152_414d_811c_dd037d4b3ca1*pEGF_EGFR2_PI3K*cbl - mwee51df1b_3f69_43f8_a1d5_5a8c5d0215f2*pEGF_EGFR2_PI3K_cbl)/unnamed;
end

function Function_for_114(STAT3c, mw366e6f17_4081_4cdc_9fa5_0aeb354d692c, mw9f1a7f64_0b37_42df_9dd5_e1a44efdcbba, pSTAT3c, STAT3c_pSTAT3c, unnamed)
  (mw9f1a7f64_0b37_42df_9dd5_e1a44efdcbba*STAT3c*pSTAT3c - mw366e6f17_4081_4cdc_9fa5_0aeb354d692c*STAT3c_pSTAT3c)/unnamed;
end

function Function_for_115(mw1df2caba_8e41_4fe5_a1b5_7777eb98ed1c, pSTAT3c_pSTAT3c, unnamed)
  mw1df2caba_8e41_4fe5_a1b5_7777eb98ed1c*pSTAT3c_pSTAT3c/unnamed;
end

function Function_for_116(pSTAT3n_pSTAT3n, mw54178365_18c1_47e0_94ee_6b96582c52ef, mw5a798f7a_b4eb_4a27_b413_4ff3956b90e9, unnamed, pSTAT3n)
  (mw5a798f7a_b4eb_4a27_b413_4ff3956b90e9*pSTAT3n*pSTAT3n - mw54178365_18c1_47e0_94ee_6b96582c52ef*pSTAT3n_pSTAT3n)/unnamed;
end

function Function_for_117(PP2, pSTAT3n_pSTAT3n_PP2, mw1ff4e75e_fce5_4a7a_907b_05df4981f80b, pSTAT3n_pSTAT3n, mw8b269d52_eda9_4dd1_8616_ebcf29c971fa, unnamed)
  (mw1ff4e75e_fce5_4a7a_907b_05df4981f80b*pSTAT3n_pSTAT3n*PP2 - mw8b269d52_eda9_4dd1_8616_ebcf29c971fa*pSTAT3n_pSTAT3n_PP2)/unnamed;
end

model Rouhimoghadam2018___GPR30_PI3K_MAPK_STAT_signaling_pathway_in_normal_and_cancer_cells()
  // Rouhimoghadam2018 - GPR30/PI3K/MAPK/STAT signaling pathway in normal and cancer cells
  // In the current study, we aimed to simulate the GPR30/PI3K/MAPK/STAT signaling pathway in normal and cancer cells by the use of ordinary differential equation modeling. In addition, we planned to show that MAPK activation pattern is different between normal and cancer models.
  // isDescribedBy pubmed:30050469
  // hasProperty mamo:MAMO_0000045

  // Compartments:
  compartment unnamed = 1;

  // Species:
  species EGF in unnamed = 0.0081967;
  species EGFR in unnamed = 0.3;
  species EGF_EGFR in unnamed = 0; EGF_EGFR is "EGF-EGFR";
  species EGF_EGFR2 in unnamed = 0; EGF_EGFR2 is "EGF-EGFR2";
  species pEGF_EGFR2 in unnamed = 0; pEGF_EGFR2 is "pEGF-EGFR2";
  species cbl in unnamed = 0.8;
  species Shc in unnamed = 1;
  species pEGF_EGFR2_Shc in unnamed = 0; pEGF_EGFR2_Shc is "pEGF-EGFR2-Shc";
  species SHP in unnamed = 0.1;
  species pEGF_EGFR2_SHP2 in unnamed = 0; pEGF_EGFR2_SHP2 is "pEGF-EGFR2-SHP2";
  species pEGF_EGFR2_pShc in unnamed = 0; pEGF_EGFR2_pShc is "pEGF-EGFR2-pShc";
  species pShc in unnamed = 0;
  species pShc_SHP2 in unnamed = 0; pShc_SHP2 is "pShc-SHP2";
  species Grb2 in unnamed = 1;
  species pEGF_EGFR2_pShc_Grb2 in unnamed = 0; pEGF_EGFR2_pShc_Grb2 is "pEGF-EGFR2-pShc-Grb2";
  species pEGF_EGFR2_pShc_Grb2_SHP2 in unnamed = 0; pEGF_EGFR2_pShc_Grb2_SHP2 is "pEGF-EGFR2-pShc-Grb2-SHP2";
  species SOS in unnamed = 0.3;
  species pEGF_EGFR2_pShc_Grb2_SOS in unnamed = 0; pEGF_EGFR2_pShc_Grb2_SOS is "pEGF-EGFR2-pShc-Grb2-SOS";
  species pEGF_EGFR2_pShc_Grb2_SOS_cbl in unnamed = 0; pEGF_EGFR2_pShc_Grb2_SOS_cbl is "pEGF-EGFR2-pShc-Grb2-SOS-cbl";
  species Grb2_SOS in unnamed = 0; Grb2_SOS is "Grb2-SOS";
  species pEGF_EGFR2_Grb2 in unnamed = 0; pEGF_EGFR2_Grb2 is "pEGF-EGFR2-Grb2";
  species pEGF_EGFR2_Grb2_SHP2 in unnamed = 0; pEGF_EGFR2_Grb2_SHP2 is "pEGF-EGFR2-Grb2-SHP2";
  species pEGF_EGFR2_Grb2_SOS in unnamed = 0; pEGF_EGFR2_Grb2_SOS is "pEGF-EGFR2-Grb2-SOS";
  species pEGF_EGFR2_Grb2_SOS_cbl in unnamed = 0; pEGF_EGFR2_Grb2_SOS_cbl is "pEGF-EGFR2-Grb2-SOS-cbl";
  species Ras_GDP in unnamed = 0.15; Ras_GDP is "Ras-GDP";
  species pEGF_EGFR2_pShc_Grb2_SOS_Ras_GDP in unnamed = 0; pEGF_EGFR2_pShc_Grb2_SOS_Ras_GDP is "pEGF-EGFR2-pShc-Grb2-SOS-Ras-GDP";
  species Ras_GTP in unnamed = 0; Ras_GTP is "Ras-GTP";
  species pEGF_EGFR2_Grb2_SOS_Ras_GDP in unnamed = 0; pEGF_EGFR2_Grb2_SOS_Ras_GDP is "pEGF-EGFR2-Grb2-SOS-Ras-GDP";
  species Ras_GAP in unnamed = 0.1; Ras_GAP is "Ras-GAP";
  species Ras_GTP_Ras_GAP in unnamed = 0; Ras_GTP_Ras_GAP is "Ras-GTP-Ras-GAP";
  species pEGF_EGFR2_Ras_GAP in unnamed = 0; pEGF_EGFR2_Ras_GAP is "pEGF-EGFR2-Ras-GAP";
  species pEGF_EGFR2_Ras_GAP_Ras_GTP in unnamed = 0; pEGF_EGFR2_Ras_GAP_Ras_GTP is "pEGF-EGFR2-Ras-GAP-Ras-GTP";
  species pEGF_EGFR2_Ras_GAP_SHP2 in unnamed = 0; pEGF_EGFR2_Ras_GAP_SHP2 is "pEGF-EGFR2-Ras-GAP-SHP2";
  species Raf1 in unnamed = 0.5;
  species Raf1_Ras_GTP in unnamed = 0; Raf1_Ras_GTP is "Raf1-Ras-GTP";
  species Raf1active in unnamed = 0;
  species MEK in unnamed = 0.68;
  species Raf1active_MEK in unnamed = 0; Raf1active_MEK is "Raf1active-MEK";
  species pMEK in unnamed = 0;
  species Raf1active_pMEK in unnamed = 0; Raf1active_pMEK is "Raf1active-pMEK";
  species ppMEK in unnamed = 0;
  species ERK in unnamed = 0.4;
  species ppMEK_ERK in unnamed = 0; ppMEK_ERK is "ppMEK-ERK";
  species pERK in unnamed = 0;
  species ppMEK_pERK in unnamed = 0; ppMEK_pERK is "ppMEK-pERK";
  species ppERK in unnamed = 0;
  species Pase in unnamed = 0.5;
  species Raf1active_Pase in unnamed = 0; Raf1active_Pase is "Raf1active-Pase";
  species Pase2 in unnamed = 0.02;
  species ppMEK_Pase2 in unnamed = 0; ppMEK_Pase2 is "ppMEK-Pase2";
  species pMEK_Pase2 in unnamed = 0; pMEK_Pase2 is "pMEK-Pase2";
  species Pase3 in unnamed = 0.002;
  species pERK_Pase3 in unnamed = 0; pERK_Pase3 is "pERK-Pase3";
  species ppERK_Pase3 in unnamed = 0; ppERK_Pase3 is "ppERK-Pase3";
  species ppERK_pEGF_EGFR2_pShc_Grb2_SOS in unnamed = 0; ppERK_pEGF_EGFR2_pShc_Grb2_SOS is "ppERK-pEGF-EGFR2-pShc-Grb2-SOS";
  species pSOS in unnamed = 0;
  species ppERK_pEGF_EGFR2_Grb2_SOS in unnamed = 0; ppERK_pEGF_EGFR2_Grb2_SOS is "ppERK-pEGF-EGFR2-Grb2-SOS";
  species ProEGFR in unnamed = 1;
  species pEGF_EGFR2_pShc_Grb2_SOS_cbl_EPn in unnamed = 0; pEGF_EGFR2_pShc_Grb2_SOS_cbl_EPn is "pEGF-EGFR2-pShc-Grb2-SOS-cbl-EPn";
  species EPn in unnamed = 0.5;
  species pEGF_EGFR2_Grb2_SOS_cbl_EPn in unnamed = 0; pEGF_EGFR2_Grb2_SOS_cbl_EPn is "pEGF-EGFR2-Grb2-SOS-cbl-EPn";
  species pEGF_EGFR2_cbl in unnamed = 0; pEGF_EGFR2_cbl is "pEGF-EGFR2-cbl";
  species pEGF_EGFR2_cbl_EPn in unnamed = 0; pEGF_EGFR2_cbl_EPn is "pEGF-EGFR2-cbl-EPn";
  species PI3K in unnamed = 0.2;
  species pEGF_EGFR2_PI3K in unnamed = 0; pEGF_EGFR2_PI3K is "pEGF-EGFR2-PI3K";
  species pEGF_EGFR2_pPI3K in unnamed = 0; pEGF_EGFR2_pPI3K is "pEGF-EGFR2-pPI3K";
  species pPI3K in unnamed = 0;
  species TP4 in unnamed = 0.2;
  species TP4_pPI3K in unnamed = 0; TP4_pPI3K is "TP4-pPI3K";
  species TP4_PI3K in unnamed = 0; TP4_PI3K is "TP4-PI3K";
  species PIP2 in unnamed = 0.5;
  species pPI3K_PIP2 in unnamed = 0; pPI3K_PIP2 is "pPI3K-PIP2";
  species PIP3 in unnamed = 0;
  species Akt in unnamed = 0.1;
  species Aktm in unnamed = 0;
  species PDK1 in unnamed = 0.1;
  species Aktm_PDK1 in unnamed = 0; Aktm_PDK1 is "Aktm-PDK1";
  species pAktm_PDK1 in unnamed = 0; pAktm_PDK1 is "pAktm-PDK1";
  species pAktm in unnamed = 0;
  species pAkt in unnamed = 0;
  species pAkt_Takt in unnamed = 0; pAkt_Takt is "pAkt-Takt";
  species Akt_Takt in unnamed = 0; Akt_Takt is "Akt-Takt";
  species Takt in unnamed = 0.1;
  species pAktm_Takt in unnamed = 0; pAktm_Takt is "pAktm-Takt";
  species Aktm_Takt in unnamed = 0; Aktm_Takt is "Aktm-Takt";
  species pAktm_PDK1_Takt in unnamed = 0; pAktm_PDK1_Takt is "pAktm-PDK1-Takt";
  species Aktm_PDK1_Takt in unnamed = 0; Aktm_PDK1_Takt is "Aktm-PDK1-Takt";
  species $pAkt_total in unnamed;
  species pRaf1active in unnamed = 0;
  species STAT3c in unnamed = 1;
  species pEGF_EGFR2_STAT3c in unnamed = 0; pEGF_EGFR2_STAT3c is "pEGF-EGFR2-STAT3c";
  species pSTAT3c in unnamed = 0;
  species pEGF_EGFR2_pSTAT3c in unnamed = 0; pEGF_EGFR2_pSTAT3c is "pEGF-EGFR2-pSTAT3c";
  species PP1 in unnamed = 0.5;
  species pSTAT3c_PP1 in unnamed = 0; pSTAT3c_PP1 is "pSTAT3c-PP1";
  species pSTAT3c_pSTAT3c_PP1 in unnamed = 0; pSTAT3c_pSTAT3c_PP1 is "pSTAT3c-pSTAT3c-PP1";
  species pSTAT3c_pSTAT3c in unnamed = 0; pSTAT3c_pSTAT3c is "pSTAT3c-pSTAT3c";
  species STAT3c_pSTAT3c in unnamed = 0; STAT3c_pSTAT3c is "STAT3c-pSTAT3c";
  species pSTAT3n_pSTAT3n in unnamed = 0; pSTAT3n_pSTAT3n is "pSTAT3n-pSTAT3n";
  species pSTAT3n in unnamed = 0;
  species PP2 in unnamed = 0.6;
  species pSTAT3n_pSTAT3n_PP2 in unnamed = 0; pSTAT3n_pSTAT3n_PP2 is "pSTAT3n-pSTAT3n-PP2";
  species STAT3n_pSTAT3n in unnamed = 0; STAT3n_pSTAT3n is "STAT3n-pSTAT3n";
  species STAT3n in unnamed = 0;
  species pSTAT3n_PP2 in unnamed = 0; pSTAT3n_PP2 is "pSTAT3n-PP2";
  species pEGF_EGFR2_STAT3c_cbl in unnamed = 0; pEGF_EGFR2_STAT3c_cbl is "pEGF-EGFR2-STAT3c-cbl";
  species pEGF_EGFR2_STAT3c_cbl_EPn in unnamed = 0; pEGF_EGFR2_STAT3c_cbl_EPn is "pEGF-EGFR2-STAT3c-cbl-EPn";
  species pEGF_EGFR2_PI3K_cbl in unnamed = 0; pEGF_EGFR2_PI3K_cbl is "pEGF-EGFR2-PI3K-cbl";
  species pEGF_EGFR2_PI3K_cbl_EPn in unnamed = 0; pEGF_EGFR2_PI3K_cbl_EPn is "pEGF-EGFR2-PI3K-cbl-EPn";
  species E2 in unnamed = 0.00025;
  species GPR30 in unnamed = 1.0192;
  species E2_GPR30 in unnamed = 0; E2_GPR30 is "E2-GPR30";
  species Gq_trimer in unnamed = 56.99; Gq_trimer is "Gq-trimer";
  species Ga_GTP in unnamed = 0; Ga_GTP is "Ga-GTP";
  species GRK2_3 in unnamed = 0.899; GRK2_3 is "GRK2/3";
  species E2_GPR30_p in unnamed = 0; E2_GPR30_p is "E2-GPR30-p";
  species barr1 in unnamed = 0.858;
  species E2_barr1_GPR30_p in unnamed = 0; E2_barr1_GPR30_p is "E2-barr1-GPR30-p";
  species barr2 in unnamed = 0.483;
  species E2_barr2_GPR30_p in unnamed = 0; E2_barr2_GPR30_p is "E2-barr2-GPR30-p";
  species GRK5_6 in unnamed = 1.518; GRK5_6 is "GRK5/6";
  species E2_GPR30_p2 in unnamed = 0; E2_GPR30_p2 is "E2-GPR30-p2";
  species E2_barr2_GPR30 in unnamed = 0; E2_barr2_GPR30 is "E2-barr2-GPR30";
  species E2_barr2_GPR30_p2 in unnamed = 0; E2_barr2_GPR30_p2 is "E2-barr2-GPR30-p2";
  species DAG in unnamed = 0.009;
  species PKc in unnamed = 8.842;
  species PKc_active in unnamed = 0.002; PKc_active is "PKc-active";
  species PA in unnamed = 0;

  // Assignment rules:
  pAkt_total := pAkt + pAktm;

  // Reactions:
  r1: EGF + EGFR -> EGF_EGFR; unnamed*Function_for_r1(r1_parameter_1, r1_parameter_2, EGF_EGFR, EGFR, unnamed, EGF);
    r1_parameter_1 = 0.0038; r1_parameter_2 = 100;
  r2: 2 EGF_EGFR -> EGF_EGFR2; unnamed*Function_for_r2(EGF_EGFR, r2_parameter_1, EGF_EGFR2, r2_parameter_2, unnamed);
    r2_parameter_1 = 10; r2_parameter_2 = 0.02;
  r3: EGF_EGFR2 => pEGF_EGFR2; unnamed*Function_for_r3(r3_parameter_1, EGF_EGFR2, unnamed);
    r3_parameter_1 = 2.014;
  r8: pEGF_EGFR2 + Shc -> pEGF_EGFR2_Shc; unnamed*Function_for_r8(Shc, pEGF_EGFR2_Shc, r8_parameter_1, pEGF_EGFR2, unnamed, r8_parameter_2);
    r8_parameter_1 = 0.6; r8_parameter_2 = 90;
  r6: pEGF_EGFR2 + SHP -> pEGF_EGFR2_SHP2; unnamed*Function_for_r6(r6_parameter_1, pEGF_EGFR2_SHP2, pEGF_EGFR2, unnamed, SHP, r6_parameter_2);
    r6_parameter_1 = 3.114; r6_parameter_2 = 0.2;
  r9: pEGF_EGFR2_Shc => pEGF_EGFR2_pShc; unnamed*Function_for_r9(pEGF_EGFR2_Shc, unnamed, r9_parameter_1);
    r9_parameter_1 = 0.5838;
  r7: pEGF_EGFR2_SHP2 => EGF_EGFR2 + SHP; unnamed*Function_for_r7(pEGF_EGFR2_SHP2, r7_parameter_1, unnamed);
    r7_parameter_1 = 0.2661;
  r10: pEGF_EGFR2_pShc -> pEGF_EGFR2 + pShc; unnamed*Function_for_r10(r10_parameter_1, pShc, pEGF_EGFR2_pShc, r10_parameter_2, pEGF_EGFR2, unnamed);
    r10_parameter_1 = 4.481; r10_parameter_2 = 0.3;
  r11: pShc + SHP -> pShc_SHP2; unnamed*Function_for_r11(r11_parameter_1, pShc, r11_parameter_2, unnamed, SHP, pShc_SHP2);
    r11_parameter_1 = 0.2; r11_parameter_2 = 3.114;
  r12: pShc_SHP2 => Shc + SHP; unnamed*Function_for_r12(r12_parameter_1, unnamed, pShc_SHP2);
    r12_parameter_1 = 0.2661;
  r13: pShc => Shc; unnamed*Function_for_r13(r13_parameter_1, pShc, unnamed);
    r13_parameter_1 = 0.005;
  r18: pEGF_EGFR2_pShc + Grb2 -> pEGF_EGFR2_pShc_Grb2; unnamed*Function_for_r18(pEGF_EGFR2_pShc_Grb2, r18_parameter_1, pEGF_EGFR2_pShc, unnamed, r18_parameter_2, Grb2);
    r18_parameter_1 = 0.1; r18_parameter_2 = 3;
  r19: pEGF_EGFR2_pShc_Grb2 + SHP -> pEGF_EGFR2_pShc_Grb2_SHP2; unnamed*Function_for_r19(r19_parameter_1, pEGF_EGFR2_pShc_Grb2_SHP2, pEGF_EGFR2_pShc_Grb2, r19_parameter_2, unnamed, SHP);
    r19_parameter_1 = 10; r19_parameter_2 = 1;
  r20: pEGF_EGFR2_pShc_Grb2_SHP2 => EGF_EGFR2 + pShc + Grb2 + SHP; unnamed*Function_for_r20(pEGF_EGFR2_pShc_Grb2_SHP2, r20_parameter_1, unnamed);
    r20_parameter_1 = 2.661;
  r23: pEGF_EGFR2_pShc_Grb2 + SOS -> pEGF_EGFR2_pShc_Grb2_SOS; unnamed*Function_for_r23(pEGF_EGFR2_pShc_Grb2, r23_parameter_1, r23_parameter_2, SOS, unnamed, pEGF_EGFR2_pShc_Grb2_SOS);
    r23_parameter_1 = 10; r23_parameter_2 = 0.0214;
  r26: Grb2 + SOS -> Grb2_SOS; unnamed*Function_for_r26(Grb2_SOS, r26_parameter_1, SOS, r26_parameter_2, unnamed, Grb2);
    r26_parameter_1 = 0.0015; r26_parameter_2 = 0.1;
  r27: pEGF_EGFR2_pShc + Grb2_SOS -> pEGF_EGFR2_pShc_Grb2_SOS; unnamed*Function_for_r27(r27_parameter_1, Grb2_SOS, pEGF_EGFR2_pShc, r27_parameter_2, unnamed, pEGF_EGFR2_pShc_Grb2_SOS);
    r27_parameter_1 = 0.045; r27_parameter_2 = 10;
  r28: pEGF_EGFR2 + Grb2 -> pEGF_EGFR2_Grb2; unnamed*Function_for_r28(pEGF_EGFR2, r28_parameter_1, pEGF_EGFR2_Grb2, unnamed, Grb2, r28_parameter_2);
    r28_parameter_1 = 3; r28_parameter_2 = 0.05;
  r29: pEGF_EGFR2_Grb2 + SHP -> pEGF_EGFR2_Grb2_SHP2; unnamed*Function_for_r29(r29_parameter_1, r29_parameter_2, pEGF_EGFR2_Grb2_SHP2, pEGF_EGFR2_Grb2, unnamed, SHP);
    r29_parameter_1 = 1; r29_parameter_2 = 10;
  r30: pEGF_EGFR2_Grb2_SHP2 => EGF_EGFR2 + Grb2 + SHP; unnamed*Function_for_r30(r30_parameter_1, pEGF_EGFR2_Grb2_SHP2, unnamed);
    r30_parameter_1 = 2.661;
  r31: pEGF_EGFR2_Grb2 + SOS -> pEGF_EGFR2_Grb2_SOS; unnamed*Function_for_r31(r31_parameter_1, r31_parameter_2, SOS, pEGF_EGFR2_Grb2, unnamed, pEGF_EGFR2_Grb2_SOS);
    r31_parameter_1 = 10; r31_parameter_2 = 0.06;
  r32: pEGF_EGFR2 + Grb2_SOS -> pEGF_EGFR2_Grb2_SOS; unnamed*Function_for_r32(Grb2_SOS, r32_parameter_1, pEGF_EGFR2, unnamed, pEGF_EGFR2_Grb2_SOS, r32_parameter_2);
    r32_parameter_1 = 0.025; r32_parameter_2 = 2.734;
  r35: pEGF_EGFR2_pShc_Grb2_SOS + Ras_GDP -> pEGF_EGFR2_pShc_Grb2_SOS_Ras_GDP; unnamed*Function_for_r35(r35_parameter_1, r35_parameter_2, Ras_GDP, unnamed, pEGF_EGFR2_pShc_Grb2_SOS_Ras_GDP, pEGF_EGFR2_pShc_Grb2_SOS);
    r35_parameter_1 = 0.18; r35_parameter_2 = 202.9;
  r39: Ras_GTP => Ras_GDP; unnamed*Function_for_r39(r39_parameter_1, Ras_GTP, unnamed);
    r39_parameter_1 = 0.000167;
  r36: pEGF_EGFR2_pShc_Grb2_SOS_Ras_GDP => pEGF_EGFR2_pShc_Grb2_SOS + Ras_GTP; unnamed*Function_for_r36(unnamed, pEGF_EGFR2_pShc_Grb2_SOS_Ras_GDP, r36_parameter_1);
    r36_parameter_1 = 0.1434;
  r38: pEGF_EGFR2_Grb2_SOS_Ras_GDP => pEGF_EGFR2_Grb2_SOS + Ras_GTP; unnamed*Function_for_r38(r38_parameter_1, pEGF_EGFR2_Grb2_SOS_Ras_GDP, unnamed);
    r38_parameter_1 = 0.1434;
  r37: pEGF_EGFR2_Grb2_SOS + Ras_GDP -> pEGF_EGFR2_Grb2_SOS_Ras_GDP; unnamed*Function_for_r37(pEGF_EGFR2_Grb2_SOS_Ras_GDP, r37_parameter_1, Ras_GDP, r37_parameter_2, unnamed, pEGF_EGFR2_Grb2_SOS);
    r37_parameter_1 = 202.9; r37_parameter_2 = 0.18;
  r40: Ras_GTP + Ras_GAP -> Ras_GTP_Ras_GAP; unnamed*Function_for_r40(r40_parameter_1, Ras_GAP, r40_parameter_2, Ras_GTP, Ras_GTP_Ras_GAP, unnamed);
    r40_parameter_1 = 2.854; r40_parameter_2 = 0.96;
  r41: Ras_GTP_Ras_GAP => Ras_GDP + Ras_GAP; unnamed*Function_for_r41(r41_parameter_1, Ras_GTP_Ras_GAP, unnamed);
    r41_parameter_1 = 7.76;
  r42: pEGF_EGFR2 + Ras_GAP -> pEGF_EGFR2_Ras_GAP; unnamed*Function_for_r42(r42_parameter_1, r42_parameter_2, Ras_GAP, pEGF_EGFR2, pEGF_EGFR2_Ras_GAP, unnamed);
    r42_parameter_1 = 0.01; r42_parameter_2 = 0.1;
  r43: pEGF_EGFR2_Ras_GAP + Ras_GTP -> pEGF_EGFR2_Ras_GAP_Ras_GTP; unnamed*Function_for_r43(Ras_GTP, r43_parameter_1, pEGF_EGFR2_Ras_GAP, pEGF_EGFR2_Ras_GAP_Ras_GTP, unnamed, r43_parameter_2);
    r43_parameter_1 = 0.96; r43_parameter_2 = 2.845;
  r44: pEGF_EGFR2_Ras_GAP_Ras_GTP => pEGF_EGFR2_Ras_GAP + Ras_GDP; unnamed*Function_for_r44(r44_parameter_1, pEGF_EGFR2_Ras_GAP_Ras_GTP, unnamed);
    r44_parameter_1 = 7.76;
  r45: pEGF_EGFR2_Ras_GAP + SHP -> pEGF_EGFR2_Ras_GAP_SHP2; unnamed*Function_for_r45(r45_parameter_1, r45_parameter_2, pEGF_EGFR2_Ras_GAP_SHP2, pEGF_EGFR2_Ras_GAP, unnamed, SHP);
    r45_parameter_1 = 3.114; r45_parameter_2 = 0.2;
  r46: pEGF_EGFR2_Ras_GAP_SHP2 => EGF_EGFR2 + Ras_GAP + SHP; unnamed*Function_for_r46(pEGF_EGFR2_Ras_GAP_SHP2, unnamed, r46_parameter_1);
    r46_parameter_1 = 2.661;
  r47: Raf1 + Ras_GTP -> Raf1_Ras_GTP; unnamed*Function_for_r47(Raf1, Raf1_Ras_GTP, r47_parameter_1, Ras_GTP, r47_parameter_2, unnamed);
    r47_parameter_1 = 1.75; r47_parameter_2 = 0.05;
  r48: Raf1_Ras_GTP => Raf1active + Ras_GTP; unnamed*Function_for_r48(Raf1_Ras_GTP, r48_parameter_1, unnamed);
    r48_parameter_1 = 0.7624;
  r49: Raf1active + MEK -> Raf1active_MEK; unnamed*Function_for_r49(MEK, r49_parameter_1, Raf1active_MEK, r49_parameter_2, Raf1active, unnamed);
    r49_parameter_1 = 0.01833; r49_parameter_2 = 4;
  r50: Raf1active_MEK => Raf1active + pMEK; unnamed*Function_for_r50(Raf1active_MEK, r50_parameter_1, unnamed);
    r50_parameter_1 = 3.5;
  r51: Raf1active + pMEK -> Raf1active_pMEK; unnamed*Function_for_r51(r51_parameter_1, Raf1active_pMEK, r51_parameter_2, pMEK, Raf1active, unnamed);
    r51_parameter_1 = 4; r51_parameter_2 = 0.01833;
  r52: Raf1active_pMEK => Raf1active + ppMEK; unnamed*Function_for_r52(Raf1active_pMEK, r52_parameter_1, unnamed);
    r52_parameter_1 = 2.9;
  r53: ppMEK + ERK -> ppMEK_ERK; unnamed*Function_for_r53(r53_parameter_1, ERK, r53_parameter_2, ppMEK_ERK, unnamed, ppMEK);
    r53_parameter_1 = 3; r53_parameter_2 = 0.033;
  r54: ppMEK_ERK => ppMEK + pERK; unnamed*Function_for_r54(r54_parameter_1, ppMEK_ERK, unnamed);
    r54_parameter_1 = 16;
  r55: ppMEK + pERK -> ppMEK_pERK; unnamed*Function_for_r55(ppMEK_pERK, r55_parameter_1, r55_parameter_2, pERK, unnamed, ppMEK);
    r55_parameter_1 = 0.033; r55_parameter_2 = 3;
  r56: ppMEK_pERK => ppMEK + ppERK; unnamed*Function_for_r56(r56_parameter_1, ppMEK_pERK, unnamed);
    r56_parameter_1 = 5.7;
  r57: Raf1active + Pase -> Raf1active_Pase; unnamed*Function_for_r57(Raf1active_Pase, r57_parameter_1, r57_parameter_2, Raf1active, Pase, unnamed);
    r57_parameter_1 = 71.7; r57_parameter_2 = 0.2;
  r58: Raf1active_Pase => Raf1 + Pase; unnamed*Function_for_r58(Raf1active_Pase, unnamed, r58_parameter_1);
    r58_parameter_1 = 1;
  r59: ppMEK + Pase2 -> ppMEK_Pase2; unnamed*Function_for_r59(r59_parameter_1, r59_parameter_2, ppMEK_Pase2, unnamed, ppMEK, Pase2);
    r59_parameter_1 = 0.8; r59_parameter_2 = 14.3;
  r60: ppMEK_Pase2 => pMEK + Pase2; unnamed*Function_for_r60(r60_parameter_1, ppMEK_Pase2, unnamed);
    r60_parameter_1 = 0.058;
  r61: pMEK + Pase2 -> pMEK_Pase2; unnamed*Function_for_r61(pMEK, r61_parameter_1, pMEK_Pase2, r61_parameter_2, unnamed, Pase2);
    r61_parameter_1 = 0.5; r61_parameter_2 = 0.25;
  r62: pMEK_Pase2 => MEK + Pase2; unnamed*Function_for_r62(pMEK_Pase2, r62_parameter_1, unnamed);
    r62_parameter_1 = 0.058;
  r63: ppERK + Pase3 -> ppERK_Pase3; unnamed*Function_for_r63(ppERK_Pase3, Pase3, r63_parameter_1, ppERK, unnamed, r63_parameter_2);
    r63_parameter_1 = 7; r63_parameter_2 = 0.6;
  r64: ppERK_Pase3 => pERK + Pase3; unnamed*Function_for_r64(ppERK_Pase3, unnamed, r64_parameter_1);
    r64_parameter_1 = 0.27;
  r66: pERK_Pase3 => ERK + Pase3; unnamed*Function_for_r66(pERK_Pase3, r66_parameter_1, unnamed);
    r66_parameter_1 = 0.3;
  r65: pERK + Pase3 -> pERK_Pase3; unnamed*Function_for_r65(r65_parameter_1, pERK_Pase3, r65_parameter_2, pERK, Pase3, unnamed);
    r65_parameter_1 = 5; r65_parameter_2 = 0.5;
  r67: ppERK + pEGF_EGFR2_pShc_Grb2_SOS -> ppERK_pEGF_EGFR2_pShc_Grb2_SOS; unnamed*Function_for_r67(r67_parameter_1, ppERK_pEGF_EGFR2_pShc_Grb2_SOS, r67_parameter_2, ppERK, unnamed, pEGF_EGFR2_pShc_Grb2_SOS);
    r67_parameter_1 = 1; r67_parameter_2 = 8.898;
  r68: ppERK_pEGF_EGFR2_pShc_Grb2_SOS => ppERK + pEGF_EGFR2 + pShc + Grb2 + pSOS; unnamed*Function_for_r68(r68_parameter_1, ppERK_pEGF_EGFR2_pShc_Grb2_SOS, unnamed);
    r68_parameter_1 = 0.0426;
  r69: ppERK + pEGF_EGFR2_Grb2_SOS -> ppERK_pEGF_EGFR2_Grb2_SOS; unnamed*Function_for_r69(ppERK_pEGF_EGFR2_Grb2_SOS, r69_parameter_1, r69_parameter_2, ppERK, unnamed, pEGF_EGFR2_Grb2_SOS);
    r69_parameter_1 = 8.898; r69_parameter_2 = 1;
  r70: ppERK_pEGF_EGFR2_Grb2_SOS => ppERK + pEGF_EGFR2 + Grb2 + pSOS; unnamed*Function_for_r70(ppERK_pEGF_EGFR2_Grb2_SOS, r70_parameter_1, unnamed);
    r70_parameter_1 = 0.0426;
  r71: pSOS => SOS; unnamed*Function_for_r71(pSOS, r71_parameter_1, unnamed);
    r71_parameter_1 = 0.002;
  r72: ProEGFR => EGFR; unnamed*Function_for_r72(ProEGFR, unnamed, r72_parameter_1);
    r72_parameter_1 = 0.005;
  r73: pEGF_EGFR2_pShc_Grb2_SOS + cbl -> pEGF_EGFR2_pShc_Grb2_SOS_cbl; unnamed*Function_for_r73(cbl, r73_parameter_1, r73_parameter_2, pEGF_EGFR2_pShc_Grb2_SOS_cbl, unnamed, pEGF_EGFR2_pShc_Grb2_SOS);
    r73_parameter_1 = 0.5; r73_parameter_2 = 0.005;
  r74: pEGF_EGFR2_pShc_Grb2_SOS_cbl + EPn -> pEGF_EGFR2_pShc_Grb2_SOS_cbl_EPn; unnamed*Function_for_r74(pEGF_EGFR2_pShc_Grb2_SOS_cbl_EPn, r74_parameter_1, pEGF_EGFR2_pShc_Grb2_SOS_cbl, EPn, r74_parameter_2, unnamed);
    r74_parameter_1 = 0.1; r74_parameter_2 = 5;
  r75: pEGF_EGFR2_pShc_Grb2_SOS_cbl_EPn => cbl + Grb2_SOS + EPn + pShc; unnamed*Function_for_r75(pEGF_EGFR2_pShc_Grb2_SOS_cbl_EPn, r75_parameter_1, unnamed);
    r75_parameter_1 = 0.001;
  r76: pEGF_EGFR2_Grb2_SOS + cbl -> pEGF_EGFR2_Grb2_SOS_cbl; unnamed*Function_for_r76(cbl, pEGF_EGFR2_Grb2_SOS_cbl, r76_parameter_1, unnamed, pEGF_EGFR2_Grb2_SOS, r76_parameter_2);
    r76_parameter_1 = 0.005; r76_parameter_2 = 0.5;
  r77: pEGF_EGFR2_Grb2_SOS_cbl + EPn -> pEGF_EGFR2_Grb2_SOS_cbl_EPn; unnamed*Function_for_r77(pEGF_EGFR2_Grb2_SOS_cbl_EPn, pEGF_EGFR2_Grb2_SOS_cbl, r77_parameter_1, EPn, unnamed, r77_parameter_2);
    r77_parameter_1 = 5; r77_parameter_2 = 0.1;
  r78: pEGF_EGFR2_Grb2_SOS_cbl_EPn => cbl + Grb2_SOS + EPn; unnamed*Function_for_r78(pEGF_EGFR2_Grb2_SOS_cbl_EPn, r78_parameter_1, unnamed);
    r78_parameter_1 = 0.001;
  r79: pEGF_EGFR2 + cbl -> pEGF_EGFR2_cbl; unnamed*Function_for_r79(cbl, r79_parameter_1, pEGF_EGFR2, unnamed, pEGF_EGFR2_cbl, r79_parameter_2);
    r79_parameter_1 = 0.005; r79_parameter_2 = 0.5;
  r80: pEGF_EGFR2_cbl + EPn -> pEGF_EGFR2_cbl_EPn; unnamed*Function_for_r80(r80_parameter_1, pEGF_EGFR2_cbl_EPn, EPn, r80_parameter_2, unnamed, pEGF_EGFR2_cbl);
    r80_parameter_1 = 0.1; r80_parameter_2 = 5;
  r81: pEGF_EGFR2_cbl_EPn => cbl + EPn; unnamed*Function_for_r81(r81_parameter_1, pEGF_EGFR2_cbl_EPn, unnamed);
    r81_parameter_1 = 0.001;
  r82: pEGF_EGFR2 + PI3K -> pEGF_EGFR2_PI3K; unnamed*Function_for_r82(r82_parameter_1, pEGF_EGFR2_PI3K, PI3K, r82_parameter_2, pEGF_EGFR2, unnamed);
    r82_parameter_1 = 14; r82_parameter_2 = 0.1743;
  r83: pEGF_EGFR2_PI3K -> pEGF_EGFR2_pPI3K; unnamed*Function_for_r83(pEGF_EGFR2_PI3K, pEGF_EGFR2_pPI3K, r83_parameter_1, unnamed, r83_parameter_2);
    r83_parameter_1 = 0.0003372; r83_parameter_2 = 33.72;
  r84: pEGF_EGFR2_PI3K -> pEGF_EGFR2 + pPI3K; unnamed*Function_for_r84(pEGF_EGFR2_PI3K, pPI3K, r84_parameter_1, r84_parameter_2, pEGF_EGFR2, unnamed);
    r84_parameter_1 = 0.09; r84_parameter_2 = 0.1764;
  r85: TP4 + pPI3K -> TP4_pPI3K; unnamed*Function_for_r85(r85_parameter_1, pPI3K, r85_parameter_2, TP4_pPI3K, unnamed, TP4);
    r85_parameter_1 = 1; r85_parameter_2 = 0.038;
  r86: TP4_pPI3K => TP4_PI3K; unnamed*Function_for_r86(r86_parameter_1, TP4_pPI3K, unnamed);
    r86_parameter_1 = 0.595;
  r87: TP4_PI3K -> TP4 + PI3K; unnamed*Function_for_r87(PI3K, TP4_PI3K, r87_parameter_1, r87_parameter_2, unnamed, TP4);
    r87_parameter_1 = 2.297e-6; r87_parameter_2 = 4.7e-6;
  r88: pPI3K + PIP2 -> pPI3K_PIP2; unnamed*Function_for_r88(pPI3K_PIP2, r88_parameter_1, r88_parameter_2, pPI3K, PIP2, unnamed);
    r88_parameter_1 = 3.5; r88_parameter_2 = 25;
  r89: pPI3K_PIP2 => pPI3K + PIP3; unnamed*Function_for_r89(pPI3K_PIP2, r89_parameter_1, unnamed);
    r89_parameter_1 = 25;
  r90: Akt + PIP3 -> Aktm; unnamed*Function_for_r90(r90_parameter_1, Aktm, Akt, PIP3, unnamed, r90_parameter_2);
    r90_parameter_1 = 10; r90_parameter_2 = 3;
  r91: Aktm + PDK1 -> Aktm_PDK1; unnamed*Function_for_r91(Aktm, Aktm_PDK1, PDK1, r91_parameter_1, unnamed, r91_parameter_2);
    r91_parameter_1 = 1; r91_parameter_2 = 10;
  r92: Aktm_PDK1 => pAktm_PDK1; unnamed*Function_for_r92(r92_parameter_1, Aktm_PDK1, unnamed);
    r92_parameter_1 = 10;
  r93: pAktm_PDK1 -> pAktm + PDK1; unnamed*Function_for_r93(r93_parameter_1, pAktm, PDK1, r93_parameter_2, pAktm_PDK1, unnamed);
    r93_parameter_1 = 0.005; r93_parameter_2 = 0.1;
  r94: pAktm -> pAkt + PIP3; unnamed*Function_for_r94(r94_parameter_1, pAkt, pAktm, r94_parameter_2, PIP3, unnamed);
    r94_parameter_1 = 0.001; r94_parameter_2 = 1;
  r95: pAkt_Takt => Akt_Takt; unnamed*Function_for_r95(r95_parameter_1, pAkt_Takt, unnamed);
    r95_parameter_1 = 0.05;
  r96: Akt_Takt -> Akt + Takt; unnamed*Function_for_r96(Takt, Akt_Takt, r96_parameter_1, r96_parameter_2, Akt, unnamed);
    r96_parameter_1 = 0.001; r96_parameter_2 = 0.001;
  r97: pAkt + Takt -> pAkt_Takt; unnamed*Function_for_r97(Takt, pAkt, pAkt_Takt, r97_parameter_1, r97_parameter_2, unnamed);
    r97_parameter_1 = 1; r97_parameter_2 = 10;
  r98: pAktm + Takt -> pAktm_Takt; unnamed*Function_for_r98(Takt, r98_parameter_1, pAktm_Takt, pAktm, r98_parameter_2, unnamed);
    r98_parameter_1 = 10; r98_parameter_2 = 1;
  r99: pAktm_Takt => Aktm_Takt; unnamed*Function_for_r99(pAktm_Takt, unnamed, r99_parameter_1);
    r99_parameter_1 = 0.05;
  r100: Aktm_Takt -> Aktm + Takt; unnamed*Function_for_r100(Takt, r100_parameter_1, Aktm, r100_parameter_2, Aktm_Takt, unnamed);
    r100_parameter_1 = 0.001; r100_parameter_2 = 0.001;
  r101: pAktm_PDK1 + Takt -> pAktm_PDK1_Takt; unnamed*Function_for_r101(Takt, r101_parameter_1, pAktm_PDK1_Takt, pAktm_PDK1, unnamed, r101_parameter_2);
    r101_parameter_1 = 10; r101_parameter_2 = 1;
  r102: pAktm_PDK1_Takt => Aktm_PDK1_Takt; unnamed*Function_for_r102(pAktm_PDK1_Takt, r102_parameter_1, unnamed);
    r102_parameter_1 = 0.05;
  r103: Aktm_PDK1_Takt -> Aktm_PDK1 + Takt; unnamed*Function_for_r103(Takt, r103_parameter_1, Aktm_PDK1, r103_parameter_2, Aktm_PDK1_Takt, unnamed);
    r103_parameter_1 = 0.001; r103_parameter_2 = 0.001;
  r104: Raf1active + $pAkt_total => pRaf1active + $pAkt_total; unnamed*Function_for_r104(r104_parameter_1, r104_parameter_2, pAkt_total, Raf1active, unnamed);
    r104_parameter_1 = 0.2; r104_parameter_2 = 0.1;
  r105: pRaf1active => Raf1active; unnamed*Function_for_r105(r105_parameter_1, pRaf1active, unnamed);
    r105_parameter_1 = 1;
  _106: pEGF_EGFR2 + STAT3c -> pEGF_EGFR2_STAT3c; unnamed*Function_for_106(STAT3c, _106_parameter_1, pEGF_EGFR2_STAT3c, _106_parameter_2, pEGF_EGFR2, unnamed);
    _106_parameter_1 = 11.74; _106_parameter_2 = 5.5;
  _107: pEGF_EGFR2_STAT3c => pEGF_EGFR2 + pSTAT3c; unnamed*Function_for_107(pEGF_EGFR2_STAT3c, _107_parameter_1, unnamed);
    _107_parameter_1 = 0.4;
  _108: pEGF_EGFR2 + pSTAT3c -> pEGF_EGFR2_pSTAT3c; unnamed*Function_for_108(pEGF_EGFR2_pSTAT3c, _108_parameter_1, pSTAT3c, pEGF_EGFR2, unnamed, _108_parameter_2);
    _108_parameter_1 = 5; _108_parameter_2 = 0.5;
  _109: pSTAT3c + PP1 -> pSTAT3c_PP1; unnamed*Function_for_109(_109_parameter_1, _109_parameter_2, pSTAT3c, PP1, pSTAT3c_PP1, unnamed);
    _109_parameter_1 = 0.2; _109_parameter_2 = 1;
  _110: pSTAT3c_PP1 => STAT3c + PP1; unnamed*Function_for_110(_110_parameter_1, pSTAT3c_PP1, unnamed);
    _110_parameter_1 = 0.003;
  _111: 2 pSTAT3c -> pSTAT3c_pSTAT3c; unnamed*Function_for_111(pSTAT3c_pSTAT3c, _111_parameter_1, _111_parameter_2, pSTAT3c, unnamed);
    _111_parameter_1 = 0.1; _111_parameter_2 = 20;
  _112: pSTAT3c_pSTAT3c + PP1 -> pSTAT3c_pSTAT3c_PP1; unnamed*Function_for_112(_112_parameter_1, pSTAT3c_pSTAT3c_PP1, pSTAT3c_pSTAT3c, _112_parameter_2, PP1, unnamed);
    _112_parameter_1 = 0.2; _112_parameter_2 = 1;
  _113: pSTAT3c_pSTAT3c_PP1 => STAT3c_pSTAT3c + PP1; unnamed*Function_for_113(pSTAT3c_pSTAT3c_PP1, _113_parameter_1, unnamed);
    _113_parameter_1 = 0.003;
  _114: STAT3c + pSTAT3c -> STAT3c_pSTAT3c; unnamed*Function_for_114(STAT3c, _114_parameter_1, _114_parameter_2, pSTAT3c, STAT3c_pSTAT3c, unnamed);
    _114_parameter_1 = 0.2; _114_parameter_2 = 0.0002;
  _115: pSTAT3c_pSTAT3c => pSTAT3n_pSTAT3n; unnamed*Function_for_115(_115_parameter_1, pSTAT3c_pSTAT3c, unnamed);
    _115_parameter_1 = 0.005;
  _116: 2 pSTAT3n -> pSTAT3n_pSTAT3n; unnamed*Function_for_116(pSTAT3n_pSTAT3n, _116_parameter_1, _116_parameter_2, unnamed, pSTAT3n);
    _116_parameter_1 = 0.1; _116_parameter_2 = 20;
  _117: pSTAT3n_pSTAT3n + PP2 -> pSTAT3n_pSTAT3n_PP2; unnamed*Function_for_117(PP2, pSTAT3n_pSTAT3n_PP2, _117_parameter_1, pSTAT3n_pSTAT3n, _117_parameter_2, unnamed);
    _117_parameter_1 = 1; _117_parameter_2 = 0.2;
  _118: pSTAT3n_pSTAT3n_PP2 => STAT3n_pSTAT3n + PP2; unnamed*Function_for_118(pSTAT3n_pSTAT3n_PP2, _118_parameter_1, unnamed);
    _118_parameter_1 = 0.005;
  _119: STAT3n + pSTAT3n -> STAT3n_pSTAT3n; unnamed*Function_for_119(_119_parameter_1, STAT3n, STAT3n_pSTAT3n, _119_parameter_2, unnamed, pSTAT3n);
    _119_parameter_1 = 0.2; _119_parameter_2 = 0.0002;
  _120: pSTAT3n + PP2 -> pSTAT3n_PP2; unnamed*Function_for_120(_120_parameter_1, PP2, pSTAT3n_PP2, _120_parameter_2, unnamed, pSTAT3n);
    _120_parameter_1 = 0.2; _120_parameter_2 = 1;
  _121: pSTAT3n_PP2 => STAT3n + PP2; unnamed*Function_for_121(_121_parameter_1, pSTAT3n_PP2, unnamed);
    _121_parameter_1 = 0.005;
  _122: STAT3n => STAT3c; unnamed*Function_for_122(_122_parameter_1, STAT3n, unnamed);
    _122_parameter_1 = 0.05;
  _124: pEGF_EGFR2_STAT3c + cbl -> pEGF_EGFR2_STAT3c_cbl; unnamed*Function_for_124(cbl, pEGF_EGFR2_STAT3c, pEGF_EGFR2_STAT3c_cbl, _124_parameter_1, _124_parameter_2, unnamed);
    _124_parameter_1 = 0.005; _124_parameter_2 = 0.5;
  _125: pEGF_EGFR2_STAT3c_cbl + EPn -> pEGF_EGFR2_STAT3c_cbl_EPn; unnamed*Function_for_125(pEGF_EGFR2_STAT3c_cbl_EPn, _125_parameter_1, pEGF_EGFR2_STAT3c_cbl, EPn, unnamed, _125_parameter_2);
    _125_parameter_1 = 5; _125_parameter_2 = 0.1;
  _126: pEGF_EGFR2_STAT3c_cbl_EPn => STAT3c + cbl + EPn; unnamed*Function_for_126(pEGF_EGFR2_STAT3c_cbl_EPn, _126_parameter_1, unnamed);
    _126_parameter_1 = 0.001;
  _127: pEGF_EGFR2_PI3K + cbl -> pEGF_EGFR2_PI3K_cbl; unnamed*Function_for_127(pEGF_EGFR2_PI3K, cbl, pEGF_EGFR2_PI3K_cbl, _127_parameter_1, unnamed, _127_parameter_2);
    _127_parameter_1 = 0.5; _127_parameter_2 = 0.005;
  _128: pEGF_EGFR2_PI3K_cbl + EPn -> pEGF_EGFR2_PI3K_cbl_EPn; unnamed*Function_for_128(pEGF_EGFR2_PI3K_cbl, _128_parameter_1, _128_parameter_2, EPn, pEGF_EGFR2_PI3K_cbl_EPn, unnamed);
    _128_parameter_1 = 5; _128_parameter_2 = 0.1;
  _129: pEGF_EGFR2_PI3K_cbl_EPn => PI3K + EPn; unnamed*Function_for_129(_129_parameter_1, pEGF_EGFR2_PI3K_cbl_EPn, unnamed);
    _129_parameter_1 = 0.001;
  r123: PIP3 => PIP2; unnamed*Function_for_r123(r123_parameter_1, PIP3, unnamed);
    r123_parameter_1 = 17;
  _130: E2 + GPR30 -> E2_GPR30; unnamed*Function_for_130(E2, _130_parameter_1, GPR30, unnamed, E2_GPR30, _130_parameter_2);
    _130_parameter_1 = 0.0012; _130_parameter_2 = 1300000;
  _131: Gq_trimer => Ga_GTP; unnamed*Function_for_131(_131_parameter_1, Gq_trimer, unnamed);
    _131_parameter_1 = 0.000311;
  _132: Ga_GTP => Gq_trimer; unnamed*Function_for_132(_132_parameter_1, Ga_GTP, unnamed);
    _132_parameter_1 = 5.099;
  _133: E2_GPR30 + Gq_trimer => Ga_GTP + E2_GPR30; unnamed*Function_for_133(_133_parameter_1, Gq_trimer, unnamed, E2_GPR30);
    _133_parameter_1 = 7.6;
  _134: E2_GPR30 + GRK2_3 => E2_GPR30_p + GRK2_3; unnamed*Function_for_134(GRK2_3, _134_parameter_1, unnamed, E2_GPR30);
    _134_parameter_1 = 2.27;
  _135: E2_GPR30_p + barr1 => E2_barr1_GPR30_p; unnamed*Function_for_135(E2_GPR30_p, barr1, unnamed, _135_parameter_1);
    _135_parameter_1 = 2.61;
  _136: E2_barr1_GPR30_p => E2_GPR30_p + barr1; unnamed*Function_for_136(E2_barr1_GPR30_p, _136_parameter_1, unnamed);
    _136_parameter_1 = 0.006;
  _137: E2_barr1_GPR30_p => barr1 + E2_GPR30; unnamed*Function_for_137(_137_parameter_1, E2_barr1_GPR30_p, unnamed);
    _137_parameter_1 = 6.54e-5;
  _138: E2_GPR30_p + barr2 => E2_barr2_GPR30_p; unnamed*Function_for_138(_138_parameter_1, E2_GPR30_p, barr2, unnamed);
    _138_parameter_1 = 2.59;
  _139: E2_barr2_GPR30_p => E2_GPR30_p + barr2; unnamed*Function_for_139(_139_parameter_1, E2_barr2_GPR30_p, unnamed);
    _139_parameter_1 = 0.031;
  _140: E2_barr2_GPR30_p => barr2 + E2_GPR30; unnamed*Function_for_140(E2_barr2_GPR30_p, _140_parameter_1, unnamed);
    _140_parameter_1 = 0.072;
  _141: E2_GPR30 + GRK5_6 => E2_GPR30_p2 + GRK5_6; unnamed*Function_for_141(_141_parameter_1, GRK5_6, unnamed, E2_GPR30);
    _141_parameter_1 = 0.59;
  _142: E2_GPR30_p2 => E2_GPR30; unnamed*Function_for_142(E2_GPR30_p2, _142_parameter_1, unnamed);
    _142_parameter_1 = 0.067;
  _143: E2_GPR30 + barr2 => E2_barr2_GPR30; unnamed*Function_for_143(_143_parameter_1, barr2, unnamed, E2_GPR30);
    _143_parameter_1 = 0.205;
  _144: E2_barr2_GPR30 => E2_GPR30 + barr2; unnamed*Function_for_144(E2_barr2_GPR30, unnamed, _144_parameter_1);
    _144_parameter_1 = 1.05;
  _145: E2_GPR30_p2 + barr2 => E2_barr2_GPR30_p2; unnamed*Function_for_145(_145_parameter_1, E2_GPR30_p2, barr2, unnamed);
    _145_parameter_1 = 1.04;
  _146: E2_barr2_GPR30_p2 => E2_GPR30_p2 + barr2; unnamed*Function_for_146(_146_parameter_1, E2_barr2_GPR30_p2, unnamed);
    _146_parameter_1 = 0.347;
  _147: E2_barr2_GPR30 + ERK => ppERK + E2_barr2_GPR30; unnamed*Function_for_147(ERK, E2_barr2_GPR30, unnamed, _147_parameter_1);
    _147_parameter_1 = 0.00042;
  _148: E2_barr2_GPR30_p2 + ERK => ppERK + E2_barr2_GPR30_p2; unnamed*Function_for_148(_148_parameter_1, ERK, E2_barr2_GPR30_p2, unnamed);
    _148_parameter_1 = 14.44;
  _149: Ga_GTP + PIP2 => DAG + Ga_GTP; unnamed*Function_for_149(_149_parameter_1, Ga_GTP, PIP2, unnamed);
    _149_parameter_1 = 4.63;
  _150: DAG + PKc => DAG + PKc_active; unnamed*Function_for_150(PKc, DAG, _150_parameter_1, unnamed);
    _150_parameter_1 = 0.079;
  _151: PKc_active => PKc; unnamed*Function_for_151(_151_parameter_1, PKc_active, unnamed);
    _151_parameter_1 = 1.77;
  _152: DAG => PA; unnamed*Function_for_152(_152_parameter_1, DAG, unnamed);
    _152_parameter_1 = 0.15;
  _153: PKc_active + SOS => Grb2_SOS + PKc_active; unnamed*Function_for_153(_153_parameter_1, SOS, PKc_active, unnamed);
    _153_parameter_1 = 4;
  _154: PKc_active + Ras_GAP => Ras_GTP_Ras_GAP + PKc_active; unnamed*Function_for_154(Ras_GAP, _154_parameter_1, PKc_active, unnamed);
    _154_parameter_1 = 4;
  _155: PKc_active + Raf1 => Raf1active + PKc_active; unnamed*Function_for_155(Raf1, _155_parameter_1, PKc_active, unnamed);
    _155_parameter_1 = 4;
end
