// SBML level 2 version 4
// dcterms:bibliographicCitation: Mathematical modeling of mutant transferrin-CRM107 molecular conjugates for cancer therapy. urn:miriam:pubmed:28065783

function Function_for_formation_of_bulk_extracellular_DT(n_cell, V_bulk, NA, k_DT_r, DT_DTR_surf)
  n_cell/V_bulk*NA*k_DT_r*DT_DTR_surf;
end

function Function_for_production_of_surface_DTR(k_DT_r, DT_DTR_surf, k_deg, DT_DTR_lys, DTR_lys, DTB_DTR_lys)
  k_DT_r*DT_DTR_surf + k_deg*DT_DTR_lys + k_deg*DTR_lys + k_deg*DTB_DTR_lys;
end

function Function_for_dissociation_of_endosomal_DTR(k_lys, DTR_en)
  k_lys*DTR_en;
end

function Function_for_Removal_of_endosomal_DTB_DTR_complex(k_lys, DTB_DTRen)
  k_lys*DTB_DTRen;
end
Function_for_Removal_of_endosomal_DTB_DTR_complex is "Function for Removal of endosomal DTB/DTR complex";

function Function_for_species_balance_formation_of_DTB_DTR_complex(k_lys, DTB_DTRen)
  k_lys*DTB_DTRen;
end
Function_for_species_balance_formation_of_DTB_DTR_complex is "Function for species balance formation of DTB/DTR complex";

function Function_for_degradation_of_bulk_extracellular_DT(n_cell, V_bulk, NA, k_DT, DT_bulk, DTR_surf)
  n_cell/V_bulk*NA*k_DT*DT_bulk*DTR_surf;
end

function Function_for_formation_of_endosomal_DTB_DTR_complex(k_trans, f_DT, DT_DTRen)
  k_trans*f_DT*DT_DTRen;
end
Function_for_formation_of_endosomal_DTB_DTR_complex is "Function for formation of endosomal DTB/DTR complex";

function Function_for_dissociation_of_DT_DTR_complex(k_trans, f_DT, DT_DTRen, k_lys)
  k_trans*f_DT*DT_DTRen + k_lys*(1 - f_DT)*DT_DTRen;
end
Function_for_dissociation_of_DT_DTR_complex is "Function for dissociation of DT/DTR complex";

function Function_for_formation_of_cytotosolic_DTA(k_trsns, f_DT, DT_DTRen)
  k_trsns*f_DT*DT_DTRen;
end

function Function_for_removal_of_lysosomal_DTR(k_deg, DTR_lys)
  k_deg*DTR_lys;
end

function Function_for_removal_of_species_balance_for_surface_DTR(k_int_DT, DTR_surf, k_DT, DT_bulk)
  k_int_DT*DTR_surf + k_DT*DT_bulk*DTR_surf;
end

function Function_for_species_balance_for_surface_DT_DTR_surf(k_DT, DT_bulk, DTR_surf)
  k_DT*DT_bulk*DTR_surf;
end

function Function_for_formation_of_endosomal_DTR(k_int_DT, DTR_surf)
  k_int_DT*DTR_surf;
end

function Function_for_dissociation_of_DT_DTR_complex_from_surface(k_DT_r, DT_DTR_surf, k_int_DT)
  k_DT_r*DT_DTR_surf + k_int_DT*DT_DTR_surf;
end

function Function_for_formation_of_endosomal_DT_DTR_complex(k_int_DT, DT_DTR_surf)
  k_int_DT*DT_DTR_surf;
end
Function_for_formation_of_endosomal_DT_DTR_complex is "Function for formation of endosomal DT/DTR complex";

function Function_for_Removal_of_species_balance_for_lysosomal_DTB_DTR_complex(k_deg, DTB_DTR_lys)
  k_deg*DTB_DTR_lys;
end
Function_for_Removal_of_species_balance_for_lysosomal_DTB_DTR_complex is "Function for Removal of species balance for lysosomal DTB/DTR complex";

function Function_for_production_of_DT_DTR_complex(k_lys, f_DT, DT_DTRen)
  k_lys*(1 - f_DT)*DT_DTRen;
end
Function_for_production_of_DT_DTR_complex is "Function for production of DT/DTR complex";

function Function_for_production_of_lysosomal_DTR(k_lys, DTR_en)
  k_lys*DTR_en;
end

function Function_for_removal_of_DT_DTR_complex(k_deg, DT_DTR_lys)
  k_deg*DT_DTR_lys;
end
Function_for_removal_of_DT_DTR_complex is "Function for removal of DT/DTR complex";

model New_Model()
  // Yoon2017 - Mathematical Modeling of Mutant Transferrin-CRM107 Molecular Conjugates for Cancer Therapy
  // Mathematical modeling of mutant transferrin-CRM107 molecular conjugates for cancer therapy.
  // Yoon DJ1, Chen KY1, Lopes AM1, Pan AA1, Shiloach J2, Mason AB3, Kamei DT4.
  // Author information
  // 1
  // Department of Bioengineering, University of California, Los Angeles, 420 Westwood Plaza, 5121 Engineering V, Los Angeles, CA 90095, USA.
  // 2
  // Biotechnology Core Laboratory, National Institute of Diabetes and Digestive and Kidney Diseases, National Institute of Health, Bethesda, MD 20892, USA.
  // 3
  // Department of Biochemistry, University of Vermont College of Medicine, Burlington, VT 05405, USA.
  // 4
  // Department of Bioengineering, University of California, Los Angeles, 420 Westwood Plaza, 5121 Engineering V, Los Angeles, CA 90095, USA. Electronic address: kamei@seas.ucla.edu.
  // Abstract
  // The transferrin (Tf) trafficking pathway is a promising mechanism for use in targeted cancer therapy due to the overexpression of transferrin receptors (TfRs) on cancerous cells. We have previously developed a mathematical model of the Tf/TfR trafficking pathway to improve the efficiency of Tf as a drug carrier. By using diphtheria toxin (DT) as a model toxin, we found that mutating the Tf protein to change its iron release rate improves cellular association and efficacy of the drug. Though this is an improvement upon using wild-type Tf as the targeting ligand, conjugated toxins like DT are unfortunately still highly cytotoxic at off-target sites. In this work, we address this hurdle in cancer research by developing a mathematical model to predict the efficacy and selectivity of Tf conjugates that use an alternative toxin. For this purpose, we have chosen to study a mutant of DT, cross-reacting material 107 (CRM107). First, we developed a mathematical model of the Tf-DT trafficking pathway by extending our Tf/TfR model to include intracellular trafficking via DT and DT receptors. Using this mathematical model, we subsequently investigated the efficacy of several conjugates in cancer cells: DT and CRM107 conjugated to wild-type Tf, as well as to our engineered mutant Tf proteins (K206E/R632A Tf and K206E/R534A Tf). We also investigated the selectivity of mutant Tf-CRM107 against non-neoplastic cells. Through the use of our mathematical model, we predicted that (i) mutant Tf-CRM107 exhibits a greater cytotoxicity than wild-type Tf-CRM107 against cancerous cells, (ii) this improvement was more drastic with CRM107 conjugates than with DT conjugates, and (iii) mutant Tf-CRM107 conjugates were selective against non-neoplastic cells. These predictions were validated with in vitro cytotoxicity experiments, demonstrating that mutant Tf-CRM107 conjugates is indeed a more suitable therapeutic agent. Validation from in vitro experiments also confirmed that such whole-cell kinetic models can be useful in cancer therapeutic design.
  // Copyright © 2017 Elsevier Ltd. All rights reserved.
  // isDescribedBy pubmed:28065783

  // Compartments:
  compartment compartment = 1;

  // Species:
  species DT_bulk in compartment = 1;
  species DTR_surf in compartment = 1;
  species DT_DTR_surf in compartment = 1;
  species DTR_en in compartment = 1;
  species DT_DTRen in compartment = 1;
  species DTB_DTRen in compartment = 1;
  species DTR_lys in compartment = 1;
  species DT_DTR_lys in compartment = 1;
  species DTB_DTR_lys in compartment = 1;
  species DRB_DTR_lys in compartment = 1;
  species DTA_cyt in compartment = 1;

  // Parameters:
  k_DT = 19000000;
  k_DT_r = 0.019;
  k_int_DT = 0.028;
  k_trans = 0.15;
  k_lys = 0.18;
  k_deg = 0.04;
  f_DT = 0.333;
  n_cell = 475000;
  V_bulk = 0.0005;
  NA = 6.02e23;

  // Reactions:
  Formation_of_bulk_extracellular_DT: => DT_bulk; compartment*Function_for_formation_of_bulk_extracellular_DT(n_cell, V_bulk, NA, k_DT_r, DT_DTR_surf);  // modifiers: DT_DTR_surf
  Degradation_of_bulk_extracellular_DT: DT_bulk => ; compartment*Function_for_degradation_of_bulk_extracellular_DT(n_cell, V_bulk, NA, k_DT, DT_bulk, DTR_surf);  // modifiers: DTR_surf
  Production_of_surface_DTR: => DTR_surf; compartment*Function_for_production_of_surface_DTR(k_DT_r, DT_DTR_surf, k_deg, DT_DTR_lys, DTR_lys, DTB_DTR_lys);  // modifiers: DT_DTR_surf, DT_DTR_lys, DTR_lys, DTB_DTR_lys
  Removal_of_species_balance_for_surface_DTR: DTR_surf => ; compartment*Function_for_removal_of_species_balance_for_surface_DTR(k_int_DT, DTR_surf, k_DT, DT_bulk);  // modifiers: DT_bulk
  Formation_of_species_balance_for_surface_DT__DTR_complex: => DT_DTR_surf; compartment*Function_for_species_balance_for_surface_DT_DTR_surf(k_DT, DT_bulk, DTR_surf); Formation_of_species_balance_for_surface_DT__DTR_complex is "Formation of species balance for surface DT/ DTR complex";  // modifiers: DT_bulk, DTR_surf
  Dissociation_of_surface_DT_DTR_complex: DT_DTR_surf => ; compartment*Function_for_dissociation_of_DT_DTR_complex_from_surface(k_DT_r, DT_DTR_surf, k_int_DT);
  Formation_of_endosomal_DTR: => DTR_en; compartment*Function_for_formation_of_endosomal_DTR(k_int_DT, DTR_surf);  // modifiers: DTR_surf
  Dissociation_of_endosomal_DTR: DTR_en => ; compartment*Function_for_dissociation_of_endosomal_DTR(k_lys, DTR_en);
  Formation_of_endosomal_DT_DTR_complex: => DT_DTRen; compartment*Function_for_formation_of_endosomal_DT_DTR_complex(k_int_DT, DT_DTR_surf); Formation_of_endosomal_DT_DTR_complex is "Formation of endosomal DT/DTR complex";  // modifiers: DT_DTR_surf
  Dissociation_of_DT_DTR_complex: DT_DTRen => ; compartment*Function_for_dissociation_of_DT_DTR_complex(k_trans, f_DT, DT_DTRen, k_lys); Dissociation_of_DT_DTR_complex is "Dissociation of DT/DTR complex";
  Species_balance_formation_for_endosomal_DTB_DTR_complex: => DTB_DTRen; compartment*Function_for_formation_of_endosomal_DTB_DTR_complex(k_trans, f_DT, DT_DTRen); Species_balance_formation_for_endosomal_DTB_DTR_complex is "Species balance formation for endosomal DTB/DTR complex";  // modifiers: DT_DTRen
  Removal_of_endosomal_DTB_DTR_complex: DTB_DTRen => ; compartment*Function_for_Removal_of_endosomal_DTB_DTR_complex(k_lys, DTB_DTRen); Removal_of_endosomal_DTB_DTR_complex is "Removal of endosomal DTB/DTR complex";
  Production_of_lysosomal_DTR: => DTR_lys; compartment*Function_for_production_of_lysosomal_DTR(k_lys, DTR_en);  // modifiers: DTR_en
  Removal_of_lysosomal_DTR: DTR_lys => ; compartment*Function_for_removal_of_lysosomal_DTR(k_deg, DTR_lys);
  Production_of_lysosomal_DT_DTR_complex: => DT_DTR_lys; compartment*Function_for_production_of_DT_DTR_complex(k_lys, f_DT, DT_DTRen); Production_of_lysosomal_DT_DTR_complex is "Production of lysosomal DT/DTR complex";  // modifiers: DT_DTRen
  Removal_of_lysosomal_DT_DTR_complex: DT_DTR_lys => ; compartment*Function_for_removal_of_DT_DTR_complex(k_deg, DT_DTR_lys); Removal_of_lysosomal_DT_DTR_complex is "Removal of lysosomal DT/DTR complex";
  species_balance_formation_of_DTB_DTR_complex: => DTB_DTR_lys; compartment*Function_for_species_balance_formation_of_DTB_DTR_complex(k_lys, DTB_DTRen); species_balance_formation_of_DTB_DTR_complex is "species balance formation of DTB/DTR complex";  // modifiers: DTB_DTRen
  Removal_of_species_balance_for_lysosomal_DTB_DTR_complex: DRB_DTR_lys => ; compartment*Function_for_Removal_of_species_balance_for_lysosomal_DTB_DTR_complex(k_deg, DRB_DTR_lys); Removal_of_species_balance_for_lysosomal_DTB_DTR_complex is "Removal of species balance for lysosomal DTB/DTR complex";
  Formation_of_cytosolic_DTA: => DTA_cyt; compartment*Function_for_formation_of_cytotosolic_DTA(k_trans, f_DT, DT_DTRen);  // modifiers: DT_DTRen

  // Unit definitions:
  unit volume = 1e-3 litre;
  unit substance = 1e-3 mole;
end
