// SBML level 2 version 4

function Function_for_SOCS3_degradation(APAP, DCF, SOCS3, apap_socs3_deg, dcf_socs3_deg, socs3_deg)
  SOCS3*socs3_deg/((APAP*apap_socs3_deg + 1)*(DCF*dcf_socs3_deg + 1));
end
Function_for_SOCS3_degradation is "Function for SOCS3 degradation_1";

function Function_for_SOCS3_translation(APAP, DCF, SOCS3RNA, apap_socs3_pro, cycloHex, dcf_socs3_pro, socs3_pro, socs3_sat)
  -(SOCS3RNA*socs3_pro*(cycloHex - 1))/((SOCS3RNA + socs3_sat)*(APAP*apap_socs3_pro + 1)*(DCF*dcf_socs3_pro + 1));
end
Function_for_SOCS3_translation is "Function for SOCS3 translation_1";

function Function_for_SOCS3_mRNA_degradation(APAP, DCF, SOCS3RNA, apap_socs3rna_deg, dcf_socs3rna_deg, socs3rna_deg)
  SOCS3RNA*socs3rna_deg/((APAP*apap_socs3rna_deg + 1)*(DCF*dcf_socs3rna_deg + 1));
end
Function_for_SOCS3_mRNA_degradation is "Function for SOCS3 mRNA degradation_1";

function Function_for_SOCS3_transcriptional_delay_4(APAP, ActD, DCF, apap_socs3rna_delay, dcf_socs3rna_delay, nSOCS3RNA4, socs3rna_delay)
  -(nSOCS3RNA4*socs3rna_delay*(ActD - 1))/((APAP*apap_socs3rna_delay + 1)*(DCF*dcf_socs3rna_delay + 1));
end
Function_for_SOCS3_transcriptional_delay_4 is "Function for SOCS3 transcriptional delay_4_1";

function Function_for_SOCS3_transcriptional_delay_5(APAP, ActD, DCF, apap_socs3rna_delay, dcf_socs3rna_delay, nSOCS3RNA5, nuc, socs3rna_delay)
  nuc*(-(nSOCS3RNA5*socs3rna_delay*(ActD - 1))/((APAP*apap_socs3rna_delay + 1)*(DCF*dcf_socs3rna_delay + 1)));
end
Function_for_SOCS3_transcriptional_delay_5 is "Function for SOCS3 transcriptional delay_5_1";

function Function_for_SOCS3_transcriptional_delay_3(APAP, ActD, DCF, apap_socs3rna_delay, dcf_socs3rna_delay, nSOCS3RNA3, socs3rna_delay)
  -(nSOCS3RNA3*socs3rna_delay*(ActD - 1))/((APAP*apap_socs3rna_delay + 1)*(DCF*dcf_socs3rna_delay + 1));
end
Function_for_SOCS3_transcriptional_delay_3 is "Function for SOCS3 transcriptional delay_3_1";

function Function_for_HAMP_mRNA_transcription(ActD, BMPR_delay6, f_HAMP_SMAD, f_HAMP_STAT3, n_SMAD, n_STAT3, npSTAT3, nuc, omega_HAMP)
  nuc*(-(ActD - 1))*(f_HAMP_STAT3*npSTAT3^n_STAT3 + BMPR_delay6^n_SMAD*f_HAMP_SMAD + BMPR_delay6^n_SMAD*f_HAMP_SMAD*f_HAMP_STAT3*npSTAT3^n_STAT3*omega_HAMP);
end
Function_for_HAMP_mRNA_transcription is "Function for HAMP mRNA transcription_1";

function Function_for_HAMP_transcriptional_delay(APAP, ActD, apap_hamprna_delay, hamprna_delay, nHAMPRNA1)
  -(hamprna_delay*nHAMPRNA1*(ActD - 1))/(APAP*apap_hamprna_delay + 1);
end
Function_for_HAMP_transcriptional_delay is "Function for HAMP transcriptional delay_1";

function Function_for_HAMP_transcriptional_delay_2(APAP, ActD, apap_hamprna_delay, hamprna_delay, nHAMPRNA2)
  -(hamprna_delay*nHAMPRNA2*(ActD - 1))/(APAP*apap_hamprna_delay + 1);
end
Function_for_HAMP_transcriptional_delay_2 is "Function for HAMP transcriptional delay_2_1";

function Function_for_HAMP_transcriptional_delay_3(APAP, ActD, apap_hamprna_delay, hamprna_delay, nHAMPRNA3)
  -(hamprna_delay*nHAMPRNA3*(ActD - 1))/(APAP*apap_hamprna_delay + 1);
end
Function_for_HAMP_transcriptional_delay_3 is "Function for HAMP transcriptional delay_3_1";

function Function_for_HAMP_transcriptional_delay_4(APAP, ActD, apap_hamprna_delay, hamprna_delay, nHAMPRNA4)
  -(hamprna_delay*nHAMPRNA4*(ActD - 1))/(APAP*apap_hamprna_delay + 1);
end
Function_for_HAMP_transcriptional_delay_4 is "Function for HAMP transcriptional delay_4_1";

function Function_for_HAMP_transcriptional_delay_5(APAP, ActD, apap_hamprna_delay, hamprna_delay, nHAMPRNA5)
  -(hamprna_delay*nHAMPRNA5*(ActD - 1))/(APAP*apap_hamprna_delay + 1);
end
Function_for_HAMP_transcriptional_delay_5 is "Function for HAMP transcriptional delay_5_1";

function Function_for_HAMP_transcriptional_delay_6(APAP, ActD, apap_hamprna_delay, hamprna_delay, nHAMPRNA6)
  -(hamprna_delay*nHAMPRNA6*(ActD - 1))/(APAP*apap_hamprna_delay + 1);
end
Function_for_HAMP_transcriptional_delay_6 is "Function for HAMP transcriptional delay_6_1";

function Function_for_SOCS3_transcriptional_delay_2(APAP, ActD, DCF, apap_socs3rna_delay, dcf_socs3rna_delay, nSOCS3RNA2, socs3rna_delay)
  -(nSOCS3RNA2*socs3rna_delay*(ActD - 1))/((APAP*apap_socs3rna_delay + 1)*(DCF*dcf_socs3rna_delay + 1));
end
Function_for_SOCS3_transcriptional_delay_2 is "Function for SOCS3 transcriptional delay_2_1";

function Function_for_SOCS3_transcriptional_delay(APAP, ActD, DCF, apap_socs3rna_delay, dcf_socs3rna_delay, nSOCS3RNA1, socs3rna_delay)
  -(nSOCS3RNA1*socs3rna_delay*(ActD - 1))/((APAP*apap_socs3rna_delay + 1)*(DCF*dcf_socs3rna_delay + 1));
end
Function_for_SOCS3_transcriptional_delay is "Function for SOCS3 transcriptional delay_1";

function Function_for_SOCS3_transcription(ActD, DCF, dcf_f_SOCS3_STAT3, f_SOCS3_STAT3, n_STAT3, npSTAT3)
  -f_SOCS3_STAT3*npSTAT3^n_STAT3*(DCF*dcf_f_SOCS3_STAT3 + 1)*(ActD - 1);
end
Function_for_SOCS3_transcription is "Function for SOCS3 transcription_1";

function Function_for_STAT3_dephosphorylation__cytoplasm(npSTAT3, nuc, stat3_dea)
  nuc*npSTAT3*stat3_dea;
end
Function_for_STAT3_dephosphorylation__cytoplasm is "Function for STAT3 dephosphorylation (cytoplasm)_1";

function Function_for_Import_phosphorylated_STAT3(DCF, cpSTAT3, cyt, dcf_pstat3_imp, pstat3_imp)
  cyt*cpSTAT3*pstat3_imp*(DCF*dcf_pstat3_imp + 1);
end
Function_for_Import_phosphorylated_STAT3 is "Function for Import phosphorylated STAT3_1";

function Function_for_Phosphorylation_STAT3(APAP, K_transport, STAT3, apap_stat3_act, pJAK1_pgp130, receptor_pro, stat3_act)
  STAT3*pJAK1_pgp130*stat3_act/(receptor_pro*(APAP*apap_stat3_act + 1)*(K_transport + 1));
end
Function_for_Phosphorylation_STAT3 is "Function for Phosphorylation STAT3_1";

function Function_for_SOCS3_Bound_receptor_degradation(SOCS3, k_sat_SOCS3, pJAK1_pgp130, receptor_deg_socs3)
  SOCS3*pJAK1_pgp130*receptor_deg_socs3/(SOCS3 + k_sat_SOCS3);
end
Function_for_SOCS3_Bound_receptor_degradation is "Function for SOCS3_Bound receptor degradation_1";

function Function_for_Basal_receptor_phosphorylation(APAP, DCF, JAK1_gp130, apap_il6_basal, dcf_il6_basal, il6_act, il6_basal)
  JAK1_gp130*il6_act*il6_basal*(APAP*apap_il6_basal + 1)*(DCF*dcf_il6_basal + 1);
end
Function_for_Basal_receptor_phosphorylation is "Function for Basal receptor phosphorylation_1";

function Function_for_Receptor_phosphorylation(IL6, JAK1_gp130, il6_act)
  IL6*JAK1_gp130*il6_act;
end
Function_for_Receptor_phosphorylation is "Function for Receptor phosphorylation_1";

function Function_for_Receptor_production_2(APAP, ActD, DCF, apap_receptor_pro, cycloHex, dcf_receptor_pro, receptor_pro)
  receptor_pro*(ActD - 1)*(cycloHex - 1)/((APAP*apap_receptor_pro + 1)*(DCF*dcf_receptor_pro + 1));
end

function Function_for_Receptor_production(bmpr_deg_smad, bmpr_inh)
  bmpr_inh*bmpr_deg_smad;
end
Function_for_Receptor_production is "Function for Receptor production_1";

function Function_for_Basal_production_SMAD_inhibitor(ActD, DCF_mRNA_inh, DCF_slow, smadinh_basal)
  -(smadinh_basal*(ActD - 1))/(DCF_slow*DCF_mRNA_inh + 1);
end

function Function_for_Production_SMAD_inhibitor(ActD, BMPR_delay6, DCF_mRNA_inh, DCF_slow, SMAD6_mRNA_loss, k_mRNA_loss, nuc, smadinh_trans)
  nuc*(-(BMPR_delay6*smadinh_trans*(ActD - 1))/((DCF_slow*DCF_mRNA_inh + 1)*(SMAD6_mRNA_loss*k_mRNA_loss + 1)));
end

function Function_for_ID3_mRNA_production(BMPR_delay6, ID3_pro, nuc)
  nuc*BMPR_delay6*ID3_pro;
end

function Function_for_HAMP_mRNA_degradation(APAP, DCF, HAMPRNA, apap_hamprna_deg, dcf_hamprna_deg, hamprna_deg)
  HAMPRNA*hamprna_deg/((APAP*apap_hamprna_deg + 1)*(DCF*dcf_hamprna_deg + 1));
end
Function_for_HAMP_mRNA_degradation is "Function for HAMP mRNA degradation_1";

function Function_for_HAMP_transcriptional_delay_7(APAP, ActD, apap_hamprna_delay, hamprna_delay, nHAMPRNA7, nuc)
  nuc*(-(hamprna_delay*nHAMPRNA7*(ActD - 1))/(APAP*apap_hamprna_delay + 1));
end
Function_for_HAMP_transcriptional_delay_7 is "Function for HAMP transcriptional delay_7_1";

function Function_for_SMAD6_mediated_receptor_degradation_1(APAP, BMP, BMPR, DCF, Km_BMP, NoName_1, Noggin, SMAD6RNA, bmpr_deg_smad, cyt, k_APAP_decay, k_DCF_decay, k_act_APAP, k_act_DCF)
  cyt*(-(BMP*BMPR*SMAD6RNA*bmpr_deg_smad*(APAP*k_act_APAP*exp(-k_APAP_decay*NoName_1) + 1)*(DCF*k_act_DCF*exp(-k_DCF_decay*NoName_1) + 1)*(Noggin - 1))/(Km_BMP - BMP*(APAP*k_act_APAP*exp(-k_APAP_decay*NoName_1) + 1)*(DCF*k_act_DCF*exp(-k_DCF_decay*NoName_1) + 1)*(Noggin - 1)));
end

function Function_for_Receptor_activation_1(APAP, BMP, BMPR, DCF, Km_BMP, NoName_1, Noggin, k_APAP_decay, k_DCF_decay, k_act_APAP, k_act_DCF)
  -(BMP*BMPR*(APAP*k_act_APAP*exp(-k_APAP_decay*NoName_1) + 1)*(DCF*k_act_DCF*exp(-k_DCF_decay*NoName_1) + 1)*(Noggin - 1))/(Km_BMP - BMP*(APAP*k_act_APAP*exp(-k_APAP_decay*NoName_1) + 1)*(DCF*k_act_DCF*exp(-k_DCF_decay*NoName_1) + 1)*(Noggin - 1));
end

model combined_model_sim()
  // Zeilfelder2025 - Model for human liver cancer cell line HepG2
  // Mathematical multi-compartment model described by sets of coupled ordinary differential equations (ODEs) for studying the IL6 and SMAD signaling in HepG2 human cancer cell lines.
  // biomodels.db:MODEL2503270001
  // hasProperty mamo:MAMO_0000046

  // Compartments:
  compartment cyt = 6.375e-13;
  compartment nuc = 2.125e-13;

  // Species:
  species BMPR in cyt = 9.632148; BMPR is "Total BMP receptor";
  species BMPR_delay1 in cyt = 2.65966; BMPR_delay1 is "Cofactor activated by BMP receptor";
  species BMPR_delay2 in cyt = 2.65966; BMPR_delay2 is "Cofactor activated by BMP receptor_2";
  species BMPR_delay3 in cyt = 2.65966; BMPR_delay3 is "Cofactor activated by BMP receptor_3";
  species BMPR_delay4 in cyt = 2.65966; BMPR_delay4 is "Cofactor activated by BMP receptor_4";
  species BMPR_delay5 in cyt = 2.65966; BMPR_delay5 is "Cofactor activated by BMP receptor_5";
  species BMPR_delay6 in cyt = 2.65966; BMPR_delay6 is "Cofactor activated by BMP receptor_6";
  species SMAD6RNA1 in nuc = 4.422582; SMAD6RNA1 is "SMAD6 inhibitor delay";
  species SMAD6RNA2 in nuc = 4.422582; SMAD6RNA2 is "SMAD6 inhibitor delay_2";
  species SMAD6RNA in nuc = 4.42242; SMAD6RNA is "SMAD6 inhibitor mRNA";
  species ID3RNA in nuc = 0.2075252; ID3RNA is "ID3 mRNA";
  species JAK1_gp130 in cyt = 207.2547; JAK1_gp130 is "Inactive receptor";
  species pJAK1_pgp130 in cyt = 3.808729; pJAK1_pgp130 is "Total phosphorylated receptor";
  species STAT3 in cyt = 1237.764; STAT3 is "Unphosphorylated STAT3";
  species cpSTAT3 in cyt = 24.13737; cpSTAT3 is "Active cytoplasmic STAT3";
  species npSTAT3 in nuc = 25.06706; npSTAT3 is "Active nuclear STAT3";
  species nSOCS3RNA1 in nuc = 0.05578823; nSOCS3RNA1 is "SOCS3 transcriptional delay";
  species nSOCS3RNA2 in nuc = 0.05578823; nSOCS3RNA2 is "SOCS3 transcriptional delay_2";
  species nSOCS3RNA3 in nuc = 0.05578823; nSOCS3RNA3 is "SOCS3 transcriptional delay_3";
  species nSOCS3RNA4 in nuc = 0.05578823; nSOCS3RNA4 is "SOCS3 transcriptional delay_4";
  species nSOCS3RNA5 in nuc = 0.05578823; nSOCS3RNA5 is "SOCS3 transcriptional delay_5";
  species SOCS3RNA in cyt = 0.09194605; SOCS3RNA is "SOCS3 mRNA";
  species SOCS3 in cyt = 0.3462884; SOCS3 is "SOCS3 protein";
  species nHAMPRNA1 in nuc = 0.09412222; nHAMPRNA1 is "HAMP transcriptional delay";
  species nHAMPRNA2 in nuc = 0.09412222; nHAMPRNA2 is "HAMP transcriptional delay_2";
  species nHAMPRNA3 in nuc = 0.09412222; nHAMPRNA3 is "HAMP transcriptional delay_3";
  species nHAMPRNA4 in nuc = 0.09412222; nHAMPRNA4 is "HAMP transcriptional delay_4";
  species nHAMPRNA5 in nuc = 0.09412222; nHAMPRNA5 is "HAMP transcriptional delay_5";
  species nHAMPRNA6 in nuc = 0.09412222; nHAMPRNA6 is "HAMP transcriptional delay_6";
  species nHAMPRNA7 in nuc = 0.09412222; nHAMPRNA7 is "HAMP transcriptional delay_7";
  species HAMPRNA in cyt = 0.5376108; HAMPRNA is "HAMP mRNA";

  // Parameters:
  DCF_mRNA_inh = 6.081891e-5;
  ID3_deg = 0.0746509;
  ID3_pro = 0.005824783;
  K_transport = 0.09741264;
  Km_BMP = 183.8143;
  STAT3_total = 0.9526927;
  apap_hamprna_deg = 0.0996624;
  apap_hamprna_delay = 0.04805705;
  apap_il6_basal = 0.1957581;
  apap_receptor_pro = 0.09398208;
  apap_socs3_deg = 0.7152049;
  apap_socs3_pro = 0.2848315;
  apap_socs3rna_deg = 0.1159516;
  apap_socs3rna_delay = 0.06570444;
  apap_stat3_act = 0.02917703;
  bmp_basal = 4.418889;
  bmpr_cof_delay = 0.08501859;
  bmpr_deg_smad = 0.002087936;
  bmpr_inh = 1;
  dcf_f_SOCS3_STAT3 = 0.6931603;
  dcf_hamprna_deg = 100000000;
  dcf_il6_basal = 0.8350967;
  dcf_pstat3_imp = 0.3826198;
  dcf_receptor_pro = 1.071202;
  dcf_socs3_deg = 7.433738;
  dcf_socs3_pro = 4.494719;
  dcf_socs3rna_deg = 1.472489;
  dcf_socs3rna_delay = 1.18203;
  f_HAMP_SMAD = 0.002134277;
  f_HAMP_STAT3 = 5.140149e-7;
  f_SOCS3_STAT3 = 2.671614e-5;
  hamprna_deg = 0.01618341;
  hamprna_delay = 0.2773111;
  il6_act = 0.02269857;
  il6_basal = 0.009570671;
  input_apap = 0 unit_0;
  input_bmp2 = 0 unit_1;
  input_cyclo = 0;
  input_dcf = 0 unit_2;
  input_il6 = 10 unit_1;
  input_noggin = 0 unit_1;
  k_APAP_decay = 0.01087514;
  k_DCF_decay = 0.004592792;
  k_act_APAP = 0.2437327;
  k_act_DCF = 3.263193;
  k_mRNA_loss = 0.7660493;
  k_sat_SOCS3 = 17.07936;
  n_SMAD = 2.494547;
  n_STAT3 = 1.926303;
  omega_HAMP = 217.3307;
  pstat3_imp = 0.4050796;
  receptor_deg = 0.006429801;
  receptor_deg_socs3 = 0.2713064;
  receptor_pro = 1.37763;
  smadinh_basal = 0.1541294;
  smadinh_delay = 0.06127403;
  smadinh_trans = 0.04393796;
  smadinhrna_deg = 0.06127628;
  smoothness_mRNA_loss = 319.5497;
  socs3_deg = 0.1041761;
  socs3_pro = 2.148714;
  socs3_sat = 5.384585;
  socs3rna_deg = 0.04799723;
  socs3rna_delay = 0.2373165;
  stat3_act = 0.00313556;
  stat3_dea = 1.170168;

  // Assignment rules:
  cycloHex := 0 + (input_cyclo - 0)*piecewise(0, time - 0 < 0, 1);
  ActD := 0;
  IL6 := 0 + (input_il6 - 0)*piecewise(0, time - 0 < 0, 1);
  Noggin := (0 + (input_noggin - 0)*piecewise(0, time - (-60) < 0, 1))/500;
  DCF := 0.001*input_dcf*(0 + (1 - 0)*piecewise(0, time - 0 < 0, 1));
  APAP := input_apap*(0 + (1 - 0)*piecewise(0, time - 0 < 0, 1));
  BMP := bmp_basal + 0 + (input_bmp2 - 0)*piecewise(0, time - 0 < 0, 1);
  DCF_slow := 0.001*input_dcf*time^2*(0 + (1 - 0)*piecewise(0, time - 0 < 0, 1));
  SMAD6_mRNA_loss := (piecewise(0, (smoothness_mRNA_loss - time)/(0 - smoothness_mRNA_loss) < 0, 1) - piecewise(0, (0 - time)/(0 - smoothness_mRNA_loss) < 0, 1)*(0 - time)*(piecewise(0, (smoothness_mRNA_loss - time)/(0 - smoothness_mRNA_loss) < 0, 1) - 1)/(0 - smoothness_mRNA_loss))^2*(2*piecewise(0, (0 - time)/(0 - smoothness_mRNA_loss) < 0, 1)*(0 - time)*(piecewise(0, (smoothness_mRNA_loss - time)/(0 - smoothness_mRNA_loss) < 0, 1) - 1)/(0 - smoothness_mRNA_loss) - 2*piecewise(0, (smoothness_mRNA_loss - time)/(0 - smoothness_mRNA_loss) < 0, 1) + 3);

  // Reactions:
  v1_Receptor_production: => BMPR; cyt*Function_for_Receptor_production(bmpr_deg_smad, bmpr_inh);
  v2_SMAD6_mediated_receptor_degradation: BMPR => ; Function_for_SMAD6_mediated_receptor_degradation_1(APAP, BMP, BMPR, DCF, Km_BMP, time, Noggin, SMAD6RNA, bmpr_deg_smad, cyt, k_APAP_decay, k_DCF_decay, k_act_APAP, k_act_DCF);  // modifiers: SMAD6RNA
  v3_Receptor_activation: => BMPR_delay1; cyt*Function_for_Receptor_activation_1(APAP, BMP, BMPR, DCF, Km_BMP, time, Noggin, k_APAP_decay, k_DCF_decay, k_act_APAP, k_act_DCF);  // modifiers: BMPR
  v4_Delay_from_receptor_to_pSMAD: BMPR_delay1 => BMPR_delay2; cyt*bmpr_cof_delay*BMPR_delay1;
  v5_Delay_from_receptor_to_pSMAD: BMPR_delay2 => BMPR_delay3; cyt*bmpr_cof_delay*BMPR_delay2; v5_Delay_from_receptor_to_pSMAD is "Delay from receptor to pSMAD_2";
  v6_Delay_from_receptor_to_pSMAD: BMPR_delay3 => BMPR_delay4; cyt*bmpr_cof_delay*BMPR_delay3; v6_Delay_from_receptor_to_pSMAD is "Delay from receptor to pSMAD_3";
  v7_Delay_from_receptor_to_pSMAD: BMPR_delay4 => BMPR_delay5; cyt*bmpr_cof_delay*BMPR_delay4; v7_Delay_from_receptor_to_pSMAD is "Delay from receptor to pSMAD_4";
  v8_Delay_from_receptor_to_pSMAD: BMPR_delay5 => BMPR_delay6; cyt*bmpr_cof_delay*BMPR_delay5; v8_Delay_from_receptor_to_pSMAD is "Delay from receptor to pSMAD_5";
  v9_Delay_from_receptor_to_pSMAD: BMPR_delay6 => ; cyt*bmpr_cof_delay*BMPR_delay6; v9_Delay_from_receptor_to_pSMAD is "Delay from receptor to pSMAD_6";
  v10_Basal_production_SMAD_inhibitor: => SMAD6RNA1; nuc*Function_for_Basal_production_SMAD_inhibitor(ActD, DCF_mRNA_inh, DCF_slow, smadinh_basal);
  v11_Production_SMAD_inhibitor: => SMAD6RNA1; Function_for_Production_SMAD_inhibitor(ActD, BMPR_delay6, DCF_mRNA_inh, DCF_slow, SMAD6_mRNA_loss, k_mRNA_loss, nuc, smadinh_trans);  // modifiers: BMPR_delay6
  v12_Delay_SMAD_inhibitor: SMAD6RNA1 => SMAD6RNA2; nuc*smadinh_delay*SMAD6RNA1;
  v13_Delay_SMAD_inhibitor: SMAD6RNA2 => SMAD6RNA; nuc*smadinh_delay*SMAD6RNA2; v13_Delay_SMAD_inhibitor is "Delay SMAD inhibitor_2";
  v14_Degradation_SMAD_inhibitor_RNA: SMAD6RNA => ; nuc*smadinhrna_deg*SMAD6RNA;
  v15_ID3_mRNA_production: => ID3RNA; Function_for_ID3_mRNA_production(BMPR_delay6, ID3_pro, nuc);  // modifiers: BMPR_delay6
  v16_ID3_mRNA_degradation: ID3RNA => ; nuc*ID3_deg*ID3RNA;
  v17_Receptor_production: => JAK1_gp130; cyt*Function_for_Receptor_production_2(APAP, ActD, DCF, apap_receptor_pro, cycloHex, dcf_receptor_pro, receptor_pro); v17_Receptor_production is "Receptor production_2";
  v18_Receptor_degradation: JAK1_gp130 => ; cyt*receptor_deg*JAK1_gp130;
  v19_Phosphorylated_receptor_degradation: pJAK1_pgp130 => ; cyt*receptor_deg*pJAK1_pgp130;
  v20_Basal_receptor_phosphorylation: JAK1_gp130 => pJAK1_pgp130; cyt*Function_for_Basal_receptor_phosphorylation(APAP, DCF, JAK1_gp130, apap_il6_basal, dcf_il6_basal, il6_act, il6_basal);
  v21_Receptor_phosphorylation: JAK1_gp130 => pJAK1_pgp130; cyt*Function_for_Receptor_phosphorylation(IL6, JAK1_gp130, il6_act);
  v22_SOCS3_Bound_receptor_degradation: pJAK1_pgp130 => ; cyt*Function_for_SOCS3_Bound_receptor_degradation(SOCS3, k_sat_SOCS3, pJAK1_pgp130, receptor_deg_socs3);  // modifiers: SOCS3
  v23_Phosphorylation_STAT3: STAT3 => cpSTAT3; cyt*Function_for_Phosphorylation_STAT3(APAP, K_transport, STAT3, apap_stat3_act, pJAK1_pgp130, receptor_pro, stat3_act);  // modifiers: pJAK1_pgp130
  v24_Import_phosphorylated_STAT3: cpSTAT3 => npSTAT3; Function_for_Import_phosphorylated_STAT3(DCF, cpSTAT3, cyt, dcf_pstat3_imp, pstat3_imp);
  v25_STAT3_dephosphorylation__cytoplasm_: npSTAT3 => STAT3; Function_for_STAT3_dephosphorylation__cytoplasm(npSTAT3, nuc, stat3_dea); v25_STAT3_dephosphorylation__cytoplasm_ is "STAT3 dephosphorylation (cytoplasm)";
  v26_SOCS3_transcription: => nSOCS3RNA1; nuc*Function_for_SOCS3_transcription(ActD, DCF, dcf_f_SOCS3_STAT3, f_SOCS3_STAT3, n_STAT3, npSTAT3);  // modifiers: npSTAT3
  v27_SOCS3_transcriptional_delay: nSOCS3RNA1 => nSOCS3RNA2; nuc*Function_for_SOCS3_transcriptional_delay(APAP, ActD, DCF, apap_socs3rna_delay, dcf_socs3rna_delay, nSOCS3RNA1, socs3rna_delay);
  v28_SOCS3_transcriptional_delay: nSOCS3RNA2 => nSOCS3RNA3; nuc*Function_for_SOCS3_transcriptional_delay_2(APAP, ActD, DCF, apap_socs3rna_delay, dcf_socs3rna_delay, nSOCS3RNA2, socs3rna_delay); v28_SOCS3_transcriptional_delay is "SOCS3 transcriptional delay_2";
  v29_SOCS3_transcriptional_delay: nSOCS3RNA3 => nSOCS3RNA4; nuc*Function_for_SOCS3_transcriptional_delay_3(APAP, ActD, DCF, apap_socs3rna_delay, dcf_socs3rna_delay, nSOCS3RNA3, socs3rna_delay); v29_SOCS3_transcriptional_delay is "SOCS3 transcriptional delay_3";
  v30_SOCS3_transcriptional_delay: nSOCS3RNA4 => nSOCS3RNA5; nuc*Function_for_SOCS3_transcriptional_delay_4(APAP, ActD, DCF, apap_socs3rna_delay, dcf_socs3rna_delay, nSOCS3RNA4, socs3rna_delay); v30_SOCS3_transcriptional_delay is "SOCS3 transcriptional delay_4";
  v31_SOCS3_transcriptional_delay: nSOCS3RNA5 => SOCS3RNA; Function_for_SOCS3_transcriptional_delay_5(APAP, ActD, DCF, apap_socs3rna_delay, dcf_socs3rna_delay, nSOCS3RNA5, nuc, socs3rna_delay); v31_SOCS3_transcriptional_delay is "SOCS3 transcriptional delay_5";
  v32_SOCS3_mRNA_degradation: SOCS3RNA => ; cyt*Function_for_SOCS3_mRNA_degradation(APAP, DCF, SOCS3RNA, apap_socs3rna_deg, dcf_socs3rna_deg, socs3rna_deg);
  v33_SOCS3_translation: => SOCS3; cyt*Function_for_SOCS3_translation(APAP, DCF, SOCS3RNA, apap_socs3_pro, cycloHex, dcf_socs3_pro, socs3_pro, socs3_sat);  // modifiers: SOCS3RNA
  v34_SOCS3_degradation: SOCS3 => ; cyt*Function_for_SOCS3_degradation(APAP, DCF, SOCS3, apap_socs3_deg, dcf_socs3_deg, socs3_deg);
  v35_HAMP_mRNA_transcription: => nHAMPRNA1; Function_for_HAMP_mRNA_transcription(ActD, BMPR_delay6, f_HAMP_SMAD, f_HAMP_STAT3, n_SMAD, n_STAT3, npSTAT3, nuc, omega_HAMP);  // modifiers: BMPR_delay6, npSTAT3
  v36_HAMP_transcriptional_delay: nHAMPRNA1 => nHAMPRNA2; nuc*Function_for_HAMP_transcriptional_delay(APAP, ActD, apap_hamprna_delay, hamprna_delay, nHAMPRNA1);
  v37_HAMP_transcriptional_delay: nHAMPRNA2 => nHAMPRNA3; nuc*Function_for_HAMP_transcriptional_delay_2(APAP, ActD, apap_hamprna_delay, hamprna_delay, nHAMPRNA2); v37_HAMP_transcriptional_delay is "HAMP transcriptional delay_2";
  v38_HAMP_transcriptional_delay: nHAMPRNA3 => nHAMPRNA4; nuc*Function_for_HAMP_transcriptional_delay_3(APAP, ActD, apap_hamprna_delay, hamprna_delay, nHAMPRNA3); v38_HAMP_transcriptional_delay is "HAMP transcriptional delay_3";
  v39_HAMP_transcriptional_delay: nHAMPRNA4 => nHAMPRNA5; nuc*Function_for_HAMP_transcriptional_delay_4(APAP, ActD, apap_hamprna_delay, hamprna_delay, nHAMPRNA4); v39_HAMP_transcriptional_delay is "HAMP transcriptional delay_4";
  v40_HAMP_transcriptional_delay: nHAMPRNA5 => nHAMPRNA6; nuc*Function_for_HAMP_transcriptional_delay_5(APAP, ActD, apap_hamprna_delay, hamprna_delay, nHAMPRNA5); v40_HAMP_transcriptional_delay is "HAMP transcriptional delay_5";
  v41_HAMP_transcriptional_delay: nHAMPRNA6 => nHAMPRNA7; nuc*Function_for_HAMP_transcriptional_delay_6(APAP, ActD, apap_hamprna_delay, hamprna_delay, nHAMPRNA6); v41_HAMP_transcriptional_delay is "HAMP transcriptional delay_6";
  v42_HAMP_transcriptional_delay: nHAMPRNA7 => HAMPRNA; Function_for_HAMP_transcriptional_delay_7(APAP, ActD, apap_hamprna_delay, hamprna_delay, nHAMPRNA7, nuc); v42_HAMP_transcriptional_delay is "HAMP transcriptional delay_7";
  v43_HAMP_mRNA_degradation: HAMPRNA => ; cyt*Function_for_HAMP_mRNA_degradation(APAP, DCF, HAMPRNA, apap_hamprna_deg, dcf_hamprna_deg, hamprna_deg);

  // Unit definitions:
  unit time = 60 second;
  unit substance = 1e-9 mole;
  unit unit_0 = 1e-3 mole / litre; unit_0 is "mmol/l";
  unit unit_1 = 1e-9 gram / (1e-3 litre); unit_1 is "ng/ml";
  unit unit_2 = 1e-6 mole / litre; unit_2 is "umol/l";
end
