// SBML level 2 version 4

model New_Model()
  // DoldánMartelli2013 - A Mathematical Model for the Rational Design of Chimeric Ligands in Selective Drug Therapies
  // This model attempts to provide a mathematical framework for describing the dynamics of receptor-drug complex formation of chimeric drugs.
  // isDescribedBy pubmed:23887616
  // hasProperty mamo:MAMO_0000003
  // biomodels.db:MODEL1907310001

  // Compartments:
  compartment compartment = 1;

  // Species:
  species R_1_D in compartment = 5640;
  species R_2_D in compartment = 3600;
  species R_1_DE in compartment = 5640;
  species R_2_DE in compartment = 3600;
  species C_1 in compartment = 0;
  species C_2 in compartment = 0;
  species C_3 in compartment = 0;
  species $L in compartment = 1;

  // Parameters:
  k_off_1 = 0.24;
  k_on_1 = 0.09;
  k_e_1 = 0.15;
  h_1 = 90;
  D_1 = 2.2e-10;
  k_wt_off_2 = 0.66;
  k_wt_on_2 = 0.22;
  k_wt_e_2 = 0.046;
  k_K133A_off_2 = 1.08;
  k_K133A_on_2 = 0.041;
  k_K133A_e_2 = 0.046;
  k_R144A_off_2 = 2.58;
  k_R144A_on_2 = 0.021;
  k_R144A_e_2 = 0.046;
  h_2 = 50;
  D_2 = 1e-10;
  A = 900;
  a = 0.00485;
  Pi = 3.141593;
  N_av = 6.0221409e23;
  Initial_for_A = A;
  Initial_for_D = D;
  Initial_for_D_1 = D_1;
  Initial_for_D_2 = D_2;
  Initial_for_N_av = N_av;
  Initial_for_Pi = pi;
  Initial_for_a = a;
  Initial_for_h_1 = h_1;
  Initial_for_h_2 = h_2;
  Initial_for_k_on_1 = k_on_1;
  Initial_for_k_wt_on_2 = k_wt_on_2;

  // Assignment rules:
  V_2 := Initial_for_A*(Initial_for_h_2 + Initial_for_a);
  D := Initial_for_D_1 + Initial_for_D_2;
  V_1 := Initial_for_A*(Initial_for_h_1 + Initial_for_a);
  k_on_prime_1 := Initial_for_k_on_1/(Initial_for_N_av*V_1);
  b_2 := (Initial_for_A/(Initial_for_Pi*R_2_D))^0.5;
  k_diff_2 := 2*Initial_for_Pi*Initial_for_D/(Initial_for_A*ln(b_2/Initial_for_a));
  k_on_prime_2 := Initial_for_k_wt_on_2/(Initial_for_N_av*V_2);
  b_1 := (Initial_for_A/(Initial_for_Pi*R_1_D))^0.5;
  k_diff_1 := 2*Initial_for_Pi*Initial_for_D/(Initial_for_A*ln(b_1/Initial_for_a));
  k_c_1 := (1/k_diff_1 + 1/k_on_prime_1)^(-1);
  k_c_2 := (1/k_diff_2 + 1/k_on_prime_2)^(-1);
  gamma_1 := k_on_prime_1/(k_diff_1 + k_on_prime_1);
  k_e_3 := k_e_1 + k_wt_e_2;
  gamma_2 := k_on_prime_2/(k_diff_2 + k_on_prime_2);
  k_u_2 := (1 - gamma_2)*k_wt_off_2;
  k_u_1 := (1 - gamma_1)*k_off_1;

  // Reactions:
  C_2_Formation: R_2_D + $L => C_2; compartment*k_wt_on_2*R_2_D*L;
  C_2_Elimination: C_2 => ; compartment*k_wt_e_2*C_2;
  C_1_Dissociation: C_1 => R_1_D + $L; compartment*k_off_1*C_1;
  C_1_Elimination: C_1 => ; compartment*k_e_1*C_1;
  C_3_Elimination: C_3 => ; compartment*k_e_3*C_3;
  C_2_Dissociation: C_2 => R_2_D + $L; compartment*k_wt_off_2*C_2;
  C_3_Uncoupling_1: C_3 => C_1 + R_2_D; compartment*k_u_2*C_3;
  C_3_Uncoupling_2: C_3 => C_2 + R_1_D; compartment*k_u_1*C_3;
  C_1_Formation: R_1_D + $L => C_1; compartment*k_on_1*R_1_D*L;
  C_3_Coupling_1: C_1 + R_2_D => C_3; compartment*k_c_2*C_1*R_2_D;
  C_3_Coupling_2: C_2 + R_1_D => C_3; compartment*k_c_1*C_2*R_1_D;

  // Unit definitions:
  unit volume = 1e-3 litre;
  unit substance = 1e-3 mole;
end
