// SBML level 3 version 1

model Model_generated_by_BIOCHAM()
  // Grignard2022 - Detyrosination/Tyrosination Model in neurons and proliferative cells
  // SBML files for the mathematical model from the publication "Mathematical modeling of the microtubule detyrosination/tyrosination cycle for cell-based drug screening design"
  // hasProperty mamo:MAMO_0000046

  // Compartments:
  compartment default_compartment = 1;

  // Species:
  species TubDetyr in default_compartment = 0;
  species MTDetyr in default_compartment = 0;
  species TubTyr in default_compartment = 5;
  species MTTyr in default_compartment = 0;
  species TCP in default_compartment = 1;
  species TTL in default_compartment = 1;

  // Parameters:
  k1 = 1;
  Vm2 = 0.2;
  Km2 = 1.9;
  kp1 = 0.975;
  kp2 = 0.975;
  km1 = 0.478;
  mc1 = 1;
  km2 = 4.78;
  mc2 = 1;

  // Assignment rules:
  f15 := TubTyr + MTTyr;
  f16 := TubDetyr + MTDetyr;
  f17 := f15/(f16 + 0.000001);

  // Reactions:
  r18: TubDetyr => MTDetyr; TubDetyr*kp1;
  r19: TubTyr => MTTyr; TubTyr*kp2;
  r20: MTDetyr => TubDetyr; MTDetyr*km1/(MTDetyr + mc1);
  r21: MTTyr => TubTyr; MTTyr*km2/(MTTyr + mc2);
  r22: MTTyr + TCP => MTDetyr + TCP; MTTyr*TCP*k1;
  r23: TubDetyr => TubTyr; TubDetyr*Vm2/(Km2 + TubDetyr);
end
