// SBML level 3 version 1
// Created with https://github.com/matthiaskoenig/sbmlutils.

model dextromethorphan_body()
  // Grzegorzewski2022 - PBPK model of dextromethorphan
  // Physiologically based pharmacokinetic (PBPK) modeling of the role of CYP2D6 polymorphism for metabolic phenotyping with dextromethorphan
  // hasProperty mamo:MAMO_0000046
  // model units - substance: mmole, time: min, volume: litre, area: m2, length: metre, extent: mmole

  // Compartments:
  compartment Vre; Vre has litre; Vre is "rest of body";  // SBO:0000290; isVersionOf FMA:62955; isPartOf ncit:C14250
  compartment Vgu; Vgu has litre; Vgu is "gut";  // SBO:0000290 FMA:45615 BTO:0000545 ncit:C12736
  compartment Vstomach = 1 litre;  // SBO:0000290 FMA:7148 ncit:C12391 UBERON:0000945
  compartment Vki; Vki has litre; Vki is "kidney";  // SBO:0000290 FMA:7203 BTO:0000671 ncit:C12415
  compartment Vli; Vli has litre; Vli is "liver";  // SBO:0000290 FMA:7197 BTO:0000759 ncit:C12392
  compartment Vlu; Vlu has litre; Vlu is "lung";  // SBO:0000290 FMA:7195 BTO:0000763 ncit:C12468
  compartment Vsp; Vsp has litre; Vsp is "spleen";  // SBO:0000290 FMA:7196 ncit:C12432 UBERON:0002106
  compartment Vpa; Vpa has litre; Vpa is "pancreas";  // SBO:0000290 FMA:7198 ncit:C12393 UBERON:0001264
  compartment Vve; Vve has litre; Vve is "venous blood";  // SBO:0000290 BTO:0000131 ncit:C13356; isPartOf FMA:50723
  compartment Var; Var has litre; Var is "arterial blood";  // SBO:0000290 BTO:0000131 ncit:C13356; isPartOf FMA:50720
  compartment Vurine = 1 litre;  // SBO:0000290 FMA:12274 ncit:C13283 BTO:0001419
  compartment Vfeces = 1 litre;  // SBO:0000290 FMA:64183 ncit:C13234 BTO:0000440
  compartment Vpo; Vpo has litre; Vpo is "portal plasma";  // SBO:0000290 BTO:0000131 ncit:C13356; isPartOf FMA:66645
  compartment Vhv; Vhv has litre; Vhv is "hepatic venous plasma";  // SBO:0000290 BTO:0000131 ncit:C13356; isPartOf FMA:14337
  compartment Vrev; Vrev has litre; Vrev is "rest venous plasma";  // SBO:0000290 BTO:0000131 ncit:C13356
  compartment Vkiv; Vkiv has litre; Vkiv is "kidney venous plasma";  // SBO:0000290 BTO:0000131 ncit:C13356
  compartment Vfo = 1 litre; Vfo is "forearm";  // SBO:0000290 ncit:C32628 FMA:9663
  compartment Vfov = 1 litre; Vfov is "forearm venous plasma";  // SBO:0000290 BTO:0000131 ncit:C13356
  compartment Vgu_tissue; Vgu_tissue has litre;  // SBO:0000290 FMA:45732 ncit:C74601 BTO:0001539; isPartOf FMA:45615 BTO:0000545 ncit:C12736 FMA:7199
  compartment Vgu_plasma; Vgu_plasma has litre;  // SBO:0000290 ncit:C13356 BTO:0000131; isPartOf FMA:45615 BTO:0000545 ncit:C12736 FMA:7199
  compartment Vki_tissue; Vki_tissue has litre;  // SBO:0000290 FMA:45732 ncit:C74601 BTO:0001539; isPartOf FMA:7203 BTO:0000671 ncit:C12415
  compartment Vki_plasma; Vki_plasma has litre;  // SBO:0000290 ncit:C13356 BTO:0000131; isPartOf FMA:7203 BTO:0000671 ncit:C12415
  compartment Vli_tissue; Vli_tissue has litre;  // SBO:0000290 FMA:45732 ncit:C74601 BTO:0001539; isPartOf FMA:7197 BTO:0000759 ncit:C12392
  compartment Vli_plasma; Vli_plasma has litre;  // SBO:0000290 ncit:C13356 BTO:0000131; isPartOf FMA:7197 BTO:0000759 ncit:C12392
  compartment Vlu_tissue; Vlu_tissue has litre;  // SBO:0000290 FMA:45732 ncit:C74601 BTO:0001539; isPartOf FMA:7195 BTO:0000763 ncit:C12468
  compartment Vlu_plasma; Vlu_plasma has litre;  // SBO:0000290 ncit:C13356 BTO:0000131; isPartOf FMA:7195 BTO:0000763 ncit:C12468
  compartment Vpa_tissue; Vpa_tissue has litre;  // SBO:0000290 FMA:45732 ncit:C74601 BTO:0001539; isPartOf FMA:7198 ncit:C12393 UBERON:0001264 BTO:0000988
  compartment Vpa_plasma; Vpa_plasma has litre;  // SBO:0000290 ncit:C13356 BTO:0000131; isPartOf FMA:7198 ncit:C12393 UBERON:0001264 BTO:0000988
  compartment Vsp_tissue; Vsp_tissue has litre;  // SBO:0000290 FMA:45732 ncit:C74601 BTO:0001539; isPartOf FMA:7196 ncit:C12432 UBERON:0002106 BTO:0001281
  compartment Vsp_plasma; Vsp_plasma has litre;  // SBO:0000290 ncit:C13356 BTO:0000131; isPartOf FMA:7196 ncit:C12432 UBERON:0002106 BTO:0001281
  compartment Vre_tissue; Vre_tissue has litre;  // SBO:0000290 FMA:45732 ncit:C74601 BTO:0001539; isPartOf FMA:62955 ncit:C14250
  compartment Vre_plasma; Vre_plasma has litre;  // SBO:0000290 ncit:C13356 BTO:0000131; isPartOf FMA:62955 ncit:C14250
  compartment Vfo_tissue; Vfo_tissue has litre;  // SBO:0000290 FMA:45732 ncit:C74601 BTO:0001539; isPartOf ncit:C32628 FMA:9663
  compartment Vfo_plasma; Vfo_plasma has litre;  // SBO:0000290 ncit:C13356 BTO:0000131; isPartOf ncit:C32628 FMA:9663
  compartment Vgulumen = 1 litre; Vgulumen is "gut lumen";  // SBO:0000290
  compartment KI__Vmem = NaN; KI__Vmem has KI__m2; KI__Vmem is "plasma membrane";  // 2-D; SBO:0000290 ncit:C13735 FMA:63841 GO:0005886
  compartment LI__Vmem = NaN; LI__Vmem has LI__m2; LI__Vmem is "plasma membrane";  // 2-D; SBO:0000290 ncit:C13735 FMA:63841 GO:0005886
  compartment GU__Vmem = NaN; GU__Vmem has GU__m2; GU__Vmem is "plasma membrane";  // 2-D; SBO:0000290 ncit:C13735 FMA:63841 GO:0005886

  // Species:
  species Cgu_plasma_dxm in Vgu_plasma = 0; Cgu_plasma_dxm is "dextromethorphan (gut)";  // SBO:0000247 CHEBI:4470 ncit:C62022 inchikey:MKXZASYAUGDDCJ-NJAFHUGGSA-N
  species Cki_plasma_dxm in Vki_plasma = 0; Cki_plasma_dxm is "dextromethorphan (kidney)";  // SBO:0000247 CHEBI:4470 ncit:C62022 inchikey:MKXZASYAUGDDCJ-NJAFHUGGSA-N
  species Cli_plasma_dxm in Vli_plasma = 0; Cli_plasma_dxm is "dextromethorphan (liver)";  // SBO:0000247 CHEBI:4470 ncit:C62022 inchikey:MKXZASYAUGDDCJ-NJAFHUGGSA-N
  species Clu_plasma_dxm in Vlu_plasma = 0; Clu_plasma_dxm is "dextromethorphan (lung)";  // SBO:0000247 CHEBI:4470 ncit:C62022 inchikey:MKXZASYAUGDDCJ-NJAFHUGGSA-N
  species Cpa_plasma_dxm in Vpa_plasma = 0; Cpa_plasma_dxm is "dextromethorphan (pancreas)";  // SBO:0000247 CHEBI:4470 ncit:C62022 inchikey:MKXZASYAUGDDCJ-NJAFHUGGSA-N
  species Csp_plasma_dxm in Vsp_plasma = 0; Csp_plasma_dxm is "dextromethorphan (spleen)";  // SBO:0000247 CHEBI:4470 ncit:C62022 inchikey:MKXZASYAUGDDCJ-NJAFHUGGSA-N
  species Cre_plasma_dxm in Vre_plasma = 0; Cre_plasma_dxm is "dextromethorphan (rest)";  // SBO:0000247 CHEBI:4470 ncit:C62022 inchikey:MKXZASYAUGDDCJ-NJAFHUGGSA-N
  species Cfo_plasma_dxm in Vfo_plasma = 0; Cfo_plasma_dxm is "dextromethorphan (forearm)";  // SBO:0000247 CHEBI:4470 ncit:C62022 inchikey:MKXZASYAUGDDCJ-NJAFHUGGSA-N
  species Car_dxm in Var = 0; Car_dxm is "dextromethorphan (arterial blood)";  // SBO:0000247 CHEBI:4470 ncit:C62022 inchikey:MKXZASYAUGDDCJ-NJAFHUGGSA-N
  species Cve_dxm in Vve = 0; Cve_dxm is "dextromethorphan (venous blood)";  // SBO:0000247 CHEBI:4470 ncit:C62022 inchikey:MKXZASYAUGDDCJ-NJAFHUGGSA-N
  species Cpo_dxm in Vpo = 0; Cpo_dxm is "dextromethorphan (portal vein)";  // SBO:0000247 CHEBI:4470 ncit:C62022 inchikey:MKXZASYAUGDDCJ-NJAFHUGGSA-N
  species Chv_dxm in Vhv = 0; Chv_dxm is "dextromethorphan (hepatic vein)";  // SBO:0000247 CHEBI:4470 ncit:C62022 inchikey:MKXZASYAUGDDCJ-NJAFHUGGSA-N
  species Crev_dxm in Vrev = 0; Crev_dxm is "dextromethorphan (rest vein)";  // SBO:0000247 CHEBI:4470 ncit:C62022 inchikey:MKXZASYAUGDDCJ-NJAFHUGGSA-N
  species Ckiv_dxm in Vkiv = 0; Ckiv_dxm is "dextromethorphan (kidney vein)";  // SBO:0000247 CHEBI:4470 ncit:C62022 inchikey:MKXZASYAUGDDCJ-NJAFHUGGSA-N
  species Cfov_dxm in Vfov = 0; Cfov_dxm is "dextromethorphan (forearm vein)";  // SBO:0000247 CHEBI:4470 ncit:C62022 inchikey:MKXZASYAUGDDCJ-NJAFHUGGSA-N
  species Cgu_dxm in Vgu_tissue = 0; Cgu_dxm is "dextromethorphan (gut)";  // SBO:0000247 CHEBI:4470 ncit:C62022 inchikey:MKXZASYAUGDDCJ-NJAFHUGGSA-N
  species Cki_dxm in Vki_tissue = 0; Cki_dxm is "dextromethorphan (kidney)";  // SBO:0000247 CHEBI:4470 ncit:C62022 inchikey:MKXZASYAUGDDCJ-NJAFHUGGSA-N
  species Cli_dxm in Vli_tissue = 0; Cli_dxm is "dextromethorphan (liver)";  // SBO:0000247 CHEBI:4470 ncit:C62022 inchikey:MKXZASYAUGDDCJ-NJAFHUGGSA-N
  species Clu_dxm in Vlu_tissue = 0; Clu_dxm is "dextromethorphan (lung)";  // SBO:0000247 CHEBI:4470 ncit:C62022 inchikey:MKXZASYAUGDDCJ-NJAFHUGGSA-N
  species Cpa_dxm in Vpa_tissue = 0; Cpa_dxm is "dextromethorphan (pancreas)";  // SBO:0000247 CHEBI:4470 ncit:C62022 inchikey:MKXZASYAUGDDCJ-NJAFHUGGSA-N
  species Csp_dxm in Vsp_tissue = 0; Csp_dxm is "dextromethorphan (spleen)";  // SBO:0000247 CHEBI:4470 ncit:C62022 inchikey:MKXZASYAUGDDCJ-NJAFHUGGSA-N
  species Cre_dxm in Vre_tissue = 0; Cre_dxm is "dextromethorphan (rest)";  // SBO:0000247 CHEBI:4470 ncit:C62022 inchikey:MKXZASYAUGDDCJ-NJAFHUGGSA-N
  species Cfo_dxm in Vfo_tissue = 0; Cfo_dxm is "dextromethorphan (forearm)";  // SBO:0000247 CHEBI:4470 ncit:C62022 inchikey:MKXZASYAUGDDCJ-NJAFHUGGSA-N
  substanceOnly species Aurine_dxm in Vurine = 0; Aurine_dxm is "dextromethorphan (urine)";  // SBO:0000247 CHEBI:4470 ncit:C62022 inchikey:MKXZASYAUGDDCJ-NJAFHUGGSA-N
  substanceOnly species $Astomach_dxm in Vstomach = 0; Astomach_dxm is "dextromethorphan (stomach)";  // SBO:0000247 CHEBI:4470 ncit:C62022 inchikey:MKXZASYAUGDDCJ-NJAFHUGGSA-N
  substanceOnly species Afeces_dxm in Vfeces = 0; Afeces_dxm is "dextromethorphan (feces)";  // SBO:0000247 CHEBI:4470 ncit:C62022 inchikey:MKXZASYAUGDDCJ-NJAFHUGGSA-N
  species Cgu_plasma_dxo in Vgu_plasma = 0; Cgu_plasma_dxo is "dextorphan (gut)";  // SBO:0000247 CHEBI:29133 ncit:C171857 inchikey:JAQUASYNZVUNQP-PVAVHDDUSA-N
  species Cki_plasma_dxo in Vki_plasma = 0; Cki_plasma_dxo is "dextorphan (kidney)";  // SBO:0000247 CHEBI:29133 ncit:C171857 inchikey:JAQUASYNZVUNQP-PVAVHDDUSA-N
  species Cli_plasma_dxo in Vli_plasma = 0; Cli_plasma_dxo is "dextorphan (liver)";  // SBO:0000247 CHEBI:29133 ncit:C171857 inchikey:JAQUASYNZVUNQP-PVAVHDDUSA-N
  species Clu_plasma_dxo in Vlu_plasma = 0; Clu_plasma_dxo is "dextorphan (lung)";  // SBO:0000247 CHEBI:29133 ncit:C171857 inchikey:JAQUASYNZVUNQP-PVAVHDDUSA-N
  species Cpa_plasma_dxo in Vpa_plasma = 0; Cpa_plasma_dxo is "dextorphan (pancreas)";  // SBO:0000247 CHEBI:29133 ncit:C171857 inchikey:JAQUASYNZVUNQP-PVAVHDDUSA-N
  species Csp_plasma_dxo in Vsp_plasma = 0; Csp_plasma_dxo is "dextorphan (spleen)";  // SBO:0000247 CHEBI:29133 ncit:C171857 inchikey:JAQUASYNZVUNQP-PVAVHDDUSA-N
  species Cre_plasma_dxo in Vre_plasma = 0; Cre_plasma_dxo is "dextorphan (rest)";  // SBO:0000247 CHEBI:29133 ncit:C171857 inchikey:JAQUASYNZVUNQP-PVAVHDDUSA-N
  species Cfo_plasma_dxo in Vfo_plasma = 0; Cfo_plasma_dxo is "dextorphan (forearm)";  // SBO:0000247 CHEBI:29133 ncit:C171857 inchikey:JAQUASYNZVUNQP-PVAVHDDUSA-N
  species Car_dxo in Var = 0; Car_dxo is "dextorphan (arterial blood)";  // SBO:0000247 CHEBI:29133 ncit:C171857 inchikey:JAQUASYNZVUNQP-PVAVHDDUSA-N
  species Cve_dxo in Vve = 0; Cve_dxo is "dextorphan (venous blood)";  // SBO:0000247 CHEBI:29133 ncit:C171857 inchikey:JAQUASYNZVUNQP-PVAVHDDUSA-N
  species Cpo_dxo in Vpo = 0; Cpo_dxo is "dextorphan (portal vein)";  // SBO:0000247 CHEBI:29133 ncit:C171857 inchikey:JAQUASYNZVUNQP-PVAVHDDUSA-N
  species Chv_dxo in Vhv = 0; Chv_dxo is "dextorphan (hepatic vein)";  // SBO:0000247 CHEBI:29133 ncit:C171857 inchikey:JAQUASYNZVUNQP-PVAVHDDUSA-N
  species Crev_dxo in Vrev = 0; Crev_dxo is "dextorphan (rest vein)";  // SBO:0000247 CHEBI:29133 ncit:C171857 inchikey:JAQUASYNZVUNQP-PVAVHDDUSA-N
  species Ckiv_dxo in Vkiv = 0; Ckiv_dxo is "dextorphan (kidney vein)";  // SBO:0000247 CHEBI:29133 ncit:C171857 inchikey:JAQUASYNZVUNQP-PVAVHDDUSA-N
  species Cfov_dxo in Vfov = 0; Cfov_dxo is "dextorphan (forearm vein)";  // SBO:0000247 CHEBI:29133 ncit:C171857 inchikey:JAQUASYNZVUNQP-PVAVHDDUSA-N
  species Cgu_dxo in Vgu_tissue = 0; Cgu_dxo is "dextorphan (gut)";  // SBO:0000247 CHEBI:29133 ncit:C171857 inchikey:JAQUASYNZVUNQP-PVAVHDDUSA-N
  species Cki_dxo in Vki_tissue = 0; Cki_dxo is "dextorphan (kidney)";  // SBO:0000247 CHEBI:29133 ncit:C171857 inchikey:JAQUASYNZVUNQP-PVAVHDDUSA-N
  species Cli_dxo in Vli_tissue = 0; Cli_dxo is "dextorphan (liver)";  // SBO:0000247 CHEBI:29133 ncit:C171857 inchikey:JAQUASYNZVUNQP-PVAVHDDUSA-N
  species Clu_dxo in Vlu_tissue = 0; Clu_dxo is "dextorphan (lung)";  // SBO:0000247 CHEBI:29133 ncit:C171857 inchikey:JAQUASYNZVUNQP-PVAVHDDUSA-N
  species Cpa_dxo in Vpa_tissue = 0; Cpa_dxo is "dextorphan (pancreas)";  // SBO:0000247 CHEBI:29133 ncit:C171857 inchikey:JAQUASYNZVUNQP-PVAVHDDUSA-N
  species Csp_dxo in Vsp_tissue = 0; Csp_dxo is "dextorphan (spleen)";  // SBO:0000247 CHEBI:29133 ncit:C171857 inchikey:JAQUASYNZVUNQP-PVAVHDDUSA-N
  species Cre_dxo in Vre_tissue = 0; Cre_dxo is "dextorphan (rest)";  // SBO:0000247 CHEBI:29133 ncit:C171857 inchikey:JAQUASYNZVUNQP-PVAVHDDUSA-N
  species Cfo_dxo in Vfo_tissue = 0; Cfo_dxo is "dextorphan (forearm)";  // SBO:0000247 CHEBI:29133 ncit:C171857 inchikey:JAQUASYNZVUNQP-PVAVHDDUSA-N
  substanceOnly species Aurine_dxo in Vurine = 0; Aurine_dxo is "dextorphan (urine)";  // SBO:0000247 CHEBI:29133 ncit:C171857 inchikey:JAQUASYNZVUNQP-PVAVHDDUSA-N
  species Cgu_plasma_dxo_glu in Vgu_plasma = 0; Cgu_plasma_dxo_glu is "dextorphan glucuronide (gut)";  // SBO:0000247 CHEBI:32645 pubchem.compound:24883428 inchikey:YQAUTKINOXBFCA-DCWOAAMISA-N
  species Cki_plasma_dxo_glu in Vki_plasma = 0; Cki_plasma_dxo_glu is "dextorphan glucuronide (kidney)";  // SBO:0000247 CHEBI:32645 pubchem.compound:24883428 inchikey:YQAUTKINOXBFCA-DCWOAAMISA-N
  species Cli_plasma_dxo_glu in Vli_plasma = 0; Cli_plasma_dxo_glu is "dextorphan glucuronide (liver)";  // SBO:0000247 CHEBI:32645 pubchem.compound:24883428 inchikey:YQAUTKINOXBFCA-DCWOAAMISA-N
  species Clu_plasma_dxo_glu in Vlu_plasma = 0; Clu_plasma_dxo_glu is "dextorphan glucuronide (lung)";  // SBO:0000247 CHEBI:32645 pubchem.compound:24883428 inchikey:YQAUTKINOXBFCA-DCWOAAMISA-N
  species Cpa_plasma_dxo_glu in Vpa_plasma = 0; Cpa_plasma_dxo_glu is "dextorphan glucuronide (pancreas)";  // SBO:0000247 CHEBI:32645 pubchem.compound:24883428 inchikey:YQAUTKINOXBFCA-DCWOAAMISA-N
  species Csp_plasma_dxo_glu in Vsp_plasma = 0; Csp_plasma_dxo_glu is "dextorphan glucuronide (spleen)";  // SBO:0000247 CHEBI:32645 pubchem.compound:24883428 inchikey:YQAUTKINOXBFCA-DCWOAAMISA-N
  species Cre_plasma_dxo_glu in Vre_plasma = 0; Cre_plasma_dxo_glu is "dextorphan glucuronide (rest)";  // SBO:0000247 CHEBI:32645 pubchem.compound:24883428 inchikey:YQAUTKINOXBFCA-DCWOAAMISA-N
  species Cfo_plasma_dxo_glu in Vfo_plasma = 0; Cfo_plasma_dxo_glu is "dextorphan glucuronide (forearm)";  // SBO:0000247 CHEBI:32645 pubchem.compound:24883428 inchikey:YQAUTKINOXBFCA-DCWOAAMISA-N
  species Car_dxo_glu in Var = 0; Car_dxo_glu is "dextorphan glucuronide (arterial blood)";  // SBO:0000247 CHEBI:32645 pubchem.compound:24883428 inchikey:YQAUTKINOXBFCA-DCWOAAMISA-N
  species Cve_dxo_glu in Vve = 0; Cve_dxo_glu is "dextorphan glucuronide (venous blood)";  // SBO:0000247 CHEBI:32645 pubchem.compound:24883428 inchikey:YQAUTKINOXBFCA-DCWOAAMISA-N
  species Cpo_dxo_glu in Vpo = 0; Cpo_dxo_glu is "dextorphan glucuronide (portal vein)";  // SBO:0000247 CHEBI:32645 pubchem.compound:24883428 inchikey:YQAUTKINOXBFCA-DCWOAAMISA-N
  species Chv_dxo_glu in Vhv = 0; Chv_dxo_glu is "dextorphan glucuronide (hepatic vein)";  // SBO:0000247 CHEBI:32645 pubchem.compound:24883428 inchikey:YQAUTKINOXBFCA-DCWOAAMISA-N
  species Crev_dxo_glu in Vrev = 0; Crev_dxo_glu is "dextorphan glucuronide (rest vein)";  // SBO:0000247 CHEBI:32645 pubchem.compound:24883428 inchikey:YQAUTKINOXBFCA-DCWOAAMISA-N
  species Ckiv_dxo_glu in Vkiv = 0; Ckiv_dxo_glu is "dextorphan glucuronide (kidney vein)";  // SBO:0000247 CHEBI:32645 pubchem.compound:24883428 inchikey:YQAUTKINOXBFCA-DCWOAAMISA-N
  species Cfov_dxo_glu in Vfov = 0; Cfov_dxo_glu is "dextorphan glucuronide (forearm vein)";  // SBO:0000247 CHEBI:32645 pubchem.compound:24883428 inchikey:YQAUTKINOXBFCA-DCWOAAMISA-N
  species Cgu_dxo_glu in Vgu_tissue = 0; Cgu_dxo_glu is "dextorphan glucuronide (gut)";  // SBO:0000247 CHEBI:32645 pubchem.compound:24883428 inchikey:YQAUTKINOXBFCA-DCWOAAMISA-N
  species Cki_dxo_glu in Vki_tissue = 0; Cki_dxo_glu is "dextorphan glucuronide (kidney)";  // SBO:0000247 CHEBI:32645 pubchem.compound:24883428 inchikey:YQAUTKINOXBFCA-DCWOAAMISA-N
  species Cli_dxo_glu in Vli_tissue = 0; Cli_dxo_glu is "dextorphan glucuronide (liver)";  // SBO:0000247 CHEBI:32645 pubchem.compound:24883428 inchikey:YQAUTKINOXBFCA-DCWOAAMISA-N
  species Clu_dxo_glu in Vlu_tissue = 0; Clu_dxo_glu is "dextorphan glucuronide (lung)";  // SBO:0000247 CHEBI:32645 pubchem.compound:24883428 inchikey:YQAUTKINOXBFCA-DCWOAAMISA-N
  species Cpa_dxo_glu in Vpa_tissue = 0; Cpa_dxo_glu is "dextorphan glucuronide (pancreas)";  // SBO:0000247 CHEBI:32645 pubchem.compound:24883428 inchikey:YQAUTKINOXBFCA-DCWOAAMISA-N
  species Csp_dxo_glu in Vsp_tissue = 0; Csp_dxo_glu is "dextorphan glucuronide (spleen)";  // SBO:0000247 CHEBI:32645 pubchem.compound:24883428 inchikey:YQAUTKINOXBFCA-DCWOAAMISA-N
  species Cre_dxo_glu in Vre_tissue = 0; Cre_dxo_glu is "dextorphan glucuronide (rest)";  // SBO:0000247 CHEBI:32645 pubchem.compound:24883428 inchikey:YQAUTKINOXBFCA-DCWOAAMISA-N
  species Cfo_dxo_glu in Vfo_tissue = 0; Cfo_dxo_glu is "dextorphan glucuronide (forearm)";  // SBO:0000247 CHEBI:32645 pubchem.compound:24883428 inchikey:YQAUTKINOXBFCA-DCWOAAMISA-N
  substanceOnly species Aurine_dxo_glu in Vurine = 0; Aurine_dxo_glu is "dextorphan glucuronide (urine)";  // SBO:0000247 CHEBI:32645 pubchem.compound:24883428 inchikey:YQAUTKINOXBFCA-DCWOAAMISA-N
  species Cgulumen_dxm in Vgulumen = 0; Cgulumen_dxm is "dextromethorphan (gut lumen)";
  species $LI__qui in Vli_tissue = 0; LI__qui is "quinidine (liver)";  // substance in LI__mmole; SBO:0000247 CHEBI:28593 ncit:C793 inchikey:LOUPRKONTZGTKE-LHHVKLHASA-N
  // used for tracking of amounts
  species GU__dxmmet in Vgu_tissue = 0; GU__dxmmet is "dextromethorphan metabolite (intestine)";  // substance in GU__mmole; SBO:0000247

  // Parameters:
  BW = 75 kg; BW is "body weight [kg]";  // SBO:0000002
  HEIGHT = 170 cm; HEIGHT is "height [cm]";  // SBO:0000002
  HR = 70 per_min; HR is "heart rate [1/min]";  // SBO:0000002
  HRrest = 70 per_min; HRrest is "heart rate (resting) [1/min]";  // SBO:0000002
  BSA has m2; BSA is "body surface area [m^2]";  // SBO:0000002
  COBW = 1.548 ml_per_s_kg; COBW is "cardiac output per bodyweight [ml/s/kg]";  // SBO:0000002
  CO has ml_per_s; CO is "cardiac output [ml/s]";  // SBO:0000002
  QC has litre_per_min; QC is "cardiac output [L/hr]";  // SBO:0000002
  COHRI = 150 ml; COHRI is "increase of cardiac output per heartbeat [ml/min*min]";  // SBO:0000002
  Fblood = 0.02 dimensionless; Fblood is "blood fraction of organ volume";  // SBO:0000002
  HCT = 0.51 dimensionless; HCT is "hematocrit";  // SBO:0000002
  Kp_fo_dxm = 10 dimensionless; Kp_fo_dxm is "tissue/plasma partition coefficient dxm forearm";  // SBO:0000002
  f_shunting_forearm = 0.2795175 dimensionless; f_shunting_forearm is "shunting in forearm";  // SBO:0000002
  FVgu = 0.0171 l_per_kg; FVgu is "gut fractional tissue volume";  // SBO:0000002
  FVki = 0.0044 l_per_kg; FVki is "kidney fractional tissue volume";  // SBO:0000002
  FVli = 0.021 l_per_kg; FVli is "liver fractional tissue volume";  // SBO:0000002
  FVlu = 0.0076 l_per_kg; FVlu is "lung fractional tissue volume";  // SBO:0000002
  FVsp = 0.0026 l_per_kg; FVsp is "spleen fractional tissue volume";  // SBO:0000002
  FVpa = 0.01 l_per_kg; FVpa is "pancreas fractional tissue volume";  // SBO:0000002
  // [Huang2020:Supp] Forearm blood flow 0.6430 L/hr; Physical Volume 0.3380 L
  FVfo = 0.004828571 l_per_kg; FVfo is "liver fractional tissue volume";  // SBO:0000002
  FVre has l_per_kg; FVre is "rest of body fractional tissue volume";  // SBO:0000002
  FVve = 0.0514 l_per_kg; FVve is "venous fractional tissue volume";  // SBO:0000002
  FVar = 0.0257 l_per_kg; FVar is "arterial fractional tissue volume";  // SBO:0000002
  FVpo = 0.001 l_per_kg; FVpo is "portal fractional tissue volume";  // SBO:0000002
  FVhv = 0.001 l_per_kg; FVhv is "hepatic venous fractional tissue volume";  // SBO:0000002
  FVrev = 0.001 l_per_kg; FVrev is "rest venous fractional tissue volume";  // SBO:0000002
  FVkiv = 0.001 l_per_kg; FVkiv is "kidney venous fractional tissue volume";  // SBO:0000002
  FVfov = 0.001 l_per_kg; FVfov is "fore arm venous fractional tissue volume";  // SBO:0000002
  FQgu = 0.146 dimensionless; FQgu is "gut fractional tissue blood flow";  // SBO:0000002
  FQki = 0.19 dimensionless; FQki is "kidney fractional tissue blood flow";  // SBO:0000002
  FQh = 0.215 dimensionless; FQh is "hepatic (venous side) fractional tissue blood flow";  // SBO:0000002
  FQlu = 1 dimensionless; FQlu is "lung fractional tissue blood flow";  // SBO:0000002
  FQsp = 0.017 dimensionless; FQsp is "spleen fractional tissue blood flow";  // SBO:0000002
  // [deprecated info][Huang2020:Supp] Forearm blood flow 0.6430 L/hr; Physical Volume 0.3380 L, Lung blood flow 300 L/hrCardiac output in humans is generally 5-6 L/min in an at-rest to more than 35 L/min in elite athletes during exercise.[95ml/min in meddian cubital vein] https://bpgmobile.rnao.ca/sites/default/files/Appendix%20C%20Vein%20Anatomy.pdf
  FQfo = 0.01461538 dimensionless; FQfo is "fore arm fractional tissue blood flow";  // SBO:0000002
  FQpa = 0.017 dimensionless; FQpa is "pancreas fractional tissue blood flow";  // SBO:0000002
  FQre has dimensionless; FQre is "rest of body fractional tissue blood flow";  // SBO:0000002
  conversion_min_per_day = 1440 min_per_day; conversion_min_per_day is "Conversion factor min to hours";  // SBO:0000002
  Mr_dxm = 271.404 g_per_mole; Mr_dxm is "Molecular weight dxm [g/mole]";  // SBO:0000647
  ftissue_dxm = 1000 litre_per_min; ftissue_dxm is "Vmax tissue distribution dxm";  // SBO:0000002
  Kp_dxm = 8.734613 dimensionless; Kp_dxm is "tissue/plasma partition coefficient dxm";  // SBO:0000002
  IVDOSE_dxm = 0 mg; IVDOSE_dxm is "IV bolus dose dxm [mg]";  // SBO:0000002
  ti_dxm = 10 second; ti_dxm is "injection time dxm [s]";  // SBO:0000002
  Ki_dxm has per_min; Ki_dxm is "Ki [1/min] injection dxm";  // SBO:0000002
  Ri_dxm = 0 mg_per_min; Ri_dxm is "Ri [mg/min] rate of infusion dxm";  // SBO:0000002
  cum_dose_dxm = 0 mg; cum_dose_dxm is "Cumulative dose due to infusion dxm";  // SBO:0000002
  PODOSE_dxm = 0 mg; PODOSE_dxm is "oral dose dxm [mg]";  // SBO:0000002 ncit:C38288
  Ka_dis_dxm = 0.02173913 per_hr; Ka_dis_dxm is "Ka_dis [1/hr] dissolution dxm";  // SBO:0000002
  Mr_dxo = 257.37066 g_per_mole; Mr_dxo is "Molecular weight dxo [g/mole]";  // SBO:0000647
  ftissue_dxo = 100 litre_per_min; ftissue_dxo is "Vmax tissue distribution dxo";  // SBO:0000002
  Kp_dxo = 4 dimensionless; Kp_dxo is "tissue/plasma partition coefficient dxo";  // SBO:0000002
  Mr_dxo_glu = 433.49478 g_per_mole; Mr_dxo_glu is "Molecular weight dxo_glu [g/mole]";  // SBO:0000647
  ftissue_dxo_glu = 3 litre_per_min; ftissue_dxo_glu is "Vmax tissue distribution dxo_glu";  // SBO:0000002
  Kp_dxo_glu = 0.08 dimensionless; Kp_dxo_glu is "tissue/plasma partition coefficient dxo_glu";  // SBO:0000002
  dxm_dxo_plasma has dimensionless; dxm_dxo_plasma is "Current plasma DXM/DXO ratio";
  dxo_total_plasma has mmole_per_l; dxo_total_plasma is "Current plasma total dxo (dxo + dxo_glu)";
  dxm_dxo_total_plasma has dimensionless; dxm_dxo_total_plasma is "Current plasma DXM/total DXO ratio";
  dxo_total_rev has mmole_per_l; dxo_total_rev is "Current total dxo (dxo + dxo_glu) in rest venous compartment";
  dxm_dxo_rev has dimensionless; dxm_dxo_rev is "Current dxm/dxo ratio in rest venous compartment";
  dxm_dxo_total_rev has dimensionless; dxm_dxo_total_rev is "Current dxm/total dxo (dxo + dxo_glu) ratio in rest venous compartment";
  dxm_dxo_total_fov has dimensionless; dxm_dxo_total_fov is "Current dxm/total dxo (dxo + dxo_glu) ratio in forearm venous compartment";
  dxo_total_fov has mmole_per_l; dxo_total_fov is "Current total dxo (dxo + dxo_glu) in forearm venous compartment";
  dxm_dxo_fov has dimensionless; dxm_dxo_fov is "Current dxm/dxo ratio in forearm venous compartment";
  dxm_dxo_urine has dimensionless; dxm_dxo_urine is "Cumulative urinary DXM/DXO ratio";
  Aurine_dxo_total has mmole; Aurine_dxo_total is "Cumulative urinary total DXO";
  dxm_dxo_total_urine has dimensionless; dxm_dxo_total_urine is "Cumulative urinary DXM/ Total DXO ratio";
  Qgu has litre_per_min; Qgu is "gut blood flow";
  Qki has litre_per_min; Qki is "kidney blood flow";
  Qh has litre_per_min; Qh is "hepatic (venous side) blood flow";
  Qha has litre_per_min; Qha is "hepatic artery blood flow";
  Qlu has litre_per_min; Qlu is "lung blood flow";
  Qsp has litre_per_min; Qsp is "spleen blood flow";
  Qpa has litre_per_min; Qpa is "pancreas blood flow";
  Qre has litre_per_min; Qre is "rest of body blood flow";
  Qpo has litre_per_min; Qpo is "portal blood flow";
  Qfo has litre_per_min; Qfo is "forearm blood flow";
  Agu_plasma_dxm has mmole; Agu_plasma_dxm is "dextromethorphan amount (gut) [mmole]";
  Xgu_plasma_dxm has mg; Xgu_plasma_dxm is "dextromethorphan amount (gut) [mg]";
  Mgu_plasma_dxm has mg_per_l; Mgu_plasma_dxm is "dextromethorphan concentration (gut) [mg/l]";
  Aki_plasma_dxm has mmole; Aki_plasma_dxm is "dextromethorphan amount (kidney) [mmole]";
  Xki_plasma_dxm has mg; Xki_plasma_dxm is "dextromethorphan amount (kidney) [mg]";
  Mki_plasma_dxm has mg_per_l; Mki_plasma_dxm is "dextromethorphan concentration (kidney) [mg/l]";
  Ali_plasma_dxm has mmole; Ali_plasma_dxm is "dextromethorphan amount (liver) [mmole]";
  Xli_plasma_dxm has mg; Xli_plasma_dxm is "dextromethorphan amount (liver) [mg]";
  Mli_plasma_dxm has mg_per_l; Mli_plasma_dxm is "dextromethorphan concentration (liver) [mg/l]";
  Alu_plasma_dxm has mmole; Alu_plasma_dxm is "dextromethorphan amount (lung) [mmole]";
  Xlu_plasma_dxm has mg; Xlu_plasma_dxm is "dextromethorphan amount (lung) [mg]";
  Mlu_plasma_dxm has mg_per_l; Mlu_plasma_dxm is "dextromethorphan concentration (lung) [mg/l]";
  Apa_plasma_dxm has mmole; Apa_plasma_dxm is "dextromethorphan amount (pancreas) [mmole]";
  Xpa_plasma_dxm has mg; Xpa_plasma_dxm is "dextromethorphan amount (pancreas) [mg]";
  Mpa_plasma_dxm has mg_per_l; Mpa_plasma_dxm is "dextromethorphan concentration (pancreas) [mg/l]";
  Asp_plasma_dxm has mmole; Asp_plasma_dxm is "dextromethorphan amount (spleen) [mmole]";
  Xsp_plasma_dxm has mg; Xsp_plasma_dxm is "dextromethorphan amount (spleen) [mg]";
  Msp_plasma_dxm has mg_per_l; Msp_plasma_dxm is "dextromethorphan concentration (spleen) [mg/l]";
  Are_plasma_dxm has mmole; Are_plasma_dxm is "dextromethorphan amount (rest) [mmole]";
  Xre_plasma_dxm has mg; Xre_plasma_dxm is "dextromethorphan amount (rest) [mg]";
  Mre_plasma_dxm has mg_per_l; Mre_plasma_dxm is "dextromethorphan concentration (rest) [mg/l]";
  Afo_plasma_dxm has mmole; Afo_plasma_dxm is "dextromethorphan amount (forearm) [mmole]";
  Xfo_plasma_dxm has mg; Xfo_plasma_dxm is "dextromethorphan amount (forearm) [mg]";
  Mfo_plasma_dxm has mg_per_l; Mfo_plasma_dxm is "dextromethorphan concentration (forearm) [mg/l]";
  Aar_dxm has mmole; Aar_dxm is "dextromethorphan amount (arterial blood) [mmole]";
  Xar_dxm has mg; Xar_dxm is "dextromethorphan amount (arterial blood) [mg]";
  Mar_dxm has mg_per_l; Mar_dxm is "dextromethorphan concentration (arterial blood) [mg/l]";
  Ave_dxm has mmole; Ave_dxm is "dextromethorphan amount (venous blood) [mmole]";
  Xve_dxm has mg; Xve_dxm is "dextromethorphan amount (venous blood) [mg]";
  Mve_dxm has mg_per_l; Mve_dxm is "dextromethorphan concentration (venous blood) [mg/l]";
  Apo_dxm has mmole; Apo_dxm is "dextromethorphan amount (portal vein) [mmole]";
  Xpo_dxm has mg; Xpo_dxm is "dextromethorphan amount (portal vein) [mg]";
  Mpo_dxm has mg_per_l; Mpo_dxm is "dextromethorphan concentration (portal vein) [mg/l]";
  Ahv_dxm has mmole; Ahv_dxm is "dextromethorphan amount (hepatic vein) [mmole]";
  Xhv_dxm has mg; Xhv_dxm is "dextromethorphan amount (hepatic vein) [mg]";
  Mhv_dxm has mg_per_l; Mhv_dxm is "dextromethorphan concentration (hepatic vein) [mg/l]";
  Arev_dxm has mmole; Arev_dxm is "dextromethorphan amount (rest vein) [mmole]";
  Xrev_dxm has mg; Xrev_dxm is "dextromethorphan amount (rest vein) [mg]";
  Mrev_dxm has mg_per_l; Mrev_dxm is "dextromethorphan concentration (rest vein) [mg/l]";
  Akiv_dxm has mmole; Akiv_dxm is "dextromethorphan amount (kidney vein) [mmole]";
  Xkiv_dxm has mg; Xkiv_dxm is "dextromethorphan amount (kidney vein) [mg]";
  Mkiv_dxm has mg_per_l; Mkiv_dxm is "dextromethorphan concentration (kidney vein) [mg/l]";
  Afov_dxm has mmole; Afov_dxm is "dextromethorphan amount (forearm vein) [mmole]";
  Xfov_dxm has mg; Xfov_dxm is "dextromethorphan amount (forearm vein) [mg]";
  Mfov_dxm has mg_per_l; Mfov_dxm is "dextromethorphan concentration (forearm vein) [mg/l]";
  Xurine_dxm has mg; Xurine_dxm is "dextromethorphan amount (urine) [mg]";
  Xfeces_dxm has mg; Xfeces_dxm is "dextromethorphan amount (feces)";
  Agu_plasma_dxo has mmole; Agu_plasma_dxo is "dextorphan amount (gut) [mmole]";
  Xgu_plasma_dxo has mg; Xgu_plasma_dxo is "dextorphan amount (gut) [mg]";
  Mgu_plasma_dxo has mg_per_l; Mgu_plasma_dxo is "dextorphan concentration (gut) [mg/l]";
  Aki_plasma_dxo has mmole; Aki_plasma_dxo is "dextorphan amount (kidney) [mmole]";
  Xki_plasma_dxo has mg; Xki_plasma_dxo is "dextorphan amount (kidney) [mg]";
  Mki_plasma_dxo has mg_per_l; Mki_plasma_dxo is "dextorphan concentration (kidney) [mg/l]";
  Ali_plasma_dxo has mmole; Ali_plasma_dxo is "dextorphan amount (liver) [mmole]";
  Xli_plasma_dxo has mg; Xli_plasma_dxo is "dextorphan amount (liver) [mg]";
  Mli_plasma_dxo has mg_per_l; Mli_plasma_dxo is "dextorphan concentration (liver) [mg/l]";
  Alu_plasma_dxo has mmole; Alu_plasma_dxo is "dextorphan amount (lung) [mmole]";
  Xlu_plasma_dxo has mg; Xlu_plasma_dxo is "dextorphan amount (lung) [mg]";
  Mlu_plasma_dxo has mg_per_l; Mlu_plasma_dxo is "dextorphan concentration (lung) [mg/l]";
  Apa_plasma_dxo has mmole; Apa_plasma_dxo is "dextorphan amount (pancreas) [mmole]";
  Xpa_plasma_dxo has mg; Xpa_plasma_dxo is "dextorphan amount (pancreas) [mg]";
  Mpa_plasma_dxo has mg_per_l; Mpa_plasma_dxo is "dextorphan concentration (pancreas) [mg/l]";
  Asp_plasma_dxo has mmole; Asp_plasma_dxo is "dextorphan amount (spleen) [mmole]";
  Xsp_plasma_dxo has mg; Xsp_plasma_dxo is "dextorphan amount (spleen) [mg]";
  Msp_plasma_dxo has mg_per_l; Msp_plasma_dxo is "dextorphan concentration (spleen) [mg/l]";
  Are_plasma_dxo has mmole; Are_plasma_dxo is "dextorphan amount (rest) [mmole]";
  Xre_plasma_dxo has mg; Xre_plasma_dxo is "dextorphan amount (rest) [mg]";
  Mre_plasma_dxo has mg_per_l; Mre_plasma_dxo is "dextorphan concentration (rest) [mg/l]";
  Afo_plasma_dxo has mmole; Afo_plasma_dxo is "dextorphan amount (forearm) [mmole]";
  Xfo_plasma_dxo has mg; Xfo_plasma_dxo is "dextorphan amount (forearm) [mg]";
  Mfo_plasma_dxo has mg_per_l; Mfo_plasma_dxo is "dextorphan concentration (forearm) [mg/l]";
  Aar_dxo has mmole; Aar_dxo is "dextorphan amount (arterial blood) [mmole]";
  Xar_dxo has mg; Xar_dxo is "dextorphan amount (arterial blood) [mg]";
  Mar_dxo has mg_per_l; Mar_dxo is "dextorphan concentration (arterial blood) [mg/l]";
  Ave_dxo has mmole; Ave_dxo is "dextorphan amount (venous blood) [mmole]";
  Xve_dxo has mg; Xve_dxo is "dextorphan amount (venous blood) [mg]";
  Mve_dxo has mg_per_l; Mve_dxo is "dextorphan concentration (venous blood) [mg/l]";
  Apo_dxo has mmole; Apo_dxo is "dextorphan amount (portal vein) [mmole]";
  Xpo_dxo has mg; Xpo_dxo is "dextorphan amount (portal vein) [mg]";
  Mpo_dxo has mg_per_l; Mpo_dxo is "dextorphan concentration (portal vein) [mg/l]";
  Ahv_dxo has mmole; Ahv_dxo is "dextorphan amount (hepatic vein) [mmole]";
  Xhv_dxo has mg; Xhv_dxo is "dextorphan amount (hepatic vein) [mg]";
  Mhv_dxo has mg_per_l; Mhv_dxo is "dextorphan concentration (hepatic vein) [mg/l]";
  Arev_dxo has mmole; Arev_dxo is "dextorphan amount (rest vein) [mmole]";
  Xrev_dxo has mg; Xrev_dxo is "dextorphan amount (rest vein) [mg]";
  Mrev_dxo has mg_per_l; Mrev_dxo is "dextorphan concentration (rest vein) [mg/l]";
  Akiv_dxo has mmole; Akiv_dxo is "dextorphan amount (kidney vein) [mmole]";
  Xkiv_dxo has mg; Xkiv_dxo is "dextorphan amount (kidney vein) [mg]";
  Mkiv_dxo has mg_per_l; Mkiv_dxo is "dextorphan concentration (kidney vein) [mg/l]";
  Afov_dxo has mmole; Afov_dxo is "dextorphan amount (forearm vein) [mmole]";
  Xfov_dxo has mg; Xfov_dxo is "dextorphan amount (forearm vein) [mg]";
  Mfov_dxo has mg_per_l; Mfov_dxo is "dextorphan concentration (forearm vein) [mg/l]";
  Xurine_dxo has mg; Xurine_dxo is "dextorphan amount (urine) [mg]";
  Agu_plasma_dxo_glu has mmole; Agu_plasma_dxo_glu is "dextorphan glucuronide amount (gut) [mmole]";
  Xgu_plasma_dxo_glu has mg; Xgu_plasma_dxo_glu is "dextorphan glucuronide amount (gut) [mg]";
  Mgu_plasma_dxo_glu has mg_per_l; Mgu_plasma_dxo_glu is "dextorphan glucuronide concentration (gut) [mg/l]";
  Aki_plasma_dxo_glu has mmole; Aki_plasma_dxo_glu is "dextorphan glucuronide amount (kidney) [mmole]";
  Xki_plasma_dxo_glu has mg; Xki_plasma_dxo_glu is "dextorphan glucuronide amount (kidney) [mg]";
  Mki_plasma_dxo_glu has mg_per_l; Mki_plasma_dxo_glu is "dextorphan glucuronide concentration (kidney) [mg/l]";
  Ali_plasma_dxo_glu has mmole; Ali_plasma_dxo_glu is "dextorphan glucuronide amount (liver) [mmole]";
  Xli_plasma_dxo_glu has mg; Xli_plasma_dxo_glu is "dextorphan glucuronide amount (liver) [mg]";
  Mli_plasma_dxo_glu has mg_per_l; Mli_plasma_dxo_glu is "dextorphan glucuronide concentration (liver) [mg/l]";
  Alu_plasma_dxo_glu has mmole; Alu_plasma_dxo_glu is "dextorphan glucuronide amount (lung) [mmole]";
  Xlu_plasma_dxo_glu has mg; Xlu_plasma_dxo_glu is "dextorphan glucuronide amount (lung) [mg]";
  Mlu_plasma_dxo_glu has mg_per_l; Mlu_plasma_dxo_glu is "dextorphan glucuronide concentration (lung) [mg/l]";
  Apa_plasma_dxo_glu has mmole; Apa_plasma_dxo_glu is "dextorphan glucuronide amount (pancreas) [mmole]";
  Xpa_plasma_dxo_glu has mg; Xpa_plasma_dxo_glu is "dextorphan glucuronide amount (pancreas) [mg]";
  Mpa_plasma_dxo_glu has mg_per_l; Mpa_plasma_dxo_glu is "dextorphan glucuronide concentration (pancreas) [mg/l]";
  Asp_plasma_dxo_glu has mmole; Asp_plasma_dxo_glu is "dextorphan glucuronide amount (spleen) [mmole]";
  Xsp_plasma_dxo_glu has mg; Xsp_plasma_dxo_glu is "dextorphan glucuronide amount (spleen) [mg]";
  Msp_plasma_dxo_glu has mg_per_l; Msp_plasma_dxo_glu is "dextorphan glucuronide concentration (spleen) [mg/l]";
  Are_plasma_dxo_glu has mmole; Are_plasma_dxo_glu is "dextorphan glucuronide amount (rest) [mmole]";
  Xre_plasma_dxo_glu has mg; Xre_plasma_dxo_glu is "dextorphan glucuronide amount (rest) [mg]";
  Mre_plasma_dxo_glu has mg_per_l; Mre_plasma_dxo_glu is "dextorphan glucuronide concentration (rest) [mg/l]";
  Afo_plasma_dxo_glu has mmole; Afo_plasma_dxo_glu is "dextorphan glucuronide amount (forearm) [mmole]";
  Xfo_plasma_dxo_glu has mg; Xfo_plasma_dxo_glu is "dextorphan glucuronide amount (forearm) [mg]";
  Mfo_plasma_dxo_glu has mg_per_l; Mfo_plasma_dxo_glu is "dextorphan glucuronide concentration (forearm) [mg/l]";
  Aar_dxo_glu has mmole; Aar_dxo_glu is "dextorphan glucuronide amount (arterial blood) [mmole]";
  Xar_dxo_glu has mg; Xar_dxo_glu is "dextorphan glucuronide amount (arterial blood) [mg]";
  Mar_dxo_glu has mg_per_l; Mar_dxo_glu is "dextorphan glucuronide concentration (arterial blood) [mg/l]";
  Ave_dxo_glu has mmole; Ave_dxo_glu is "dextorphan glucuronide amount (venous blood) [mmole]";
  Xve_dxo_glu has mg; Xve_dxo_glu is "dextorphan glucuronide amount (venous blood) [mg]";
  Mve_dxo_glu has mg_per_l; Mve_dxo_glu is "dextorphan glucuronide concentration (venous blood) [mg/l]";
  Apo_dxo_glu has mmole; Apo_dxo_glu is "dextorphan glucuronide amount (portal vein) [mmole]";
  Xpo_dxo_glu has mg; Xpo_dxo_glu is "dextorphan glucuronide amount (portal vein) [mg]";
  Mpo_dxo_glu has mg_per_l; Mpo_dxo_glu is "dextorphan glucuronide concentration (portal vein) [mg/l]";
  Ahv_dxo_glu has mmole; Ahv_dxo_glu is "dextorphan glucuronide amount (hepatic vein) [mmole]";
  Xhv_dxo_glu has mg; Xhv_dxo_glu is "dextorphan glucuronide amount (hepatic vein) [mg]";
  Mhv_dxo_glu has mg_per_l; Mhv_dxo_glu is "dextorphan glucuronide concentration (hepatic vein) [mg/l]";
  Arev_dxo_glu has mmole; Arev_dxo_glu is "dextorphan glucuronide amount (rest vein) [mmole]";
  Xrev_dxo_glu has mg; Xrev_dxo_glu is "dextorphan glucuronide amount (rest vein) [mg]";
  Mrev_dxo_glu has mg_per_l; Mrev_dxo_glu is "dextorphan glucuronide concentration (rest vein) [mg/l]";
  Akiv_dxo_glu has mmole; Akiv_dxo_glu is "dextorphan glucuronide amount (kidney vein) [mmole]";
  Xkiv_dxo_glu has mg; Xkiv_dxo_glu is "dextorphan glucuronide amount (kidney vein) [mg]";
  Mkiv_dxo_glu has mg_per_l; Mkiv_dxo_glu is "dextorphan glucuronide concentration (kidney vein) [mg/l]";
  Afov_dxo_glu has mmole; Afov_dxo_glu is "dextorphan glucuronide amount (forearm vein) [mmole]";
  Xfov_dxo_glu has mg; Xfov_dxo_glu is "dextorphan glucuronide amount (forearm vein) [mg]";
  Mfov_dxo_glu has mg_per_l; Mfov_dxo_glu is "dextorphan glucuronide concentration (forearm vein) [mg/l]";
  Xurine_dxo_glu has mg; Xurine_dxo_glu is "dextorphan glucuronide amount (urine) [mg]";
  KI__DXMEX_k = 0.017 KI__per_min; KI__DXMEX_k is "DXM urinary excretion rate";  // SBO:0000009
  KI__DXOEX_k = 0.3 KI__per_min; KI__DXOEX_k is "DXO urinary excretion rate";  // SBO:0000009
  KI__DXOGLUEX_k = 10 KI__per_min; KI__DXOGLUEX_k is "DXO glucuronide urinary excretion rate";  // SBO:0000009
  LI__cyp2d6_a0 = 1 dimensionless; LI__cyp2d6_a0 is "*1 activity";  // SBO:0000002
  LI__cyp2d6_a1 = 0.25 dimensionless; LI__cyp2d6_a1 is "*10 activity";  // SBO:0000002
  LI__cyp2d6_a2 = 0 dimensionless; LI__cyp2d6_a2 is "*100 activity";  // SBO:0000002
  LI__cyp2d6_a3 = 0 dimensionless; LI__cyp2d6_a3 is "*101 activity";  // SBO:0000002
  LI__cyp2d6_a4 = 0.5 dimensionless; LI__cyp2d6_a4 is "*10x2 activity";  // SBO:0000002
  LI__cyp2d6_a5 = 0 dimensionless; LI__cyp2d6_a5 is "*11 activity";  // SBO:0000002
  LI__cyp2d6_a6 = 0 dimensionless; LI__cyp2d6_a6 is "*114 activity";  // SBO:0000002
  LI__cyp2d6_a7 = 0 dimensionless; LI__cyp2d6_a7 is "*12 activity";  // SBO:0000002
  LI__cyp2d6_a8 = 0 dimensionless; LI__cyp2d6_a8 is "*120 activity";  // SBO:0000002
  LI__cyp2d6_a9 = 0 dimensionless; LI__cyp2d6_a9 is "*124 activity";  // SBO:0000002
  LI__cyp2d6_a10 = 0 dimensionless; LI__cyp2d6_a10 is "*129 activity";  // SBO:0000002
  LI__cyp2d6_a11 = 0 dimensionless; LI__cyp2d6_a11 is "*13 activity";  // SBO:0000002
  LI__cyp2d6_a12 = 0.5 dimensionless; LI__cyp2d6_a12 is "*14 activity";  // SBO:0000002
  LI__cyp2d6_a13 = 0 dimensionless; LI__cyp2d6_a13 is "*15 activity";  // SBO:0000002
  LI__cyp2d6_a14 = 0.5 dimensionless; LI__cyp2d6_a14 is "*17 activity";  // SBO:0000002
  LI__cyp2d6_a15 = 1 dimensionless; LI__cyp2d6_a15 is "*17x2 activity";  // SBO:0000002
  LI__cyp2d6_a16 = 0 dimensionless; LI__cyp2d6_a16 is "*18 activity";  // SBO:0000002
  LI__cyp2d6_a17 = 0 dimensionless; LI__cyp2d6_a17 is "*19 activity";  // SBO:0000002
  LI__cyp2d6_a18 = 2 dimensionless; LI__cyp2d6_a18 is "*1x2 activity";  // SBO:0000002
  LI__cyp2d6_a19 = 3 dimensionless; LI__cyp2d6_a19 is "*1x3 activity";  // SBO:0000002
  LI__cyp2d6_a20 = 4 dimensionless; LI__cyp2d6_a20 is "*1x4 activity";  // SBO:0000002
  LI__cyp2d6_a21 = 5 dimensionless; LI__cyp2d6_a21 is "*1x5 activity";  // SBO:0000002
  LI__cyp2d6_a22 = 6 dimensionless; LI__cyp2d6_a22 is "*1x6 activity";  // SBO:0000002
  LI__cyp2d6_a23 = 1 dimensionless; LI__cyp2d6_a23 is "*2 activity";  // SBO:0000002
  LI__cyp2d6_a24 = 0 dimensionless; LI__cyp2d6_a24 is "*20 activity";  // SBO:0000002
  LI__cyp2d6_a25 = 0 dimensionless; LI__cyp2d6_a25 is "*21 activity";  // SBO:0000002
  LI__cyp2d6_a26 = 1 dimensionless; LI__cyp2d6_a26 is "*27 activity";  // SBO:0000002
  LI__cyp2d6_a27 = 0.5 dimensionless; LI__cyp2d6_a27 is "*29 activity";  // SBO:0000002
  LI__cyp2d6_a28 = 1 dimensionless; LI__cyp2d6_a28 is "*29x2 activity";  // SBO:0000002
  LI__cyp2d6_a29 = 2 dimensionless; LI__cyp2d6_a29 is "*2x2 activity";  // SBO:0000002
  LI__cyp2d6_a30 = 3 dimensionless; LI__cyp2d6_a30 is "*2x3 activity";  // SBO:0000002
  LI__cyp2d6_a31 = 4 dimensionless; LI__cyp2d6_a31 is "*2x4 activity";  // SBO:0000002
  LI__cyp2d6_a32 = 5 dimensionless; LI__cyp2d6_a32 is "*2x5 activity";  // SBO:0000002
  LI__cyp2d6_a33 = 6 dimensionless; LI__cyp2d6_a33 is "*2x6 activity";  // SBO:0000002
  LI__cyp2d6_a34 = 0 dimensionless; LI__cyp2d6_a34 is "*3 activity";  // SBO:0000002
  LI__cyp2d6_a35 = 0 dimensionless; LI__cyp2d6_a35 is "*31 activity";  // SBO:0000002
  LI__cyp2d6_a36 = 1 dimensionless; LI__cyp2d6_a36 is "*33 activity";  // SBO:0000002
  LI__cyp2d6_a37 = 1 dimensionless; LI__cyp2d6_a37 is "*34 activity";  // SBO:0000002
  LI__cyp2d6_a38 = 1 dimensionless; LI__cyp2d6_a38 is "*35 activity";  // SBO:0000002
  LI__cyp2d6_a39 = 2 dimensionless; LI__cyp2d6_a39 is "*35x2 activity";  // SBO:0000002
  LI__cyp2d6_a40 = 0 dimensionless; LI__cyp2d6_a40 is "*36 activity";  // SBO:0000002
  LI__cyp2d6_a41 = 0 dimensionless; LI__cyp2d6_a41 is "*36x2 activity";  // SBO:0000002
  LI__cyp2d6_a42 = 0 dimensionless; LI__cyp2d6_a42 is "*38 activity";  // SBO:0000002
  LI__cyp2d6_a43 = 1 dimensionless; LI__cyp2d6_a43 is "*39 activity";  // SBO:0000002
  LI__cyp2d6_a44 = 0 dimensionless; LI__cyp2d6_a44 is "*3x2 activity";  // SBO:0000002
  LI__cyp2d6_a45 = 0 dimensionless; LI__cyp2d6_a45 is "*4 activity";  // SBO:0000002
  LI__cyp2d6_a46 = 0 dimensionless; LI__cyp2d6_a46 is "*40 activity";  // SBO:0000002
  LI__cyp2d6_a47 = 0.5 dimensionless; LI__cyp2d6_a47 is "*41 activity";  // SBO:0000002
  LI__cyp2d6_a48 = 1 dimensionless; LI__cyp2d6_a48 is "*41x2 activity";  // SBO:0000002
  LI__cyp2d6_a49 = 1.5 dimensionless; LI__cyp2d6_a49 is "*41x3 activity";  // SBO:0000002
  LI__cyp2d6_a50 = 0 dimensionless; LI__cyp2d6_a50 is "*42 activity";  // SBO:0000002
  LI__cyp2d6_a51 = 0 dimensionless; LI__cyp2d6_a51 is "*44 activity";  // SBO:0000002
  LI__cyp2d6_a52 = 1 dimensionless; LI__cyp2d6_a52 is "*45 activity";  // SBO:0000002
  LI__cyp2d6_a53 = 2 dimensionless; LI__cyp2d6_a53 is "*45x2 activity";  // SBO:0000002
  LI__cyp2d6_a54 = 1 dimensionless; LI__cyp2d6_a54 is "*46 activity";  // SBO:0000002
  LI__cyp2d6_a55 = 0 dimensionless; LI__cyp2d6_a55 is "*47 activity";  // SBO:0000002
  LI__cyp2d6_a56 = 1 dimensionless; LI__cyp2d6_a56 is "*48 activity";  // SBO:0000002
  LI__cyp2d6_a57 = 0.5 dimensionless; LI__cyp2d6_a57 is "*49 activity";  // SBO:0000002
  LI__cyp2d6_a58 = 0 dimensionless; LI__cyp2d6_a58 is "*4x2 activity";  // SBO:0000002
  LI__cyp2d6_a59 = 0 dimensionless; LI__cyp2d6_a59 is "*4x3 activity";  // SBO:0000002
  LI__cyp2d6_a60 = 0 dimensionless; LI__cyp2d6_a60 is "*4x4 activity";  // SBO:0000002
  LI__cyp2d6_a61 = 0 dimensionless; LI__cyp2d6_a61 is "*4x5 activity";  // SBO:0000002
  LI__cyp2d6_a62 = 0 dimensionless; LI__cyp2d6_a62 is "*5 activity";  // SBO:0000002
  LI__cyp2d6_a63 = 0.5 dimensionless; LI__cyp2d6_a63 is "*50 activity";  // SBO:0000002
  LI__cyp2d6_a64 = 0 dimensionless; LI__cyp2d6_a64 is "*51 activity";  // SBO:0000002
  LI__cyp2d6_a65 = 1 dimensionless; LI__cyp2d6_a65 is "*53 activity";  // SBO:0000002
  LI__cyp2d6_a66 = 0.5 dimensionless; LI__cyp2d6_a66 is "*54 activity";  // SBO:0000002
  LI__cyp2d6_a67 = 0.5 dimensionless; LI__cyp2d6_a67 is "*55 activity";  // SBO:0000002
  LI__cyp2d6_a68 = 0 dimensionless; LI__cyp2d6_a68 is "*56 activity";  // SBO:0000002
  LI__cyp2d6_a69 = 0 dimensionless; LI__cyp2d6_a69 is "*57 activity";  // SBO:0000002
  LI__cyp2d6_a70 = 0.5 dimensionless; LI__cyp2d6_a70 is "*59 activity";  // SBO:0000002
  LI__cyp2d6_a71 = 0 dimensionless; LI__cyp2d6_a71 is "*6 activity";  // SBO:0000002
  LI__cyp2d6_a72 = 0 dimensionless; LI__cyp2d6_a72 is "*60 activity";  // SBO:0000002
  LI__cyp2d6_a73 = 0 dimensionless; LI__cyp2d6_a73 is "*62 activity";  // SBO:0000002
  LI__cyp2d6_a74 = 0 dimensionless; LI__cyp2d6_a74 is "*68 activity";  // SBO:0000002
  LI__cyp2d6_a75 = 0 dimensionless; LI__cyp2d6_a75 is "*69 activity";  // SBO:0000002
  LI__cyp2d6_a76 = 0 dimensionless; LI__cyp2d6_a76 is "*6x2 activity";  // SBO:0000002
  LI__cyp2d6_a77 = 0 dimensionless; LI__cyp2d6_a77 is "*7 activity";  // SBO:0000002
  LI__cyp2d6_a78 = 0 dimensionless; LI__cyp2d6_a78 is "*8 activity";  // SBO:0000002
  LI__cyp2d6_a79 = 0 dimensionless; LI__cyp2d6_a79 is "*81 activity";  // SBO:0000002
  LI__cyp2d6_a80 = 0.5 dimensionless; LI__cyp2d6_a80 is "*9 activity";  // SBO:0000002
  LI__cyp2d6_a81 = 0 dimensionless; LI__cyp2d6_a81 is "*92 activity";  // SBO:0000002
  LI__cyp2d6_a82 = 0 dimensionless; LI__cyp2d6_a82 is "*96 activity";  // SBO:0000002
  LI__cyp2d6_a83 = 0 dimensionless; LI__cyp2d6_a83 is "*99 activity";  // SBO:0000002
  LI__cyp2d6_a84 = 1 dimensionless; LI__cyp2d6_a84 is "*9x2 activity";  // SBO:0000002
  LI__cyp2d6_ac = 1 dimensionless; LI__cyp2d6_ac is "custom allele activity";  // SBO:0000002
  LI__cyp2d6_allele1 = 0 dimensionless; LI__cyp2d6_allele1 is "allele 1";  // SBO:0000389
  LI__cyp2d6_allele2 = 0 dimensionless; LI__cyp2d6_allele2 is "allele 2";  // SBO:0000389
  LI__cyp2d6_activity1 has dimensionless; LI__cyp2d6_activity1 is "activity of allele 1";  // SBO:0000002
  LI__cyp2d6_activity2 has dimensionless; LI__cyp2d6_activity2 is "activity of allele 2";  // SBO:0000002
  // Helper parameter used during sampling of CYP2D6 Km and Vmax. Parameter was added to model to not lose this information, but does not affect the model.
  LI___activity_score = NaN; LI___activity_score has dimensionless; LI___activity_score is "activity helper parameter";  // SBO:0000002
  LI__DXMCYP2D6_Vmax = 0.003 LI__mmole_per_min_l; LI__DXMCYP2D6_Vmax is "DXM CYP2D6 Vmax";  // SBO:0000002
  // Kronbach1987: 3.89 µM Yu2001: 3.7 +- 1.2µM Allorge2005: WildType 1.4+-1.2 µM (mean ± s.d.) Arg440His 11.7+-8.3 µM (mean ± s.d.) Arg440His+Arg296Cys 22.8+-5.7 µM (mean ± s.d.) Arg440His+Ser486Thr 11.6+-7.3 µM (mean ± s.d.) Broly1989: 4.6 ± 1.8 µM (mean ± s.d.)
  LI__DXMCYP2D6_Km = 0.0079 LI__mM; LI__DXMCYP2D6_Km is "DXM CYP2D6 Km";  // SBO:0000027
  // Kerry1994: 0.1 µM Broly1989: 0.025 ± 0.008 µM (mean ± s.d.) Yu2001: 0.034 µM
  LI__DXMCYP2D6_Ki_qui = 1e-6 LI__mM; LI__DXMCYP2D6_Ki_qui is "DXM CYP2D6 Ki quinidine";  // SBO:0000009
  LI__f_DXMCYP2D6_Km = 1 dimensionless; LI__f_DXMCYP2D6_Km is "A factor used to scan DXMCYP2D6_Km (for induction and inhibition)";  // SBO:0000002
  LI__lambda_1 = -0.4 dimensionless; LI__lambda_1 is "Km value of the scaled first eigenvector of (Vmax, Km) in log space. Determies how much Km should be scaled if Vmax is scaled. In this model, Vmax is scaled by the activity score. The value was calculated based on Storelli2019 and Yang2012.";  // SBO:0000002
  // Vmax between low activity site and high activity site. See for instance Schmider1997
  LI__DXMCYP3A4_Vmax = 0.0004 LI__mmole_per_min_l; LI__DXMCYP3A4_Vmax is "Vmax of minor CYP pathway for DXO formation";  // SBO:0000186
  // Schmieder1997: EM low affinity site of Km (dxm->dxo) [289,157,143] [µM] Kerry1994: EM low affinity site of Km (dxm->dxo) [55.3-3ß7.3] [µM] Kerry1994: PM Km (dxm->dxo) [157, 260] [µM] Yu2001: CYP3A4 has lowest Km and highest [v_max/Km] DXO formation after CY2D6 157 +-26 µM (mean ± s.d.)
  LI__DXMCYP3A4_Km = 0.157 LI__mM; LI__DXMCYP3A4_Km is "Km of minor CYP pathway for DXO formation";  // SBO:0000027
  LI__f_DXMCYP3A4_Km = 1 dimensionless; LI__f_DXMCYP3A4_Km is "A factor used to scan DXMCYP3A4_Km (for induction and inhibition)";  // SBO:0000002
  // UDP-glucuronosyltransferase Vmax
  LI__DXOUGT_Vmax = 0.895285 LI__mmole_per_min_l; LI__DXOUGT_Vmax is "DXO UGT Vmax";  // SBO:0000186
  // UDP-glucuronosyltransferase Michaelis Menten constant. Lutz2012: Kinetic characterization of dextrorphan formation and elimination in human liver microsomes
  LI__DXOUGT_Km = 0.69 LI__mM; LI__DXOUGT_Km is "Km of for glucurination.";  // SBO:0000027
  LI__cyp2d6_activity has dimensionless; LI__cyp2d6_activity is "activity of CYP2D6 diplotype";
  GU__F_dxm = 0.55 dimensionless; GU__F_dxm is "fraction absorbed dextromethorphan";  // SBO:0000002
  GU__Ka_abs_dxm = 3.428544 GU__per_hr; GU__Ka_abs_dxm is "Ka_abs [1/hr] absorption dextromethorphan";  // SBO:0000002
  // Scaling factor for activity
  GU__DXMCYP3A4_activity = 1 dimensionless;  // SBO:0000559
  // Same isoform in liver and intestine. Value replaced by global value.
  // Vmax(DOR) = 5.6 [3.3-6.8] [nmole/min/mg] Km_dxm(DOR) = 286 [231-322] [µM]
  GU__DXMCYP3A4_Vmax = 0.0002 GU__mmole_per_min_l; GU__DXMCYP3A4_Vmax is "DXM CYP3A4 Vmax";  // SBO:0000186
  // Same isoform in liver and intestine. Value replaced by global value. Kerry1994: Km = [632, 929, 977, 742, 677][µM] Yu2001: 232+38 [µM]
  // Km_dxm(DOR) = 286 [231-322]
  // Vmax(DOR) = 5.6 [3.3-6.8] [nmole/min/mg]
  GU__DXMCYP3A4_Km = 0.7 GU__mM; GU__DXMCYP3A4_Km is "DXM CYP3A4 Km";  // SBO:0000027
  GU__absorption has GU__mmole_per_min; GU__absorption is "absorption dextromethorphan";

  // Assignment rules:
  dxm_dxo_plasma := Cve_dxm/Cve_dxo;
  dxo_total_plasma := Cve_dxo + Cve_dxo_glu;
  dxm_dxo_total_plasma := Cve_dxm/(Cve_dxo + Cve_dxo_glu);
  dxo_total_rev := Crev_dxo + Crev_dxo_glu;
  dxm_dxo_rev := Crev_dxm/Crev_dxo;
  dxm_dxo_total_rev := Crev_dxm/(Crev_dxo + Crev_dxo_glu);
  dxm_dxo_total_fov := Cfov_dxm/(Cfov_dxo + Cfov_dxo_glu);
  dxo_total_fov := Cfov_dxo + Cfov_dxo_glu;
  dxm_dxo_fov := Cfov_dxm/Cfov_dxo;
  dxm_dxo_urine := Aurine_dxm/Aurine_dxo;
  Aurine_dxo_total := Aurine_dxo + Aurine_dxo_glu;
  dxm_dxo_total_urine := Aurine_dxm/(Aurine_dxo + Aurine_dxo_glu);
  FVre := 1 l_per_kg - (FVgu + FVki + FVli + FVlu + FVsp + FVpa + FVve + FVar + FVfo);
  FQre := 1 - (FQki + FQh + FQfo);
  BSA := 0.024265 m2*(BW/(1 kg))^0.5378*(HEIGHT/(1 cm))^0.3964;
  CO := BW*COBW + (HR - HRrest)*COHRI/(60 s_per_min);
  QC := CO/(1000 ml_per_l)*60 s_per_min;
  Vgu := BW*FVgu;
  Vki := BW*FVki;
  Vli := BW*FVli;
  Vlu := BW*FVlu;
  Vsp := BW*FVsp;
  Vpa := BW*FVpa;
  Vre := BW*FVre;
  Vve := BW*FVve - FVve/(FVar + FVve)*BW*Fblood*(1 l_per_kg - FVve - FVar);
  Var := BW*FVar - FVar/(FVar + FVve)*BW*Fblood*(1 l_per_kg - FVve - FVar);
  Vpo := (1 - HCT)*(BW*FVpo - FVpo/(FVar + FVve + FVpo + FVhv + FVkiv + FVrev + FVfov)*BW*Fblood*(1 l_per_kg - (FVar + FVve + FVpo + FVhv + FVkiv + FVrev + FVfov)));
  Vhv := (1 - HCT)*(BW*FVhv - FVhv/(FVar + FVve + FVpo + FVhv + FVkiv + FVrev + FVfov)*BW*Fblood*(1 l_per_kg - (FVar + FVve + FVpo + FVhv + FVkiv + FVrev + FVfov)));
  Vrev := BW*FVrev - FVrev/(FVar + FVve)*BW*Fblood*(1 l_per_kg - FVve - FVar);
  Vkiv := BW*FVkiv - FVkiv/(FVar + FVve)*BW*Fblood*(1 l_per_kg - FVve - FVar);
  Qgu := QC*FQgu;
  Qki := QC*FQki;
  Qh := QC*FQh;
  Qha := Qh - Qgu - Qsp - Qpa;
  Qlu := QC*FQlu;
  Qsp := QC*FQsp;
  Qpa := QC*FQpa;
  Qre := QC*FQre;
  Qpo := Qsp + Qpa + Qgu;
  Qfo := QC*FQfo;
  Vgu_tissue := Vgu*(1 - Fblood);
  Vgu_plasma := Vgu*Fblood*(1 - HCT);
  Vki_tissue := Vki*(1 - Fblood);
  Vki_plasma := Vki*Fblood*(1 - HCT);
  Vli_tissue := Vli*(1 - Fblood);
  Vli_plasma := Vli*Fblood*(1 - HCT);
  Vlu_tissue := Vlu*(1 - Fblood);
  Vlu_plasma := Vlu*Fblood*(1 - HCT);
  Vpa_tissue := Vpa*(1 - Fblood);
  Vpa_plasma := Vpa*Fblood*(1 - HCT);
  Vsp_tissue := Vsp*(1 - Fblood);
  Vsp_plasma := Vsp*Fblood*(1 - HCT);
  Vre_tissue := Vre*(1 - Fblood);
  Vre_plasma := Vre*Fblood*(1 - HCT);
  Vfo_tissue := Vfo*(1 - Fblood);
  Vfo_plasma := Vfo*Fblood*(1 - HCT);
  // log(2) ~ 0.693 used for conversion of half-life injection time to injection rate.
  Ki_dxm := 0.693/ti_dxm*60 s_per_min;
  Agu_plasma_dxm := Cgu_plasma_dxm*Vgu_plasma;
  Xgu_plasma_dxm := Agu_plasma_dxm*Mr_dxm;
  Mgu_plasma_dxm := Agu_plasma_dxm/Vgu_plasma*Mr_dxm;
  Aki_plasma_dxm := Cki_plasma_dxm*Vki_plasma;
  Xki_plasma_dxm := Aki_plasma_dxm*Mr_dxm;
  Mki_plasma_dxm := Aki_plasma_dxm/Vki_plasma*Mr_dxm;
  Ali_plasma_dxm := Cli_plasma_dxm*Vli_plasma;
  Xli_plasma_dxm := Ali_plasma_dxm*Mr_dxm;
  Mli_plasma_dxm := Ali_plasma_dxm/Vli_plasma*Mr_dxm;
  Alu_plasma_dxm := Clu_plasma_dxm*Vlu_plasma;
  Xlu_plasma_dxm := Alu_plasma_dxm*Mr_dxm;
  Mlu_plasma_dxm := Alu_plasma_dxm/Vlu_plasma*Mr_dxm;
  Apa_plasma_dxm := Cpa_plasma_dxm*Vpa_plasma;
  Xpa_plasma_dxm := Apa_plasma_dxm*Mr_dxm;
  Mpa_plasma_dxm := Apa_plasma_dxm/Vpa_plasma*Mr_dxm;
  Asp_plasma_dxm := Csp_plasma_dxm*Vsp_plasma;
  Xsp_plasma_dxm := Asp_plasma_dxm*Mr_dxm;
  Msp_plasma_dxm := Asp_plasma_dxm/Vsp_plasma*Mr_dxm;
  Are_plasma_dxm := Cre_plasma_dxm*Vre_plasma;
  Xre_plasma_dxm := Are_plasma_dxm*Mr_dxm;
  Mre_plasma_dxm := Are_plasma_dxm/Vre_plasma*Mr_dxm;
  Afo_plasma_dxm := Cfo_plasma_dxm*Vfo_plasma;
  Xfo_plasma_dxm := Afo_plasma_dxm*Mr_dxm;
  Mfo_plasma_dxm := Afo_plasma_dxm/Vfo_plasma*Mr_dxm;
  Aar_dxm := Car_dxm*Var;
  Xar_dxm := Aar_dxm*Mr_dxm;
  Mar_dxm := Aar_dxm/Var*Mr_dxm;
  Ave_dxm := Cve_dxm*Vve;
  Xve_dxm := Ave_dxm*Mr_dxm;
  Mve_dxm := Ave_dxm/Vve*Mr_dxm;
  Apo_dxm := Cpo_dxm*Vpo;
  Xpo_dxm := Apo_dxm*Mr_dxm;
  Mpo_dxm := Apo_dxm/Vpo*Mr_dxm;
  Ahv_dxm := Chv_dxm*Vhv;
  Xhv_dxm := Ahv_dxm*Mr_dxm;
  Mhv_dxm := Ahv_dxm/Vhv*Mr_dxm;
  Arev_dxm := Crev_dxm*Vrev;
  Xrev_dxm := Arev_dxm*Mr_dxm;
  Mrev_dxm := Arev_dxm/Vrev*Mr_dxm;
  Akiv_dxm := Ckiv_dxm*Vkiv;
  Xkiv_dxm := Akiv_dxm*Mr_dxm;
  Mkiv_dxm := Akiv_dxm/Vkiv*Mr_dxm;
  Afov_dxm := Cfov_dxm*Vfov;
  Xfov_dxm := Afov_dxm*Mr_dxm;
  Mfov_dxm := Afov_dxm/Vfov*Mr_dxm;
  Xurine_dxm := Aurine_dxm*Mr_dxm;
  Xfeces_dxm := Afeces_dxm*Mr_dxm;
  Agu_plasma_dxo := Cgu_plasma_dxo*Vgu_plasma;
  Xgu_plasma_dxo := Agu_plasma_dxo*Mr_dxo;
  Mgu_plasma_dxo := Agu_plasma_dxo/Vgu_plasma*Mr_dxo;
  Aki_plasma_dxo := Cki_plasma_dxo*Vki_plasma;
  Xki_plasma_dxo := Aki_plasma_dxo*Mr_dxo;
  Mki_plasma_dxo := Aki_plasma_dxo/Vki_plasma*Mr_dxo;
  Ali_plasma_dxo := Cli_plasma_dxo*Vli_plasma;
  Xli_plasma_dxo := Ali_plasma_dxo*Mr_dxo;
  Mli_plasma_dxo := Ali_plasma_dxo/Vli_plasma*Mr_dxo;
  Alu_plasma_dxo := Clu_plasma_dxo*Vlu_plasma;
  Xlu_plasma_dxo := Alu_plasma_dxo*Mr_dxo;
  Mlu_plasma_dxo := Alu_plasma_dxo/Vlu_plasma*Mr_dxo;
  Apa_plasma_dxo := Cpa_plasma_dxo*Vpa_plasma;
  Xpa_plasma_dxo := Apa_plasma_dxo*Mr_dxo;
  Mpa_plasma_dxo := Apa_plasma_dxo/Vpa_plasma*Mr_dxo;
  Asp_plasma_dxo := Csp_plasma_dxo*Vsp_plasma;
  Xsp_plasma_dxo := Asp_plasma_dxo*Mr_dxo;
  Msp_plasma_dxo := Asp_plasma_dxo/Vsp_plasma*Mr_dxo;
  Are_plasma_dxo := Cre_plasma_dxo*Vre_plasma;
  Xre_plasma_dxo := Are_plasma_dxo*Mr_dxo;
  Mre_plasma_dxo := Are_plasma_dxo/Vre_plasma*Mr_dxo;
  Afo_plasma_dxo := Cfo_plasma_dxo*Vfo_plasma;
  Xfo_plasma_dxo := Afo_plasma_dxo*Mr_dxo;
  Mfo_plasma_dxo := Afo_plasma_dxo/Vfo_plasma*Mr_dxo;
  Aar_dxo := Car_dxo*Var;
  Xar_dxo := Aar_dxo*Mr_dxo;
  Mar_dxo := Aar_dxo/Var*Mr_dxo;
  Ave_dxo := Cve_dxo*Vve;
  Xve_dxo := Ave_dxo*Mr_dxo;
  Mve_dxo := Ave_dxo/Vve*Mr_dxo;
  Apo_dxo := Cpo_dxo*Vpo;
  Xpo_dxo := Apo_dxo*Mr_dxo;
  Mpo_dxo := Apo_dxo/Vpo*Mr_dxo;
  Ahv_dxo := Chv_dxo*Vhv;
  Xhv_dxo := Ahv_dxo*Mr_dxo;
  Mhv_dxo := Ahv_dxo/Vhv*Mr_dxo;
  Arev_dxo := Crev_dxo*Vrev;
  Xrev_dxo := Arev_dxo*Mr_dxo;
  Mrev_dxo := Arev_dxo/Vrev*Mr_dxo;
  Akiv_dxo := Ckiv_dxo*Vkiv;
  Xkiv_dxo := Akiv_dxo*Mr_dxo;
  Mkiv_dxo := Akiv_dxo/Vkiv*Mr_dxo;
  Afov_dxo := Cfov_dxo*Vfov;
  Xfov_dxo := Afov_dxo*Mr_dxo;
  Mfov_dxo := Afov_dxo/Vfov*Mr_dxo;
  Xurine_dxo := Aurine_dxo*Mr_dxo;
  Agu_plasma_dxo_glu := Cgu_plasma_dxo_glu*Vgu_plasma;
  Xgu_plasma_dxo_glu := Agu_plasma_dxo_glu*Mr_dxo_glu;
  Mgu_plasma_dxo_glu := Agu_plasma_dxo_glu/Vgu_plasma*Mr_dxo_glu;
  Aki_plasma_dxo_glu := Cki_plasma_dxo_glu*Vki_plasma;
  Xki_plasma_dxo_glu := Aki_plasma_dxo_glu*Mr_dxo_glu;
  Mki_plasma_dxo_glu := Aki_plasma_dxo_glu/Vki_plasma*Mr_dxo_glu;
  Ali_plasma_dxo_glu := Cli_plasma_dxo_glu*Vli_plasma;
  Xli_plasma_dxo_glu := Ali_plasma_dxo_glu*Mr_dxo_glu;
  Mli_plasma_dxo_glu := Ali_plasma_dxo_glu/Vli_plasma*Mr_dxo_glu;
  Alu_plasma_dxo_glu := Clu_plasma_dxo_glu*Vlu_plasma;
  Xlu_plasma_dxo_glu := Alu_plasma_dxo_glu*Mr_dxo_glu;
  Mlu_plasma_dxo_glu := Alu_plasma_dxo_glu/Vlu_plasma*Mr_dxo_glu;
  Apa_plasma_dxo_glu := Cpa_plasma_dxo_glu*Vpa_plasma;
  Xpa_plasma_dxo_glu := Apa_plasma_dxo_glu*Mr_dxo_glu;
  Mpa_plasma_dxo_glu := Apa_plasma_dxo_glu/Vpa_plasma*Mr_dxo_glu;
  Asp_plasma_dxo_glu := Csp_plasma_dxo_glu*Vsp_plasma;
  Xsp_plasma_dxo_glu := Asp_plasma_dxo_glu*Mr_dxo_glu;
  Msp_plasma_dxo_glu := Asp_plasma_dxo_glu/Vsp_plasma*Mr_dxo_glu;
  Are_plasma_dxo_glu := Cre_plasma_dxo_glu*Vre_plasma;
  Xre_plasma_dxo_glu := Are_plasma_dxo_glu*Mr_dxo_glu;
  Mre_plasma_dxo_glu := Are_plasma_dxo_glu/Vre_plasma*Mr_dxo_glu;
  Afo_plasma_dxo_glu := Cfo_plasma_dxo_glu*Vfo_plasma;
  Xfo_plasma_dxo_glu := Afo_plasma_dxo_glu*Mr_dxo_glu;
  Mfo_plasma_dxo_glu := Afo_plasma_dxo_glu/Vfo_plasma*Mr_dxo_glu;
  Aar_dxo_glu := Car_dxo_glu*Var;
  Xar_dxo_glu := Aar_dxo_glu*Mr_dxo_glu;
  Mar_dxo_glu := Aar_dxo_glu/Var*Mr_dxo_glu;
  Ave_dxo_glu := Cve_dxo_glu*Vve;
  Xve_dxo_glu := Ave_dxo_glu*Mr_dxo_glu;
  Mve_dxo_glu := Ave_dxo_glu/Vve*Mr_dxo_glu;
  Apo_dxo_glu := Cpo_dxo_glu*Vpo;
  Xpo_dxo_glu := Apo_dxo_glu*Mr_dxo_glu;
  Mpo_dxo_glu := Apo_dxo_glu/Vpo*Mr_dxo_glu;
  Ahv_dxo_glu := Chv_dxo_glu*Vhv;
  Xhv_dxo_glu := Ahv_dxo_glu*Mr_dxo_glu;
  Mhv_dxo_glu := Ahv_dxo_glu/Vhv*Mr_dxo_glu;
  Arev_dxo_glu := Crev_dxo_glu*Vrev;
  Xrev_dxo_glu := Arev_dxo_glu*Mr_dxo_glu;
  Mrev_dxo_glu := Arev_dxo_glu/Vrev*Mr_dxo_glu;
  Akiv_dxo_glu := Ckiv_dxo_glu*Vkiv;
  Xkiv_dxo_glu := Akiv_dxo_glu*Mr_dxo_glu;
  Mkiv_dxo_glu := Akiv_dxo_glu/Vkiv*Mr_dxo_glu;
  Afov_dxo_glu := Cfov_dxo_glu*Vfov;
  Xfov_dxo_glu := Afov_dxo_glu*Mr_dxo_glu;
  Mfov_dxo_glu := Afov_dxo_glu/Vfov*Mr_dxo_glu;
  Xurine_dxo_glu := Aurine_dxo_glu*Mr_dxo_glu;
  LI__cyp2d6_activity1 := piecewise(LI__cyp2d6_ac/2, LI__cyp2d6_allele1 == -1, LI__cyp2d6_a0, LI__cyp2d6_allele1 == 0, LI__cyp2d6_a1, LI__cyp2d6_allele1 == 1, LI__cyp2d6_a2, LI__cyp2d6_allele1 == 2, LI__cyp2d6_a3, LI__cyp2d6_allele1 == 3, LI__cyp2d6_a4, LI__cyp2d6_allele1 == 4, LI__cyp2d6_a5, LI__cyp2d6_allele1 == 5, LI__cyp2d6_a6, LI__cyp2d6_allele1 == 6, LI__cyp2d6_a7, LI__cyp2d6_allele1 == 7, LI__cyp2d6_a8, LI__cyp2d6_allele1 == 8, LI__cyp2d6_a9, LI__cyp2d6_allele1 == 9, LI__cyp2d6_a10, LI__cyp2d6_allele1 == 10, LI__cyp2d6_a11, LI__cyp2d6_allele1 == 11, LI__cyp2d6_a12, LI__cyp2d6_allele1 == 12, LI__cyp2d6_a13, LI__cyp2d6_allele1 == 13, LI__cyp2d6_a14, LI__cyp2d6_allele1 == 14, LI__cyp2d6_a15, LI__cyp2d6_allele1 == 15, LI__cyp2d6_a16, LI__cyp2d6_allele1 == 16, LI__cyp2d6_a17, LI__cyp2d6_allele1 == 17, LI__cyp2d6_a18, LI__cyp2d6_allele1 == 18, LI__cyp2d6_a19, LI__cyp2d6_allele1 == 19, LI__cyp2d6_a20, LI__cyp2d6_allele1 == 20, LI__cyp2d6_a21, LI__cyp2d6_allele1 == 21, LI__cyp2d6_a22, LI__cyp2d6_allele1 == 22, LI__cyp2d6_a23, LI__cyp2d6_allele1 == 23, LI__cyp2d6_a24, LI__cyp2d6_allele1 == 24, LI__cyp2d6_a25, LI__cyp2d6_allele1 == 25, LI__cyp2d6_a26, LI__cyp2d6_allele1 == 26, LI__cyp2d6_a27, LI__cyp2d6_allele1 == 27, LI__cyp2d6_a28, LI__cyp2d6_allele1 == 28, LI__cyp2d6_a29, LI__cyp2d6_allele1 == 29, LI__cyp2d6_a30, LI__cyp2d6_allele1 == 30, LI__cyp2d6_a31, LI__cyp2d6_allele1 == 31, LI__cyp2d6_a32, LI__cyp2d6_allele1 == 32, LI__cyp2d6_a33, LI__cyp2d6_allele1 == 33, LI__cyp2d6_a34, LI__cyp2d6_allele1 == 34, LI__cyp2d6_a35, LI__cyp2d6_allele1 == 35, LI__cyp2d6_a36, LI__cyp2d6_allele1 == 36, LI__cyp2d6_a37, LI__cyp2d6_allele1 == 37, LI__cyp2d6_a38, LI__cyp2d6_allele1 == 38, LI__cyp2d6_a39, LI__cyp2d6_allele1 == 39, LI__cyp2d6_a40, LI__cyp2d6_allele1 == 40, LI__cyp2d6_a41, LI__cyp2d6_allele1 == 41, LI__cyp2d6_a42, LI__cyp2d6_allele1 == 42, LI__cyp2d6_a43, LI__cyp2d6_allele1 == 43, LI__cyp2d6_a44, LI__cyp2d6_allele1 == 44, LI__cyp2d6_a45, LI__cyp2d6_allele1 == 45, LI__cyp2d6_a46, LI__cyp2d6_allele1 == 46, LI__cyp2d6_a47, LI__cyp2d6_allele1 == 47, LI__cyp2d6_a48, LI__cyp2d6_allele1 == 48, LI__cyp2d6_a49, LI__cyp2d6_allele1 == 49, LI__cyp2d6_a50, LI__cyp2d6_allele1 == 50, LI__cyp2d6_a51, LI__cyp2d6_allele1 == 51, LI__cyp2d6_a52, LI__cyp2d6_allele1 == 52, LI__cyp2d6_a53, LI__cyp2d6_allele1 == 53, LI__cyp2d6_a54, LI__cyp2d6_allele1 == 54, LI__cyp2d6_a55, LI__cyp2d6_allele1 == 55, LI__cyp2d6_a56, LI__cyp2d6_allele1 == 56, LI__cyp2d6_a57, LI__cyp2d6_allele1 == 57, LI__cyp2d6_a58, LI__cyp2d6_allele1 == 58, LI__cyp2d6_a59, LI__cyp2d6_allele1 == 59, LI__cyp2d6_a60, LI__cyp2d6_allele1 == 60, LI__cyp2d6_a61, LI__cyp2d6_allele1 == 61, LI__cyp2d6_a62, LI__cyp2d6_allele1 == 62, LI__cyp2d6_a63, LI__cyp2d6_allele1 == 63, LI__cyp2d6_a64, LI__cyp2d6_allele1 == 64, LI__cyp2d6_a65, LI__cyp2d6_allele1 == 65, LI__cyp2d6_a66, LI__cyp2d6_allele1 == 66, LI__cyp2d6_a67, LI__cyp2d6_allele1 == 67, LI__cyp2d6_a68, LI__cyp2d6_allele1 == 68, LI__cyp2d6_a69, LI__cyp2d6_allele1 == 69, LI__cyp2d6_a70, LI__cyp2d6_allele1 == 70, LI__cyp2d6_a71, LI__cyp2d6_allele1 == 71, LI__cyp2d6_a72, LI__cyp2d6_allele1 == 72, LI__cyp2d6_a73, LI__cyp2d6_allele1 == 73, LI__cyp2d6_a74, LI__cyp2d6_allele1 == 74, LI__cyp2d6_a75, LI__cyp2d6_allele1 == 75, LI__cyp2d6_a76, LI__cyp2d6_allele1 == 76, LI__cyp2d6_a77, LI__cyp2d6_allele1 == 77, LI__cyp2d6_a78, LI__cyp2d6_allele1 == 78, LI__cyp2d6_a79, LI__cyp2d6_allele1 == 79, LI__cyp2d6_a80, LI__cyp2d6_allele1 == 80, LI__cyp2d6_a81, LI__cyp2d6_allele1 == 81, LI__cyp2d6_a82, LI__cyp2d6_allele1 == 82, LI__cyp2d6_a83, LI__cyp2d6_allele1 == 83, LI__cyp2d6_a84, LI__cyp2d6_allele1 == 84, LI__cyp2d6_ac/2);
  LI__cyp2d6_activity2 := piecewise(LI__cyp2d6_ac/2, LI__cyp2d6_allele2 == -1, LI__cyp2d6_a0, LI__cyp2d6_allele2 == 0, LI__cyp2d6_a1, LI__cyp2d6_allele2 == 1, LI__cyp2d6_a2, LI__cyp2d6_allele2 == 2, LI__cyp2d6_a3, LI__cyp2d6_allele2 == 3, LI__cyp2d6_a4, LI__cyp2d6_allele2 == 4, LI__cyp2d6_a5, LI__cyp2d6_allele2 == 5, LI__cyp2d6_a6, LI__cyp2d6_allele2 == 6, LI__cyp2d6_a7, LI__cyp2d6_allele2 == 7, LI__cyp2d6_a8, LI__cyp2d6_allele2 == 8, LI__cyp2d6_a9, LI__cyp2d6_allele2 == 9, LI__cyp2d6_a10, LI__cyp2d6_allele2 == 10, LI__cyp2d6_a11, LI__cyp2d6_allele2 == 11, LI__cyp2d6_a12, LI__cyp2d6_allele2 == 12, LI__cyp2d6_a13, LI__cyp2d6_allele2 == 13, LI__cyp2d6_a14, LI__cyp2d6_allele2 == 14, LI__cyp2d6_a15, LI__cyp2d6_allele2 == 15, LI__cyp2d6_a16, LI__cyp2d6_allele2 == 16, LI__cyp2d6_a17, LI__cyp2d6_allele2 == 17, LI__cyp2d6_a18, LI__cyp2d6_allele2 == 18, LI__cyp2d6_a19, LI__cyp2d6_allele2 == 19, LI__cyp2d6_a20, LI__cyp2d6_allele2 == 20, LI__cyp2d6_a21, LI__cyp2d6_allele2 == 21, LI__cyp2d6_a22, LI__cyp2d6_allele2 == 22, LI__cyp2d6_a23, LI__cyp2d6_allele2 == 23, LI__cyp2d6_a24, LI__cyp2d6_allele2 == 24, LI__cyp2d6_a25, LI__cyp2d6_allele2 == 25, LI__cyp2d6_a26, LI__cyp2d6_allele2 == 26, LI__cyp2d6_a27, LI__cyp2d6_allele2 == 27, LI__cyp2d6_a28, LI__cyp2d6_allele2 == 28, LI__cyp2d6_a29, LI__cyp2d6_allele2 == 29, LI__cyp2d6_a30, LI__cyp2d6_allele2 == 30, LI__cyp2d6_a31, LI__cyp2d6_allele2 == 31, LI__cyp2d6_a32, LI__cyp2d6_allele2 == 32, LI__cyp2d6_a33, LI__cyp2d6_allele2 == 33, LI__cyp2d6_a34, LI__cyp2d6_allele2 == 34, LI__cyp2d6_a35, LI__cyp2d6_allele2 == 35, LI__cyp2d6_a36, LI__cyp2d6_allele2 == 36, LI__cyp2d6_a37, LI__cyp2d6_allele2 == 37, LI__cyp2d6_a38, LI__cyp2d6_allele2 == 38, LI__cyp2d6_a39, LI__cyp2d6_allele2 == 39, LI__cyp2d6_a40, LI__cyp2d6_allele2 == 40, LI__cyp2d6_a41, LI__cyp2d6_allele2 == 41, LI__cyp2d6_a42, LI__cyp2d6_allele2 == 42, LI__cyp2d6_a43, LI__cyp2d6_allele2 == 43, LI__cyp2d6_a44, LI__cyp2d6_allele2 == 44, LI__cyp2d6_a45, LI__cyp2d6_allele2 == 45, LI__cyp2d6_a46, LI__cyp2d6_allele2 == 46, LI__cyp2d6_a47, LI__cyp2d6_allele2 == 47, LI__cyp2d6_a48, LI__cyp2d6_allele2 == 48, LI__cyp2d6_a49, LI__cyp2d6_allele2 == 49, LI__cyp2d6_a50, LI__cyp2d6_allele2 == 50, LI__cyp2d6_a51, LI__cyp2d6_allele2 == 51, LI__cyp2d6_a52, LI__cyp2d6_allele2 == 52, LI__cyp2d6_a53, LI__cyp2d6_allele2 == 53, LI__cyp2d6_a54, LI__cyp2d6_allele2 == 54, LI__cyp2d6_a55, LI__cyp2d6_allele2 == 55, LI__cyp2d6_a56, LI__cyp2d6_allele2 == 56, LI__cyp2d6_a57, LI__cyp2d6_allele2 == 57, LI__cyp2d6_a58, LI__cyp2d6_allele2 == 58, LI__cyp2d6_a59, LI__cyp2d6_allele2 == 59, LI__cyp2d6_a60, LI__cyp2d6_allele2 == 60, LI__cyp2d6_a61, LI__cyp2d6_allele2 == 61, LI__cyp2d6_a62, LI__cyp2d6_allele2 == 62, LI__cyp2d6_a63, LI__cyp2d6_allele2 == 63, LI__cyp2d6_a64, LI__cyp2d6_allele2 == 64, LI__cyp2d6_a65, LI__cyp2d6_allele2 == 65, LI__cyp2d6_a66, LI__cyp2d6_allele2 == 66, LI__cyp2d6_a67, LI__cyp2d6_allele2 == 67, LI__cyp2d6_a68, LI__cyp2d6_allele2 == 68, LI__cyp2d6_a69, LI__cyp2d6_allele2 == 69, LI__cyp2d6_a70, LI__cyp2d6_allele2 == 70, LI__cyp2d6_a71, LI__cyp2d6_allele2 == 71, LI__cyp2d6_a72, LI__cyp2d6_allele2 == 72, LI__cyp2d6_a73, LI__cyp2d6_allele2 == 73, LI__cyp2d6_a74, LI__cyp2d6_allele2 == 74, LI__cyp2d6_a75, LI__cyp2d6_allele2 == 75, LI__cyp2d6_a76, LI__cyp2d6_allele2 == 76, LI__cyp2d6_a77, LI__cyp2d6_allele2 == 77, LI__cyp2d6_a78, LI__cyp2d6_allele2 == 78, LI__cyp2d6_a79, LI__cyp2d6_allele2 == 79, LI__cyp2d6_a80, LI__cyp2d6_allele2 == 80, LI__cyp2d6_a81, LI__cyp2d6_allele2 == 81, LI__cyp2d6_a82, LI__cyp2d6_allele2 == 82, LI__cyp2d6_a83, LI__cyp2d6_allele2 == 83, LI__cyp2d6_a84, LI__cyp2d6_allele2 == 84, LI__cyp2d6_ac/2);
  LI__cyp2d6_activity := LI__cyp2d6_activity1 + LI__cyp2d6_activity2;
  GU__absorption := Vgu_tissue*GU__Ka_abs_dxm/(60 GU__min_per_hr)*Cgulumen_dxm;

  // Rate rules:
  PODOSE_dxm' = -dissolution_dxm*Mr_dxm;
  IVDOSE_dxm' = -iv_dxm*Mr_dxm + Ri_dxm;
  cum_dose_dxm' = Ri_dxm;

  // Reactions:
  transport_gu_dxm: Cgu_plasma_dxm -> Cgu_dxm; ftissue_dxm*(Cgu_plasma_dxm*Kp_dxm - Cgu_dxm); transport_gu_dxm is "transport dextromethorphan";  // SBO:0000655
  transport_ki_dxm: Cki_plasma_dxm -> Cki_dxm; ftissue_dxm*(Cki_plasma_dxm*Kp_dxm - Cki_dxm); transport_ki_dxm is "transport dextromethorphan";  // SBO:0000655
  transport_li_dxm: Cli_plasma_dxm -> Cli_dxm; ftissue_dxm*(Cli_plasma_dxm*Kp_dxm - Cli_dxm); transport_li_dxm is "transport dextromethorphan";  // SBO:0000655
  transport_lu_dxm: Clu_plasma_dxm -> Clu_dxm; ftissue_dxm*(Clu_plasma_dxm*Kp_dxm - Clu_dxm); transport_lu_dxm is "transport dextromethorphan";  // SBO:0000655
  transport_pa_dxm: Cpa_plasma_dxm -> Cpa_dxm; ftissue_dxm*(Cpa_plasma_dxm*Kp_dxm - Cpa_dxm); transport_pa_dxm is "transport dextromethorphan";  // SBO:0000655
  transport_sp_dxm: Csp_plasma_dxm -> Csp_dxm; ftissue_dxm*(Csp_plasma_dxm*Kp_dxm - Csp_dxm); transport_sp_dxm is "transport dextromethorphan";  // SBO:0000655
  transport_re_dxm: Cre_plasma_dxm -> Cre_dxm; ftissue_dxm*(Cre_plasma_dxm*Kp_dxm - Cre_dxm); transport_re_dxm is "transport dextromethorphan";  // SBO:0000655
  transport_fo_dxm: Cfo_plasma_dxm -> Cfo_dxm; ftissue_dxm*(Cfo_plasma_dxm*Kp_fo_dxm - Cfo_dxm); transport_fo_dxm is "transport dextromethorphan";  // SBO:0000655
  iv_dxm: => Cve_dxm; Ki_dxm*IVDOSE_dxm/Mr_dxm; iv_dxm is "iv dextromethorphan";  // SBO:0000655 ncit:C38276
  Flow_ar_gu_dxm: Car_dxm => Cgu_plasma_dxm; Qgu*Car_dxm; Flow_ar_gu_dxm is "inflow gut dextromethorphan";  // SBO:0000655
  Flow_gu_po_dxm: Cgu_plasma_dxm => Cpo_dxm; Qgu*Cgu_plasma_dxm; Flow_gu_po_dxm is "outflow gut dextromethorphan";  // SBO:0000655
  Flow_ar_ki_dxm: Car_dxm => Cki_plasma_dxm; Qki*Car_dxm; Flow_ar_ki_dxm is "inflow kidney dextromethorphan";  // SBO:0000655
  Flow_ki_kiv_dxm: Cki_plasma_dxm => Ckiv_dxm; Qki*Cki_plasma_dxm; Flow_ki_kiv_dxm is "outflow kidney dextromethorphan";  // SBO:0000655
  Flow_kiv_ve_dxm: Ckiv_dxm => Cve_dxm; Qki*Ckiv_dxm; Flow_kiv_ve_dxm is "outflow kidney vein dextromethorphan";  // SBO:0000655
  Flow_ar_li_dxm: Car_dxm => Cli_plasma_dxm; Qha*Car_dxm; Flow_ar_li_dxm is "inflow liver dextromethorphan";  // SBO:0000655
  Flow_po_li_dxm: Cpo_dxm => Cli_plasma_dxm; Qpo*Cpo_dxm; Flow_po_li_dxm is "outflow po dextromethorphan";  // SBO:0000655
  Flow_li_hv_dxm: Cli_plasma_dxm => Chv_dxm; Qh*Cli_plasma_dxm; Flow_li_hv_dxm is "outflow liver dextromethorphan";  // SBO:0000655
  Flow_hv_ve_dxm: Chv_dxm => Cve_dxm; Qh*Chv_dxm; Flow_hv_ve_dxm is "outflow hepatic vein dextromethorphan";  // SBO:0000655
  Flow_ve_lu_dxm: Cve_dxm => Clu_plasma_dxm; Qlu*Cve_dxm; Flow_ve_lu_dxm is "inflow lung dextromethorphan";  // SBO:0000655
  Flow_lu_ar_dxm: Clu_plasma_dxm => Car_dxm; Qlu*Clu_plasma_dxm; Flow_lu_ar_dxm is "outflow lung dextromethorphan";  // SBO:0000655
  Flow_ar_pa_dxm: Car_dxm => Cpa_plasma_dxm; Qpa*Car_dxm; Flow_ar_pa_dxm is "inflow pancreas dextromethorphan";  // SBO:0000655
  Flow_pa_po_dxm: Cpa_plasma_dxm => Cpo_dxm; Qpa*Cpa_plasma_dxm; Flow_pa_po_dxm is "outflow pancreas dextromethorphan";  // SBO:0000655
  Flow_ar_sp_dxm: Car_dxm => Csp_plasma_dxm; Qsp*Car_dxm; Flow_ar_sp_dxm is "inflow spleen dextromethorphan";  // SBO:0000655
  Flow_sp_po_dxm: Csp_plasma_dxm => Cpo_dxm; Qsp*Csp_plasma_dxm; Flow_sp_po_dxm is "outflow spleen dextromethorphan";  // SBO:0000655
  Flow_ar_re_dxm: Car_dxm => Cre_plasma_dxm; Qre*Car_dxm; Flow_ar_re_dxm is "inflow rest dextromethorphan";  // SBO:0000655
  Flow_re_rev_dxm: Cre_plasma_dxm => Crev_dxm; Qre*Cre_plasma_dxm; Flow_re_rev_dxm is "outflow rest dextromethorphan";  // SBO:0000655
  Flow_rev_ve_dxm: Crev_dxm => Cve_dxm; Qre*Crev_dxm; Flow_rev_ve_dxm is "outflow rest vein dextromethorphan";  // SBO:0000655
  Flow_ar_fo_dxm: Car_dxm => Cfo_plasma_dxm; Car_dxm*Qfo*(1 - f_shunting_forearm); Flow_ar_fo_dxm is "inflow forearm dextromethorphan";  // SBO:0000655
  Flow_fo_fov_dxm: Cfo_plasma_dxm + Car_dxm => Cfov_dxm; Qfo*(1 - f_shunting_forearm)*Cfo_plasma_dxm + Qfo*f_shunting_forearm*Car_dxm; Flow_fo_fov_dxm is "outflow forearm dextromethorphan";  // SBO:0000655
  Flow_fov_ve_dxm: Cfov_dxm => Cve_dxm; Qfo*Cfov_dxm; Flow_fov_ve_dxm is "outflow forearm vein dextromethorphan";  // SBO:0000655
  transport_gu_dxo: Cgu_plasma_dxo -> Cgu_dxo; ftissue_dxo*(Cgu_plasma_dxo*Kp_dxo - Cgu_dxo); transport_gu_dxo is "transport dextorphan";  // SBO:0000655
  transport_ki_dxo: Cki_plasma_dxo -> Cki_dxo; ftissue_dxo*(Cki_plasma_dxo*Kp_dxo - Cki_dxo); transport_ki_dxo is "transport dextorphan";  // SBO:0000655
  transport_li_dxo: Cli_plasma_dxo -> Cli_dxo; ftissue_dxo*(Cli_plasma_dxo*Kp_dxo - Cli_dxo); transport_li_dxo is "transport dextorphan";  // SBO:0000655
  transport_lu_dxo: Clu_plasma_dxo -> Clu_dxo; ftissue_dxo*(Clu_plasma_dxo*Kp_dxo - Clu_dxo); transport_lu_dxo is "transport dextorphan";  // SBO:0000655
  transport_pa_dxo: Cpa_plasma_dxo -> Cpa_dxo; ftissue_dxo*(Cpa_plasma_dxo*Kp_dxo - Cpa_dxo); transport_pa_dxo is "transport dextorphan";  // SBO:0000655
  transport_sp_dxo: Csp_plasma_dxo -> Csp_dxo; ftissue_dxo*(Csp_plasma_dxo*Kp_dxo - Csp_dxo); transport_sp_dxo is "transport dextorphan";  // SBO:0000655
  transport_re_dxo: Cre_plasma_dxo -> Cre_dxo; ftissue_dxo*(Cre_plasma_dxo*Kp_dxo - Cre_dxo); transport_re_dxo is "transport dextorphan";  // SBO:0000655
  transport_fo_dxo: Cfo_plasma_dxo -> Cfo_dxo; ftissue_dxo*(Cfo_plasma_dxo*Kp_dxo - Cfo_dxo); transport_fo_dxo is "transport dextorphan";  // SBO:0000655
  Flow_ar_gu_dxo: Car_dxo => Cgu_plasma_dxo; Qgu*Car_dxo; Flow_ar_gu_dxo is "inflow gut dextorphan";  // SBO:0000655
  Flow_gu_po_dxo: Cgu_plasma_dxo => Cpo_dxo; Qgu*Cgu_plasma_dxo; Flow_gu_po_dxo is "outflow gut dextorphan";  // SBO:0000655
  Flow_ar_ki_dxo: Car_dxo => Cki_plasma_dxo; Qki*Car_dxo; Flow_ar_ki_dxo is "inflow kidney dextorphan";  // SBO:0000655
  Flow_ki_kiv_dxo: Cki_plasma_dxo => Ckiv_dxo; Qki*Cki_plasma_dxo; Flow_ki_kiv_dxo is "outflow kidney dextorphan";  // SBO:0000655
  Flow_kiv_ve_dxo: Ckiv_dxo => Cve_dxo; Qki*Ckiv_dxo; Flow_kiv_ve_dxo is "outflow kidney vein dextorphan";  // SBO:0000655
  Flow_ar_li_dxo: Car_dxo => Cli_plasma_dxo; Qha*Car_dxo; Flow_ar_li_dxo is "inflow liver dextorphan";  // SBO:0000655
  Flow_po_li_dxo: Cpo_dxo => Cli_plasma_dxo; Qpo*Cpo_dxo; Flow_po_li_dxo is "outflow po dextorphan";  // SBO:0000655
  Flow_li_hv_dxo: Cli_plasma_dxo => Chv_dxo; Qh*Cli_plasma_dxo; Flow_li_hv_dxo is "outflow liver dextorphan";  // SBO:0000655
  Flow_hv_ve_dxo: Chv_dxo => Cve_dxo; Qh*Chv_dxo; Flow_hv_ve_dxo is "outflow hepatic vein dextorphan";  // SBO:0000655
  Flow_ve_lu_dxo: Cve_dxo => Clu_plasma_dxo; Qlu*Cve_dxo; Flow_ve_lu_dxo is "inflow lung dextorphan";  // SBO:0000655
  Flow_lu_ar_dxo: Clu_plasma_dxo => Car_dxo; Qlu*Clu_plasma_dxo; Flow_lu_ar_dxo is "outflow lung dextorphan";  // SBO:0000655
  Flow_ar_pa_dxo: Car_dxo => Cpa_plasma_dxo; Qpa*Car_dxo; Flow_ar_pa_dxo is "inflow pancreas dextorphan";  // SBO:0000655
  Flow_pa_po_dxo: Cpa_plasma_dxo => Cpo_dxo; Qpa*Cpa_plasma_dxo; Flow_pa_po_dxo is "outflow pancreas dextorphan";  // SBO:0000655
  Flow_ar_sp_dxo: Car_dxo => Csp_plasma_dxo; Qsp*Car_dxo; Flow_ar_sp_dxo is "inflow spleen dextorphan";  // SBO:0000655
  Flow_sp_po_dxo: Csp_plasma_dxo => Cpo_dxo; Qsp*Csp_plasma_dxo; Flow_sp_po_dxo is "outflow spleen dextorphan";  // SBO:0000655
  Flow_ar_re_dxo: Car_dxo => Cre_plasma_dxo; Qre*Car_dxo; Flow_ar_re_dxo is "inflow rest dextorphan";  // SBO:0000655
  Flow_re_rev_dxo: Cre_plasma_dxo => Crev_dxo; Qre*Cre_plasma_dxo; Flow_re_rev_dxo is "outflow rest dextorphan";  // SBO:0000655
  Flow_rev_ve_dxo: Crev_dxo => Cve_dxo; Qre*Crev_dxo; Flow_rev_ve_dxo is "outflow rest vein dextorphan";  // SBO:0000655
  Flow_ar_fo_dxo: Car_dxo => Cfo_plasma_dxo; Car_dxo*Qfo*(1 - f_shunting_forearm); Flow_ar_fo_dxo is "inflow forearm dextorphan";  // SBO:0000655
  Flow_fo_fov_dxo: Cfo_plasma_dxo + Car_dxo => Cfov_dxo; Qfo*(1 - f_shunting_forearm)*Cfo_plasma_dxo + Qfo*f_shunting_forearm*Car_dxo; Flow_fo_fov_dxo is "outflow forearm dextorphan";  // SBO:0000655
  Flow_fov_ve_dxo: Cfov_dxo => Cve_dxo; Qfo*Cfov_dxo; Flow_fov_ve_dxo is "outflow forearm vein dextorphan";  // SBO:0000655
  transport_gu_dxo_glu: Cgu_plasma_dxo_glu -> Cgu_dxo_glu; ftissue_dxo_glu*(Cgu_plasma_dxo_glu*Kp_dxo_glu - Cgu_dxo_glu); transport_gu_dxo_glu is "transport dextorphan glucuronide";  // SBO:0000655
  transport_ki_dxo_glu: Cki_plasma_dxo_glu -> Cki_dxo_glu; ftissue_dxo_glu*(Cki_plasma_dxo_glu*Kp_dxo_glu - Cki_dxo_glu); transport_ki_dxo_glu is "transport dextorphan glucuronide";  // SBO:0000655
  transport_li_dxo_glu: Cli_plasma_dxo_glu -> Cli_dxo_glu; ftissue_dxo_glu*(Cli_plasma_dxo_glu*Kp_dxo_glu - Cli_dxo_glu); transport_li_dxo_glu is "transport dextorphan glucuronide";  // SBO:0000655
  transport_lu_dxo_glu: Clu_plasma_dxo_glu -> Clu_dxo_glu; ftissue_dxo_glu*(Clu_plasma_dxo_glu*Kp_dxo_glu - Clu_dxo_glu); transport_lu_dxo_glu is "transport dextorphan glucuronide";  // SBO:0000655
  transport_pa_dxo_glu: Cpa_plasma_dxo_glu -> Cpa_dxo_glu; ftissue_dxo_glu*(Cpa_plasma_dxo_glu*Kp_dxo_glu - Cpa_dxo_glu); transport_pa_dxo_glu is "transport dextorphan glucuronide";  // SBO:0000655
  transport_sp_dxo_glu: Csp_plasma_dxo_glu -> Csp_dxo_glu; ftissue_dxo_glu*(Csp_plasma_dxo_glu*Kp_dxo_glu - Csp_dxo_glu); transport_sp_dxo_glu is "transport dextorphan glucuronide";  // SBO:0000655
  transport_re_dxo_glu: Cre_plasma_dxo_glu -> Cre_dxo_glu; ftissue_dxo_glu*(Cre_plasma_dxo_glu*Kp_dxo_glu - Cre_dxo_glu); transport_re_dxo_glu is "transport dextorphan glucuronide";  // SBO:0000655
  transport_fo_dxo_glu: Cfo_plasma_dxo_glu -> Cfo_dxo_glu; ftissue_dxo_glu*(Cfo_plasma_dxo_glu*Kp_dxo_glu - Cfo_dxo_glu); transport_fo_dxo_glu is "transport dextorphan glucuronide";  // SBO:0000655
  Flow_ar_gu_dxo_glu: Car_dxo_glu => Cgu_plasma_dxo_glu; Qgu*Car_dxo_glu; Flow_ar_gu_dxo_glu is "inflow gut dextorphan glucuronide";  // SBO:0000655
  Flow_gu_po_dxo_glu: Cgu_plasma_dxo_glu => Cpo_dxo_glu; Qgu*Cgu_plasma_dxo_glu; Flow_gu_po_dxo_glu is "outflow gut dextorphan glucuronide";  // SBO:0000655
  Flow_ar_ki_dxo_glu: Car_dxo_glu => Cki_plasma_dxo_glu; Qki*Car_dxo_glu; Flow_ar_ki_dxo_glu is "inflow kidney dextorphan glucuronide";  // SBO:0000655
  Flow_ki_kiv_dxo_glu: Cki_plasma_dxo_glu => Ckiv_dxo_glu; Qki*Cki_plasma_dxo_glu; Flow_ki_kiv_dxo_glu is "outflow kidney dextorphan glucuronide";  // SBO:0000655
  Flow_kiv_ve_dxo_glu: Ckiv_dxo_glu => Cve_dxo_glu; Qki*Ckiv_dxo_glu; Flow_kiv_ve_dxo_glu is "outflow kidney vein dextorphan glucuronide";  // SBO:0000655
  Flow_ar_li_dxo_glu: Car_dxo_glu => Cli_plasma_dxo_glu; Qha*Car_dxo_glu; Flow_ar_li_dxo_glu is "inflow liver dextorphan glucuronide";  // SBO:0000655
  Flow_po_li_dxo_glu: Cpo_dxo_glu => Cli_plasma_dxo_glu; Qpo*Cpo_dxo_glu; Flow_po_li_dxo_glu is "outflow po dextorphan glucuronide";  // SBO:0000655
  Flow_li_hv_dxo_glu: Cli_plasma_dxo_glu => Chv_dxo_glu; Qh*Cli_plasma_dxo_glu; Flow_li_hv_dxo_glu is "outflow liver dextorphan glucuronide";  // SBO:0000655
  Flow_hv_ve_dxo_glu: Chv_dxo_glu => Cve_dxo_glu; Qh*Chv_dxo_glu; Flow_hv_ve_dxo_glu is "outflow hepatic vein dextorphan glucuronide";  // SBO:0000655
  Flow_ve_lu_dxo_glu: Cve_dxo_glu => Clu_plasma_dxo_glu; Qlu*Cve_dxo_glu; Flow_ve_lu_dxo_glu is "inflow lung dextorphan glucuronide";  // SBO:0000655
  Flow_lu_ar_dxo_glu: Clu_plasma_dxo_glu => Car_dxo_glu; Qlu*Clu_plasma_dxo_glu; Flow_lu_ar_dxo_glu is "outflow lung dextorphan glucuronide";  // SBO:0000655
  Flow_ar_pa_dxo_glu: Car_dxo_glu => Cpa_plasma_dxo_glu; Qpa*Car_dxo_glu; Flow_ar_pa_dxo_glu is "inflow pancreas dextorphan glucuronide";  // SBO:0000655
  Flow_pa_po_dxo_glu: Cpa_plasma_dxo_glu => Cpo_dxo_glu; Qpa*Cpa_plasma_dxo_glu; Flow_pa_po_dxo_glu is "outflow pancreas dextorphan glucuronide";  // SBO:0000655
  Flow_ar_sp_dxo_glu: Car_dxo_glu => Csp_plasma_dxo_glu; Qsp*Car_dxo_glu; Flow_ar_sp_dxo_glu is "inflow spleen dextorphan glucuronide";  // SBO:0000655
  Flow_sp_po_dxo_glu: Csp_plasma_dxo_glu => Cpo_dxo_glu; Qsp*Csp_plasma_dxo_glu; Flow_sp_po_dxo_glu is "outflow spleen dextorphan glucuronide";  // SBO:0000655
  Flow_ar_re_dxo_glu: Car_dxo_glu => Cre_plasma_dxo_glu; Qre*Car_dxo_glu; Flow_ar_re_dxo_glu is "inflow rest dextorphan glucuronide";  // SBO:0000655
  Flow_re_rev_dxo_glu: Cre_plasma_dxo_glu => Crev_dxo_glu; Qre*Cre_plasma_dxo_glu; Flow_re_rev_dxo_glu is "outflow rest dextorphan glucuronide";  // SBO:0000655
  Flow_rev_ve_dxo_glu: Crev_dxo_glu => Cve_dxo_glu; Qre*Crev_dxo_glu; Flow_rev_ve_dxo_glu is "outflow rest vein dextorphan glucuronide";  // SBO:0000655
  Flow_ar_fo_dxo_glu: Car_dxo_glu => Cfo_plasma_dxo_glu; Car_dxo_glu*Qfo*(1 - f_shunting_forearm); Flow_ar_fo_dxo_glu is "inflow forearm dextorphan glucuronide";  // SBO:0000655
  Flow_fo_fov_dxo_glu: Cfo_plasma_dxo_glu + Car_dxo_glu => Cfov_dxo_glu; Qfo*(1 - f_shunting_forearm)*Cfo_plasma_dxo_glu + Qfo*f_shunting_forearm*Car_dxo_glu; Flow_fo_fov_dxo_glu is "outflow forearm dextorphan glucuronide";  // SBO:0000655
  Flow_fov_ve_dxo_glu: Cfov_dxo_glu => Cve_dxo_glu; Qfo*Cfov_dxo_glu; Flow_fov_ve_dxo_glu is "outflow forearm vein dextorphan glucuronide";  // SBO:0000655
  dissolution_dxm: $Astomach_dxm => Cgulumen_dxm; Ka_dis_dxm/(60 min_per_hr)*PODOSE_dxm/Mr_dxm; dissolution_dxm is "dissolution dextromethorphan";
  KI__DXMEX: Cki_dxm => Aurine_dxm; KI__DXMEX_k*Vki_tissue*Cki_dxm; KI__DXMEX is "DXM urinary excretion";  // SBO:0000655
  KI__DXOEX: Cki_dxo => Aurine_dxo; KI__DXOEX_k*Vki_tissue*Cki_dxo; KI__DXOEX is "DXO urinary excretion";  // SBO:0000655
  KI__DXOGLUEX: Cki_dxo_glu => Aurine_dxo_glu; KI__DXOGLUEX_k*Vki_tissue*Cki_dxo_glu; KI__DXOGLUEX is "DXO glucuronide urinary excretion";  // SBO:0000655
  // Complex reaction kinetics by CYP2D6. Reaction kinetics contains competitive inhibition by quinidine, is affected by CYP2D6 activity score.
  LI__DXMCYP2D6: Cli_dxm => Cli_dxo; LI__DXMCYP2D6_Vmax*Vli_tissue*LI__cyp2d6_activity*Cli_dxm/((1 + LI__qui/LI__DXMCYP2D6_Ki_qui)*LI__f_DXMCYP2D6_Km*LI__cyp2d6_activity^LI__lambda_1*LI__DXMCYP2D6_Km + Cli_dxm); LI__DXMCYP2D6 is "DXM CYP2D6";  // modifiers: LI__qui; SBO:0000176
  // This reaction is required for the poor metabolizer phenotype, which have no CYP2D6 activity. A basal low conversion exists independent of CYP2D6 phenotype. 2021-09-08|janekg: CYP mediated conversion of DXM to DXO normally accounting for a low percentage of conversion.
  LI__DXMCYP3A4: Cli_dxm => Cli_dxo; LI__DXMCYP3A4_Vmax*Vli_tissue*Cli_dxm/(LI__f_DXMCYP3A4_Km*LI__DXMCYP3A4_Km + Cli_dxm); LI__DXMCYP3A4 is "DXM CYP3A4 (DXO formation)";  // SBO:0000176
  LI__DXOUGT: Cli_dxo => Cli_dxo_glu; LI__DXOUGT_Vmax*Vli_tissue*Cli_dxo/(LI__DXOUGT_Km + Cli_dxo); LI__DXOUGT is "DXO UGT (UGT2B15)";  // SBO:0000176
  GU__absorption_dxm: Cgulumen_dxm => Cgu_dxm; GU__F_dxm*GU__absorption; GU__absorption_dxm is "absorption dextromethorphan";
  GU__excretion_dxm: Cgulumen_dxm => Afeces_dxm; (1 - GU__F_dxm)*GU__absorption; GU__excretion_dxm is "excretion dextromethorphan";
  // CYP3A4 mediated conversion of DXM is responsible for the first-pass metabolism of DXM, dextromethorphan (DXM) -[CYP3A4]-> 3-methoxymorphinan (MEM/MM3).First pass can occur in intestine and liver and both enzymes are modeled via the same parameters (Km, Vmax). CYP3A4 inhibition/activation can be implemented by changing the CYP3A4_activity, e.g., grapefruit juice selectively inhibits only the intestinal CYP3A4.
  GU__DXMCYP3A4: Cgu_dxm => GU__dxmmet; GU__DXMCYP3A4_Vmax*GU__DXMCYP3A4_activity*Vgu_tissue*Cgu_dxm/(Cgu_dxm + GU__DXMCYP3A4_Km); GU__DXMCYP3A4 is "DXM CYP3A4";  // SBO:0000176

  // Unit definitions:
  unit cm = 0.01 metre;
  unit g_per_mole = gram / mole; g_per_mole is "g/mole";
  unit hr = 3600 second;
  unit kg = 1000 gram;
  unit l_per_hr = litre / (3600 second); l_per_hr is "l/hr";
  unit l_per_kg = litre / (1000 gram); l_per_kg is "l/kg";
  unit litre_per_min = litre / (60 second); litre_per_min is "litre/min";
  unit l_per_min_kg = litre / (60 second * 1000 gram); l_per_min_kg is "l/min/kg";
  unit l_per_ml = litre / (1e-3 litre); l_per_ml is "l/ml";
  unit m2 = metre^2; m2 is "meter^2";
  unit m2_per_kg = metre^2 / (1000 gram); m2_per_kg is "meter^2/kg";
  unit mM = 1e-3 mole / litre; mM is "mmole/liter";
  unit mg = 1e-3 gram;
  unit mg_per_day = 1e-3 gram / (86400 second); mg_per_day is "mg/day";
  unit mg_per_g = 1e-3 gram / gram; mg_per_g is "mg/g";
  unit mg_per_hr = 1e-3 gram / (3600 second); mg_per_hr is "mg/hr";
  unit mg_per_l = 1e-3 gram / litre; mg_per_l is "mg/l";
  unit mg_per_min = 1e-3 gram / (60 second); mg_per_min is "mg/min";
  unit microM = 1e-6 mole / litre; microM is "micromole/liter";
  unit min = 60 second;
  unit min_per_day = 60 second / (86400 second); min_per_day is "min/day";
  unit min_per_hr = 60 second / (3600 second); min_per_hr is "min/hr";
  unit ml = 1e-3 litre;
  unit ml_per_l = 1e-3 litre / litre; ml_per_l is "ml/l";
  unit ml_per_s = 1e-3 litre / second; ml_per_s is "ml/s";
  unit ml_per_s_kg = 1e-3 litre / (second * 1000 gram); ml_per_s_kg is "ml/s/kg";
  unit mmole = 1e-3 mole;
  unit mmole_per_hr = 1e-3 mole / (3600 second); mmole_per_hr is "mmole/hr";
  unit mmole_per_hr_ml = 1e-3 mole / (3600 second * 1e-3 litre); mmole_per_hr_ml is "mmole/hr/ml";
  unit mmole_per_l = 1e-3 mole / litre; mmole_per_l is "mmole/l";
  unit mmole_per_min = 1e-3 mole / (60 second); mmole_per_min is "mmole/min";
  unit mmole_per_min_kg = 1e-3 mole / (60 second * 1000 gram); mmole_per_min_kg is "mmole/min/kg";
  unit mmole_per_min_l = 1e-3 mole / (60 second * litre); mmole_per_min_l is "mmole/min/liter";
  unit mulitre_per_g = 1e-6 litre / gram; mulitre_per_g is "microlitre/g";
  unit mul_per_min_mg = 1e-6 litre / (60 second * 1e-3 gram); mul_per_min_mg is "microliter/min/mg";
  unit per_hr = 1 / (3600 second); per_hr is "1/hr";
  unit per_min = 1 / (60 second); per_min is "1/min";
  unit per_min_kg = 1 / (60 second * 1000 gram); per_min_kg is "1/min/kg";
  unit s_per_min = second / (60 second); s_per_min is "s/min";
  unit KI__g_per_mole = gram / mole; KI__g_per_mole is "g/mole";
  unit KI__litre_per_min = litre / (60 second); KI__litre_per_min is "litre/min";
  unit KI__m2 = metre^2; KI__m2 is "meter^2";
  unit KI__mM = 1e-3 mole / litre; KI__mM is "mmole/liter";
  unit KI__mg = 1e-3 gram;
  unit KI__microM = 1e-6 mole / litre; KI__microM is "micromole/liter";
  unit KI__min = 60 second;
  unit KI__mmole = 1e-3 mole;
  unit KI__mmole_per_min = 1e-3 mole / (60 second); KI__mmole_per_min is "mmole/min";
  unit KI__mmole_per_min_l = 1e-3 mole / (60 second * litre); KI__mmole_per_min_l is "mmole/min/liter";
  unit KI__per_min = 1 / (60 second); KI__per_min is "1/min";
  unit LI__g_per_mole = gram / mole; LI__g_per_mole is "g/mole";
  unit LI__litre_per_min = litre / (60 second); LI__litre_per_min is "litre/min";
  unit LI__m2 = metre^2; LI__m2 is "meter^2";
  unit LI__mM = 1e-3 mole / litre; LI__mM is "mmole/liter";
  unit LI__mg = 1e-3 gram;
  unit LI__microM = 1e-6 mole / litre; LI__microM is "micromole/liter";
  unit LI__min = 60 second;
  unit LI__mmole = 1e-3 mole;
  unit LI__mmole_per_min = 1e-3 mole / (60 second); LI__mmole_per_min is "mmole/min";
  unit LI__mmole_per_min_l = 1e-3 mole / (60 second * litre); LI__mmole_per_min_l is "mmole/min/liter";
  unit LI__per_min = 1 / (60 second); LI__per_min is "1/min";
  unit GU__g_per_mole = gram / mole; GU__g_per_mole is "g/mole";
  unit GU__litre_per_min = litre / (60 second); GU__litre_per_min is "litre/min";
  unit GU__m2 = metre^2; GU__m2 is "meter^2";
  unit GU__mM = 1e-3 mole / litre; GU__mM is "mmole/liter";
  unit GU__mg = 1e-3 gram;
  unit GU__microM = 1e-6 mole / litre; GU__microM is "micromole/liter";
  unit GU__min = 60 second;
  unit GU__min_per_hr = 60 second / (3600 second); GU__min_per_hr is "min/hr";
  unit GU__mmole = 1e-3 mole;
  unit GU__mmole_per_min = 1e-3 mole / (60 second); GU__mmole_per_min is "mmole/min";
  unit GU__mmole_per_min_l = 1e-3 mole / (60 second * litre); GU__mmole_per_min_l is "mmole/min/liter";
  unit GU__per_hr = 1 / (3600 second); GU__per_hr is "1/hr";
  unit GU__per_min = 1 / (60 second); GU__per_min is "1/min";
end
