// SBML level 3 version 2

model KaratzaKaralis2020___CYP_mediated_losartan_metabolism()
  // initial_model
  // isDescribedBy doi:10.1111/bcpt.13321
  // hasProperty mamo:MAMO_0000089
  // biomodels.db:MODEL2412180001

  // Compartments:
  compartment default = 1; default is "KaratzaKaralis2020 - CYP mediated losartan metabolism";
  compartment central_compartment = 1;
  compartment intestine = 1;
  compartment peripherial_compartment = 1;
  compartment stomach = 1;

  // Species:
  species E3174_out in default = 0;
  species E3174_cc in central_compartment = 0;
  species losartan_cc in central_compartment = 0;
  species losartan_int in intestine = 0;
  species losartan_out in default = 0;
  species losartan_pc in peripherial_compartment = 0;
  species losartan_stm in stomach = oral_dose/(1000*461.01)*1000000000000;

  // Parameters:
  // L/h
  CL_m = 5.5;
  // L/h
  CL_p = 184;
  // L/h
  Q = 129;
  // 1/h
  T = 0.271;
  // L
  Vm = 9.66;
  // L
  Vp_1 = 43.7;
  // L
  Vp_2 = 1160;
  // 1/h
  a = 4.56;
  // 1/h
  b = 3.95;
  // 1/h
  k_a = 1.93;
  // 1/h
  k_m = 0.452;
  // mg
  oral_dose = 100;
  // unitless
  start_CYP2C9 = 0;

  // Assignment rules:
  C_p := losartan_cc/(Vp_1*1000);
  C_m := E3174_cc/(Vm*1000);
  k_12 := Q/Vp_1;
  k_21 := Q/Vp_2;
  k_elp := CL_p/Vp_1;
  k_elm := CL_m/Vm;

  // Reactions:
  E3174_elimination: E3174_cc => E3174_out; k_elm*E3174_cc; E3174_elimination is "E3174_cc -> E3174_out";
  L_from_cc_to_pc: losartan_cc => losartan_pc; k_12*losartan_cc; L_from_cc_to_pc is "losartan_cc -> losartan_pc";
  L_from_pc_to_cc: losartan_pc => losartan_cc; k_21*losartan_pc; L_from_pc_to_cc is "losartan_pc -> losartan_cc";
  absorption: losartan_int => losartan_cc; k_a*losartan_int; absorption is "losartan_int -> losartan_cc";
  CYP2C9_reaction: losartan_cc => E3174_cc; k_m*losartan_cc*start_CYP2C9; CYP2C9_reaction is "losartan_cc -> E3174_cc";
  L_elimination: losartan_cc => losartan_out; k_elp*losartan_cc; L_elimination is "losartan_cc -> losartan_out";
  gastric_emptying: losartan_stm => losartan_int; max(0, a*sin(2*pi/b*time))*losartan_stm; gastric_emptying is "losartan_stm -> losartan_int";

  // Events:
  CYP2C9_delay: at (time > T), t0=false: start_CYP2C9 = 1; CYP2C9_delay is "losartan metabolism delay";
end
