// SBML level 3 version 1
// Created with https://github.com/matthiaskoenig/sbmlutils.

model icg_body()
  // Koeller2021 - PBPK model of ICG liver function tests
  // Physiollogically based pharmacokinetic (PBPK) model of indocyanine-green (ICG) liver function tests.
  // taxonomy:9606
  // hasProperty mamo:MAMO_0000046
  // model units - substance: mmole, time: min, volume: litre, area: m2, length: m, extent: mmole

  // Compartments:
  compartment Vbi; Vbi has litre; Vbi is "bile";  // SBO:0000290 FMA:62971 ncit:C13192
  compartment Vre; Vre has litre; Vre is "rest of body";  // SBO:0000290; isVersionOf FMA:62955; isPartOf ncit:C14250
  compartment Vgi; Vgi has litre; Vgi is "gastrointestinal tract";  // SBO:0000290 FMA:71132 BTO:0000511 ncit:C34082
  compartment Vli; Vli has litre; Vli is "liver";  // SBO:0000290 FMA:7197 BTO:0000759 ncit:C12392
  compartment Vlu; Vlu has litre; Vlu is "lung";  // SBO:0000290 FMA:7195 BTO:0000763 ncit:C12468
  compartment Vve; Vve has litre; Vve is "venous plasma";  // SBO:0000290 BTO:0000131 ncit:C13356; isPartOf FMA:50723
  compartment Var; Var has litre; Var is "arterial plasma";  // SBO:0000290 BTO:0000131 ncit:C13356; isPartOf FMA:50720
  compartment Vpo; Vpo has litre; Vpo is "portal plasma";  // SBO:0000290 BTO:0000131 ncit:C13356; isPartOf FMA:66645
  compartment Vhv; Vhv has litre; Vhv is "hepatic venous plasma";  // SBO:0000290 BTO:0000131 ncit:C13356; isPartOf FMA:14337
  compartment Vfeces = 1 litre;  // SBO:0000290 FMA:64183 ncit:C13234 BTO:0000440
  compartment Vre_tissue; Vre_tissue has litre;  // SBO:0000290 FMA:45732 ncit:C74601 BTO:0001539; isPartOf FMA:62955 ncit:C14250
  compartment Vre_plasma; Vre_plasma has litre;  // SBO:0000290 ncit:C13356 BTO:0000131; isPartOf FMA:62955 ncit:C14250
  compartment Vgi_tissue; Vgi_tissue has litre;  // SBO:0000290 FMA:45732 ncit:C74601 BTO:0001539; isPartOf FMA:71132 BTO:0000511 ncit:C34082
  compartment Vgi_plasma; Vgi_plasma has litre;  // SBO:0000290 ncit:C13356 BTO:0000131; isPartOf FMA:71132 BTO:0000511 ncit:C34082
  compartment Vli_tissue; Vli_tissue has litre;  // SBO:0000290 FMA:45732 ncit:C74601 BTO:0001539; isPartOf FMA:7197 BTO:0000759 ncit:C12392
  compartment Vli_plasma; Vli_plasma has litre;  // SBO:0000290 ncit:C13356 BTO:0000131; isPartOf FMA:7197 BTO:0000759 ncit:C12392
  compartment Vlu_tissue; Vlu_tissue has litre;  // SBO:0000290 FMA:45732 ncit:C74601 BTO:0001539; isPartOf FMA:7195 BTO:0000763 ncit:C12468
  compartment Vlu_plasma; Vlu_plasma has litre;  // SBO:0000290 ncit:C13356 BTO:0000131; isPartOf FMA:7195 BTO:0000763 ncit:C12468

  // Species:
  species Cre_plasma_icg in Vre_plasma = 0; Cre_plasma_icg is "icg (rest)";  // SBO:0000247 inchikey:MOFVSTNWEDAEEK-UHFFFAOYSA-M CHEBI:31696 ncit:C65913
  species Cgi_plasma_icg in Vgi_plasma = 0; Cgi_plasma_icg is "icg (gastrointestinal tract)";  // SBO:0000247 inchikey:MOFVSTNWEDAEEK-UHFFFAOYSA-M CHEBI:31696 ncit:C65913
  species Cli_plasma_icg in Vli_plasma = 0; Cli_plasma_icg is "icg (liver)";  // SBO:0000247 inchikey:MOFVSTNWEDAEEK-UHFFFAOYSA-M CHEBI:31696 ncit:C65913
  species Clu_plasma_icg in Vlu_plasma = 0; Clu_plasma_icg is "icg (lung)";  // SBO:0000247 inchikey:MOFVSTNWEDAEEK-UHFFFAOYSA-M CHEBI:31696 ncit:C65913
  species Cve_icg in Vve = 0; Cve_icg is "icg (venous plasma)";  // SBO:0000247 inchikey:MOFVSTNWEDAEEK-UHFFFAOYSA-M CHEBI:31696 ncit:C65913
  species Car_icg in Var = 0; Car_icg is "icg (arterial plasma)";  // SBO:0000247 inchikey:MOFVSTNWEDAEEK-UHFFFAOYSA-M CHEBI:31696 ncit:C65913
  species Cpo_icg in Vpo = 0; Cpo_icg is "icg (portal vein)";  // SBO:0000247 inchikey:MOFVSTNWEDAEEK-UHFFFAOYSA-M CHEBI:31696 ncit:C65913
  species Chv_icg in Vhv = 0; Chv_icg is "icg (hepatic vein)";  // SBO:0000247 inchikey:MOFVSTNWEDAEEK-UHFFFAOYSA-M CHEBI:31696 ncit:C65913
  substanceOnly species Afeces_icg in Vfeces = 0; Afeces_icg is "icg (feces)";  // SBO:0000247 inchikey:MOFVSTNWEDAEEK-UHFFFAOYSA-M CHEBI:31696 ncit:C65913
  // Reference range: 0.01 [mmole/l] (~ 1 mg/dl)
  species $LI__bil_ext in Vli_plasma = 0.01; LI__bil_ext is "bilirubin (extern)";  // substance in LI__mmole; SBO:0000247 inchikey:BPYKTIZUTYGOLE-IFADSCNNSA-N CHEBI:16990 ncit:C305
  species LI__icg in Vli_tissue = 0; LI__icg is "icg (liver)";  // substance in LI__mmole; SBO:0000247 inchikey:MOFVSTNWEDAEEK-UHFFFAOYSA-M CHEBI:31696 ncit:C65913
  species LI__icg_bi in Vbi = 0; LI__icg_bi is "icg (bile)";  // substance in LI__mmole; SBO:0000247 inchikey:MOFVSTNWEDAEEK-UHFFFAOYSA-M CHEBI:31696 ncit:C65913

  // Parameters:
  conversion_ml_per_l = 1000 ml_per_l; conversion_ml_per_l is "volume conversion factor";  // SBO:0000002
  conversion_l_per_ml = 0.001 l_per_ml; conversion_l_per_ml is "volume conversion factor";  // SBO:0000002
  BW = 75 kg; BW is "body weight [kg]";  // SBO:0000002 efo:0004338 ncit:C25208 CMO:0000012
  HEIGHT = 170 cm; HEIGHT is "height [cm]";  // SBO:0000002 ncit:C25347 efo:0004339
  BSA has m2; BSA is "body surface area [m^2]";  // SBO:0000002 ncit:C25157 omit:0003188
  // Simone1997 75 [50-100] ml/min/kg
  COBW = 0.8333333 ml_per_s_kg; COBW is "cardiac output per bodyweight [ml/s/kg]";  // SBO:0000002 ncit:C119246 omit:0003637
  // BW*COBW (100 ml/s)
  CO has ml_per_s; CO is "cardiac output [ml/s]";  // SBO:0000002 ncit:C119246 omit:0003637
  // CO/1000 ml/l * 60 s/min (6 l/min) IRCP2001 reference values Cardiac output: 6.5 l/min (male); 5.9 l/min (female) Cardiac output at lower end => 3.75 l/min
  QC has l_per_min; QC is "cardiac output [L/min]";  // SBO:0000002 ncit:C119246 omit:0003637
  // A certain volume of an organ is occupied by large vessels (in the low percent range). This parameter describes this fraction.
  Fblood = 0.02 dimensionless; Fblood is "blood fraction of organ volume";  // SBO:0000002
  HCT = 0.51 dimensionless; HCT is "hematocrit";  // SBO:0000002 ncit:C64796 omit:0007571 efo:0004348
  // FVgi = FVgu + FVpa + FVsp = 0.0171 + 0.01 + 0.0026 = 0.0297
  FVgi = 0.0297 l_per_kg; FVgi is "fractional tissue volume gastrointestinal tract";  // SBO:0000002; isVersionOf FMA:71132 BTO:0000511 ncit:C34082
  FVbi = 0.00071 l_per_kg; FVbi is "fractional tissue volume bile";  // SBO:0000002; isVersionOf FMA:62971 ncit:C13192
  // 1.7-1.8 kg (male); 1.5 kg (female); 75kg; 1.7/75 = 0.0227
  FVli = 0.021 l_per_kg; FVli is "fractional tissue volume liver";  // SBO:0000002; isVersionOf FMA:7197 BTO:0000759 ncit:C12392
  FVlu = 0.0076 l_per_kg; FVlu is "fractional tissue volume lung";  // SBO:0000002; isVersionOf FMA:7195 BTO:0000763 ncit:C12468
  FVve = 0.0587 l_per_kg; FVve is "fractional tissue volume venous";  // SBO:0000002; isVersionOf BTO:0000131 ncit:C13356 FMA:50723
  FVar = 0.0184 l_per_kg; FVar is "fractional tissue volume arterial";  // SBO:0000002; isVersionOf BTO:0000131 ncit:C13356 FMA:50720
  FVpo = 0.001 l_per_kg; FVpo is "fractional tissue volume portal";  // SBO:0000002; isVersionOf BTO:0000131 ncit:C13356 FMA:66645
  FVhv = 0.001 l_per_kg; FVhv is "fractional tissue volume hepatic venous";  // SBO:0000002; isVersionOf BTO:0000131 ncit:C13356 FMA:14337
  // Fraction is calculated based on other volume fractions.
  FVre has l_per_kg; FVre is "fractional tissue volume rest of body";  // SBO:0000002; isVersionOf FMA:62955 ncit:C14250
  FQgi = 0.19 dimensionless; FQgi is "gastrointestinal tract fractional tissue blood flow";  // SBO:0000002; isVersionOf FMA:71132 BTO:0000511 ncit:C34082
  FQh = 0.255 dimensionless; FQh is "hepatic (venous side) fractional tissue blood flow";  // SBO:0000002; isVersionOf BTO:0000131 ncit:C13356 FMA:14337
  FQlu = 1 dimensionless; FQlu is "lung fractional tissue blood flow";  // SBO:0000002; isVersionOf FMA:7195 BTO:0000763 ncit:C12468
  // Calculated based on other tissue blood flow and flow conservation laws.
  FQre has dimensionless; FQre is "rest of body fractional tissue blood flow";  // SBO:0000002; isVersionOf FMA:62955 ncit:C14250
  f_cirrhosis = 0 dimensionless; f_cirrhosis is "severity of cirrhosis [0, 0.95]";  // SBO:0000002 ncit:C2951 efo:0001422
  f_shunts = 0 dimensionless; f_shunts is "fraction of portal venous blood shunted by the liver";  // SBO:0000002 HP:0002629
  f_tissue_loss = 0 dimensionless; f_tissue_loss is "fraction of lost parenchymal liver volume";  // SBO:0000002
  f_bloodflow = 1 dimensionless; f_bloodflow is "fractional change of hepatic blood flow";  // SBO:0000002
  f_cardiac_output = 1 dimensionless; f_cardiac_output is "fractional change of cardiac output";  // SBO:0000002
  f_exercise = 1 dimensionless; f_exercise is "fractional blood flow change due to exercise";  // SBO:0000002
  resection_rate = 0 dimensionless;  // SBO:0000002; isVersionOf ncit:C158758
  Mr_icg = 774.96493 g_per_mole; Mr_icg is "Molecular weight icg [g/mole]";  // SBO:0000647; isVersionOf opb:OPB_01146; hasPart inchikey:MOFVSTNWEDAEEK-UHFFFAOYSA-M
  IVDOSE_icg = 0 mg; IVDOSE_icg is "IV bolus dose icg [mg]";  // SBO:0000002 ncit:C38274
  ti_icg = 5 s; ti_icg is "injection time icg [s]";  // SBO:0000002 ncit:C69282
  Ki_icg has per_min; Ki_icg is "Ki [1/min] injection icg";  // SBO:0000002
  Ri_icg = 0 mg_per_min; Ri_icg is "Ri [mg/min] rate of infusion icg";  // SBO:0000002 ncit:C94916
  cum_dose_icg = 0 mg; cum_dose_icg is "Cumulative dose due to infusion icg";  // SBO:0000002 ncit:C94394 inchikey:MOFVSTNWEDAEEK-UHFFFAOYSA-M CHEBI:31696
  Qlu has l_per_min; Qlu is "blood flow lung";
  Qre has l_per_min; Qre is "blood flow rest of body";
  Qh has l_per_min; Qh is "blood flow hepatic (venous side)";
  Qgi has l_per_min; Qgi is "blood flow gastrointestinal tract";
  Qpo has l_per_min; Qpo is "blood flow portal vein";
  Qha has l_per_min; Qha is "blood flow hepatic artery";
  Are_plasma_icg has mmole; Are_plasma_icg is "icg concentration (rest)";
  Xre_plasma_icg has mg; Xre_plasma_icg is "icg amount (rest)";
  Mre_plasma_icg has mg_per_l; Mre_plasma_icg is "icg amount (rest)";
  Agi_plasma_icg has mmole; Agi_plasma_icg is "icg concentration (gastrointestinal tract)";
  Xgi_plasma_icg has mg; Xgi_plasma_icg is "icg amount (gastrointestinal tract)";
  Mgi_plasma_icg has mg_per_l; Mgi_plasma_icg is "icg amount (gastrointestinal tract)";
  Ali_plasma_icg has mmole; Ali_plasma_icg is "icg concentration (liver)";
  Xli_plasma_icg has mg; Xli_plasma_icg is "icg amount (liver)";
  Mli_plasma_icg has mg_per_l; Mli_plasma_icg is "icg amount (liver)";
  Alu_plasma_icg has mmole; Alu_plasma_icg is "icg concentration (lung)";
  Xlu_plasma_icg has mg; Xlu_plasma_icg is "icg amount (lung)";
  Mlu_plasma_icg has mg_per_l; Mlu_plasma_icg is "icg amount (lung)";
  Ave_icg has mmole; Ave_icg is "icg concentration (venous plasma)";
  Xve_icg has mg; Xve_icg is "{sname} amount ({cname})";
  Mve_icg has mg_per_l; Mve_icg is "icg amount (venous plasma)";
  Aar_icg has mmole; Aar_icg is "icg concentration (arterial plasma)";
  Xar_icg has mg; Xar_icg is "{sname} amount ({cname})";
  Mar_icg has mg_per_l; Mar_icg is "icg amount (arterial plasma)";
  Apo_icg has mmole; Apo_icg is "icg concentration (portal vein)";
  Xpo_icg has mg; Xpo_icg is "{sname} amount ({cname})";
  Mpo_icg has mg_per_l; Mpo_icg is "icg amount (portal vein)";
  Ahv_icg has mmole; Ahv_icg is "icg concentration (hepatic vein)";
  Xhv_icg has mg; Xhv_icg is "{sname} amount ({cname})";
  Mhv_icg has mg_per_l; Mhv_icg is "icg amount (hepatic vein)";
  ER_icg has dimensionless; ER_icg is "extraction ratio ICG";
  CLinfusion_icg has l_per_min; CLinfusion_icg is "infusion clearance (steady state)";
  LI__ICGIM_Vmax = 0.03695988 LI__mmole_per_min_l; LI__ICGIM_Vmax is "Vmax for icg import";  // SBO:0000186
  LI__ICGIM_Km = 0.02165918 LI__mM; LI__ICGIM_Km is "Km icg of icg import";  // SBO:0000322
  // bilirubin reference range:
  // ~ 0.1 - 5 [g/dl]
  // (10 [mg/l] /584.6623 [g/mole]) ~ 0.0171 mmole/l`
  // setting Ki in reference range
  LI__ICGIM_ki_bil = 0.02 LI__mM; LI__ICGIM_ki_bil is "Ki bilirubin of icg import";  // SBO:0000261
  // Parameter for scaling transport protein amount.
  LI__f_oatp1b3 = 1 dimensionless; LI__f_oatp1b3 is "scaling factor protein amount";  // SBO:0000002
  LI__ICGLI2CA_Vmax = 0.0009436728 LI__mmole_per_min_l; LI__ICGLI2CA_Vmax is "Vmax bile export icg";  // SBO:0000186
  LI__ICGLI2CA_Km = 0.01238866 LI__mM; LI__ICGLI2CA_Km is "Km bile export icg";  // SBO:0000322
  LI__ICGLI2BI_Vmax = 0.0001145966 LI__per_min; LI__ICGLI2BI_Vmax is "Vmax bile transport icg";  // SBO:0000186

  // Assignment rules:
  // Remaining volume based on fractional organ volume is used for the rest compartment.
  FVre := 1 l_per_kg - (FVbi + FVgi + FVli + FVlu + FVve + FVar + FVpo + FVhv);
  // Rest body perfusion .must be calculate based on flux conservation laws.
  // Qlu = Qre + Qh
  // Qre = Qlu - Qh
  // FQre = (Qlu - Qh) / Qlu = 1 - Qh/Qlu
  FQre := 1 - Qh/Qlu;
  // Calculated with Haycock1978 formula.
  BSA := 0.024265 m2*(BW/(1 kg))^0.5378*(HEIGHT/(1 cm))^0.3964;
  CO := BW*COBW*f_cardiac_output;
  QC := CO/(1000 ml_per_l)*60 s_per_min;
  Vbi := BW*FVbi;
  Vgi := BW*FVgi;
  Vli := BW*FVli*(1 - resection_rate);
  Vlu := BW*FVlu;
  Vre := BW*FVre;
  Vve := (1 - HCT)*(BW*FVve - FVve/(FVar + FVve + FVpo + FVhv)*BW*Fblood*(1 l_per_kg - (FVar + FVve + FVpo + FVhv)));
  Var := (1 - HCT)*(BW*FVar - FVar/(FVar + FVve + FVpo + FVhv)*BW*Fblood*(1 l_per_kg - (FVar + FVve + FVpo + FVhv)));
  Vpo := (1 - HCT)*(BW*FVpo - FVpo/(FVar + FVve + FVpo + FVhv)*BW*Fblood*(1 l_per_kg - (FVar + FVve + FVpo + FVhv)));
  Vhv := (1 - HCT)*(BW*FVhv - FVhv/(FVar + FVve + FVpo + FVhv)*BW*Fblood*(1 l_per_kg - (FVar + FVve + FVpo + FVhv)));
  Qlu := QC*FQlu;
  Qre := QC*FQre;
  Qh := QC*FQh*f_bloodflow*f_exercise;
  Qgi := QC*FQgi*f_bloodflow;
  Qpo := Qgi;
  Qha := Qh - Qpo;
  Vre_plasma := Vre*Fblood*(1 - HCT);
  Vre_tissue := Vre*(1 - Fblood);
  Vgi_plasma := Vgi*Fblood*(1 - HCT);
  Vgi_tissue := Vgi*(1 - Fblood);
  Vli_plasma := Vli*Fblood*(1 - HCT);
  Vli_tissue := Vli*(1 - f_tissue_loss)*(1 - Fblood);
  Vlu_plasma := Vlu*Fblood*(1 - HCT);
  Vlu_tissue := Vlu*(1 - Fblood);
  Ki_icg := 0.693/ti_icg*60 s_per_min;
  Are_plasma_icg := Cre_plasma_icg*Vre_plasma;
  Xre_plasma_icg := Are_plasma_icg*Mr_icg;
  Mre_plasma_icg := Are_plasma_icg/Vre_plasma*Mr_icg;
  Agi_plasma_icg := Cgi_plasma_icg*Vgi_plasma;
  Xgi_plasma_icg := Agi_plasma_icg*Mr_icg;
  Mgi_plasma_icg := Agi_plasma_icg/Vgi_plasma*Mr_icg;
  Ali_plasma_icg := Cli_plasma_icg*Vli_plasma;
  Xli_plasma_icg := Ali_plasma_icg*Mr_icg;
  Mli_plasma_icg := Ali_plasma_icg/Vli_plasma*Mr_icg;
  Alu_plasma_icg := Clu_plasma_icg*Vlu_plasma;
  Xlu_plasma_icg := Alu_plasma_icg*Mr_icg;
  Mlu_plasma_icg := Alu_plasma_icg/Vlu_plasma*Mr_icg;
  Ave_icg := Cve_icg*Vve;
  Xve_icg := Ave_icg*Mr_icg;
  Mve_icg := Ave_icg/Vve*Mr_icg;
  Aar_icg := Car_icg*Var;
  Xar_icg := Aar_icg*Mr_icg;
  Mar_icg := Aar_icg/Var*Mr_icg;
  Apo_icg := Cpo_icg*Vpo;
  Xpo_icg := Apo_icg*Mr_icg;
  Mpo_icg := Apo_icg/Vpo*Mr_icg;
  Ahv_icg := Chv_icg*Vhv;
  Xhv_icg := Ahv_icg*Mr_icg;
  Mhv_icg := Ahv_icg/Vhv*Mr_icg;
  ER_icg := (Car_icg + 1e-7 mM - (Chv_icg + 1e-7 mM))/(Car_icg + 1e-7 mM);
  CLinfusion_icg := Ri_icg/Mr_icg/(Cve_icg + 1e-12 mM);

  // Rate rules:
  // The injected dose appears in the blood over time.
  IVDOSE_icg' = -iv_icg*Mr_icg + Ri_icg;
  cum_dose_icg' = Ri_icg;

  // Reactions:
  iv_icg: => Cve_icg; Ki_icg*IVDOSE_icg/Mr_icg;  // SBO:0000655 ncit:C38276
  Flow_ar_arre_icg: Car_icg => Cre_plasma_icg; Qre*Car_icg; Flow_ar_arre_icg is "inflow rest icg";  // SBO:0000655 ncit:C16353; isPartOf FMA:62955 ncit:C14250
  Flow_re_ve_icg: Cre_plasma_icg => Cve_icg; Qre*Cre_plasma_icg; Flow_re_ve_icg is "outflow rest icg";  // SBO:0000655 ncit:C16353; isPartOf FMA:62955 ncit:C14250
  Flow_ar_argi_icg: Car_icg => Cgi_plasma_icg; Qgi*Car_icg; Flow_ar_argi_icg is "inflow gastrointestinal tract icg";  // SBO:0000655 ncit:C16353; isPartOf FMA:71132 BTO:0000511 ncit:C34082
  Flow_gi_po_icg: Cgi_plasma_icg => Cpo_icg; Qgi*Cgi_plasma_icg; Flow_gi_po_icg is "outflow gastrointestinal tract icg";  // SBO:0000655 ncit:C16353; isPartOf FMA:71132 BTO:0000511 ncit:C34082
  Flow_arli_li_icg: Car_icg => Cli_plasma_icg; (1 - f_shunts)*Qha*Car_icg; Flow_arli_li_icg is "arterial inflow liver icg";  // SBO:0000655
  Flow_arli_hv_icg: Car_icg => Chv_icg; f_shunts*Qha*Car_icg; Flow_arli_hv_icg is "flow arterial shunts";  // SBO:0000655
  Flow_po_li_icg: Cpo_icg => Cli_plasma_icg; (1 - f_shunts)*Qpo*Cpo_icg; Flow_po_li_icg is "outflow po icg";  // SBO:0000655
  Flow_po_hv_icg: Cpo_icg => Chv_icg; f_shunts*Qpo*Cpo_icg; Flow_po_hv_icg is "flow portal shunts";  // SBO:0000655
  Flow_li_hv_icg: Cli_plasma_icg => Chv_icg; (1 - f_shunts)*(Qpo + Qha)*Cli_plasma_icg; Flow_li_hv_icg is "outflow liver icg";  // SBO:0000655
  Flow_hv_ve_icg: Chv_icg => Cve_icg; Qh*Chv_icg; Flow_hv_ve_icg is "outflow hepatic vein icg";  // SBO:0000655
  Flow_ve_lu_icg: Cve_icg => Clu_plasma_icg; Qlu*Cve_icg; Flow_ve_lu_icg is "inflow lung icg";  // SBO:0000655
  Flow_lu_ar_icg: Clu_plasma_icg => Car_icg; Qlu*Clu_plasma_icg; Flow_lu_ar_icg is "outflow lung icg";  // SBO:0000655
  // Solute carrier organic anion transporter family member 1B3 (SLCO1B3). Often referred to as OATP1B3. Bilirubin effect was modeled as competitive inhibition.
  LI__ICGIM: Cli_plasma_icg => LI__icg; LI__f_oatp1b3*LI__ICGIM_Vmax*Vli_tissue*Cli_plasma_icg/(LI__ICGIM_Km*(1 + LI__bil_ext/LI__ICGIM_ki_bil) + Cli_plasma_icg); LI__ICGIM is "ICG import";  // modifiers: LI__bil_ext; SBO:0000655 uniprot:Q9NPD5 omit:0040643; isEncodedBy ncit:C106617
  // Phosphatidylcholine translocator ABCB4
  LI__ICGLI2CA: LI__icg => LI__icg_bi; LI__ICGLI2CA_Vmax*Vli_tissue*LI__icg/(LI__ICGLI2CA_Km + LI__icg); LI__ICGLI2CA is "ICG export (bile)";  // SBO:0000655; isVersionOf uniprot:P21439
  // As simplification transport directly into feces (no information on time course available). No transport proteins involved in the biliary secretion into the duodenum.
  LI__ICGLI2BI: LI__icg_bi => Afeces_icg; LI__ICGLI2BI_Vmax*Vli_tissue*LI__icg_bi; LI__ICGLI2BI is "ICG bile transport";  // SBO:0000655

  // Unit definitions:
  unit cm = 0.01 metre;
  unit g_per_mole = gram / mole; g_per_mole is "g/mole";
  unit hr = 3600 second;
  unit kg = 1000 gram;
  unit l_per_hr = litre / (3600 second); l_per_hr is "l/hr";
  unit l_per_kg = litre / (1000 gram); l_per_kg is "l/kg";
  unit l_per_min = litre / (60 second); l_per_min is "l/min";
  unit l_per_ml = litre / (1e-3 litre); l_per_ml is "l/ml";
  unit m = metre; m is "meter";
  unit m2 = metre^2; m2 is "meter^2";
  unit m2_per_kg = metre^2 / (1000 gram); m2_per_kg is "meter^2/kg";
  unit mM = 1e-3 mole / litre; mM is "mmole/liter";
  unit mg = 1e-3 gram;
  unit mg_per_g = 1e-3 gram / gram; mg_per_g is "mg/g";
  unit mg_per_hr = 1e-3 gram / (3600 second); mg_per_hr is "mg/hr";
  unit mg_per_l = 1e-3 gram / litre; mg_per_l is "mg/l";
  unit mg_per_min = 1e-3 gram / (60 second); mg_per_min is "mg/min";
  unit min = 60 second;
  unit min_per_hr = 60 second / (3600 second); min_per_hr is "min/hr";
  unit ml = 1e-3 litre;
  unit ml_per_l = 1e-3 litre / litre; ml_per_l is "ml/l";
  unit ml_per_s = 1e-3 litre / second; ml_per_s is "ml/s";
  unit ml_per_s_kg = 1e-3 litre / (second * 1000 gram); ml_per_s_kg is "ml/s/kg";
  unit mmole = 1e-3 mole;
  unit mmole_per_hr = 1e-3 mole / (3600 second); mmole_per_hr is "mmole/hr";
  unit mmole_per_hr_ml = 1e-3 mole / (3600 second * 1e-3 litre); mmole_per_hr_ml is "mmole/hr/ml";
  unit mmole_per_min = 1e-3 mole / (60 second); mmole_per_min is "mmole/min";
  unit mmole_per_min_kg = 1e-3 mole / (60 second * 1000 gram); mmole_per_min_kg is "mmole/min/kg";
  unit mmole_per_min_l = 1e-3 mole / (60 second * litre); mmole_per_min_l is "mmole/min/l";
  unit mul_per_g = 1e-6 litre / gram; mul_per_g is "microliter/g";
  unit mul_per_min_mg = 1e-6 litre / (60 second * 1e-3 gram); mul_per_min_mg is "microliter/min/mg";
  unit per_hr = 1 / (3600 second); per_hr is "1/hr";
  unit per_min = 1 / (60 second); per_min is "1/min";
  unit s = second; s is "second";
  unit s_per_hr = second / (3600 second); s_per_hr is "s/hr";
  unit s_per_min = second / (60 second); s_per_min is "s/min";
  unit LI__m2 = metre^2; LI__m2 is "meter^2";
  unit LI__mM = 1e-3 mole / litre; LI__mM is "mmole/liter";
  unit LI__min = 60 second;
  unit LI__mmole = 1e-3 mole;
  unit LI__mmole_per_min = 1e-3 mole / (60 second); LI__mmole_per_min is "mmole/min";
  unit LI__mmole_per_min_l = 1e-3 mole / (60 second * litre); LI__mmole_per_min_l is "mmole/min/l";
  unit LI__per_min = 1 / (60 second); LI__per_min is "1/min";
end
