// SBML level 2 version 4
// dcterms:bibliographicCitation: urn:miriam:pubmed:24120727

model Peng2013_melatonin__effects_of_light_and_routes_of_administration()
  // Peng2013-melatonin--effects of light and routes of administration
  // Physiologically based pharmacokinetic (PBPK) models were developed using MATLAB Simulink(®) to predict diurnal variations of endogenous melatonin with light as well as pharmacokinetics of exogenous melatonin via different routes of administration. The model was structured using whole body, including pineal and saliva compartments, and parameterized based on the literature values for endogenous melatonin. It was then optimized by including various intensities of light and various dosage and formulation of melatonin. The model predictions generally have a good fit with available experimental data as evaluated by mean squared errors and ratios between model-predicted and observed values considering large variations in melatonin secretion and pharmacokinetics as reported in the literature. It also demonstrates the capability and usefulness in simulating plasma and salivary concentrations of melatonin under different light conditions and the interaction of endogenous melatonin with the pharmacokinetics of exogenous melatonin. Given the mechanistic approach and programming flexibility of MATLAB Simulink(®), the PBPK model could provide predictions of endogenous melatonin rhythms and pharmacokinetic changes in response to environmental (light) and experimental (dosage and route of administration) conditions. Furthermore, the model may be used to optimize the combined treatment using light exposure and exogenous melatonin for maximal phase advances or delays
  // Model is encoded by Ruby and submitted to BioModels by Ahmad Zyoud.
  // hasTaxon taxonomy:9606
  // isDescribedBy pubmed:24120727
  // hasProperty ncit:C2267 omit:0011589 ncit:C64650 mamo:MAMO_0000203

  // Compartments:
  compartment Arterial_blood = 690;
  compartment Venous_blood = 690;
  compartment Lung = 1286;
  compartment Heart = 414;
  compartment Muscles = 31832;
  compartment Skin = 3643;
  compartment Bone = 11633;
  compartment Fat = 15736;
  compartment Pancreas = 189;
  compartment Spleen = 242;
  compartment Thymus = 29;
  compartment Kidneys = 435;
  compartment Liver = 2342;
  compartment GI_tract = 1296;
  compartment Brain = 1509;
  compartment Saliva = 6;
  compartment Pineal = 24;

  // Species:
  species $C_Arterial in Arterial_blood = 1;
  species $C_Venous in Venous_blood = 1;
  species $C_Lung in Lung = 1;
  species $C_Heart in Heart = 1;
  species $C_Muscles in Muscles = 1;
  species $C_Skin in Skin = 1;
  species $C_Bone in Bone = 1;
  species $C_Fat in Fat = 1;
  species $C_Pancreas in Pancreas = 1;
  species $C_Spleen in Spleen = 1;
  species $C_Thymus in Thymus = 1;
  species $C_Kidneys in Kidneys = 1;
  species $C_Liver in Liver = 1;
  species $C_GI in GI_tract = 1;
  species $C_Brain in Brain = 1;
  species $C_Saliva in Saliva = 1;
  species $C_Pineal in Pineal = 1;

  // Parameters:
  Q_Arterial = 6038;
  Q_Venous = 6038;
  Q_Lung = 6038;
  Q_Heart = 257;
  Q_Muscles = 1083;
  Q_Skin = 313;
  Q_Bone = 318;
  Q_Fat = 342;
  Q_Pancreas = 64;
  Q_Spleen = 193;
  Q_Thymus = 80;
  Q_Kidneys = 1309;
  Q_Liver = 1220;
  Q_GI = 963;
  Q_Brain = 775;
  Q_Saliva = 1;
  Q_Pineal = 12;
  P_Arterial = 1.2;
  P_Venous = 1.2;
  P_Lung = 1;
  P_Heart = 0.37;
  P_Muscles = 1.5;
  P_Skin = 1.5;
  P_Bone = 0;
  P_Fat = 13;
  P_Pancreas = 1.5;
  P_Spleen = 1.5;
  P_Thymus = 0;
  P_Kidneys = 1.5;
  P_Liver = 1.6;
  P_GI = 1.5;
  P_Brain = 2;
  P_Saliva = 0.39;
  P_Pineal = 1.5;
  CL_int = 1226.4;
  C_amp = 476;
  k_cAMP = 0.37;
  k_dNAT = 0.011;
  T_on = 1210;
  T_off = 245;
  T_sec = 474;
  k_gi = 0.029;
  F1 = 0.1;
  T_lag1 = 0;
  k = 0.035;
  n = 0.48;
  F2 = 0.1;
  T_lag2 = 0;
  T_rel = 480;
  R_s = 65.4;
  T_lag3 = 61.8;
  F_dep = 0.07;
  k_srel = 0.02;
  m = 7;
  alpha0 = 0.05;
  p = 0.5;
  G = 37;
  beta = 0.007;
  R = 1.2;
  f_u = 1;
  X = 0;
  D_eff = 1;
  I = 0;
  I0 = 0;
  N = 0;
  A_NAT = 0;

  // Assignment rules:
  rdt := n*k*time^(n - 1);
  alpha := alpha0*(I/I0)^p*(I/I + 100);
  B := G*(1 - N)*alpha;
  R_td := piecewise(0, time < T_lag1, piecewise(R_s, time <= T_rel, k_srel*R_s*T_rel*F_dep*exp(-k_srel*(time - T_rel))));
  R_ex := C_Liver/P_Liver*f_u*CL_int;
  R_gi := piecewise(0, time < T_lag1, k_gi*X);

  // Rate rules:
  C_Arterial' = Q_Arterial*(C_Lung - C_Arterial);
  C_Venous' = Q_Lung*(C_Lung*R/P_Lung) + Q_Heart*(C_Heart*R/P_Heart) + Q_Muscles*(C_Muscles*R/P_Muscles) + Q_Skin*(C_Skin*R/P_Skin) + Q_Bone*(C_Bone*R/P_Bone) + Q_Fat*(C_Fat*R/P_Fat) + Q_Pancreas*(C_Pancreas*R/P_Pancreas) + Q_Spleen*(C_Spleen*R/P_Spleen) + Q_Thymus*(C_Thymus*R/P_Thymus) + Q_Kidneys*(C_Kidneys*R/P_Kidneys) + Q_Liver*(C_Liver*R/P_Liver) + Q_GI*(C_GI*R/P_GI) + Q_Brain*(C_Brain*R/P_Brain) + Q_Saliva*(C_Saliva*R/P_Saliva) + Q_Pineal*(C_Pineal*R/P_Pineal) - Q_Venous*C_Venous + R_s;
  C_Lung' = Q_Lung*(C_Arterial - C_Lung*R/P_Lung);
  C_Heart' = Q_Heart*(C_Arterial - C_Heart*R/P_Heart);
  C_Muscles' = Q_Muscles*(C_Arterial - C_Muscles*R/P_Muscles);
  C_Skin' = Q_Skin*(C_Arterial - C_Skin*R/P_Skin) + R_td;
  C_Bone' = Q_Bone*(C_Arterial - C_Bone*R/P_Bone);
  C_Fat' = Q_Fat*(C_Arterial - C_Fat*R/P_Fat);
  C_Pancreas' = Q_Pancreas*(C_Arterial - C_Pancreas*R/P_Pancreas);
  C_Spleen' = Q_Spleen*(C_Arterial - C_Spleen*R/P_Spleen);
  C_Thymus' = Q_Thymus*(C_Arterial - C_Thymus*R/P_Thymus);
  C_Kidneys' = Q_Kidneys*(C_Arterial - C_Kidneys*R/P_Kidneys);
  C_Liver' = Q_Liver*(C_Arterial - C_Liver*R/P_Liver) - R_ex;
  C_GI' = Q_GI*(C_Arterial - C_GI*R/P_GI) + R_gi;
  C_Brain' = Q_Brain*(C_Arterial - C_Brain*R/P_Brain);
  C_Saliva' = Q_Saliva*(C_Arterial - C_Saliva*R/P_Saliva);
  C_Pineal' = Q_Pineal*(C_Arterial - C_Pineal*R/P_Pineal) + A_NAT;
  X' = D_eff*rdt - k_gi*F1*X;
  N' = 60*(alpha*(1 - N) - beta*N);
  A_NAT' = A_NAT*(1 - m*B);

  // Unit definitions:
  unit volume = 1e-3 litre;
  unit substance = 1e-3 mole;
end
