// SBML level 2 version 4

function Uni_Uni_ar_k(k, Vf, substrate, product, Keq, Kms, Kmp)
  k*Vf*(substrate - product/Keq)/(substrate + Kms*(1 + product/Kmp));
end

function Function_for_CS(Kaca_cs, Kcit_cs, Kcoa_cs, Koaa_cs, Vf_cs, Vr_cs, aca, cit, coa, oaa, Vm, k)
  k*Vm*(Vf_cs*(aca/Kaca_cs)*(oaa/Koaa_cs) - Vr_cs*(coa/Kcoa_cs)*(cit/Kcit_cs))/((1 + aca/Kaca_cs + coa/Kcoa_cs)*(1 + oaa/Koaa_cs + cit/Kcit_cs));
end

function Function_for_KDH(Kakg_kdh, Ksca_kdh, Vf_kdh, Vr_kdh, akg, sca, Vm, k)
  k*Vm*(Vf_kdh*(akg/Kakg_kdh) - Vr_kdh*(sca/Ksca_kdh))/(1 + akg/Kakg_kdh + sca/Ksca_kdh);
end
Function_for_KDH is "Function for OGDH";

function Function_for_ScAS(Ksca_scas, Ksuc_scas, Vf_scas, Vr_scas, sca, suc, Vm, k)
  k*Vm*(Vf_scas*(sca/Ksca_scas) - Vr_scas*(suc/Ksuc_scas))/(1 + sca/Ksca_scas + suc/Ksuc_scas);
end
Function_for_ScAS is "Function for SS";

function Function_for_SDH(Kfa_sdh, Ksuc_sdh, Vf_sdh, Vr_sdh, fa, suc, Vm, k)
  k*Vm*(Vf_sdh*(suc/Ksuc_sdh) - Vr_sdh*(fa/Kfa_sdh))/(1 + suc/Ksuc_sdh + fa/Kfa_sdh);
end
Function_for_SDH is "Function for SDE";

function Function_for_FUM(Kfa_fum, Kmal_fum, Vf_fum, Vr_fum, fa, mal, Vm, k)
  k*Vm*(Vf_fum*(fa/Kfa_fum) - Vr_fum*(mal/Kmal_fum))/(1 + fa/Kfa_fum + mal/Kmal_fum);
end
Function_for_FUM is "Function for FUH";

function Function_for_MDH(Kmal_mdh, Koaa_mdh, Vf_mdh, Vr_mdh, mal, oaa, Vm, k)
  k*Vm*(Vf_mdh*(mal/Kmal_mdh) - Vr_mdh*(oaa/Koaa_mdh))/(1 + mal/Kmal_mdh + oaa/Koaa_mdh);
end
Function_for_MDH is "Function for MDE";

function Function_for_ACN(Kcit_acn, Kicit_acn, Vf_acn, Vr_acn, cit, icit, Vm, k)
  k*Vm*(Vf_acn*(cit/Kcit_acn) - Vr_acn*(icit/Kicit_acn))/(1 + cit/Kcit_acn + icit/Kicit_acn);
end
Function_for_ACN is "Function for ACO";

function Function_for_ICD(Kakg_icd, Kicit_icd, Vf_icd, Vr_icd, akg, icit, Vm, k)
  k*Vm*(Vf_icd*(icit/Kicit_icd) - Vr_icd*(akg/Kakg_icd))/(1 + icit/Kicit_icd + akg/Kakg_icd);
end
Function_for_ICD is "Function for IDE";

function Transport_Michaelis_Menten(k, V, substrate, Km)
  k*V*substrate/(Km + substrate);
end
Transport_Michaelis_Menten is "Transport Michaelis-Menten";

function Function_for_aldolase(Vf, f16bp, Kf16bp, dhap, gap, Keq, Kdhap, Kgap, k)
  k*(Vf*f16bp/Kf16bp*(1 - dhap*gap/(Keq*f16bp))/(1 + dhap/Kdhap + f16bp/Kf16bp + gap/Kgap + dhap*gap/(Kdhap*Kgap)));
end

function Uni_Bi_generalised_Hill_s_equation(Vf, substrate, Ks, product1, product2, Keq, Kp2, Kp1, k)
  k*Vf*(substrate/Ks)*(1 - product1*product2/(substrate*Keq))/(1 + substrate/Ks + product1/Kp1 + product2/Kp2 + product1*product2/(Kp1*Kp2));
end
Uni_Bi_generalised_Hill_s_equation is "Uni Bi generalised Hill's equation";

function Passive_defusion(V, S, P)
  V*(S - P);
end

function Rate_Law_for_22__EC_1_2_1_104_PDH(V, substrate, Km, inhibitor, Ki, k)
  k*V*substrate/((Km + substrate)*(1 + inhibitor/Ki));
end
Rate_Law_for_22__EC_1_2_1_104_PDH is "Rate Law for 22. EC 1.2.1.104 PDH";

function function_for_glucose_transport(VmGLT, KmGLTGLCo, GLCo, GLCi, KeqGLT, KmGLTGLCi)
  VmGLT/KmGLTGLCo*(GLCo - GLCi/KeqGLT)/(1 + GLCo/KmGLTGLCo + GLCi/KmGLTGLCi + 0.91*GLCo*GLCi/(KmGLTGLCo*KmGLTGLCi));
end

model Berzins2022___C_cohnii_ethanol()
  // Berzins2022 - Crypthecodinium cohnii: ethanol uptake for production of DHA precursor acetyl-CoA
  // This model is a supplementary material of publication
  // “Kinetic and stoichiometric modeling-based analysis of do-cosahexaenoic acid (DHA) production potential by C.cohnii from glycerol, glucose and ethanol”
  // by Kristaps Berzins, Reinis Muiznieks, Matiss R. Baumanis, Inese Strazdina, Karlis Shvirksts, Santa Prikule, Vytautas Galvanauskas, Daniel Pleissner, Agris Pentjuss, Mara Grube, Uldis Kalnenieks and Egils Stalidzans
  // This is a kinetic model of Crypthecodinium cohnii central carbon metabolism during fatty acid synthesis. The model is aimed at cytosolic acetyl coenzyme-A production, which is the precursor of fatty acids.
  // The model contains 35 reactions and 36 species split into three compartments – extracellular, cytosol and mitochondria. It was assumed that dry weight accounts for 33% of wet weight and that 1ml = 1g. The mitochondria volume is 1% of cytosol volume. The model was designed for ethanol as a single substrate. For use of glucose and glycerol as substrates, see MODEL2112280001.
  // The model is preset for steady state calculation using ethanol.
  // The model contains 31 global quantities which were used to optimize the model during parameter estimation. These global quantities include amino acid concentrations for each enzyme, the total amino acid concentration used in enzymes, the sum transport reaction variable parameters and the total concentration of species.
  // All enzymatic reactions contain a parameter k, which can be used for change of enzyme expression levels in case of optimization of product flux or yield. Currently all the parameters k are set for 1, which corresponds to wild-type.
  // The model was made for steady-state. For ethanol as a substrate a steady-state resolution of 0.1 can be used.
  // hasPart biomodels.db:BIOMD0000000222
  // hasProperty mamo:MAMO_0000046

  // Compartments:
  compartment extracellular = 1;
  compartment cytosol = 1;
  compartment mitochondria = 0.01;

  // Species:
  species $glucose_ex in extracellular = 0; glucose_ex is "glucose[ex]";
  species glucose_6_phosphate_c in cytosol = 9.401365e-5; glucose_6_phosphate_c is "glucose-6-phosphate[c]";
  species fructose_6_phosphate_c in cytosol = 4.742262e-5; fructose_6_phosphate_c is "fructose-6-phosphate[c]";
  species dihydroxyacetone_phosphate_c in cytosol = 0.1665922; dihydroxyacetone_phosphate_c is "dihydroxyacetone-phosphate[c]";
  species fructose_1_6_biphosphate_c in cytosol = 0.01477261; fructose_1_6_biphosphate_c is "fructose-1,6-biphosphate[c]";
  species glyceraldehyde_3_phosphate_c in cytosol = 0.007983073; glyceraldehyde_3_phosphate_c is "glyceraldehyde-3-phosphate[c]";
  species _1_3_bisphosphoglyceratec_c in cytosol = 4.031022e-5; _1_3_bisphosphoglyceratec_c is "1,3-bisphosphoglyceratec[c]";
  species _2_phosphoglycerate_c in cytosol = 2.578138e-5; _2_phosphoglycerate_c is "2-phosphoglycerate[c]";
  species _3_phosphoglycerate_c in cytosol = 0.07325797; _3_phosphoglycerate_c is "3-phosphoglycerate[c]";
  species phosphoenolpyruvate_c in cytosol = 2.07863e-5; phosphoenolpyruvate_c is "phosphoenolpyruvate[c]";
  species pyruvate_c in cytosol = 0.005440782; pyruvate_c is "pyruvate[c]";
  species $acetyl_CoA_c in cytosol = 1; acetyl_CoA_c is "acetyl-CoA[c]";
  species acetaldehyde_c in cytosol = 0.003421142; acetaldehyde_c is "acetaldehyde[c]";
  species $ethanol_ex in extracellular = 32; ethanol_ex is "ethanol[ex]";
  species ethanol_c in cytosol = 31.19541; ethanol_c is "ethanol[c]";
  species $glycerol_ex in extracellular = 0; glycerol_ex is "glycerol[ex]";
  species glycerol_c in cytosol = 0.003393628; glycerol_c is "glycerol[c]";
  species glycerol_3_phosphate_c in cytosol = 2.816191; glycerol_3_phosphate_c is "glycerol-3-phosphate[c]";
  species citrate_c in cytosol = 5.222767; citrate_c is "citrate[c]";  // isVersionOf kegg.compound:C00158; isVersionOf CHEBI:30769
  species acetyl_CoA_m in mitochondria = 0.000115748; acetyl_CoA_m is "acetyl-CoA[m]";
  species citrate_m in mitochondria = 0.01511161; citrate_m is "citrate[m]";
  species $coa_m in mitochondria = 0.01; coa_m is "coa[m]";
  species oxaloacetate_m in mitochondria = 0.164857; oxaloacetate_m is "oxaloacetate[m]";
  species isoCitrate_m in mitochondria = 0.0007270412; isoCitrate_m is "isoCitrate[m]";
  species fumarate_m in mitochondria = 33.19653; fumarate_m is "fumarate[m]";
  species malate_m in mitochondria = 10.60967; malate_m is "malate[m]";
  species alpha_ketoglutarate_m in mitochondria = 0.03067544; alpha_ketoglutarate_m is "alpha-ketoglutarate[m]";
  species succinyl_CoA_m in mitochondria = 0.001195886; succinyl_CoA_m is "succinyl-CoA[m]";
  species succinate_m in mitochondria = 1.864495; succinate_m is "succinate[m]";
  species pyruvate_m in mitochondria = 2.096775; pyruvate_m is "pyruvate[m]";
  species oxaloacetate_c in cytosol = 0.0769546; oxaloacetate_c is "oxaloacetate[c]";
  species malate_c in cytosol = 4.949649; malate_c is "malate[c]";
  species $starch_c in cytosol = 1; starch_c is "starch[c]";
  species glucose_c in cytosol = 1.10604e-7; glucose_c is "glucose[c]";
  species acetaldehyde_m in mitochondria = 0.001456808; acetaldehyde_m is "acetaldehyde[m]";
  species acetate_m in mitochondria = 0.005107669; acetate_m is "acetate[m]";

  // Parameters:
  var aa20AcA_LIG;
  _07__EC_1_2_1_12_Gra3PDH_k = 1; _07__EC_1_2_1_12_Gra3PDH_k is "07. EC 1.2.1.12 Gra3PDH_k";
  _07__EC_1_2_1_12_Gra3PDH_Vf = 301.853; _07__EC_1_2_1_12_Gra3PDH_Vf is "07. EC 1.2.1.12 Gra3PDH_Vf";
  _08__EC_2_7_2_3_PGK_k = 1; _08__EC_2_7_2_3_PGK_k is "08. EC 2.7.2.3 PGK_k";
  _08__EC_2_7_2_3_PGK_Vf = 4576.27; _08__EC_2_7_2_3_PGK_Vf is "08. EC 2.7.2.3 PGK_Vf";
  _09__EC_5_4_2_12_PGM_k = 1; _09__EC_5_4_2_12_PGM_k is "09. EC 5.4.2.12 PGM_k";
  _09__EC_5_4_2_12_PGM_Vf = 11.4969; _09__EC_5_4_2_12_PGM_Vf is "09. EC 5.4.2.12 PGM_Vf";
  _10__EC_4_2_1_11_ENO_k = 1; _10__EC_4_2_1_11_ENO_k is "10. EC 4.2.1.11 ENO_k";
  _10__EC_4_2_1_11_ENO_Vf = 4881.49; _10__EC_4_2_1_11_ENO_Vf is "10. EC 4.2.1.11 ENO_Vf";
  _11__EC_2_7_1_40_PYK_k = 1; _11__EC_2_7_1_40_PYK_k is "11. EC 2.7.1.40 PYK_k";
  _11__EC_2_7_1_40_PYK_Vf = 1.72285e4; _11__EC_2_7_1_40_PYK_Vf is "11. EC 2.7.1.40 PYK_Vf";
  _22__EC_1_2_1_104_PDH_V = 1.06372e-6; _22__EC_1_2_1_104_PDH_V is "22. EC 1.2.1.104 PDH_V";
  _03__EC_5_3_1_9_PGI_k = 1; _03__EC_5_3_1_9_PGI_k is "03. EC 5.3.1.9 PGI_k";
  _03__EC_5_3_1_9_PGI_Vf = 4333.26; _03__EC_5_3_1_9_PGI_Vf is "03. EC 5.3.1.9 PGI_Vf";
  _02__EC_2_7_1_1_HK_k = 1; _02__EC_2_7_1_1_HK_k is "02. EC 2.7.1.1 HK_k";
  _02__EC_2_7_1_1_HK_Vf = 5147.9; _02__EC_2_7_1_1_HK_Vf is "02. EC 2.7.1.1 HK_Vf";
  _04__EC_2_7_1_11_PFK_k = 1; _04__EC_2_7_1_11_PFK_k is "04. EC 2.7.1.11 PFK_k";
  _04__EC_2_7_1_11_PFK_Vf = 2977.04; _04__EC_2_7_1_11_PFK_Vf is "04. EC 2.7.1.11 PFK_Vf";
  _06__EC_5_3_1_1_TPI_k = 1; _06__EC_5_3_1_1_TPI_k is "06. EC 5.3.1.1 TPI_k";
  _06__EC_5_3_1_1_TPI_Vf = 9424.48; _06__EC_5_3_1_1_TPI_Vf is "06. EC 5.3.1.1 TPI_Vf";
  _31__EC_1_1_1_37__MDE_k = 1; _31__EC_1_1_1_37__MDE_k is "31. EC 1.1.1.37 MDE_k";
  _34__EC_1_1_1_37_MDE_cytosol_Vm = 32.866; _34__EC_1_1_1_37_MDE_cytosol_Vm is "34. EC 1.1.1.37 MDE cytosol_Vm";
  _14__EC_2_7_1_30_GK_k = 1; _14__EC_2_7_1_30_GK_k is "14. EC 2.7.1.30 GK_k";
  _14__EC_2_7_1_30_GK_Vf = 803.828; _14__EC_2_7_1_30_GK_Vf is "14. EC 2.7.1.30 GK_Vf";
  _25__EC_4_2_1_3_ACO_k = 1; _25__EC_4_2_1_3_ACO_k is "25. EC 4.2.1.3 ACO_k";
  _25__EC_4_2_1_3_ACO_Vm = 374.083; _25__EC_4_2_1_3_ACO_Vm is "25. EC 4.2.1.3 ACO_Vm";
  _35__EC_1_1_1_40_ME_k = 1; _35__EC_1_1_1_40_ME_k is "35. EC 1.1.1.40 ME_k";
  _35__EC_1_1_1_40_ME_Vf = 4596.66; _35__EC_1_1_1_40_ME_Vf is "35. EC 1.1.1.40 ME_Vf";
  _17__EC_1_1_1_2_ADH_k = 1; _17__EC_1_1_1_2_ADH_k is "17. EC 1.1.1.2 ADH_k";
  _17__EC_1_1_1_2_ADH_Vf = 2620.76; _17__EC_1_1_1_2_ADH_Vf is "17. EC 1.1.1.2 ADH_Vf";
  _05__EC_4_1_2_13_ALD_k = 1; _05__EC_4_1_2_13_ALD_k is "05. EC 4.1.2.13 ALD_k";
  _05__EC_4_1_2_13_ALD_Vf = 395.726; _05__EC_4_1_2_13_ALD_Vf is "05. EC 4.1.2.13 ALD_Vf";
  _27__EC_1_2_4_2_OGDH_k = 1; _27__EC_1_2_4_2_OGDH_k is "27. EC 1.2.4.2 OGDH_k";
  _27__EC_1_2_4_2_OGDH_Vm = 35.7462; _27__EC_1_2_4_2_OGDH_Vm is "27. EC 1.2.4.2 OGDH_Vm";
  _23__EC_6_4_1_1_PYC_k = 1; _23__EC_6_4_1_1_PYC_k is "23. EC 6.4.1.1 PYC_k";
  _23__EC_6_4_1_1_PYC_Vf = 912.784; _23__EC_6_4_1_1_PYC_Vf is "23. EC 6.4.1.1 PYC_Vf";
  _20__EC_6_2_1_1_AcA_LIG_k = 1; _20__EC_6_2_1_1_AcA_LIG_k is "20. EC 6.2.1.1 AcA LIG_k";
  _20__EC_6_2_1_1_AcA_LIG_Vf = 4.36034e4; _20__EC_6_2_1_1_AcA_LIG_Vf is "20. EC 6.2.1.1 AcA LIG_Vf";
  _24__EC_2_3_3_1_CS_k = 1; _24__EC_2_3_3_1_CS_k is "24. EC 2.3.3.1 CS_k";
  _24__EC_2_3_3_1_CS_Vm = 3338.25; _24__EC_2_3_3_1_CS_Vm is "24. EC 2.3.3.1 CS_Vm";
  _26__EC_1_1_1_41_IDE_k = 1; _26__EC_1_1_1_41_IDE_k is "26. EC 1.1.1.41 IDE_k";
  _26__EC_1_1_1_41_IDE_Vm = 305.949; _26__EC_1_1_1_41_IDE_Vm is "26. EC 1.1.1.41 IDE_Vm";
  _34__EC_1_1_1_37_MDE_cytosol_k = 1; _34__EC_1_1_1_37_MDE_cytosol_k is "34. EC 1.1.1.37 MDE cytosol_k";
  _29__EC_1_3_5_1_SDE_k = 1; _29__EC_1_3_5_1_SDE_k is "29. EC 1.3.5.1 SDE_k";
  _29__EC_1_3_5_1_SDE_Vm = 649.833; _29__EC_1_3_5_1_SDE_Vm is "29. EC 1.3.5.1 SDE_Vm";
  _28__EC_6_2_1_5_SS_Vm = 2069.77; _28__EC_6_2_1_5_SS_Vm is "28. EC 6.2.1.5 SS_Vm";
  _19__EC_1_2_1_5_ALDH_k = 1; _19__EC_1_2_1_5_ALDH_k is "19. EC 1.2.1.5 ALDH_k";
  _19__EC_1_2_1_5_ALDH_Vf = 1.52354e4; _19__EC_1_2_1_5_ALDH_Vf is "19. EC 1.2.1.5 ALDH_Vf";
  _15__EC_1_1_5_3_GPD_k = 1; _15__EC_1_1_5_3_GPD_k is "15. EC 1.1.5.3 GPD_k";
  _15__EC_1_1_5_3_GPD_Vf = 327.332; _15__EC_1_1_5_3_GPD_Vf is "15. EC 1.1.5.3 GPD_Vf";
  _18__Acetladehyde_transport_V = 3961.59; _18__Acetladehyde_transport_V is "18. Acetladehyde transport_V";
  _01__Glucose_transport_VmGLT = 3.66257; _01__Glucose_transport_VmGLT is "01. Glucose transport_VmGLT";
  _21__Pyruvate_transport_V = 152.671; _21__Pyruvate_transport_V is "21. Pyruvate transport_V";
  _13__Glycerol_transport_Vf = 2.4617; _13__Glycerol_transport_Vf is "13. Glycerol transport_Vf";
  _32__Citrate_transport_V = 200.782; _32__Citrate_transport_V is "32. Citrate transport_V";
  _33__EC_2_3_3_8_ACL_k = 1; _33__EC_2_3_3_8_ACL_k is "33. EC 2.3.3.8 ACL_k";
  _33__EC_2_3_3_8_ACL_Vf = 48.0346; _33__EC_2_3_3_8_ACL_Vf is "33. EC 2.3.3.8 ACL_Vf";
  _30__EC_4_2_1_2_FUH_k = 1; _30__EC_4_2_1_2_FUH_k is "30. EC 4.2.1.2 FUH_k";
  _30__EC_4_2_1_2_FUH_Vm = 1.02592e4; _30__EC_4_2_1_2_FUH_Vm is "30. EC 4.2.1.2 FUH_Vm";
  Initial_for_aa02HK = aa02HK;
  Initial_for_aa03PGI = aa03PGI;
  Initial_for_aa04PFK = aa04PFK;
  Initial_for_aa05ALD = aa05ALD;
  Initial_for_aa06TPI = aa06TPI;
  Initial_for_aa07Gra3PDH = aa07Gra3PDH;
  Initial_for_aa08PGK = aa08PGK;
  Initial_for_aa09PGM = aa09PGM;
  Initial_for_aa10ENO = aa10ENO;
  Initial_for_aa11PYK = aa11PYK;
  Initial_for_aa14GK = aa14GK;
  Initial_for_aa15GPD = aa15GPD;
  Initial_for_aa17ADH = aa17ADH;
  Initial_for_aa19ALDH = aa19ALDH;
  Initial_for_aa20AcA_LIG = aa20AcA_LIG;
  Initial_for_aa22PDH = aa22PDH;
  Initial_for_aa23PYC = aa23PYC;
  Initial_for_aa24CS = aa24CS;
  Initial_for_aa25ACO = aa25ACO;
  Initial_for_aa26IDE = aa26IDE;
  Initial_for_aa27OGDH = aa27OGDH;
  Initial_for_aa28SS = aa28SS;
  Initial_for_aa29SDE = aa29SDE;
  Initial_for_aa30FUH = aa30FUH;
  Initial_for_aa31MDE = aa31MDE;
  Initial_for_aa33ACL = aa33ACL;
  Initial_for_aa34MDEcytosol = aa34MDEcytosol;
  Initial_for_aa35ME = aa35ME;

  // Assignment rules:
  aa07Gra3PDH := _07__EC_1_2_1_12_Gra3PDH_k*(_07__EC_1_2_1_12_Gra3PDH_Vf*60/70)*332;
  aa08PGK := _08__EC_2_7_2_3_PGK_k*(_08__EC_2_7_2_3_PGK_Vf*60/300)*416;
  aa09PGM := _09__EC_5_4_2_12_PGM_k*(_09__EC_5_4_2_12_PGM_Vf*60/102)*511;
  aa10ENO := _10__EC_4_2_1_11_ENO_k*(_10__EC_4_2_1_11_ENO_Vf*60/78)*437;
  aa11PYK := _11__EC_2_7_1_40_PYK_k*(_11__EC_2_7_1_40_PYK_Vf*60/226)*500;
  aa22PDH := _22__EC_1_2_1_104_PDH_V*60/68*1401;
  aa03PGI := _03__EC_5_3_1_9_PGI_k*(_03__EC_5_3_1_9_PGI_Vf*60/150)*554;
  aa02HK := _02__EC_2_7_1_1_HK_k*(_02__EC_2_7_1_1_HK_Vf*60/38)*485;
  aa04PFK := _04__EC_2_7_1_11_PFK_k*(_04__EC_2_7_1_11_PFK_Vf*60/111)*987;
  aa06TPI := _06__EC_5_3_1_1_TPI_k*(_06__EC_5_3_1_1_TPI_Vf*60/860)*248;
  aa31MDE := _31__EC_1_1_1_37__MDE_k*(_34__EC_1_1_1_37_MDE_cytosol_Vm*60/621)*334;
  aa14GK := _14__EC_2_7_1_30_GK_k*(_14__EC_2_7_1_30_GK_Vf*60/4900)*501;
  aa25ACO := _25__EC_4_2_1_3_ACO_k*(_25__EC_4_2_1_3_ACO_Vm*60/5.3)*778;
  aa35ME := _35__EC_1_1_1_40_ME_k*(_35__EC_1_1_1_40_ME_Vf*60/770)*623;
  aa17ADH := _17__EC_1_1_1_2_ADH_k*(_17__EC_1_1_1_2_ADH_Vf*60/27.35)*360;
  aa05ALD := _05__EC_4_1_2_13_ALD_k*(_05__EC_4_1_2_13_ALD_Vf*60/10.5)*359;
  scsum := _1_3_bisphosphoglyceratec_c + _3_phosphoglycerate_c + acetaldehyde_c + acetyl_CoA_m + alpha_ketoglutarate_m + citrate_c + citrate_m + dihydroxyacetone_phosphate_c + ethanol_c + fructose_1_6_biphosphate_c + fructose_6_phosphate_c + acetaldehyde_m + acetate_m + _2_phosphoglycerate_c + fumarate_m + glyceraldehyde_3_phosphate_c + glycerol_c + glycerol_3_phosphate_c + glucose_6_phosphate_c + isoCitrate_m + malate_c + malate_m + oxaloacetate_c + oxaloacetate_m + phosphoenolpyruvate_c + pyruvate_c + pyruvate_m + succinate_m + succinyl_CoA_m + glucose_c;
  aa27OGDH := _27__EC_1_2_4_2_OGDH_k*(_27__EC_1_2_4_2_OGDH_Vm*60/30)*1014;
  aa23PYC := _23__EC_6_4_1_1_PYC_k*(_23__EC_6_4_1_1_PYC_Vf*60/7.33)*1178;
  aa20AcA_LIG := _20__EC_6_2_1_1_AcA_LIG_k*(_20__EC_6_2_1_1_AcA_LIG_Vf*60/33.5)*539;
  aa24CS := _24__EC_2_3_3_1_CS_k*(_24__EC_2_3_3_1_CS_Vm*60/260)*479;
  aa26IDE := _26__EC_1_1_1_41_IDE_k*(_26__EC_1_1_1_41_IDE_Vm*60/30)*729;
  aa34MDEcytosol := _34__EC_1_1_1_37_MDE_cytosol_k*(_34__EC_1_1_1_37_MDE_cytosol_Vm*60/621)*377;
  aa29SDE := _29__EC_1_3_5_1_SDE_k*(_29__EC_1_3_5_1_SDE_Vm*60/217)*640;
  aa28SS := _24__EC_2_3_3_1_CS_k*(_28__EC_6_2_1_5_SS_Vm*60/201)*329;
  aa19ALDH := _19__EC_1_2_1_5_ALDH_k*(_19__EC_1_2_1_5_ALDH_Vf*60/1.11)*519;
  aa15GPD := _15__EC_1_1_5_3_GPD_k*(_15__EC_1_1_5_3_GPD_Vf*60/33.3)*501;
  transport_vm := _18__Acetladehyde_transport_V + _01__Glucose_transport_VmGLT + _21__Pyruvate_transport_V + _13__Glycerol_transport_Vf + _32__Citrate_transport_V;
  aa33ACL := _33__EC_2_3_3_8_ACL_k*_33__EC_2_3_3_8_ACL_Vf*60*1101/2.4;
  aa30FUH := _30__EC_4_2_1_2_FUH_k*(_30__EC_4_2_1_2_FUH_Vm*60/1149)*488;
  aasum := Initial_for_aa03PGI + Initial_for_aa02HK + Initial_for_aa04PFK + Initial_for_aa05ALD + Initial_for_aa06TPI + Initial_for_aa07Gra3PDH + Initial_for_aa08PGK + Initial_for_aa09PGM + Initial_for_aa10ENO + Initial_for_aa11PYK + Initial_for_aa22PDH + Initial_for_aa25ACO + Initial_for_aa26IDE + Initial_for_aa27OGDH + Initial_for_aa28SS + Initial_for_aa24CS + Initial_for_aa29SDE + Initial_for_aa30FUH + Initial_for_aa31MDE + Initial_for_aa23PYC + Initial_for_aa33ACL + Initial_for_aa34MDEcytosol + Initial_for_aa35ME + Initial_for_aa14GK + Initial_for_aa15GPD + Initial_for_aa17ADH + Initial_for_aa19ALDH + Initial_for_aa20AcA_LIG;

  // Reactions:
  _01__Glucose_transport: $glucose_ex -> glucose_c; function_for_glucose_transport(_01__Glucose_transport_VmGLT, KmGLTGLCo, glucose_ex, glucose_c, KeqGLT, KmGLTGLCi); _01__Glucose_transport is "01. Glucose transport";
    KmGLTGLCo = 1.1918; KeqGLT = 1; KmGLTGLCi = 1.1918;
  _02__EC_2_7_1_1_HK: glucose_c -> glucose_6_phosphate_c; cytosol*Uni_Uni_ar_k(_02__EC_2_7_1_1_HK_k, _02__EC_2_7_1_1_HK_Vf, glucose_c, glucose_6_phosphate_c, _02__EC_2_7_1_1_HK_Keq, _02__EC_2_7_1_1_HK_Kms, _02__EC_2_7_1_1_HK_Kmp); _02__EC_2_7_1_1_HK is "02. EC 2.7.1.1 HK";
    _02__EC_2_7_1_1_HK_Keq = 850; _02__EC_2_7_1_1_HK_Kms = 0.0106; _02__EC_2_7_1_1_HK_Kmp = 30;
  _03__EC_5_3_1_9_PGI: glucose_6_phosphate_c -> fructose_6_phosphate_c; cytosol*Uni_Uni_ar_k(_03__EC_5_3_1_9_PGI_k, _03__EC_5_3_1_9_PGI_Vf, glucose_6_phosphate_c, fructose_6_phosphate_c, _03__EC_5_3_1_9_PGI_Keq, _03__EC_5_3_1_9_PGI_Kms, _03__EC_5_3_1_9_PGI_Kmp); _03__EC_5_3_1_9_PGI is "03. EC 5.3.1.9 PGI";
    _03__EC_5_3_1_9_PGI_Keq = 0.5; _03__EC_5_3_1_9_PGI_Kms = 0.084; _03__EC_5_3_1_9_PGI_Kmp = 0.23;
  _04__EC_2_7_1_11_PFK: fructose_6_phosphate_c -> fructose_1_6_biphosphate_c; cytosol*Uni_Uni_ar_k(_04__EC_2_7_1_11_PFK_k, _04__EC_2_7_1_11_PFK_Vf, fructose_6_phosphate_c, fructose_1_6_biphosphate_c, _04__EC_2_7_1_11_PFK_Keq, _04__EC_2_7_1_11_PFK_Kms, _04__EC_2_7_1_11_PFK_Kmp); _04__EC_2_7_1_11_PFK is "04. EC 2.7.1.11 PFK";
    _04__EC_2_7_1_11_PFK_Keq = 310; _04__EC_2_7_1_11_PFK_Kms = 0.016; _04__EC_2_7_1_11_PFK_Kmp = 7.6;
  _05__EC_4_1_2_13_ALD: fructose_1_6_biphosphate_c -> dihydroxyacetone_phosphate_c + glyceraldehyde_3_phosphate_c; cytosol*Function_for_aldolase(_05__EC_4_1_2_13_ALD_Vf, fructose_1_6_biphosphate_c, Kf16bp, dihydroxyacetone_phosphate_c, glyceraldehyde_3_phosphate_c, _05__EC_4_1_2_13_ALD_Keq, Kdhap, Kgap, _05__EC_4_1_2_13_ALD_k); _05__EC_4_1_2_13_ALD is "05. EC 4.1.2.13 ALD";
    Kf16bp = 0.025; _05__EC_4_1_2_13_ALD_Keq = 0.09; Kdhap = 0.11; Kgap = 0.05;
  _07__EC_1_2_1_12_Gra3PDH: glyceraldehyde_3_phosphate_c -> _1_3_bisphosphoglyceratec_c; cytosol*Uni_Uni_ar_k(_07__EC_1_2_1_12_Gra3PDH_k, _07__EC_1_2_1_12_Gra3PDH_Vf, glyceraldehyde_3_phosphate_c, _1_3_bisphosphoglyceratec_c, _07__EC_1_2_1_12_Gra3PDH_Keq, _07__EC_1_2_1_12_Gra3PDH_Kms, _07__EC_1_2_1_12_Gra3PDH_Kmp); _07__EC_1_2_1_12_Gra3PDH is "07. EC 1.2.1.12 Gra3PDH";
    _07__EC_1_2_1_12_Gra3PDH_Keq = 0.046; _07__EC_1_2_1_12_Gra3PDH_Kms = 0.89; _07__EC_1_2_1_12_Gra3PDH_Kmp = 0.012;
  _09__EC_5_4_2_12_PGM: _3_phosphoglycerate_c -> _2_phosphoglycerate_c; cytosol*Uni_Uni_ar_k(_09__EC_5_4_2_12_PGM_k, _09__EC_5_4_2_12_PGM_Vf, _3_phosphoglycerate_c, _2_phosphoglycerate_c, _09__EC_5_4_2_12_PGM_Keq, _09__EC_5_4_2_12_PGM_Kms, _09__EC_5_4_2_12_PGM_Kmp); _09__EC_5_4_2_12_PGM is "09. EC 5.4.2.12 PGM";
    _09__EC_5_4_2_12_PGM_Keq = 11.4; _09__EC_5_4_2_12_PGM_Kms = 0.27; _09__EC_5_4_2_12_PGM_Kmp = 0.11;
  _08__EC_2_7_2_3_PGK: _1_3_bisphosphoglyceratec_c -> _3_phosphoglycerate_c; cytosol*Uni_Uni_ar_k(_08__EC_2_7_2_3_PGK_k, _08__EC_2_7_2_3_PGK_Vf, _1_3_bisphosphoglyceratec_c, _3_phosphoglycerate_c, _08__EC_2_7_2_3_PGK_Keq, _08__EC_2_7_2_3_PGK_Kms, _08__EC_2_7_2_3_PGK_Kmp); _08__EC_2_7_2_3_PGK is "08. EC 2.7.2.3 PGK";
    _08__EC_2_7_2_3_PGK_Keq = 2000; _08__EC_2_7_2_3_PGK_Kms = 0.005; _08__EC_2_7_2_3_PGK_Kmp = 0.18;
  _10__EC_4_2_1_11_ENO: _2_phosphoglycerate_c -> phosphoenolpyruvate_c; cytosol*Uni_Uni_ar_k(_10__EC_4_2_1_11_ENO_k, _10__EC_4_2_1_11_ENO_Vf, _2_phosphoglycerate_c, phosphoenolpyruvate_c, _10__EC_4_2_1_11_ENO_Keq, _10__EC_4_2_1_11_ENO_Kms, _10__EC_4_2_1_11_ENO_Kmp); _10__EC_4_2_1_11_ENO is "10. EC 4.2.1.11 ENO";
    _10__EC_4_2_1_11_ENO_Keq = 5; _10__EC_4_2_1_11_ENO_Kms = 0.043; _10__EC_4_2_1_11_ENO_Kmp = 0.244;
  _11__EC_2_7_1_40_PYK: phosphoenolpyruvate_c -> pyruvate_c; cytosol*Uni_Uni_ar_k(_11__EC_2_7_1_40_PYK_k, _11__EC_2_7_1_40_PYK_Vf, phosphoenolpyruvate_c, pyruvate_c, _11__EC_2_7_1_40_PYK_Keq, _11__EC_2_7_1_40_PYK_Kms, _11__EC_2_7_1_40_PYK_Kmp); _11__EC_2_7_1_40_PYK is "11. EC 2.7.1.40 PYK";
    _11__EC_2_7_1_40_PYK_Keq = 6450; _11__EC_2_7_1_40_PYK_Kms = 0.14; _11__EC_2_7_1_40_PYK_Kmp = 21;
  _06__EC_5_3_1_1_TPI: dihydroxyacetone_phosphate_c -> glyceraldehyde_3_phosphate_c; cytosol*Uni_Uni_ar_k(_06__EC_5_3_1_1_TPI_k, _06__EC_5_3_1_1_TPI_Vf, dihydroxyacetone_phosphate_c, glyceraldehyde_3_phosphate_c, _06__EC_5_3_1_1_TPI_Keq, _06__EC_5_3_1_1_TPI_Kms, _06__EC_5_3_1_1_TPI_Kmp); _06__EC_5_3_1_1_TPI is "06. EC 5.3.1.1 TPI";
    _06__EC_5_3_1_1_TPI_Keq = 0.048; _06__EC_5_3_1_1_TPI_Kms = 0.9; _06__EC_5_3_1_1_TPI_Kmp = 0.25;
  _22__EC_1_2_1_104_PDH: pyruvate_m => acetyl_CoA_m; mitochondria*Rate_Law_for_22__EC_1_2_1_104_PDH(_22__EC_1_2_1_104_PDH_V, pyruvate_m, _22__EC_1_2_1_104_PDH_Km, acetyl_CoA_m, Ki, _22__EC_1_2_1_104_PDH_k); _22__EC_1_2_1_104_PDH is "22. EC 1.2.1.104 PDH";
    _22__EC_1_2_1_104_PDH_Km = 0.073; Ki = 0.015; _22__EC_1_2_1_104_PDH_k = 1;
  _17__EC_1_1_1_2_ADH: ethanol_c -> acetaldehyde_c; cytosol*Uni_Uni_ar_k(_17__EC_1_1_1_2_ADH_k, _17__EC_1_1_1_2_ADH_Vf, ethanol_c, acetaldehyde_c, _17__EC_1_1_1_2_ADH_Keq, _17__EC_1_1_1_2_ADH_Kms, _17__EC_1_1_1_2_ADH_Kmp); _17__EC_1_1_1_2_ADH is "17. EC 1.1.1.2 ADH";
    _17__EC_1_1_1_2_ADH_Keq = 0.00011; _17__EC_1_1_1_2_ADH_Kms = 0.5; _17__EC_1_1_1_2_ADH_Kmp = 2.33;
  _19__EC_1_2_1_5_ALDH: acetaldehyde_m -> acetate_m; mitochondria*Uni_Uni_ar_k(_19__EC_1_2_1_5_ALDH_k, _19__EC_1_2_1_5_ALDH_Vf, acetaldehyde_m, acetate_m, _19__EC_1_2_1_5_ALDH_Keq, _19__EC_1_2_1_5_ALDH_Kms, _19__EC_1_2_1_5_ALDH_Kmp); _19__EC_1_2_1_5_ALDH is "19. EC 1.2.1.5 ALDH";
    _19__EC_1_2_1_5_ALDH_Keq = 1.57356e11; _19__EC_1_2_1_5_ALDH_Kms = 0.024; _19__EC_1_2_1_5_ALDH_Kmp = 0.04;
  _16__Ethanol_transport: $ethanol_ex -> ethanol_c; Passive_defusion(V, ethanol_ex, ethanol_c); _16__Ethanol_transport is "16. Ethanol transport";
    V = 9.67177;
  _13__Glycerol_transport: $glycerol_ex -> glycerol_c; Uni_Uni_ar_k(_13__Glycerol_transport_k, _13__Glycerol_transport_Vf, glycerol_ex, glycerol_c, _13__Glycerol_transport_Keq, _13__Glycerol_transport_Kms, _13__Glycerol_transport_Kmp); _13__Glycerol_transport is "13. Glycerol transport";
    _13__Glycerol_transport_k = 1; _13__Glycerol_transport_Keq = 12; _13__Glycerol_transport_Kms = 2; _13__Glycerol_transport_Kmp = 2;
  _14__EC_2_7_1_30_GK: glycerol_c -> glycerol_3_phosphate_c; cytosol*Uni_Uni_ar_k(_14__EC_2_7_1_30_GK_k, _14__EC_2_7_1_30_GK_Vf, glycerol_c, glycerol_3_phosphate_c, _14__EC_2_7_1_30_GK_Keq, _14__EC_2_7_1_30_GK_Kms, _14__EC_2_7_1_30_GK_Kmp); _14__EC_2_7_1_30_GK is "14. EC 2.7.1.30 GK";
    _14__EC_2_7_1_30_GK_Keq = 830; _14__EC_2_7_1_30_GK_Kms = 0.169; _14__EC_2_7_1_30_GK_Kmp = 12.56;
  _15__EC_1_1_5_3_GPD: glycerol_3_phosphate_c -> dihydroxyacetone_phosphate_c; cytosol*Uni_Uni_ar_k(_15__EC_1_1_5_3_GPD_k, _15__EC_1_1_5_3_GPD_Vf, glycerol_3_phosphate_c, dihydroxyacetone_phosphate_c, _15__EC_1_1_5_3_GPD_Keq, _15__EC_1_1_5_3_GPD_Kms, _15__EC_1_1_5_3_GPD_Kmp); _15__EC_1_1_5_3_GPD is "15. EC 1.1.5.3 GPD";
    _15__EC_1_1_5_3_GPD_Keq = 0.06; _15__EC_1_1_5_3_GPD_Kms = 0.1; _15__EC_1_1_5_3_GPD_Kmp = 0.006;
  _25__EC_4_2_1_3_ACO: citrate_m -> isoCitrate_m; mitochondria*Function_for_ACN(Kcit_acn, Kicit_acn, Vf_acn, Vr_acn, citrate_m, isoCitrate_m, _25__EC_4_2_1_3_ACO_Vm, _25__EC_4_2_1_3_ACO_k); _25__EC_4_2_1_3_ACO is "25. EC 4.2.1.3 ACO";  // isVersionOf kegg.reaction:R01324
    Kcit_acn = 1.7; Kicit_acn = 3.33; Vf_acn = 91.2; Vr_acn = 0.912;
  _26__EC_1_1_1_41_IDE: isoCitrate_m -> alpha_ketoglutarate_m; mitochondria*Function_for_ICD(Kakg_icd, Kicit_icd, Vf_icd, Vr_icd, alpha_ketoglutarate_m, isoCitrate_m, _26__EC_1_1_1_41_IDE_Vm, _26__EC_1_1_1_41_IDE_k); _26__EC_1_1_1_41_IDE is "26. EC 1.1.1.41 IDE";  // isVersionOf kegg.reaction:R00709
    Kakg_icd = 0.13; Kicit_icd = 0.008; Vf_icd = 14.72; Vr_icd = 0.1472;
  _27__EC_1_2_4_2_OGDH: alpha_ketoglutarate_m -> succinyl_CoA_m; mitochondria*Function_for_KDH(Kakg_kdh, Ksca_kdh, Vf_kdh, Vr_kdh, alpha_ketoglutarate_m, succinyl_CoA_m, _27__EC_1_2_4_2_OGDH_Vm, _27__EC_1_2_4_2_OGDH_k); _27__EC_1_2_4_2_OGDH is "27. EC 1.2.4.2 OGDH";  // isVersionOf kegg.reaction:R08549
    Kakg_kdh = 0.1; Ksca_kdh = 1; Vf_kdh = 35.84; Vr_kdh = 0.3584;
  _28__EC_6_2_1_5_SS: succinyl_CoA_m -> succinate_m; mitochondria*Function_for_ScAS(Ksca_scas, Ksuc_scas, Vf_scas, Vr_scas, succinyl_CoA_m, succinate_m, _28__EC_6_2_1_5_SS_Vm, _28__EC_6_2_1_5_SS_k); _28__EC_6_2_1_5_SS is "28. EC 6.2.1.5 SS";  // isVersionOf kegg.reaction:R00407
    Ksca_scas = 0.02; Ksuc_scas = 5; Vf_scas = 3.5; Vr_scas = 0.0035; _28__EC_6_2_1_5_SS_k = 1;
  _24__EC_2_3_3_1_CS: acetyl_CoA_m + oxaloacetate_m -> $coa_m + citrate_m; mitochondria*Function_for_CS(Kaca_cs, Kcit_cs, Kcoa_cs, Koaa_cs, Vf_cs, Vr_cs, acetyl_CoA_m, coa_m, citrate_m, oxaloacetate_m, _24__EC_2_3_3_1_CS_Vm, _24__EC_2_3_3_1_CS_k); _24__EC_2_3_3_1_CS is "24. EC 2.3.3.1 CS";  // isVersionOf kegg.reaction:R00351
    Kaca_cs = 0.03; Kcit_cs = 0.7; Kcoa_cs = 0.3; Koaa_cs = 0.07; Vf_cs = 91.2; Vr_cs = 0.912;
  _29__EC_1_3_5_1_SDE: succinate_m -> fumarate_m; mitochondria*Function_for_SDH(Kfa_sdh, Ksuc_sdh, Vf_sdh, Vr_sdh, fumarate_m, succinate_m, _29__EC_1_3_5_1_SDE_Vm, _29__EC_1_3_5_1_SDE_k); _29__EC_1_3_5_1_SDE is "29. EC 1.3.5.1 SDE";  // isVersionOf kegg.reaction:R00402
    Kfa_sdh = 0.4; Ksuc_sdh = 0.02; Vf_sdh = 7.38; Vr_sdh = 7.31;
  _30__EC_4_2_1_2_FUH: fumarate_m -> malate_m; mitochondria*Function_for_FUM(Kfa_fum, Kmal_fum, Vf_fum, Vr_fum, fumarate_m, malate_m, _30__EC_4_2_1_2_FUH_Vm, _30__EC_4_2_1_2_FUH_k); _30__EC_4_2_1_2_FUH is "30. EC 4.2.1.2 FUH";  // isVersionOf kegg.reaction:R01082
    Kfa_fum = 0.15; Kmal_fum = 0.04; Vf_fum = 44.64; Vr_fum = 37.2;
  _31__EC_1_1_1_37__MDE: malate_m -> oxaloacetate_m; mitochondria*Function_for_MDH(_31__EC_1_1_1_37__MDE_Kmal_mdh, _31__EC_1_1_1_37__MDE_Koaa_mdh, _31__EC_1_1_1_37__MDE_Vf_mdh, _31__EC_1_1_1_37__MDE_Vr_mdh, malate_m, oxaloacetate_m, Vm, _31__EC_1_1_1_37__MDE_k); _31__EC_1_1_1_37__MDE is "31. EC 1.1.1.37 MDE";  // isVersionOf kegg.reaction:R00342
    _31__EC_1_1_1_37__MDE_Kmal_mdh = 2.6; _31__EC_1_1_1_37__MDE_Koaa_mdh = 0.04; _31__EC_1_1_1_37__MDE_Vf_mdh = 356.64; _31__EC_1_1_1_37__MDE_Vr_mdh = 353.11; Vm = 546867;
  _21__Pyruvate_transport: pyruvate_c => pyruvate_m; Transport_Michaelis_Menten(_21__Pyruvate_transport_k, _21__Pyruvate_transport_V, pyruvate_c, _21__Pyruvate_transport_Km); _21__Pyruvate_transport is "21. Pyruvate transport";
    _21__Pyruvate_transport_k = 1; _21__Pyruvate_transport_Km = 0.15;
  _23__EC_6_4_1_1_PYC: pyruvate_m -> oxaloacetate_m; mitochondria*Uni_Uni_ar_k(_23__EC_6_4_1_1_PYC_k, _23__EC_6_4_1_1_PYC_Vf, pyruvate_m, oxaloacetate_m, _23__EC_6_4_1_1_PYC_Keq, _23__EC_6_4_1_1_PYC_Kms, _23__EC_6_4_1_1_PYC_Kmp); _23__EC_6_4_1_1_PYC is "23. EC 6.4.1.1 PYC";
    _23__EC_6_4_1_1_PYC_Keq = 5.99; _23__EC_6_4_1_1_PYC_Kms = 0.15; _23__EC_6_4_1_1_PYC_Kmp = 0.019;
  _32__Citrate_transport: citrate_m => citrate_c; Transport_Michaelis_Menten(_32__Citrate_transport_k, _32__Citrate_transport_V, citrate_m, _32__Citrate_transport_Km); _32__Citrate_transport is "32. Citrate transport";
    _32__Citrate_transport_k = 1; _32__Citrate_transport_Km = 0.62;
  _33__EC_2_3_3_8_ACL: citrate_c -> $acetyl_CoA_c + oxaloacetate_c; cytosol*Uni_Bi_generalised_Hill_s_equation(_33__EC_2_3_3_8_ACL_Vf, citrate_c, Ks, acetyl_CoA_c, oxaloacetate_c, _33__EC_2_3_3_8_ACL_Keq, Kp2, Kp1, _33__EC_2_3_3_8_ACL_k); _33__EC_2_3_3_8_ACL is "33. EC 2.3.3.8 ACL";
    Ks = 0.588; _33__EC_2_3_3_8_ACL_Keq = 1.5; Kp2 = 0.177; Kp1 = 0.0098;
  _34__EC_1_1_1_37_MDE_cytosol: malate_c -> oxaloacetate_c; cytosol*Function_for_MDH(_34__EC_1_1_1_37_MDE_cytosol_Kmal_mdh, _34__EC_1_1_1_37_MDE_cytosol_Koaa_mdh, _34__EC_1_1_1_37_MDE_cytosol_Vf_mdh, _34__EC_1_1_1_37_MDE_cytosol_Vr_mdh, malate_c, oxaloacetate_c, _34__EC_1_1_1_37_MDE_cytosol_Vm, _34__EC_1_1_1_37_MDE_cytosol_k); _34__EC_1_1_1_37_MDE_cytosol is "34. EC 1.1.1.37 MDE cytosol";
    _34__EC_1_1_1_37_MDE_cytosol_Kmal_mdh = 2.6; _34__EC_1_1_1_37_MDE_cytosol_Koaa_mdh = 0.04; _34__EC_1_1_1_37_MDE_cytosol_Vf_mdh = 356.64; _34__EC_1_1_1_37_MDE_cytosol_Vr_mdh = 353.11;
  _35__EC_1_1_1_40_ME: malate_c -> pyruvate_c; cytosol*Uni_Uni_ar_k(_35__EC_1_1_1_40_ME_k, _35__EC_1_1_1_40_ME_Vf, malate_c, pyruvate_c, _35__EC_1_1_1_40_ME_Keq, _35__EC_1_1_1_40_ME_Kms, _35__EC_1_1_1_40_ME_Kmp); _35__EC_1_1_1_40_ME is "35. EC 1.1.1.40 ME";
    _35__EC_1_1_1_40_ME_Keq = 0.0011; _35__EC_1_1_1_40_ME_Kms = 0.59; _35__EC_1_1_1_40_ME_Kmp = 15.03;
  _12__Starch_synthesis: glucose_6_phosphate_c => $starch_c; cytosol*k1*glucose_6_phosphate_c; _12__Starch_synthesis is "12. Starch synthesis";
    k1 = 457.292;
  _18__Acetladehyde_transport: acetaldehyde_c -> acetaldehyde_m; Passive_defusion(_18__Acetladehyde_transport_V, acetaldehyde_c, acetaldehyde_m); _18__Acetladehyde_transport is "18. Acetladehyde transport";
  _20__EC_6_2_1_1_AcA_LIG: acetate_m -> acetyl_CoA_m; mitochondria*Uni_Uni_ar_k(_20__EC_6_2_1_1_AcA_LIG_k, _20__EC_6_2_1_1_AcA_LIG_Vf, acetate_m, acetyl_CoA_m, _20__EC_6_2_1_1_AcA_LIG_Keq, _20__EC_6_2_1_1_AcA_LIG_Kms, _20__EC_6_2_1_1_AcA_LIG_Kmp); _20__EC_6_2_1_1_AcA_LIG is "20. EC 6.2.1.1 AcA LIG";
    _20__EC_6_2_1_1_AcA_LIG_Keq = 6.08; _20__EC_6_2_1_1_AcA_LIG_Kms = 0.28; _20__EC_6_2_1_1_AcA_LIG_Kmp = 1.8;

  // Unit definitions:
  unit length = metre;
  unit area = metre^2;
  unit volume = litre;
  unit time = 0.06 second;
  unit substance = 1e-3 mole;
end
