// SBML level 3 version 1
// dcterms:bibliographicCitation: https://identifiers.org/doi:10.1177/1932296814562607

function rateOf(a)
  NaN + 0*a;
end

model EDES1_0()
  // EDES1.0 Eindhoven Diabetes Simulator
  // First version (1.0) of the Eindhoven Diabetes Simulator (EDES) model, describing postprandial glucose and insulin dynamics for a healthy human. Model can also be used to simulate insulin resistance (pre-diabetes, Metabolic Syndrome) and Type 2 Diabetes Mellitus (T2DM). Next to simulating a meal, the model can simulate oral glucose tolerance tests (OGTT's).
  // hasProperty mamo:MAMO_0000046
  // isDescribedBy doi:10.1177/1932296814562607
  // biomodels.db:MODEL2403070001
  // hasProperty mamo:MAMO_0000046
  // isDescribedBy doi:10.1177/1932296814562607
  // biomodels.db:MODEL2403070001
  // model units - substance: substance, time: time, volume: volume, area: area, length: length, extent: substance

  // Compartments:
  compartment plasma = 1 volume;
  compartment gut = 1 volume;
  compartment ISF = 1 volume;
  compartment default = 1 volume;

  // Species:
  // glucose mass in gut (mg)
  // dM_G_gut/dt = G_meal - k2*M_G_gut;
  species $M_G_gut in default = M_G_0;
  // plasma glucose concentration (mmol/l)
  // dG_PL/dt = G_liv + G_gut - U_ii - U_id - U_ren;
  species $G_PL in default = G_PL_0;
  // plasma insulin concentration (mU/L)
  // dI_PL/dt = I_pnc - I_liv - i_rem;
  species $I_PL in default = I_PL_0;
  // delayed/remote insulin concentration (interstitial fluid)
  // dI_dl/dt = k9*(I_PL -I_PL_b) - k10*I_dl;
  // dI_dl/dt = k9*i_rem - k10*I_dl;
  species $I_d1 in default = I_d1_0;
  // integrated plasma glucose increase (int (G_PL)) [mmol/L]
  // dGint/dt = (Gpl-Gb) - (Gpl_lowerbound-Gb);
  species $Gint in default = 0;
  // Glucose rate of appearance (Ra) from gut to plasma [mg].
  // ʃRa(t)dt
  // In principle equal to ʃG_gut(t)dt, but this has unit [mmol/L] and meal glucose dose is in [mg].
  species $Raint in default = 0;

  // Parameters:
  // net glucose flux across liver
  // G_liv = G_liv_b - k4.*f_I.*I_d1 - k3.*(G_PL-G_b);
  G_liv has unit_9;
  // basal hepatic glucose production [mmol/L/min]
  // Maas 2015: G_liv_b = 0.043
  // Ref. 63. Dalla Man C, Rizza RA, Cobelli C. Meal simulation model
  // of the glucose-insulin system. IEEE Trans Biomed Eng.
  // 2007;54(10):1740-1749.
  G_liv_b = 0.043 unit_9;
  // Rate constant of EGP suppression by delayed insulin [1/min].
  // rate constant for suppression of hepatic glucose release by delayed (remote) insulin
  // Maas 2015: k4 = 1e-3 [1/min] (Table 13 Parameter values for healthy subjects, Chapter 5. PhD Thesis A. Maas, 2017)
  // Rozendaal 2018: k4 = 2.35e-4
  // Erdos 2021: k4 = 1e-3
  // Pasveer 2024: k4 = 2.35e-4
  k04 = 0.000235 unit_1;
  // conversion factor insulin to glucose [(mmol/L)/(microU/mL)]
  // This parameter is called β in Maas et al 2015.
  f_I = 1;
  // Rate constant of ΔG suppression of EGP [1/min].
  // rate constant for suppresstion of hepatic glucose release by change of plasma glucose
  // Maas 2015: k3 = 5e-05 [1/min] (Table 13 Parameter values for healthy subjects, Chapter 5. PhD Thesis A. Maas, 2017)
  // Rozendaal 2018: k3 = 0.00607
  // Erdos 2021: k3 = 5e-05
  // Pasveer 2024: k3 = 0.00607
  k03 = 0.00607 unit_1;
  // basal plasma glucose [mmol/l]. Glucose setpoint.
  G_b has unit_2;
  // conversion factor glucose - convert glucose from mg/l to mmol/l
  // mmol/L mg/dL 0.05551
  f_G = 0.005551 unit_3;
  // volume of distribution for glucose per kg body weight
  // Maas 2015: Glucose distribution volume in plasma [L/kg] V_G = 17/BW = 17/70 = 0.24
  // V_G = (260/sqrt( {Values[BW]} /70) ) / 1000
  // For BW = 70 kg: 0.26 [l/kg]
  // Ref.65. Wallace TM, Levy JC, Matthews DR. Use and abuse of HOMA
  // modeling. Diabetes Care. 2004;27(6):1487-1495.
  V_G has unit_4;
  tau_i = 31 unit_5;
  tau_d = 3 unit_5;
  // Renal threshold
  // Ref.64. Lawrence RD. Renal threshold for glucose: normal and in dia-
  // betics. Br Med J. 1940;1(4140):766-768
  G_th_PL = 9 unit_2;
  // Rate constant of glomerular filtration [1/min]
  // c1 = 0.1
  // Ref. 67. Lehmann ED, Deutsch T. A physiological model of glucose-
  // insulin interaction in type-1 diabetes mellitus. J Biomed Eng.
  // 1992;14(3):235-242.
  c1 = 0.1 unit_1;
  // Glucose mass from meal [mg]
  // Oral Glucose Tolerance Test (OGTT) Data Used for Parameter Estimation: glucose dose D = 75 gram (Table 2 in Maas et al, 2015).
  D_meal_G = 75000 unit_6;
  // body weight (body mass) [kg]
  // The paper Maas et al (2015) does not report a specific value for body mass (Mb). Tables 2 and 3 report BMI.
  // Adding notes and then Commit often does NOT work in Copasi! (So always check.)
  BW = 85 unit_7;
  // initial condition M_G. Intial mass of glucose in digestive tract (assume 0 as fasting).
  M_G_0 = 0 unit_6;
  // initial condition G_PL [mmol/L]. Can be taken as the fasting plasma glucose concentration.
  // typical value: 5 mmol/L
  G_PL_0 = 5 unit_2;
  // initial condition I_PL [uIU/mL]. Can be taken as the fasting plasma insulin concentration.
  // typical value: 8 mU/L
  // increased value: 18
  I_PL_0 = 18;
  // initial value for Interstitial fluid insulin concentration
  // unit: mU/L (µU/mL)
  I_d1_0 = 0;
  // Rate constant of glucose appearance in the gut [1/min].
  // rate constant for glucose stomach emptying
  // Maas 2015: k1 = 0.0135 [1/min] (Table 13 Parameter values for healthy subjects, Chapter 5. PhD Thesis A. Maas, 2017)
  // Rozendaal 2018: k1 = 0.0212 (Note: Rozendaal used an extended / modified equation for glucose apperance in the gut.)
  // Erdos 2021: k1 = 0.011 (NGT)
  // Pasveer 2024: k1 = 0.0106
  // k1 is a sensitive parameter.
  k01 = 0.0135 unit_1;
  // Rate constant of gut emptying [1/min].
  // rate constant for glucose appearence from gut
  // Maas 2015: k2 = 0.633 [1/min] (Table 13 Parameter values for healthy subjects, Chapter 5. PhD Thesis A. Maas, 2017)
  // Rozendaal 2018: k2 = 0.28
  // Erdos 2021: k2 = 0.633
  // Pasveer 2024: k2 = 0.028 *)
  k02 = 0.28 unit_1;
  // Rate constant of insulin-dependent glucose uptake [1/min].
  // rate constant for delayed insulin dependent uptake of glucose. A measure for insulin sensitivity.
  // Maas 2015: k5 = 3.78e-03 [1/min] (Table 13 Parameter values for healthy subjects, Chapter 5. PhD Thesis A. Maas, 2017)
  // Rozendaal 2018: k5 = 0.0174
  // Erdos 2021: k5 = 0.0026
  // Pasveer 2024: k5 = 0.1762
  // k5 is a sensitive parameter.
  k05 = 0.08 unit_1;
  // Rate constant of ΔG-dependant insulin production [1/min].
  // rate constant for stimulation of insulin production by the difference between plasma glucose concentration and its setpoint
  // Maas 2015: k6 = 0.582 [1/min] (Table 13 Parameter values for healthy subjects, Chapter 5. PhD Thesis A. Maas, 2017)
  // Rozendaal 2018: k6 = 4.6237
  // Erdos 2021: k6 = 0.6407
  // Pasveer 2024: k6 = 1.007
  // k6 is a sensitive parameter.
  k06 = 0.582 unit_1;
  // Rate constant of ∫G-dependant insulin production [1/min].
  // rate constant for integral of glucose on insulin production (beta cell function)
  // Maas 2015: k7 = 2.20e-02 [1/min] (Table 13 Parameter values for healthy subjects, Chapter 5. PhD Thesis A. Maas, 2017)
  // Rozendaal 2018: k7 = 1.15
  // Erdos 2021: k7 = 0.022
  // Pasveer 2024: k7 = 0.8626
  k07 = 0.022 unit_1;
  // Rate constant of dG/dt-dependant insulin production [1/min].
  // rate constant for the simulation of insulin production by the rate of change in plasma glucose concentration (beta cell function)
  // Maas 2015: k8 = 4.71 [1/min] (Table 13 Parameter values for healthy subjects, Chapter 5. PhD Thesis A. Maas, 2017)
  // Rozendaal 2018: k8 = 7.27
  // Erdos 2021: k8 = 4.4961
  // k8 is a sensitive parameter.
  k08 = 4 unit_1;
  // Rate constant for outflow of insulin from plasma to interstitial space (remote compartment) [1/min].
  // k9 = 1.08e-02 [1/min] (Table 13 Parameter values for healthy subjects, Chapter 5. PhD Thesis A. Maas, 2017)
  // NOTE In this implementation k9 is the same as k11 in Maas 2015!! (In Maas 2015: k9 is the Rate constant of short-acting insulin appearance in plasma.)
  // Rozendaal 2018: k9 = 0.0383
  // Erdos 2021: k9 = 0.0108
  // Pasveer 2024: k9 = 0.0383
  k09 = 0.0383 unit_1;
  // Rate constant for degradation of insulin in remote compartment [1/min].
  // Rozendaal 2018: k10 = 0.284
  // Erdos 2021: k10 = 2.6
  // Pasveer 2024: k10 = 0.284
  // NOTE: In this implementation k10 is the same as k12 in Maas 2015.
  // (In Maas 2015: k10 is the Rate constant of short acting insulin appearance in subcutaneous compartment.)
  k10 = 0.284 unit_1;
  // Rate constant of insulin outflow from plasma to remote compartment [1/min].
  // k11 = k09 in this implementation
  k11 has unit_1;
  // Rate constant of interstitial fluid (remote compartment) insulin utilization [1/min]
  // k12 = k10 in this implementation
  k12 has unit_1;
  // σ Shape factor (appearance of meal)
  // Maas 2015: σ = 1.35 [-] (Table 13 Parameter values for healthy subjects, Chapter 5. PhD Thesis A. Maas, 2017)
  // Rozendaal 2018: σ = 1.4
  // Erdos 2021: σ = 1.35
  // Pasveer 2024: σ = 1.34
  sigma = 1.4;
  // Michaelis-Menten coefficient for glucose uptake [mmol/l] (both insulin dependent, e.g. GLUT4, and non-insulin dependent e.g. GLUT1, GLUT3)
  // Maas 2015: KM = 0.627 (mmol/L) (Table 13 Parameter values for healthy subjects, Chapter 5. PhD Thesis A. Maas, 2017)
  // KM = 2.36E+02 (mg/dl)
  // Rozendaal 2018: Km = 13.2
  // Erdos 2021: Km = 0.63
  // Pasveer 2024: Km = 13.2
  KM = 13.2 unit_2;
  // appearance of glucose from meal as a function of time
  // G_meal = sigma*(k1.^sigma)*t.^(sigma-1) .* exp(-(k1.*(t)).^sigma).* D_meal_G;
  G_meal has unit_8;
  // Insulin dependent glucose utilisation (liver, muscle, adipose)
  // U_id = k5.*f_I.*I_d1.*(G_PL./(KM + G_PL)); [mmol/L/min]
  U_id has unit_9;
  // glucose absorption flux from gut to plasma [mmol/L/min]
  // Including unit conversion from glucose mass in gut [mg/L] to glucose concentration in plasma [mmol/L].
  // Also called glucose rate of appearance (Ra) in studies with isotope tracers.
  G_gut has unit_9;
  // insulin independent glucose utilisation (brain, erythrocytes etc.)
  // U_ii = G_liv_b*((KM + G_b)./G_b).*(G_PL./(KM + G_PL)) [mmol/(l*min)]
  U_ii has unit_9;
  // renal extraction of plasma glucose
  // U_ren = ( c1./(V_G*BW).*(G_PL - G_th_PL) ) * (G_PL > G_th_PL); [mmol/(l*min)]
  U_ren has unit_9;
  // plasma glucose in [mg/dL]
  // conversion from G_PL(t) in [mmol/L] to [mg/dL]
  G_PL__mg_dL has unit_12; G_PL__mg_dL is "G_PL [mg/dL]";
  // 1 uIU/mL = 6.9444 pmol/L
  // https://unitslab.com/node/124
  I_PL__pmol_L has unit_11; I_PL__pmol_L is "I_PL [pmol/L]";
  // Time when meal is consumed (or start of OGTT)
  Tmeal = 60 unit_5;

  // Assignment rules:
  G_b := G_PL_0;
  V_G := 17/BW;
  k11 := k09;
  k12 := k10;
  G_meal := piecewise(0, time < Tmeal, sigma*k01^sigma*(time - Tmeal)^(sigma - 1)*exp(-(k01*(time - Tmeal))^sigma)*D_meal_G);
  I_PL_b := I_PL_0;
  U_id := k05*f_I*I_d1*(G_PL/(KM + G_PL));
  G_gut := k02*(f_G/(V_G*BW))*M_G_gut;
  U_ii := G_liv_b*((KM + G_b)/G_b)*(G_PL/(KM + G_PL));
  U_ren := piecewise(0, G_PL < G_th_PL, c1/(V_G*BW)*(G_PL - G_th_PL));
  I_liv := k07*(G_b/(f_I*tau_i*I_PL_b))*I_PL;
  I_rem := k09*(I_PL - I_PL_b);
  G_PL__mg_dL := G_PL/(10*f_G);
  I_PL__pmol_L := I_PL*6.9444;
  Iprop := k06*(G_PL - G_b);
  Iint := k07/tau_i*(G_b + Gint);
  G_liv := G_liv_b - k04*f_I*I_d1 - k03*(G_PL - G_b);
  Ider := k08*tau_d*(G_liv + G_gut - U_id - U_ii - U_ren);
  I_pnc := 1/f_I*(Iprop + Iint + Ider);

  // Rate rules:
  M_G_gut' = G_meal - k02*M_G_gut;
  G_PL' = G_liv + G_gut - U_id - U_ii - U_ren;
  I_PL' = I_pnc - I_liv - I_rem;
  I_d1' = I_rem - k10*I_d1;
  Gint' = G_PL - G_b;
  Raint' = k02*M_G_gut;

  // Unit definitions:
  unit unit_0 = 1e-3 mole / (litre * 0.06 second); unit_0 is "mmol/l/min";
  unit unit_1 = 1 / (0.06 second); unit_1 is "1/min";
  unit unit_2 = 1e-3 mole / litre; unit_2 is "mmol/l";
  unit unit_3 = 1e-3 mole / (1e-3 gram); unit_3 is "mmol/mg";
  unit unit_4 = litre / (1000 gram); unit_4 is "l/kg";
  unit unit_6 = 1e-3 gram; unit_6 is "mg";
  unit unit_7 = 1000 gram; unit_7 is "kg";
  unit unit_8 = 1e-3 gram / (0.06 second); unit_8 is "mg/min";
  unit unit_9 = 1e-3 mole / (litre * 0.06 second); unit_9 is "mmol/(l*min)";
  unit unit_10 = 1e-3 gram / (0.1 litre); unit_10 is "mg/dl";
  unit unit_11 = 1e-12 mole / litre; unit_11 is "pmol/l";
  unit time = 0.06 second;
  unit unit_12 = 0.01 gram / litre; unit_12 is "10*mg/l";
  unit length = metre;
  unit area = metre^2;
  unit volume = litre;
  unit substance = 1e-3 mole;
  unit unit_5 = 0.06 second; unit_5 is "min";
end
