// SBML level 2 version 4

function rateOf(a)
  NaN;
end

function Bi_with_substrate_competition(A, B, Kma, Kmb, I, Ki, Vmax)
  Vmax*A*B/(Kma*(Kmb + B)*(1 + I/Ki) + A*Kmb + A*B);
end

function NAD_consumption_0(E_T, scaling, kcat, A, Ka, P, Km_p, B, Kb, C, Kc, P2, Kp2)
  E_T*scaling*kcat*A/(1 + A/Ka + P/Km_p + B/Kb + C/Kc + P2/Kp2);
end

model NAD_labelling_dynamics()
  // Model constructed to resample stable isotope labelling experiments using 13C-Glucose
  // biomodels.db:MODEL2409150001
  // hasProperty mamo:MAMO_0000003
  // isDescribedBy doi:10.1038/s42255-024-01174-w

  // Compartments:
  compartment compartment = 1;

  // Species:
  species NMN in compartment = 0;
  species $Nam in compartment = 0.03;
  species $PRPP in compartment = 0.2;
  species ATP in compartment = 1;
  species NAD in compartment = 0.2;
  species $Glucose in compartment = 2;
  species ATP_L in compartment = 0;
  species $Glucose_L in compartment = 0;
  species $Nam_L in compartment = 0;
  species $PRPP_L in compartment = 0;
  species NMN_L in compartment = 0;
  species NAD_L10C in compartment = 0;
  species NAD_L5C in compartment = 0;
  species NAD_bound in compartment = 0;
  species NAD_L10C_bound in compartment = 0;
  species NAD_L5C_bound in compartment = 0;

  // Parameters:
  ATP_synthesis_rate = 0.005;
  NAD_consumption_vmax = 0.23;
  NMNAT_vmax = 0.05;
  NamPT_vmax = 0.0055;
  var NAD_summ_all;
  var NAD_5C_NAD_10C; NAD_5C_NAD_10C is "NAD_5C/NAD_10C";
  var Percent_unlabelled;
  var Percent_labelled;
  var Percent_5C;
  var Percent_10C;
  halflife = 0;
  var Biosyntehsis_rate_calc;
  var Vmax_consumption_Vmax_biosynthesis; Vmax_consumption_Vmax_biosynthesis is "Vmax_consumption/Vmax_biosynthesis";
  var NADconsumption_after_event;
  steady_state_test_NAD_conc = 0;
  consumption_change_after_event = 1;
  Steady_state_NAD_pre_label_addition = 0;
  var NAD_labelled_summ_including_bound;
  var NAD_summ_all_including_bound;
  var Percent_labelled_all;
  var Percent_unlabelled_all;
  ATP_halflife = 0;
  var Consumption_fluxes;
  Synthesis_Fluxes = 0;
  var Biosynthesis_fluxes;
  Biosynthesis_change_after_event = 1;
  Metabolite_5_0 = Glucose; Metabolite_5_0 is "Initial for Glucose";
  ModelValue_26_0 = Biosynthesis_change_after_event; ModelValue_26_0 is "Initial for Biosynthesis change after event";
  ModelValue_1_0 = NAD_consumption_vmax; ModelValue_1_0 is "Initial for NAD consumption vmax";
  ModelValue_14_0 = NADconsumption_after_event; ModelValue_14_0 is "Initial for NADconsumption after event";
  ModelValue_3_0 = NamPT_vmax; ModelValue_3_0 is "Initial for NamPT vmax";
  ModelValue_16_0 = consumption_change_after_event; ModelValue_16_0 is "Initial for consumption change after event";

  // Assignment rules:
  NADconsumption_after_event := ModelValue_16_0*ModelValue_1_0;
  Biosyntehsis_rate_calc := rateOf(NAD_L5C);
  Vmax_consumption_Vmax_biosynthesis := ModelValue_1_0/ModelValue_3_0;
  Consumption_fluxes := NAD_L5C_consumption + NAD_L10C_consumption + NAD_consumption;
  Biosynthesis_fluxes := NamPT_L + NamPT;
  NAD_labelled_sum := NAD_L10C + NAD_L5C;
  NAD_labelled_summ_including_bound := NAD_labelled_sum + NAD_L5C_bound + NAD_L10C_bound;
  NAD_summ_all_including_bound := NAD + NAD_bound + NAD_labelled_summ_including_bound;
  Percent_unlabelled_all := (NAD_bound + NAD)/NAD_summ_all_including_bound*100;
  NAD_summ_all := NAD + NAD_labelled_sum;
  Percent_unlabelled := NAD/NAD_summ_all*100;
  Percent_labelled := NAD_labelled_sum/NAD_summ_all*100;
  Percent_5C := NAD_L5C/NAD_summ_all*100;
  Percent_10C := NAD_L10C/NAD_summ_all*100;
  NAD_5C_NAD_10C := NAD_L5C/NAD_L10C;
  Percent_labelled_all := NAD_labelled_summ_including_bound/NAD_summ_all_including_bound*100;

  // Reactions:
  NamPT: $Nam + $PRPP => NMN; compartment*Bi_with_substrate_competition(Nam, PRPP, NamPT_Kma, NamPT_Kmb, Nam_L, NamPT_Ki, NamPT_vmax);  // modifiers: Nam_L
    NamPT_Kma = 5e-6; NamPT_Kmb = 0.0006; NamPT_Ki = 5e-6;
  NMNAT: NMN + ATP => NAD; compartment*Bi_with_substrate_competition(NMN, ATP, NMNAT_Kma, NMNAT_Kmb, NMN_L, NMNAT_Ki, NMNAT_vmax);  // modifiers: NMN_L
    NMNAT_Kma = 0.0223; NMNAT_Kmb = 0.0585; NMNAT_Ki = 0.0223;
  NAD_consumption: NAD => $Nam + $PRPP + ATP; compartment*NAD_consumption_0(NAD_consumption_vmax, NAD_consumption_scaling, NAD_consumption_kcat, NAD, NAD_consumption_Ka, Nam, NAD_consumption_Km_p, NAD_L10C, NAD_consumption_Kb, NAD_L5C, NAD_consumption_Kc, Nam_L, NAD_consumption_Kp2);  // modifiers: NAD_L10C, NAD_L5C, Nam_L
    NAD_consumption_scaling = 1; NAD_consumption_kcat = 1; NAD_consumption_Ka = 0.029; NAD_consumption_Km_p = 0.06; NAD_consumption_Kb = 0.029; NAD_consumption_Kc = 0.029; NAD_consumption_Kp2 = 0.06;
  ATP_synthesis: $Glucose => ATP; compartment*ATP_synthesis_rate*Glucose;
  ATP_degradation: ATP => ; compartment*ATP_synthesis_rate*ATP;
  ATP_L_degradation: ATP_L => ; compartment*ATP_synthesis_rate*ATP_L;
  ATP_L_synthesis: $Glucose_L => ATP_L; compartment*ATP_synthesis_rate*Glucose_L;
  NAD_L10C_consumption: NAD_L10C => $Nam_L + $PRPP_L + ATP_L; compartment*NAD_consumption_0(NAD_consumption_vmax, NAD_L10C_consumption_scaling, NAD_L10C_consumption_kcat, NAD_L10C, NAD_L10C_consumption_Ka, Nam_L, NAD_L10C_consumption_Km_p, NAD_L5C, NAD_L10C_consumption_Kb, NAD, NAD_L10C_consumption_Kc, Nam, NAD_L10C_consumption_Kp2);  // modifiers: NAD_L5C, NAD, Nam
    NAD_L10C_consumption_scaling = 1; NAD_L10C_consumption_kcat = 1; NAD_L10C_consumption_Ka = 0.029; NAD_L10C_consumption_Km_p = 0.06; NAD_L10C_consumption_Kb = 0.029; NAD_L10C_consumption_Kc = 0.029; NAD_L10C_consumption_Kp2 = 0.06;
  NamPT_L: $Nam_L + $PRPP_L => NMN_L; compartment*Bi_with_substrate_competition(Nam_L, PRPP_L, NamPT_L_Kma, NamPT_L_Kmb, Nam, NamPT_L_Ki, NamPT_vmax);  // modifiers: Nam
    NamPT_L_Kma = 5e-6; NamPT_L_Kmb = 0.0006; NamPT_L_Ki = 5e-6;
  NMNAT_L10C: NMN_L + ATP_L => NAD_L10C; compartment*Bi_with_substrate_competition(NMN_L, ATP_L, NMNAT_L10C_Kma, NMNAT_L10C_Kmb, NMN, NMNAT_L10C_Ki, NMNAT_vmax);  // modifiers: NMN
    NMNAT_L10C_Kma = 0.0223; NMNAT_L10C_Kmb = 0.0585; NMNAT_L10C_Ki = 0.0223;
  NMNAT_L5C: NMN_L + ATP => NAD_L5C; compartment*Bi_with_substrate_competition(NMN_L, ATP, NMNAT_L5C_Kma, NMNAT_L5C_Kmb, NMN, NMNAT_L5C_Ki, NMNAT_vmax);  // modifiers: NMN
    NMNAT_L5C_Kma = 0.0223; NMNAT_L5C_Kmb = 0.0585; NMNAT_L5C_Ki = 0.0223;
  NAD_L5C_consumption: NAD_L5C => $Nam_L + $PRPP_L + ATP; compartment*NAD_consumption_0(NAD_consumption_vmax, NAD_L5C_consumption_scaling, NAD_L5C_consumption_kcat, NAD_L5C, NAD_L5C_consumption_Ka, Nam_L, NAD_L5C_consumption_Km_p, NAD, NAD_L5C_consumption_Kb, NAD_L10C, NAD_L5C_consumption_Kc, Nam, NAD_L5C_consumption_Kp2);  // modifiers: NAD, NAD_L10C, Nam
    NAD_L5C_consumption_scaling = 1; NAD_L5C_consumption_kcat = 1; NAD_L5C_consumption_Ka = 0.029; NAD_L5C_consumption_Km_p = 0.06; NAD_L5C_consumption_Kb = 0.029; NAD_L5C_consumption_Kc = 0.029; NAD_L5C_consumption_Kp2 = 0.06;
  NAD_binding: NAD -> NAD_bound; compartment*(NAD_binding_k1*NAD - NAD_binding_k2*NAD_bound);
    NAD_binding_k1 = 100; NAD_binding_k2 = 10;
  NAD_L10C_binding: NAD_L10C -> NAD_L10C_bound; compartment*(NAD_L10C_binding_k1*NAD_L10C - NAD_L10C_binding_k2*NAD_L10C_bound);
    NAD_L10C_binding_k1 = 100; NAD_L10C_binding_k2 = 10;
  NAD_L5C_binding: NAD_L5C -> NAD_L5C_bound; compartment*(NAD_L5C_binding_k1*NAD_L5C - NAD_L5C_binding_k2*NAD_L5C_bound);
    NAD_L5C_binding_k1 = 100; NAD_L5C_binding_k2 = 10;

  // Events:
  label_added: at (time > 10000): Glucose_L = Metabolite_5_0, PRPP_L = 0.2, Glucose = 0, PRPP = 0, Nam = 0, Nam_L = 0.03, NAD_consumption_vmax = ModelValue_14_0, NamPT_vmax = ModelValue_3_0*ModelValue_26_0;
  halflife_0: at (Percent_unlabelled_all - Percent_labelled_all < 0): halflife = (time - 10000)/60;
  steady_state_pre_label_addition: at (time > 9995): steady_state_test_NAD_conc = NAD;
  Steady_state_test_pre_label_addition: at (((time > 9996) && (abs(steady_state_test_NAD_conc - NAD) < 1e-5)) && (Steady_state_NAD_pre_label_addition == 0)): Steady_state_NAD_pre_label_addition = NAD;
  ATP_halflife_0: at (ATP - ATP_L < 0): ATP_halflife = (time - 10000)/60;

  // Unit definitions:
  unit length = metre;
  unit area = metre^2;
  unit volume = litre;
  unit time = 60 second;
  unit substance = 1e-3 mole;
end
