// SBML level 2 version 4

function Constant_flux__irreversible(v)
  v;
end
Constant_flux__irreversible is "Constant flux (irreversible)";

function Rate_Law_for_j_VLDL_C_form(k_VLDL_C_form, hep_CE)
  k_VLDL_C_form*hep_CE;
end

function Rate_Law_for_j_BA_recycl(k_BA_recycl, int_BA)
  k_BA_recycl*int_BA;
end

function Rate_Law_for_j_VLDL_C_hep_upt_remn(k_VLDL_C_hep_upt_remn, pl_VLDL_C)
  k_VLDL_C_hep_upt_remn*pl_VLDL_C;
end

function Rate_Law_for_j_VLDL_C_upt_per(k_VLDL_C_upt_per, pl_VLDL_C)
  k_VLDL_C_upt_per*pl_VLDL_C;
end

function Rate_Law_for_j_VLDL_TG_form(k_VLDL_TG_form, hep_TG)
  k_VLDL_TG_form*hep_TG;
end

function Rate_Law_for_j_VLDL_TG_upt(k_VLDL_C_upt_per, pl_VLDL_C)
  k_VLDL_C_upt_per*pl_VLDL_C;
end

function Rate_Law_for_j_AA_hep_ket(k_AA_hep_upt, j_diet_AA)
  0.5*k_AA_hep_upt*j_diet_AA;
end

function Rate_Law_for_j_AA_hep_glc(k_AA_hep_upt, j_diet_AA)
  0.5*k_AA_hep_upt*j_diet_AA;
end

function Rate_Law_for_j_AA_per_glc(k_AA_per_upt, j_diet_AA)
  0.5*k_AA_per_upt*j_diet_AA;
end

function Rate_Law_for_j_C_fec_excr(k_C_excr, int_C)
  k_C_excr*int_C;
end

function Rate_Law_for_j_AA_per_ket(k_AA_per_upt, j_diet_AA)
  0.5*k_AA_per_upt*j_diet_AA;
end

function Rate_Law_for_j_BA_fec_excr(k_BA_excr, int_BA)
  k_BA_excr*int_BA;
end

function Rate_Law_for_j_ACAT(k_ACAT, hep_FC)
  k_ACAT*hep_FC;
end

function Rate_Law_for_j_ACoA_hep_resp(k_hep_resp, hep_ACoA)
  k_hep_resp*hep_ACoA;
end

function Rate_Law_for_j_ACoA_per_resp(k_per_resp, per_ACoA)
  k_per_resp*per_ACoA;
end

function Rate_Law_for_j_G_hep_upt(k_G_hep_upt, pl_G)
  k_G_hep_upt*pl_G;
end

function Rate_Law_for_j_BA_synt(k_BA_synt, hep_FC)
  k_BA_synt*hep_FC;
end

function Rate_Law_for_j_BA_bil_excr(k_BA_bil_exr, hep_BA)
  k_BA_bil_exr*hep_BA;
end

function Rate_Law_for_j_C_hep_biosynt(k_hep_biosynt, hep_ACoA)
  k_hep_biosynt*hep_ACoA;
end

function Rate_Law_for_j_C_per_biosynt(k_per_biosynt, per_ACoA)
  k_per_biosynt*per_ACoA;
end

function Rate_Law_for_j_CEH(k_CEH, hep_CE)
  k_CEH*hep_CE;
end

function Rate_Law_for_j_CETP(k_CETP, pl_VLDL_TG)
  k_CETP*pl_VLDL_TG;
end

function Rate_Law_for_j_CM_C_remn_upt(k_CM_C_remn_upt, int_C)
  k_CM_C_remn_upt*int_C;
end

function Rate_Law_for_j_CM_TG_remn_upt_hep(k_CM_TG_remn_upt_hep, int_TG)
  k_CM_TG_remn_upt_hep*int_TG;
end

function Rate_Law_for_j_CM_TG_remn_upt_per(k_CM_TG_remn_upt_per, int_TG)
  k_CM_TG_remn_upt_per*int_TG;
end

function Rate_Law_for_j_FA_hep_upt(k_hep_FA_upt, pl_FFA)
  k_hep_FA_upt*pl_FFA;
end

function Rate_Law_for_j_G_hep_GNG(k_hep_GNG, hep_G6P)
  k_hep_GNG*hep_G6P;
end

function Rate_Law_for_j_G_hep_glycolysis(k_hep_glycolysis, hep_G6P)
  k_hep_glycolysis*hep_G6P;
end

function Rate_Law_for_j_G_per_glycolysis(k_per_glycolysis, per_G6P)
  k_per_glycolysis*per_G6P;
end

function Rate_Law_for_j_G_per_upt(k_G_per_upt, pl_G)
  k_G_per_upt*pl_G;
end

function Rate_Law_for_j_HDL_C_form(k_HDL_C_form, per_C)
  k_HDL_C_form*per_C;
end

function Rate_Law_for_j_HDL_C_remn_upt(k_HDL_C_remn_upt, pl_HDL_C)
  k_HDL_C_remn_upt*pl_HDL_C;
end

function Rate_Law_for_j_TG_hep_betaox(k_hep_betaox, hep_TG)
  k_hep_betaox*hep_TG;
end

function Rate_Law_for_j_TG_hep_DNL(k_hep_DNL, hep_ACoA)
  k_hep_DNL*hep_ACoA;
end

function Rate_Law_for_j_TG_per_betaox(k_per_betaox, per_TG)
  k_per_betaox*per_TG;
end

function Rate_Law_for_j_TG_per_DNL(k_per_DNL, per_ACoA)
  k_per_DNL*per_ACoA;
end

function Rate_Law_for_j_TG_per_lipolysis(k_LPL, per_TG)
  k_LPL*per_TG;
end

function Rate_Law_for_j_TICE(k_TICE, pl_VLDL_C)
  k_TICE*pl_VLDL_C;
end

model New_Model()
  // Rozendaal2018 - Model Integrating Glucose and Lipid Dynamics
  // https://journals.plos.org/ploscompbiol/article?id=10.1371/journal.pcbi.1006145

  // Compartments:
  compartment MINGLeD = 1;

  // Species:
  species hep_TG in MINGLeD = 285.9971;
  species hep_FC in MINGLeD = 20.1592;
  species hep_CE in MINGLeD = 20.2553;
  species hep_G6P in MINGLeD = 793.8114;
  species hep_ACoA in MINGLeD = 2679.9;
  species hep_BA in MINGLeD = 2585.5;
  species per_TG in MINGLeD = 25739;
  species per_C in MINGLeD = 562.8153;
  species per_G6P in MINGLeD = 2.4729;
  species per_ACoA in MINGLeD = 90.8662;
  species int_TG in MINGLeD = 6.4849;
  species int_C in MINGLeD = 0.6391;
  species int_BA in MINGLeD = 63.5679;
  species pl_HDL_C in MINGLeD = 2.1466;
  species pl_VLDL_C in MINGLeD = 18.9467;
  species pl_FFA in MINGLeD = 1.9222;
  species pl_G in MINGLeD = 15.998;
  species pl_VLDL_TG in MINGLeD = 9.7632;
  species dietary_AA in MINGLeD = 1;
  species dietary_G in MINGLeD = 1;
  species dietary_C in MINGLeD = 1;
  species dietary_TG in MINGLeD = 1;
  species int_AA in MINGLeD = 1;

  // Parameters:
  k_CM_TG_remn_upt_hep = 19.1916 unit_0;
  k_CM_TG_remn_upt_per = 5.5779;
  k_CM_C_remn_upt = 3.686;
  k_AA_hep_upt = 0.9743;
  k_AA_per_upt = 0.0257;
  k_G_hep_upt = 786.1614;
  k_G_per_upt = 0.0122;
  k_hep_glycolysis = 17.9571;
  k_hep_GNG = 2.3373e-14;
  k_per_glycolysis = 17.8623;
  k_VLDL_TG_upt = 6.3416;
  k_VLDL_C_upt_per = 0.0132;
  k_VLDL_hep_upt_remn = 0.1321;
  k_VLDL_TG_form = 0.2201;
  k_VLDL_C_form = 0.2462;
  k_HDL_C_form = 0.1893;
  k_HDL_C_remn_upt = 50.8458;
  k_TICE = 0.1234;
  k_CETP = 0.0215;
  k_hep_FA_upt = 44.834;
  k_hep_betaox = 0.5355;
  k_hep_biosynt = 0.0236;
  k_hep_DNL = 0.0155;
  k_LPL = 0.0012;
  k_per_betaox = 0.0033;
  k_per_biosynt = 15.6347;
  k_per_DNL = 3.2615;
  k_ACAT = 2.8076;
  k_CEH = 7.7257;
  k_BA_synt = 5.28;
  k_BA_bil_excr = 0.0445;
  k_BA_recycl = 0.0783;
  k_C_bil_excr = 0.0536;
  k_C_excr = 1.7259;
  k_BA_excr = 1.7313;
  k_hep_resp = 12.3712;
  k_per_resp = 2.9734;
  diet_G = 5449.5;
  diet_C = 228.362;
  diet_TG = 1463.7;
  diet_AA = 4870.7;

  // Reactions:
  j_CM_TG_remn_upt_hep: int_TG => hep_TG; MINGLeD*Rate_Law_for_j_CM_TG_remn_upt_hep(j_CM_TG_remn_upt_hep_k_CM_TG_remn_upt_hep, int_TG);
    j_CM_TG_remn_upt_hep_k_CM_TG_remn_upt_hep = 0.1;
  j_CM_TG_remn_upt_per: int_TG => per_TG; MINGLeD*Rate_Law_for_j_CM_TG_remn_upt_per(j_CM_TG_remn_upt_per_k_CM_TG_remn_upt_per, int_TG);
    j_CM_TG_remn_upt_per_k_CM_TG_remn_upt_per = 0.1;
  j_CM_C_remn_upt: int_C => hep_FC; MINGLeD*Rate_Law_for_j_CM_C_remn_upt(j_CM_C_remn_upt_k_CM_C_remn_upt, int_C);
    j_CM_C_remn_upt_k_CM_C_remn_upt = 0.1;
  j_AA_hep_glc: dietary_AA => hep_G6P; MINGLeD*Rate_Law_for_j_AA_hep_glc(j_AA_hep_glc_k_AA_hep_upt, dietary_AA);
    j_AA_hep_glc_k_AA_hep_upt = 0.1;
  j_AA_per_glc: dietary_AA => per_G6P; MINGLeD*Rate_Law_for_j_AA_per_glc(j_AA_per_glc_k_AA_per_upt, dietary_AA);
    j_AA_per_glc_k_AA_per_upt = 0.1;
  j_AA_hep_ket: dietary_AA => hep_ACoA; MINGLeD*Rate_Law_for_j_AA_hep_ket(j_AA_hep_ket_k_AA_hep_upt, dietary_AA);
    j_AA_hep_ket_k_AA_hep_upt = 0.1;
  j_AA_per_ket: dietary_AA => per_ACoA; MINGLeD*Rate_Law_for_j_AA_per_ket(j_AA_per_ket_k_AA_per_upt, dietary_AA);
    j_AA_per_ket_k_AA_per_upt = 0.1;
  j_G_hep_upt: pl_G => hep_G6P; MINGLeD*Rate_Law_for_j_G_hep_upt(j_G_hep_upt_k_G_hep_upt, pl_G);
    j_G_hep_upt_k_G_hep_upt = 0.1;
  j_G_per_upt: pl_G => per_ACoA; MINGLeD*Rate_Law_for_j_G_per_upt(j_G_per_upt_k_G_per_upt, pl_G);
    j_G_per_upt_k_G_per_upt = 0.1;
  j_G_hep_glycolysis: hep_G6P => 2 hep_ACoA; MINGLeD*Rate_Law_for_j_G_hep_glycolysis(j_G_hep_glycolysis_k_hep_glycolysis, hep_G6P);
    j_G_hep_glycolysis_k_hep_glycolysis = 0.1;
  j_G_hep_GNG: hep_G6P => pl_G; MINGLeD*Rate_Law_for_j_G_hep_GNG(j_G_hep_GNG_k_hep_GNG, hep_G6P);
    j_G_hep_GNG_k_hep_GNG = 0.1;
  j_G_per_glycolysis: per_G6P => 2 per_ACoA; MINGLeD*Rate_Law_for_j_G_per_glycolysis(j_G_per_glycolysis_k_per_glycolysis, per_G6P);
    j_G_per_glycolysis_k_per_glycolysis = 0.1;
  j_VLDL_TG_upt: pl_VLDL_TG => per_TG; MINGLeD*Rate_Law_for_j_VLDL_TG_upt(j_VLDL_TG_upt_k_VLDL_C_upt_per, pl_VLDL_TG);
    j_VLDL_TG_upt_k_VLDL_C_upt_per = 0.1;
  j_VLDL_C_upt_per: pl_VLDL_C => per_C; MINGLeD*Rate_Law_for_j_VLDL_C_upt_per(j_VLDL_C_upt_per_k_VLDL_C_upt_per, pl_VLDL_C);
    j_VLDL_C_upt_per_k_VLDL_C_upt_per = 0.1;
  j_VLDL_C_hep_upt_remn: pl_VLDL_C => hep_CE; MINGLeD*Rate_Law_for_j_VLDL_C_hep_upt_remn(k_VLDL_C_hep_upt_remn, pl_VLDL_C);
    k_VLDL_C_hep_upt_remn = 0.1;
  j_VLDL_TG_form: hep_TG => pl_VLDL_TG; MINGLeD*Rate_Law_for_j_VLDL_TG_form(j_VLDL_TG_form_k_VLDL_TG_form, hep_TG);
    j_VLDL_TG_form_k_VLDL_TG_form = 0.1;
  j_VLDL_C_form: hep_CE => pl_VLDL_C; MINGLeD*Rate_Law_for_j_VLDL_C_form(j_VLDL_C_form_k_VLDL_C_form, hep_CE);
    j_VLDL_C_form_k_VLDL_C_form = 0.1;
  j_HDL_C_form: per_C => pl_HDL_C; MINGLeD*Rate_Law_for_j_HDL_C_form(j_HDL_C_form_k_HDL_C_form, per_C);
    j_HDL_C_form_k_HDL_C_form = 0.1;
  j_HDL_C_remn_upt: pl_HDL_C => hep_CE; MINGLeD*Rate_Law_for_j_HDL_C_remn_upt(j_HDL_C_remn_upt_k_HDL_C_remn_upt, pl_HDL_C);
    j_HDL_C_remn_upt_k_HDL_C_remn_upt = 0.1;
  j_TICE: pl_VLDL_C => int_C; MINGLeD*Rate_Law_for_j_TICE(j_TICE_k_TICE, pl_VLDL_C);
    j_TICE_k_TICE = 0.1;
  j_CETP: pl_HDL_C => pl_VLDL_C; MINGLeD*Rate_Law_for_j_CETP(j_CETP_k_CETP, pl_HDL_C);
    j_CETP_k_CETP = 0.1;
  j_FA_hep_upt: 3 pl_FFA => hep_TG; MINGLeD*Rate_Law_for_j_FA_hep_upt(j_FA_hep_upt_k_hep_FA_upt, pl_FFA);
    j_FA_hep_upt_k_hep_FA_upt = 0.1;
  j_TG_hep_betaox: hep_TG => 21.4 hep_ACoA; MINGLeD*Rate_Law_for_j_TG_hep_betaox(j_TG_hep_betaox_k_hep_betaox, hep_TG);
    j_TG_hep_betaox_k_hep_betaox = 0.1;
  j_C_hep_biosynt: 13.5 hep_ACoA => hep_FC; MINGLeD*Rate_Law_for_j_C_hep_biosynt(j_C_hep_biosynt_k_hep_biosynt, hep_ACoA);
    j_C_hep_biosynt_k_hep_biosynt = 0.1;
  j_TG_hep_DNL: 21.4 hep_ACoA => hep_TG; MINGLeD*Rate_Law_for_j_TG_hep_DNL(j_TG_hep_DNL_k_hep_DNL, hep_ACoA);
    j_TG_hep_DNL_k_hep_DNL = 0.1;
  j_TG_per_lipolysis: per_TG => 3 pl_FFA; MINGLeD*Rate_Law_for_j_TG_per_lipolysis(j_TG_per_lipolysis_k_LPL, per_TG);
    j_TG_per_lipolysis_k_LPL = 0.1;
  j_TG_per_betaox: per_TG => 21.4 per_ACoA; MINGLeD*Rate_Law_for_j_TG_per_betaox(j_TG_per_betaox_k_per_betaox, per_TG);
    j_TG_per_betaox_k_per_betaox = 0.1;
  j_C_per_biosynt: 13.5 per_ACoA => per_C; MINGLeD*Rate_Law_for_j_C_per_biosynt(j_C_per_biosynt_k_per_biosynt, per_ACoA);
    j_C_per_biosynt_k_per_biosynt = 0.1;
  j_TG_per_DNL: 21.4 per_ACoA => per_TG; MINGLeD*Rate_Law_for_j_TG_per_DNL(j_TG_per_DNL_k_per_DNL, per_ACoA);
    j_TG_per_DNL_k_per_DNL = 0.1;
  j_CEH: hep_CE => hep_FC; MINGLeD*Rate_Law_for_j_CEH(j_CEH_k_CEH, hep_CE);
    j_CEH_k_CEH = 0.1;
  j_BA_synt: hep_FC => int_BA; MINGLeD*Rate_Law_for_j_BA_synt(j_BA_synt_k_BA_synt, hep_FC);
    j_BA_synt_k_BA_synt = 0.1;
  j_BA_bil_excr: hep_BA => int_BA; MINGLeD*Rate_Law_for_j_BA_bil_excr(j_BA_bil_excr_k_BA_bil_exr, hep_BA);
    j_BA_bil_excr_k_BA_bil_exr = 0.1;
  j_BA_recycl: int_BA => hep_BA; MINGLeD*Rate_Law_for_j_BA_recycl(j_BA_recycl_k_BA_recycl, int_BA);
    j_BA_recycl_k_BA_recycl = 0.1;
  j_C_bil_excr: hep_FC => int_C; MINGLeD*Rate_Law_for_j_BA_bil_excr(j_C_bil_excr_k_BA_bil_exr, hep_FC);
    j_C_bil_excr_k_BA_bil_exr = 0.1;
  j_C_fec_excr: int_C => ; MINGLeD*Rate_Law_for_j_C_fec_excr(j_C_fec_excr_k_C_excr, int_C);
    j_C_fec_excr_k_C_excr = 0.1;
  j_BA_fec_excr: int_BA => ; MINGLeD*Rate_Law_for_j_BA_fec_excr(j_BA_fec_excr_k_BA_excr, int_BA);
    j_BA_fec_excr_k_BA_excr = 0.1;
  j_ACoA_hep_resp: hep_ACoA => ; MINGLeD*Rate_Law_for_j_ACoA_hep_resp(j_ACoA_hep_resp_k_hep_resp, hep_ACoA);
    j_ACoA_hep_resp_k_hep_resp = 0.1;
  j_ACoA_per_resp: per_ACoA => ; MINGLeD*Rate_Law_for_j_ACoA_per_resp(j_ACoA_per_resp_k_per_resp, per_ACoA);
    j_ACoA_per_resp_k_per_resp = 0.1;
  j_diet_G: dietary_G => pl_G; MINGLeD*Constant_flux__irreversible(diet_G);
  j_diet_C: dietary_C => int_C; MINGLeD*Constant_flux__irreversible(diet_C);
  j_diet_TG: dietary_TG => int_TG; MINGLeD*Constant_flux__irreversible(diet_TG);
  j_diet_AA: dietary_AA => int_AA; MINGLeD*Constant_flux__irreversible(diet_AA);
  j_ACAT: hep_FC => hep_CE; MINGLeD*Rate_Law_for_j_ACAT(j_ACAT_k_ACAT, hep_FC);
    j_ACAT_k_ACAT = 0.1;

  // Unit definitions:
  unit volume = litre;
  unit substance = 1e-6 mole;
  unit unit_0 = (1e-6 dimensionless)^0 * item * avogadro / (8640 second); unit_0 is "umol/day";
  unit time = 86400 second;
end
