// SBML level 2 version 4
// dcterms:bibliographicCitation: urn:miriam:pubmed:20739927

model A_model_of_yeast_cell_cycle_regulation_based_on_multisite_phosphorylation_1_1_1()
  // A model of yeast cell-cycle regulation based on multisite phosphorylation_1_1_1
  // Model does not simulate
  // isDescribedBy pubmed:20739927

  // Compartments:
  compartment Compartment = 1;

  // Species:
  species $V in Compartment = 1;
  species $Cln3 in Compartment = 0.1285;
  species $ClbM in Compartment = 0.4588;
  species $ClbS in Compartment = 5.7567;
  species $Cdc14 in Compartment = 1.664;
  species $SBF in Compartment = 2.0895;
  species $SBFP1 in Compartment = 0.0953;
  species $SBFP4 in Compartment = 9.06e-6;
  species $Hbf in Compartment = 127.5;
  species $Whi5 in Compartment = 297.0617;
  species $Whi5P1 in Compartment = 68.0978;
  species $Whi5P6 in Compartment = 0.0438;
  species $Hi5 in Compartment = 127.5;
  species $Net1 in Compartment = 209.85;
  species $Net1P1 in Compartment = 11.1794;
  species $Net1P8 in Compartment = 1.51e-8;
  species $RENT in Compartment = 132.9591;
  species $RENTP1 in Compartment = 7.4407;
  species $RENTP5 in Compartment = 6.81e-5;
  species $Ht1 in Compartment = 102;
  species $Cmp in Compartment = 117.3219;
  species $CmpP1 in Compartment = 27.1919;
  species $CmpP2 in Compartment = 6.2968;
  species $Cdh1 in Compartment = 176.4816;
  species $Cdh1P1 in Compartment = 25.4719;
  species $Cdh1P10 in Compartment = 6.93e-7;
  species $Mn3 in Compartment = 7.5;
  species $MbM in Compartment = 7.5;
  species $Ga in Compartment = 0.0417;
  species $MbS in Compartment = 1.9189;
  species $Mc14 in Compartment = 7.5;
  species $Mhbf in Compartment = 10;
  species $Mi5 in Compartment = 7.5;
  species $Mt1 in Compartment = 7.5;
  species $Mht1 in Compartment = 10;
  species $Mh1 in Compartment = 7.5;
  species $Net1RTotal in Compartment;
  species $RentTotal in Compartment;
  species $Cdh1PTotal in Compartment;
  species $SBFP2 in Compartment = 0.00435;
  species $SBFP3 in Compartment = 0.000198;
  species $Whi5P2 in Compartment = 15.6268;
  species $Whi5P3 in Compartment = 3.593;
  species $Whi5P4 in Compartment = 0.8262;
  species $Whi5P5 in Compartment = 0.1901;
  species $Net1P2 in Compartment = 0.5992;
  species $Net1P3 in Compartment = 0.0323;
  species $Net1P4 in Compartment = 0.00174;
  species $Net1P5 in Compartment = 9.42e-5;
  species $Net1P6 in Compartment = 5.12e-6;
  species $Net1P7 in Compartment = 2.78e-7;
  species $RENTP2 in Compartment = 0.4122;
  species $RENTP3 in Compartment = 0.0227;
  species $RENTP4 in Compartment = 0.00124;
  species $Cdh1P2 in Compartment = 3.6764;
  species $Cdh1P3 in Compartment = 0.5306;
  species $Cdh1P4 in Compartment = 0.0766;
  species $Cdh1P5 in Compartment = 0.0111;
  species $Cdh1P6 in Compartment = 0.00159;
  species $Cdh1P7 in Compartment = 0.00023;
  species $Cdh1P8 in Compartment = 3.32e-5;
  species $Cdh1P9 in Compartment = 4.79e-6;
  species $Mhi5 in Compartment = 10;

  // Parameters:
  al = 0.007 unit_0;
  kd_g = 12 unit_0; kd_g is "kd,g";
  gbM = 0.03 unit_0;
  gbf = 0.01 unit_0;
  ghi5 = 0.01 unit_0;
  gh1 = 0.01 unit_0;
  gmbS = 0.25 unit_0;
  gmi5 = 0.7 unit_0;
  gmh1 = 0.7 unit_0;
  ks_mbS = 11.5 unit_0; ks_mbS is "ks,mbS";
  k_d_h1 = 1.65 unit_0; k_d_h1 is "k'd,h1";
  gbS = 0.1 unit_0;
  ghbf = 0.01 unit_0;
  gt1 = 0.015 unit_0;
  gmn3 = 1 unit_0;
  gmcl4 = 0.7 unit_0;
  gmhi5 = 0.7 unit_0;
  gmht1 = 0.7 unit_0;
  kd_c = 0.2 unit_0; kd_c is "kd,c";
  kd_r = 0.075 unit_0; kd_r is "kd,r";
  gn3 = 0.14 unit_0;
  gc14 = 0.02 unit_0;
  gi5 = 0.01 unit_0;
  ght1 = 0.01 unit_0;
  gmbM = 0.7 unit_0;
  gmhbf = 0.7 unit_0;
  gmt1 = 0.7 unit_0;
  kd_bMi = 1.7e-5; kd_bMi is "kd,bMi";
  ka_c = 0.0417; ka_c is "ka,c";
  ka_g = 0.25; ka_g is "ka,g";
  k_p_h1 = 0.18; k_p_h1 is "k'p,h1";
  kp_i5 = 0.1835; kp_i5 is "kp,i5";
  kp_cm = 0.1835; kp_cm is "kp,cm";
  kp_t1 = 0.042; kp_t1 is "kp,t1";
  kd_h1 = 0.134; kd_h1 is "kd,h1";
  k_d_bf = 0.0165; k_d_bf is "k'd,bf";
  k_d_i5 = 0.033; k_d_i5 is "k'd,i5";
  k_d_cm = 0.033; k_d_cm is "k'd,cm";
  kd_nt = 0.0033; kd_nt is "kd,nt";
  kd_bMa = 0.025; kd_bMa is "kd,bMa";
  ka_r = 0.042; ka_r is "ka,r";
  kp_h1 = 0.033; kp_h1 is "kp,h1";
  kp_bf = 0.0625; kp_bf is "kp,bf";
  k_p_i5 = 0.0475; k_p_i5 is "k'p,i5";
  k_p_cm = 0.0475; k_p_cm is "k'p,cm";
  kp_nt = 0.042; kp_nt is "kp,nt";
  kd_bf = 0.0046; kd_bf is "kd,bf";
  kd_i5 = 0.0096; kd_i5 is "kd,i5";
  kd_cm = 0.0096; kd_cm is "kd,cm";
  kd_t1 = 0.0033; kd_t1 is "kd,t1";
  ks_bM = 0.27; ks_bM is "ks,bM";
  ks_bS = 0.3; ks_bS is "ks,bS";
  ks_i5 = 0.715; ks_i5 is "ks,i5";
  ks_h1 = 0.275; ks_h1 is "ks,h1";
  ks_t1 = 0.725; ks_t1 is "ks,t1";
  ks_cl4 = 0.38; ks_cl4 is "ks,cl4";
  ks_hi5 = 0.1275; ks_hi5 is "ks,hi5";
  ks_hbf = 0.1275; ks_hbf is "ks,hbf";
  ks_ht1 = 0.102; ks_ht1 is "ks,ht1";
  ks_mn3 = 7.5; ks_mn3 is "ks,mn3";
  ks_mc14 = 5.25; ks_mc14 is "ks,mc14";
  ks_mi5 = 5.25; ks_mi5 is "ks,mi5";
  ks_mt1 = 5.25; ks_mt1 is "ks,mt1";
  ks_mht1 = 7; ks_mht1 is "ks,mht1";
  ks_mbM = 5.25; ks_mbM is "ks,mbM";
  ks_mhbf = 7; ks_mhbf is "ks,mhbf";
  ks_mhi5 = 7; ks_mhi5 is "ks,mhi5";
  ks_mh1 = 5.25; ks_mh1 is "ks,mh1";
  P = 1;
  f = 0.4;
  ks_n3 = 0.0024; ks_n3 is "ks,n3";
  ks_bf = 1.53; ks_bf is "ks,bf";
  FLAG = 0;

  // Assignment rules:
  Net1RTotal := Net1 + Net1P2 + Net1P1 + Net1P3 + Net1P4 + Net1P5;
  RentTotal := RENT + RENTP1 + RENTP2 + RENTP3 + RENTP4 + RENTP5;
  Cdh1PTotal := Cdh1P1 + Cdh1P2 + Cdh1P3 + Cdh1P4 + Cdh1P5 + Cdh1P6 + Cdh1P7 + Cdh1P8 + Cdh1P9 + Cdh1P10;

  // Rate rules:
  V' = al*V;
  Cln3' = ks_n3*(V/P)^2*Mn3 - gn3*Cln3;
  ClbM' = ks_bM*V/P*MbM - kd_bMa/V*Cdh1*ClbM - kd_bMi/V*Cdh1PTotal*ClbM - gbM*ClbM;
  ClbS' = ks_bS*V/P*MbS - gbS*ClbS;
  Cdc14' = ks_cl4*V/P*Mc14 + (kd_r + gt1)*RentTotal - ka_r/V*Net1RTotal*Cdc14 - gc14*Cdc14;
  SBF' = ks_bf*V + (kd_c + gi5)*(Cmp + CmpP1 + CmpP2) + (kd_bf/V*Hbf + k_d_bf/V*Cdc14)*SBFP1 - (ka_c/V*(Whi5 + Whi5P1 + Whi5P2) + kp_bf/V*ClbM + gbf)*SBF;
  SBFP1' = kp_bf/V*ClbM*SBF + (kd_bf/V*Hbf + k_d_bf/V*Cdc14)*SBFP2 - (kp_bf/V*ClbM + kd_bf/V*Hbf + k_d_bf/V*Cdc14 + gbf)*SBFP1;
  SBFP4' = kp_bf/V*ClbM*SBFP3 - (kd_bf/V*Hbf + k_d_bf/V*Cdc14 + gbf)*SBFP4;
  Hbf' = ks_hbf*V/P*Mhbf - ghbf*Hbf;
  Whi5' = ks_i5*V/P*Mi5 + (kd_c + gbf)*Cmp + (kd_i5/V*Hi5 + k_d_i5/V*Cdc14)*Whi5P1 - (ka_c/V*SBF + kp_i5/V*Cln3 + k_p_i5/V*ClbS + gi5)*Whi5;
  Whi5P1' = (kd_c + gbf)*CmpP1 + (kp_i5/V*Cln3 + k_p_i5/V*ClbS)*Whi5 + (kd_i5/V*Hi5 + k_d_i5/V*Cdc14)*Whi5P2 - (ka_c/V*SBF + kp_i5/V*Cln3 + k_p_i5/V*ClbS + kd_i5/V*Hi5 + k_d_i5/V*Cdc14 + gi5)*Whi5P1;
  Whi5P6' = (kp_i5/V*Cln3 + k_p_i5/V*ClbS)*Whi5P5 - (kd_i5/V*Hi5 + k_d_i5/V*Cdc14 + gi5)*Whi5P6;
  Hi5' = ks_hi5*V/P*Mhi5 - ghi5*Hi5;
  Net1' = ks_t1*V/P*Mt1 + (kd_r + gc14)*RENT + kd_t1/V*Ht1*Net1P1 - (ka_r/V*Cdc14 + kp_t1/V*ClbM + gt1)*Net1;
  Net1P1' = (kd_r + gc14)*RENTP1 + kp_t1/V*ClbM*Net1 + kd_t1/V*Ht1*Net1P2 - (ka_r/V*Cdc14 + kp_t1/V*ClbM + kd_t1/V*Ht1 + gt1)*Net1P1;
  Net1P8' = kp_t1/V*ClbM*Net1P7 - (kd_t1/V*Ht1 + gt1)*Net1P8;
  RENT' = ka_r/V*Cdc14*Net1 + kd_nt/V*Ht1*RENTP1 - (kd_r + kp_nt/V*ClbM + gt1 + gc14)*RENT;
  RENTP1' = ka_r/V*Cdc14*Net1P1 + kp_nt/V*ClbM*RENT + kd_nt/V*Ht1*RENTP2 - (kd_r + kp_nt/V*ClbM + kd_nt/V*Ht1 + gt1 + gc14)*RENTP1;
  RENTP5' = ka_r/V*Cdc14*Net1P5 + kp_nt/V*ClbM*RENTP4 - (kd_r + kd_nt/V*Ht1 + gt1 + gc14)*RENTP5;
  Ht1' = ks_ht1*V/P*Mht1 - ght1*Ht1;
  Cmp' = ka_c/V*SBF*Whi5 + (kd_cm/V*Hi5 + k_d_cm/V*Cdc14)*CmpP1 - (kd_c + kp_cm/V*Cln3 + k_p_cm/V*ClbS + gbf + gi5)*Cmp;
  CmpP1' = ka_c/V*SBF*Whi5P1 + (kp_cm/V*Cln3 + k_p_cm/V*ClbS)*Cmp + (kd_cm/V*Hi5 + k_d_cm/V*Cdc14)*CmpP2 - (kd_c + kd_cm/V*Hi5 + k_d_cm/V*Cdc14 + kp_cm/V*Cln3 + k_p_cm/V*ClbS + gbf + gi5)*CmpP1;
  CmpP2' = ka_c/V*SBF*Whi5P2 + (kp_cm/V*Cln3 + k_p_cm/V*ClbS)*CmpP1 - (kd_c + kd_cm/V*Hi5 + k_d_cm/V*Cdc14 + gbf + gi5)*CmpP2;
  Cdh1' = ks_h1*V/P*Mh1 + (kd_h1/V*Cdc14 + k_d_h1)*Cdh1P1 - (kp_h1/V*ClbS + k_p_h1/V*ClbM + gh1)*Cdh1;
  Cdh1P1' = (kp_h1/V*ClbS + k_p_h1/V*ClbM)*Cdh1 + (kd_h1/V*Cdc14 + k_d_h1)*Cdh1P2 - (kp_h1/V*ClbS + k_p_h1/V*ClbM + kd_h1/V*Cdc14 + k_d_h1 + gh1)*Cdh1P1;
  Cdh1P10' = (kp_h1/V*ClbS + k_p_h1/V*ClbM)*Cdh1P9 - (kd_h1/V*Cdc14 + k_d_h1 + gh1)*Cdh1P10;
  Mn3' = ks_mn3*P - gmn3*Mn3;
  MbM' = ks_mbM*P - gmbM*MbM;
  Ga' = ka_g/V*SBF*(P - Ga) - kd_g*Ga;
  MbS' = ks_mbS*Ga - gmbS*MbS;
  Mc14' = ks_mc14*P - gmcl4*Mc14;
  Mhbf' = ks_mhbf*P - gmhbf*Mhbf;
  Mi5' = ks_mi5*P - gmi5*Mi5;
  Mt1' = ks_mt1*P - gmt1*Mt1;
  Mht1' = ks_mht1*P - gmht1*Mht1;
  Mh1' = ks_mh1*P - gmh1*Mh1;
  SBFP2' = kp_bf/V*ClbM*SBFP1 + (kd_bf/V*Hbf + k_d_bf/V*Cdc14)*SBFP3 - (kp_bf/V*ClbM + kd_bf/V*Hbf + k_d_bf/V*Cdc14 + gbf)*SBFP2;
  SBFP3' = kp_bf/V*ClbM*SBFP2 + (kd_bf/V*Hbf + k_d_bf/V*Cdc14)*SBFP4 - (kp_bf/V*ClbM + kd_bf/V*Hbf + k_d_bf/V*Cdc14 + gbf)*SBFP3;
  Whi5P2' = (kd_c + gbf)*CmpP2 + (kp_i5/V*Cln3 + k_p_i5/V*ClbS)*Whi5P1 + (kd_i5/V*Hi5 + k_d_i5/V*Cdc14)*Whi5P3 - (ka_c/V*SBF + kp_i5/V*Cln3 + k_p_i5/V*ClbS + kd_i5/V*Hi5 + k_d_i5/V*Cdc14 + gi5)*Whi5P2;
  Whi5P3' = (kp_i5/V*Cln3 + k_p_i5/V*ClbS)*Whi5P2 + (kd_i5/V*Hi5 + k_d_i5/V*Cdc14)*Whi5P4 - (kp_i5/V*Cln3 + k_p_i5/V*ClbS + kd_i5/V*Hi5 + k_d_i5/V*Cdc14 + gi5)*Whi5P3;
  Whi5P4' = (kp_i5/V*Cln3 + k_p_i5/V*ClbS)*Whi5P3 + (kd_i5/V*Hi5 + k_d_i5/V*Cdc14)*Whi5P5 - (kp_i5/V*Cln3 + k_p_i5/V*ClbS + kd_i5/V*Hi5 + k_d_i5/V*Cdc14 + gi5)*Whi5P4;
  Whi5P5' = (kp_i5/V*Cln3 + k_p_i5/V*ClbS)*Whi5P4 + (kd_i5/V*Hi5 + k_d_i5/V*Cdc14)*Whi5P6 - (kp_i5/V*Cln3 + k_p_i5/V*ClbS + kd_i5/V*Hi5 + k_d_i5/V*Cdc14 + gi5)*Whi5P4;
  Net1P2' = (kd_r + gc14)*RENTP2 + kp_t1/V*ClbM*Net1P1 + kd_t1/V*Ht1*Net1P3 - (ka_r/V*Cdc14 + kp_t1/V*ClbM + kd_t1/V*Ht1 + gt1)*Net1P2;
  Net1P3' = (kd_r + gc14)*RENTP3 + kp_t1/V*ClbM*Net1P2 + kd_t1/V*Ht1*Net1P4 - (ka_r/V*Cdc14 + kp_t1/V*ClbM + kd_t1/V*Ht1 + gt1)*Net1P3;
  Net1P4' = (kd_r + gc14)*RENTP4 + kp_t1/V*ClbM*Net1P3 + kd_t1/V*Ht1*Net1P5 - (ka_r/V*Cdc14 + kp_t1/V*ClbM + kd_t1/V*Ht1 + gt1)*Net1P4;
  Net1P5' = (kd_r + gc14)*RENTP5 + kp_t1/V*ClbM*Net1P4 + kd_t1/V*Ht1*Net1P6 - (ka_r/V*Cdc14 + kp_t1/V*ClbM + kd_t1/V*Ht1 + gt1)*Net1P5;
  Net1P6' = kp_t1/V*ClbM*Net1P5 + kd_t1/V*Ht1*Net1P7 - (kp_t1/V*ClbM + kd_t1/V*Ht1 + gt1)*Net1P6;
  Net1P7' = kp_t1/V*ClbM*Net1P6 + kd_t1/V*Ht1*Net1P8 - (kp_t1/V*ClbM + kd_t1/V*Ht1 + gt1)*Net1P7;
  RENTP2' = ka_r/V*Cdc14*Net1P2 + kp_nt/V*ClbM*RENTP1 + kd_nt/V*Ht1*RENTP3 - (kd_r + kp_nt/V*ClbM + kd_nt/V*Ht1 + gt1 + gc14)*RENTP2;
  RENTP3' = ka_r/V*Cdc14*Net1P3 + kp_nt/V*ClbM*RENTP2 + kd_nt/V*Ht1*RENTP4 - (kd_r + kp_nt/V*ClbM + kd_nt/V*Ht1 + gt1 + gc14)*RENTP3;
  RENTP4' = ka_r/V*Cdc14*Net1P4 + kp_nt/V*ClbM*RENTP3 + kd_nt/V*Ht1*RENTP5 - (kd_r + kp_nt/V*ClbM + kd_nt/V*Ht1 + gt1 + gc14)*RENTP4;
  Cdh1P2' = (kp_h1/V*ClbS + k_p_h1/V*ClbM)*Cdh1P1 + (kd_h1/V*Cdc14 + k_d_h1)*Cdh1P3 - (kp_h1/V*ClbS + k_p_h1/V*ClbM + kd_h1/V*Cdc14 + k_d_h1 + gh1)*Cdh1P2;
  Cdh1P3' = (kp_h1/V*ClbS + k_p_h1/V*ClbM)*Cdh1P2 + (kd_h1/V*Cdc14 + k_d_h1)*Cdh1P4 - (kp_h1/V*ClbS + k_p_h1/V*ClbM + kd_h1/V*Cdc14 + k_d_h1 + gh1)*Cdh1P3;
  Cdh1P4' = (kp_h1/V*ClbS + k_p_h1/V*ClbM)*Cdh1P3 + (kd_h1/V*Cdc14 + k_d_h1)*Cdh1P5 - (kp_h1/V*ClbS + k_p_h1/V*ClbM + kd_h1/V*Cdc14 + k_d_h1 + gh1)*Cdh1P4;
  Cdh1P5' = (kp_h1/V*ClbS + k_p_h1/V*ClbM)*Cdh1P4 + (kd_h1/V*Cdc14 + k_d_h1)*Cdh1P6 - (kp_h1/V*ClbS + k_p_h1/V*ClbM + kd_h1/V*Cdc14 + k_d_h1 + gh1)*Cdh1P5;
  Cdh1P6' = (kp_h1/V*ClbS + k_p_h1/V*ClbM)*Cdh1P5 + (kd_h1/V*Cdc14 + k_d_h1)*Cdh1P7 - (kp_h1/V*ClbS + k_p_h1/V*ClbM + kd_h1/V*Cdc14 + k_d_h1 + gh1)*Cdh1P6;
  Cdh1P7' = (kp_h1/V*ClbS + k_p_h1/V*ClbM)*Cdh1P6 + (kd_h1/V*Cdc14 + k_d_h1)*Cdh1P8 - (kp_h1/V*ClbS + k_p_h1/V*ClbM + kd_h1/V*Cdc14 + k_d_h1 + gh1)*Cdh1P7;
  Cdh1P8' = (kp_h1/V*ClbS + k_p_h1/V*ClbM)*Cdh1P7 + (kd_h1/V*Cdc14 + k_d_h1)*Cdh1P9 - (kp_h1/V*ClbS + k_p_h1/V*ClbM + kd_h1/V*Cdc14 + k_d_h1 + gh1)*Cdh1P8;
  Cdh1P9' = (kp_h1/V*ClbS + k_p_h1/V*ClbM)*Cdh1P8 + (kd_h1/V*Cdc14 + k_d_h1)*Cdh1P10 - (kp_h1/V*ClbS + k_p_h1/V*ClbM + kd_h1/V*Cdc14 + k_d_h1 + gh1)*Cdh1P9;
  Mhi5' = ks_mhi5*P - gmhi5*Mhi5;

  // Events:
  ClbM_above_threshhold: at (ClbM > 12.5): FLAG = 1;
  Cdc14_0: at ((FLAG == 1) && (ClbM < 12.5)): Cdc14 = Cdc14*0.5;
  V_0: at ((FLAG == 1) && (ClbM < 12.5)): V = V*0.5;
  Cln3_0: at ((FLAG == 1) && (ClbM < 12.5)): Cln3 = Cln3*0.25;
  ClbM_0: at ((FLAG == 1) && (ClbM < 12.5)): ClbM = ClbM*0.5;
  ClbS_0: at ((FLAG == 1) && (ClbM < 12.5)): ClbS = ClbS*0.5;
  SBF_0: at ((FLAG == 1) && (ClbM < 12.5)): SBF = SBF*0.5;
  SBFP1_0: at ((FLAG == 1) && (ClbM < 12.5)): SBFP1 = SBFP1*0.5;
  SBFP2_0: at ((FLAG == 1) && (ClbM < 12.5)): SBFP2 = SBFP2*0.5;
  SBFP3_0: at ((FLAG == 1) && (ClbM < 12.5)): SBFP3 = SBFP3*0.5;
  SBFP4_0: at ((FLAG == 1) && (ClbM < 12.5)): SBFP4 = SBFP4*0.5;
  Hbf_0: at ((FLAG == 1) && (ClbM < 12.5)): Hbf = Hbf*0.5;
  Whi5_0: at ((FLAG == 1) && (ClbM < 12.5)): Whi5 = Whi5*0.5;
  Whi5P1_0: at ((FLAG == 1) && (ClbM < 12.5)): Whi5P1 = Whi5P1*0.5;
  Whi5P2_0: at ((FLAG == 1) && (ClbM < 12.5)): Whi5P2 = Whi5P2*0.5;
  Whi5P3_0: at ((FLAG == 1) && (ClbM < 12.5)): Whi5P3 = Whi5P3*0.5;
  Whi5P4_0: at ((FLAG == 1) && (ClbM < 12.5)): Whi5P4 = Whi5P4*0.5;
  Whi5P5_0: at ((FLAG == 1) && (ClbM < 12.5)): Whi5P5 = Whi5P5*0.5;
  Whi5P6_0: at ((FLAG == 1) && (ClbM < 12.5)): Whi5P6 = Whi5P6*0.5;
  Hi5_0: at ((FLAG == 1) && (ClbM < 12.5)): Hi5 = Hi5*0.5;
  Net1_0: at ((FLAG == 1) && (ClbM < 12.5)): Net1 = Net1*0.5;
  Net1P1_0: at ((FLAG == 1) && (ClbM < 12.5)): Net1P1 = Net1P1*0.5;
  Net1P2_0: at ((FLAG == 1) && (ClbM < 12.5)): Net1P2 = Net1P2*0.5;
  Net1P3_0: at ((FLAG == 1) && (ClbM < 12.5)): Net1P3 = Net1P3*0.5;
  Net1P4_0: at ((FLAG == 1) && (ClbM < 12.5)): Net1P4 = Net1P4*0.5;
  Net1P5_0: at ((FLAG == 1) && (ClbM < 12.5)): Net1P5 = Net1P5*0.5;
  Net1P6_0: at ((FLAG == 1) && (ClbM < 12.5)): Net1P6 = Net1P6*0.5;
  Net1P7_0: at ((FLAG == 1) && (ClbM < 12.5)): Net1P7 = Net1P7*0.5;
  Net1P8_0: at ((FLAG == 1) && (ClbM < 12.5)): Net1P8 = Net1P8*0.5;
  RENT_0: at ((FLAG == 1) && (ClbM < 12.5)): RENT = RENT*0.5;
  RENTP1_0: at ((FLAG == 1) && (ClbM < 12.5)): RENTP1 = RENTP1*0.5;
  RENTP2_0: at ((FLAG == 1) && (ClbM < 12.5)): RENTP2 = RENTP2*0.5;
  RENTP3_0: at ((FLAG == 1) && (ClbM < 12.5)): RENTP3 = RENTP3*0.5;
  RENTP4_0: at ((FLAG == 1) && (ClbM < 12.5)): RENTP4 = RENTP4*0.5;
  RENTP5_0: at ((FLAG == 1) && (ClbM < 12.5)): RENTP5 = RENTP5*0.5;
  Ht1_0: at ((FLAG == 1) && (ClbM < 12.5)): Ht1 = Ht1*0.5;
  Cmp_0: at ((FLAG == 1) && (ClbM < 12.5)): Cmp = Cmp*0.5;
  CmpP1_0: at ((FLAG == 1) && (ClbM < 12.5)): CmpP1 = CmpP1*0.5;
  CmpP2_0: at ((FLAG == 1) && (ClbM < 12.5)): CmpP2 = CmpP2*0.5;
  Cdh1_0: at ((FLAG == 1) && (ClbM < 12.5)): Cdh1 = Cdh1*0.5;
  Cdh1P1_0: at ((FLAG == 1) && (ClbM < 12.5)): Cdh1P1 = Cdh1P1*0.5;
  Cdh1P2_0: at ((FLAG == 1) && (ClbM < 12.5)): Cdh1P2 = Cdh1P2*0.5;
  Cdh1P3_0: at ((FLAG == 1) && (ClbM < 12.5)): Cdh1P3 = Cdh1P3*0.5;
  Cdh1P4_0: at ((FLAG == 1) && (ClbM < 12.5)): Cdh1P4 = Cdh1P4*0.5;
  Cdh1P5_0: at ((FLAG == 1) && (ClbM < 12.5)): Cdh1P5 = Cdh1P5*0.5;
  Cdh1P6_0: at ((FLAG == 1) && (ClbM < 12.5)): Cdh1P6 = Cdh1P6*0.5;
  Cdh1P7_0: at ((FLAG == 1) && (ClbM < 12.5)): Cdh1P7 = Cdh1P7*0.5;
  Cdh1P8_0: at ((FLAG == 1) && (ClbM < 12.5)): Cdh1P8 = Cdh1P8*0.5;
  Cdh1P9_0: at ((FLAG == 1) && (ClbM < 12.5)): Cdh1P9 = Cdh1P9*0.5;
  Cdh1P10_0: at ((FLAG == 1) && (ClbM < 12.5)): Cdh1P10 = Cdh1P10*0.5;
  Mn3_0: at ((FLAG == 1) && (ClbM < 12.5)): Mn3 = Mn3*0.5;
  MbM_0: at ((FLAG == 1) && (ClbM < 12.5)): MbM = MbM*0.5;
  Ga_0: at ((FLAG == 1) && (ClbM < 12.5)): Ga = Ga*0.5;
  MbS_0: at ((FLAG == 1) && (ClbM < 12.5)): MbS = MbS*0.5;
  Mc14_0: at ((FLAG == 1) && (ClbM < 12.5)): Mc14 = Mc14*0.5;
  Mhbf_0: at ((FLAG == 1) && (ClbM < 12.5)): Mhbf = Mhbf*0.5;
  Mi5_0: at ((FLAG == 1) && (ClbM < 12.5)): Mi5 = Mi5*0.5;
  Mhi5_0: at ((FLAG == 1) && (ClbM < 12.5)): Mhi5 = Mhi5*0.5;
  Mt1_0: at ((FLAG == 1) && (ClbM < 12.5)): Mt1 = Mt1*0.5;
  Mht1_0: at ((FLAG == 1) && (ClbM < 12.5)): Mht1 = Mht1*0.5;
  Mh1_0: at ((FLAG == 1) && (ClbM < 12.5)): Mh1 = Mh1*0.5;
  Cell_Division: at ((FLAG == 1) && (ClbM < 12.5)): FLAG = 0;

  // Unit definitions:
  unit time = 60 second;
  unit unit_0 = 1 / second; unit_0 is "1/s";
end
