// SBML level 2 version 4
// dcterms:bibliographicCitation: urn:miriam:doi:10.1080/10273660412331317415

function Function_for_modifiers(kcat, mod, sub)
  kcat*mod*sub;
end

function Function_for_MM(kcat, mod, sub, Km)
  kcat*mod*sub/(Km + sub);
end

model Anand2003___Reactions_of_the_Intrinsic_Pathway_of_Blood_Coagulation_with_Platelet_Activation()
  // Anand2003 - Reactions of the Intrinsic Pathway of Blood Coagulation with Platelet Activation
  // Inhomogeneous blood coagulation model. Encoded model contains reactions of the intrinsic pathway with platelet activation. Initial conditions provided. Mostly an extension of Zarnitsina1996.
  // hasPart GO:0030168
  // isVersionOf GO:0007596
  // isDescribedBy doi:10.1080/10273660412331317415

  // Compartments:
  compartment compartment = 1;

  // Species:
  species IX in compartment = 90;
  species IXa in compartment = 0;
  species XIa in compartment = 0;
  species ATIII in compartment = 2410;
  species IXa_ATIII in compartment = 0; IXa_ATIII is "IXa:ATIII";
  species IIa in compartment = 0;
  species VIII in compartment = 0.7;
  species VIIIa in compartment = 0;
  species VIIIa_i in compartment = 0;
  species APC in compartment = 0;
  species V in compartment = 20;
  species Va in compartment = 0;
  species Va_i in compartment = 0;
  species AP in compartment = 0.5;
  species VIIIa_IXa_AP in compartment = 0; VIIIa_IXa_AP is "VIIIa:IXa:AP";
  species VIIIa_IXa in compartment = 0; VIIIa_IXa is "VIIIa:IXa";
  species Va_Xa_AP in compartment = 0; Va_Xa_AP is "Va:Xa:AP";
  species Xa in compartment = 0;
  species Va_Xa in compartment = 0; Va_Xa is "Va:Xa";
  species X in compartment = 170;
  species Xa_ATIII in compartment = 0; Xa_ATIII is "Xa:ATIII";
  species TFPI in compartment = 2.5;
  species Xa_TFPI in compartment = 0; Xa_TFPI is "Xa:TFPI";
  species II in compartment = 1400;
  species IIa_ATIII in compartment = 0; IIa_ATIII is "IIa:ATIII";
  species PC in compartment = 60;
  species APC_L1AT in compartment = 0; APC_L1AT is "APC:L1AT";
  species L1AT in compartment = 45000;
  species I in compartment = 7000;
  species Ia in compartment = 0;
  species Ia_i in compartment = 0;
  species PLA in compartment = 0;
  species XI in compartment = 30;
  species XIa_i in compartment = 0;
  species RP in compartment = 10;
  species PLS in compartment = 2180;
  species tPA_Ia in compartment = 0; tPA_Ia is "tPA:Ia";
  species L2AP in compartment = 105;
  species PLA_L2AP in compartment = 0; PLA_L2AP is "PLA:L2AP";
  species tPA in compartment = 0.08;

  // Parameters:
  R01a_k9 = 20;
  R01b_h9 = 0.2;
  R02a_k8 = 1e-5;
  R02b_h8 = 0.31;
  R02c_ka = 1.2;
  R03a_k5 = 0.17;
  R03b_h5 = 0.31;
  R03c_ka = 1.2;
  var R04a_k8_9; R04a_k8_9 is "R04a_k8,9";
  var R04a_h8_9; R04a_h8_9 is "R04a_h8,9";
  R04b_ka = 1.2;
  var R05a_k5_10; R05a_k5_10 is "R05a_k5,10";
  var R05a_h5_10; R05a_h5_10 is "R05a_h5,10";
  R05b_ka = 1.2;
  R06a_k10 = 1200;
  R06b_h10 = 1;
  R06c_kTFPI = 0.96;
  R07a_k2 = 1344;
  R07a_K2m = 1060;
  R07b_h2 = 1.3;
  R08a_kAPC = 0.0014;
  R08b_hAPC = 0.1;
  R09a_k1 = 3540;
  R09a_K1m = 3160;
  R09b_h1 = 6.97;
  R09b_H1m = 2900;
  R10a_k11 = 0.0078;
  R10b_h11 = 0.2;
  R11a_kap_IIa = 30; R11a_kap_IIa is "R11a_kap^IIa";
  R11b_kAP_AP = 18; R11b_kAP_AP is "R11b_kAP^AP";
  R12a_kPLA = 12;
  R12b_hPLA = 0.096;
  Initial_for_AP = AP;
  Initial_for_RP = RP;

  // Assignment rules:
  R04a_k8_9 := 100*Initial_for_AP/Initial_for_RP;
  R04a_h8_9 := 100*Initial_for_AP/Initial_for_RP;
  R05a_k5_10 := 100*Initial_for_AP/Initial_for_RP;
  R05a_h5_10 := 100*Initial_for_AP/Initial_for_RP;

  // Reactions:
  R01a__Activation_of_IX_by_XIa: IX => IXa; compartment*Function_for_modifiers(R01a_k9, XIa, IX); R01a__Activation_of_IX_by_XIa is "R01a: Activation of IX by XIa";  // modifiers: XIa
  R01b__Inhabition_of_IXa_by_ATIII: IXa + ATIII => IXa_ATIII; compartment*R01b_h9*IXa*ATIII; R01b__Inhabition_of_IXa_by_ATIII is "R01b: Inhabition of IXa by ATIII";
  R02a__Activation_of_VIII_by_IIa: VIII => VIIIa; compartment*Function_for_modifiers(R02a_k8, IIa, VIII); R02a__Activation_of_VIII_by_IIa is "R02a: Activation of VIII by IIa";  // modifiers: IIa
  R02b__Inactivation_of_VIIIa: VIIIa => VIIIa_i; compartment*R02b_h8*VIIIa; R02b__Inactivation_of_VIIIa is "R02b: Inactivation of VIIIa";
  R02c__Inactivation_of_VIIIa_by_APC: VIIIa => VIIIa_i; compartment*Function_for_modifiers(R02c_ka, APC, VIIIa); R02c__Inactivation_of_VIIIa_by_APC is "R02c: Inactivation of VIIIa by APC";  // modifiers: APC
  R03a__Activation_of_V_by_IIa: V => Va; compartment*Function_for_modifiers(R03a_k5, IIa, V); R03a__Activation_of_V_by_IIa is "R03a: Activation of V by IIa";  // modifiers: IIa
  R03b__Inactivation_of_Va: Va => Va_i; compartment*R03b_h5*Va; R03b__Inactivation_of_Va is "R03b: Inactivation of Va";
  R03c__Inactivation_of_Va_by_APC: Va => Va_i; compartment*Function_for_modifiers(R03c_ka, APC, Va); R03c__Inactivation_of_Va_by_APC is "R03c: Inactivation of Va by APC";  // modifiers: APC
  R04a__Formation_of_VIIIa_IXa_AP_complex: VIIIa + IXa + AP -> VIIIa_IXa_AP; compartment*(R04a_k8_9*VIIIa*IXa*AP - R04a_h8_9*VIIIa_IXa_AP); R04a__Formation_of_VIIIa_IXa_AP_complex is "R04a: Formation of VIIIa:IXa:AP complex";
  R04b__Inactivation_of_VIIIa_by_APC_from_VIIIa_IXa_complex: VIIIa_IXa => VIIIa_i + IXa; compartment*Function_for_modifiers(R04b_ka, APC, VIIIa_IXa); R04b__Inactivation_of_VIIIa_by_APC_from_VIIIa_IXa_complex is "R04b: Inactivation of VIIIa by APC from VIIIa:IXa complex";  // modifiers: APC
  R05a__Formation_of_Va_Xa_AP_complex: Va + Xa + AP -> Va_Xa_AP; compartment*(R05a_k5_10*Va*Xa*AP - R05a_h5_10*Va_Xa_AP); R05a__Formation_of_Va_Xa_AP_complex is "R05a: Formation of Va:Xa:AP complex";
  R05b__Inactivation_of_Va_by_APC_from_Va_Xa_complex: Va_Xa => Va_i + Xa; compartment*Function_for_modifiers(R05b_ka, APC, Va_Xa); R05b__Inactivation_of_Va_by_APC_from_Va_Xa_complex is "R05b: Inactivation of Va by APC from Va:Xa complex";  // modifiers: APC
  R06a__Activation_of_X_by_VIIIa_IXa_AP_complex: X => Xa; compartment*Function_for_modifiers(R06a_k10, VIIIa_IXa_AP, X); R06a__Activation_of_X_by_VIIIa_IXa_AP_complex is "R06a: Activation of X by VIIIa:IXa:AP complex";  // modifiers: VIIIa_IXa_AP
  R06b__Inhibition_of_Xa_by_ATIII: Xa + ATIII => Xa_ATIII; compartment*R06b_h10*Xa*ATIII; R06b__Inhibition_of_Xa_by_ATIII is "R06b: Inhibition of Xa by ATIII";
  R06c__Inhibition_of_Xa_by_TFPI: Xa + TFPI => Xa_TFPI; compartment*R06c_kTFPI*Xa*TFPI; R06c__Inhibition_of_Xa_by_TFPI is "R06c: Inhibition of Xa by TFPI";
  R07a__Activation_of_II_by_Va_Xa_AP: II => IIa; compartment*Function_for_MM(R07a_k2, Va_Xa_AP, II, R07a_K2m); R07a__Activation_of_II_by_Va_Xa_AP is "R07a: Activation of II by Va:Xa:AP";  // modifiers: Va_Xa_AP
  R07b__Inhibition_of_IIa_by_ATIII: IIa + ATIII => IIa_ATIII; compartment*R07b_h2*IIa*ATIII; R07b__Inhibition_of_IIa_by_ATIII is "R07b: Inhibition of IIa by ATIII";
  R08a__Activation_of_PC_by_IIa: PC => APC; compartment*Function_for_modifiers(R08a_kAPC, IIa, PC); R08a__Activation_of_PC_by_IIa is "R08a: Activation of PC by IIa";  // modifiers: IIa
  R08b__Inhibition_of_APC_bt_antitrypsin: APC + L1AT => APC_L1AT; compartment*R08b_hAPC*APC*L1AT; R08b__Inhibition_of_APC_bt_antitrypsin is "R08b: Inhibition of APC bt antitrypsin";
  R09a__Activation_of_Fibrinogen: I => Ia; compartment*Function_for_MM(R09a_k1, IIa, I, R09a_K1m); R09a__Activation_of_Fibrinogen is "R09a: Activation of Fibrinogen";  // modifiers: IIa
  R09b__Inactivation_of_fibrin_by_PLA: Ia => Ia_i; compartment*Function_for_MM(R09b_h1, PLA, Ia, R09b_H1m); R09b__Inactivation_of_fibrin_by_PLA is "R09b: Inactivation of fibrin by PLA";  // modifiers: PLA
  R10a__Activation_of_XI_by_IIa: XI => XIa; compartment*Function_for_modifiers(R10a_k11, IIa, XI); R10a__Activation_of_XI_by_IIa is "R10a: Activation of XI by IIa";  // modifiers: IIa
  R10b__Inactivation_of_XIa: XIa => XIa_i; compartment*R10b_h11*XIa; R10b__Inactivation_of_XIa is "R10b: Inactivation of XIa";
  R11a__Activation_of_RP_by_IIa: RP => AP; compartment*Function_for_modifiers(R11a_kap_IIa, IIa, RP); R11a__Activation_of_RP_by_IIa is "R11a: Activation of RP by IIa";  // modifiers: IIa
  R11b__Activation_of_RP_by_AP: RP => AP; compartment*Function_for_modifiers(R11b_kAP_AP, AP, RP); R11b__Activation_of_RP_by_AP is "R11b: Activation of RP by AP";
  R12a__Activation_of_PLS_by_tPA_Ia: PLS => PLA; compartment*Function_for_modifiers(R12a_kPLA, tPA_Ia, PLS); R12a__Activation_of_PLS_by_tPA_Ia is "R12a: Activation of PLS by tPA:Ia";  // modifiers: tPA_Ia
  R12b__Inhibition_of_PLA_bt_L2AP: PLA + L2AP => PLA_L2AP; compartment*R12b_hPLA*PLA*L2AP; R12b__Inhibition_of_PLA_bt_L2AP is "R12b: Inhibition of PLA bt L2AP";

  // Unit definitions:
  unit volume = 1e-3 litre;
  unit substance = 1e-9 mole;
end
