// SBML level 2 version 4
// dcterms:bibliographicCitation: urn:miriam:pubmed:25601154

function function_for_v27(k27, K1, X1, Ki2, X2)
  k27/(K1 + X1/Ki2)*X2;
end

function function_for_v25(k, X1)
  k*X1;
end

function function_for_v20(k, X1)
  k*X1;
end

function function_for_v23(Vmax, X1, K, Vbasal)
  Vmax*(X1^2/(K^2 + X1^2)) + Vbasal;
end

function function_for_v1(k1, x1, W)
  k1*x1*W;
end

function function_for_v18(Vmax, K_HOS, Ki, X1)
  Vmax*(1/(K_HOS^2 + (X1/Ki)^2));
end

function function_for_v3(k3, x2, x4)
  k3*x2*x4;
end

function Constant_flux__irreversible(v)
  v;
end
Constant_flux__irreversible is "Constant flux (irreversible)";

model Benary2015___feedback_regulation_of_beta_catenin_pathway_by_HOS_and_FWD1()
  // Benary2015 - feedback regulation of beta-catenin pathway by HOS and FWD1
  // It's a mathematical model studying feedback control of B-catenin pathway by HOS and FWD1 using Lee2003 model as base.
  // isDerivedFrom kegg.pathway:xla04310 mamo:MAMO_0000046 taxonomy:262014 biomodels.db:BIOMD0000000658
  // isDescribedBy biomodels.db:BIOMD0000000658 pubmed:25601154
  // hasProperty kegg.pathway:xla04310
  // hasProperty mamo:MAMO_0000046
  // hasTaxon taxonomy:262014

  // Compartments:
  compartment Cytoplasm = 1;  // FMA:66835
  compartment Nucleus = 1;  // isVersionOf GO:0005634

  // Species:
  species Dsh_i in Cytoplasm = Dsh0 - Dsh_a;  // isHomologTo uniprot:P51142
  species Dsh_a in Cytoplasm = 0;  // isHomologTo uniprot:P51142
  species APC__axin__GSK3 in Cytoplasm = 0.00966; APC__axin__GSK3 is "APC*_axin*_GSK3";  // hasPart uniprot:P70039; hasPart uniprot:Q9YGY0; hasPart uniprot:Q91757
  species APC_axin_GSK3 in Cytoplasm = 0.00483;  // hasPart uniprot:P70039; hasPart uniprot:Q91757; hasPart uniprot:Q9YGY0
  species GSK3 in Cytoplasm = 50;  // isVersionOf uniprot:Q91757
  species APC_axin in Cytoplasm = 0.00098065;  // hasPart uniprot:Q9YGY0; hasPart uniprot:P70039
  species APC in Cytoplasm = 98;  // isVersionOf uniprot:P70039
  species B_catenin_APC__axin__GSK3 in Cytoplasm = 0.00202; B_catenin_APC__axin__GSK3 is "B_catenin_APC*_axin*_GSK3";  // hasPart uniprot:P70039; hasPart uniprot:Q9YGY0; hasPart uniprot:Q91757; hasPart uniprot:P26233
  species B_catenin__APC__axin__GSK3 in Cytoplasm = 0.00202; B_catenin__APC__axin__GSK3 is "B_catenin*_APC*_axin*_GSK3";  // hasPart uniprot:P70039; hasPart uniprot:P26233; hasPart uniprot:Q91757; hasPart uniprot:Q9YGY0
  species B_catenin in Cytoplasm = 1; B_catenin is "B_catenin*";  // isVersionOf uniprot:P26233
  species B_catenin_0 in Nucleus = 25.1;  // isVersionOf uniprot:P26233
  species Axin in Cytoplasm = 0.000493;  // isVersionOf uniprot:Q9YGY0
  species TCF in Nucleus = 8.17;  // uniprot:P70062
  species B_catenin_TCF in Nucleus = 6.83;  // hasPart uniprot:P26233; hasPart uniprot:P70062
  species B_catenin_APC in Cytoplasm = 2.05;  // hasPart uniprot:P26233; hasPart uniprot:P70039
  species $Wnt in Cytoplasm;  // isInstanceOf uniprot:Q670P5; isPropertyOf uniprot:Q670P5
  species HOS_mRNA in Cytoplasm = 0;  // isVersionOf uniprot:Q9UKB1; hasProperty ncit:C813
  // paralog of human b-TrcP
  species HOS in Cytoplasm = 0;  // hasProperty uniprot:Q9UKB1
  species CRD_BP_mRNA in Cytoplasm = 0; CRD_BP_mRNA is "CRD-BP_mRNA";  // isVersionOf uniprot:O73932; hasProperty ncit:C813
  species CRD_BP in Cytoplasm = 0; CRD_BP is "CRD-BP";  // uniprot.isoform:O73932
  species FWD1_mRNA in Cytoplasm = 0;  // isVersionOf uniprot.isoform:Q91854; hasProperty ncit:C813
  species FWD1 in Cytoplasm = 0;  // hasVersion uniprot:Q91854
  species B_catenin__APC__axin__GSK3_HOS in Cytoplasm = 0; B_catenin__APC__axin__GSK3_HOS is "B_catenin*_APC*_axin*_GSK3_HOS";  // hasPart uniprot:Q9YGY0; hasPart uniprot:P70039; hasPart uniprot:Q9UKB1; hasPart uniprot:Q91757
  species B_catenin__APC__axin__GSK3_FWD in Cytoplasm = 0; B_catenin__APC__axin__GSK3_FWD is "B_catenin*_APC*_axin*_GSK3_FWD1";  // hasPart uniprot:P26233; hasPart uniprot:Q91854; hasPart uniprot:Q91757; hasPart uniprot:P70039

  // Parameters:
  k1 = 0.182;
  k2 = 0.0182;
  k3 = 0.05;
  k4 = 0.267;
  k5 = 0.133;
  k6 = 0.0909;
  k_6 = 0.909;
  k7 = 1;
  k8 = 206;
  k9 = 206;
  k11 = 0.417;
  k12 = 0.423;
  k13 = 0.000257;
  k14 = 8.22e-5;
  k15 = 0.167;
  k16 = 1;
  k17 = 1;
  K_7 = 50; K_7 is "amp_7";
  K_8 = 120; K_8 is "amp_8";
  K_16 = 30; K_16 is "amp_16";
  K_17 = 1200; K_17 is "amp_17";
  lambda = 0.05;
  t0 = 40;
  Dsh0 = 100;
  Vmax18 = 1e-6;
  K_HOS = 1;
  k19 = 0.00048;
  k20 = 30;
  k21 = 0.038;
  Vmax23 = 4.22e-6;
  Vbasal = 9e-8;
  K_CRD_BP = 585; K_CRD_BP is "K_CRD-BP";
  k24 = 0.00246;
  k25 = 0.013;
  k26 = 7.35e-5;
  k27 = 0.003;
  K_FWD1 = 3e-6;
  var Ki2; Ki2 is "Ki27";
  k28 = 1e-6;
  k29 = 30;
  k30 = 0.0058;
  k10a = 206;
  k10b = 206;
  k22b = 206;
  k22a = 206;
  k31 = 0.0228;
  k32 = 0.0028;
  FWD1_feedback = 0;
  HOS_feedback = 0.6;
  Initial_for_FWD1_feedback = FWD1_feedback;
  Initial_for_HOS_feedback = HOS_feedback;

  // Assignment rules:
  Ki18 := 1/Initial_for_HOS_feedback;
  Ki2 := 1/Initial_for_FWD1_feedback;
  k_7 := k7*K_7;
  k_8 := k8*K_8;
  k_16 := k16*K_16;
  k_17 := k17*K_17;
  Total_B_Catenin := B_catenin_APC__axin__GSK3 + B_catenin__APC__axin__GSK3 + B_catenin + B_catenin_0 + B_catenin_TCF + B_catenin_APC;
  Total_Axin := APC__axin__GSK3 + APC_axin_GSK3 + APC_axin + B_catenin_APC__axin__GSK3 + B_catenin__APC__axin__GSK3 + Axin;
  Wnt := piecewise(0, time < t0, exp(-1*lambda*(time - t0)));

  // Reactions:
  v1: Dsh_i => Dsh_a; Cytoplasm*function_for_v1(k1, Dsh_i, Wnt);  // modifiers: Wnt
  v2: Dsh_a => Dsh_i; Cytoplasm*k2*Dsh_a;
  v3: APC_axin_GSK3 => GSK3 + APC_axin; Cytoplasm*function_for_v3(k3, Dsh_a, APC_axin_GSK3);  // modifiers: Dsh_a
  v4: APC_axin_GSK3 => APC__axin__GSK3; Cytoplasm*k4*APC_axin_GSK3;  // isVersionOf GO:0016310
  v5: APC__axin__GSK3 => APC_axin_GSK3; Cytoplasm*k5*APC__axin__GSK3;  // isVersionOf GO:0016311
  v6: GSK3 + APC_axin -> APC_axin_GSK3; Cytoplasm*(k6*GSK3*APC_axin - k_6*APC_axin_GSK3);
  v7: APC + Axin -> APC_axin; Cytoplasm*(k7*APC*Axin - k_7*APC_axin);
  v8: APC__axin__GSK3 + B_catenin_0 -> B_catenin_APC__axin__GSK3; k8*APC__axin__GSK3*B_catenin_0 - k_8*B_catenin_APC__axin__GSK3;
  v9: B_catenin_APC__axin__GSK3 => B_catenin__APC__axin__GSK3; Cytoplasm*k9*B_catenin_APC__axin__GSK3;  // isVersionOf GO:0016310
  v11: B_catenin => ; Cytoplasm*k11*B_catenin;
  v12: => B_catenin_0; Nucleus*Constant_flux__irreversible(k12);
  v13: B_catenin_0 => ; Nucleus*k13*B_catenin_0;
  v14: => Axin; Cytoplasm*Constant_flux__irreversible(k14);
  v15: Axin => ; Cytoplasm*k15*Axin;
  v16: B_catenin_0 + TCF -> B_catenin_TCF; Nucleus*(k16*B_catenin_0*TCF - k_16*B_catenin_TCF);
  v17: APC + B_catenin_0 -> B_catenin_APC; k17*APC*B_catenin_0 - k_17*B_catenin_APC;
  v18: => HOS_mRNA; function_for_v18(Vmax18, K_HOS, Ki18, B_catenin_TCF);  // modifiers: B_catenin_TCF
  v19: HOS_mRNA => ; Cytoplasm*k19*HOS_mRNA;
  v20: => HOS; Cytoplasm*function_for_v20(k20, HOS_mRNA);  // modifiers: HOS_mRNA
  v21: HOS => ; Cytoplasm*k21*HOS;
  v23: => CRD_BP_mRNA; function_for_v23(Vmax23, B_catenin_TCF, K_CRD_BP, Vbasal);  // modifiers: B_catenin_TCF
  v24: CRD_BP_mRNA => ; Cytoplasm*k24*CRD_BP_mRNA;
  v25: => CRD_BP; Cytoplasm*function_for_v25(k25, CRD_BP_mRNA);  // modifiers: CRD_BP_mRNA
  v26: CRD_BP => ; Cytoplasm*k26*CRD_BP;
  v27: FWD1_mRNA => ; Cytoplasm*function_for_v27(k27, K_FWD1, CRD_BP, Ki2, FWD1_mRNA);  // modifiers: CRD_BP; GO:0070934
  v28: => FWD1_mRNA; Cytoplasm*Constant_flux__irreversible(k28);
  v29: => FWD1; Cytoplasm*Constant_flux__irreversible(k29);
  v30: FWD1 => ; Cytoplasm*k30*FWD1;
  v22a: B_catenin__APC__axin__GSK3 + HOS => B_catenin__APC__axin__GSK3_HOS; Cytoplasm*k22a*B_catenin__APC__axin__GSK3*HOS;
  v22b: B_catenin__APC__axin__GSK3 + FWD1 => B_catenin__APC__axin__GSK3_FWD; Cytoplasm*k22b*B_catenin__APC__axin__GSK3*FWD1;
  v10b: B_catenin__APC__axin__GSK3_FWD => FWD1 + B_catenin + APC__axin__GSK3; Cytoplasm*k10b*B_catenin__APC__axin__GSK3_FWD;
  v10a: B_catenin__APC__axin__GSK3_HOS => HOS + B_catenin + APC__axin__GSK3; Cytoplasm*k10a*B_catenin__APC__axin__GSK3_HOS;
  v31: => TCF; Nucleus*Constant_flux__irreversible(k31);
  v32: TCF => ; Nucleus*k32*TCF;

  // Unit definitions:
  unit volume = 1e-3 litre;
  unit time = 60 second;
  unit substance = 1e-6 mole;
end
