// SBML level 2 version 4

model MODEL1506220000()
  // Benson2017 - Systems Pharmacology Multidrug (cholesterol biosynthesis pathway)
  // BensonWattersonetal_SystemsPharmacology_Multidrug
  // This model is described in the article:
  // Is systems pharmacology ready to impact upon therapy development? A study on the cholesterol biosynthesis pathway.
  // Benson H, Watterson S, Sharman J, Mpamhanga C, Parton A, Southan C, Harmar A, Ghazal P.
  // Br. J. Pharmacol. 2017 Sep; :
  // Abstract:
  // An ever-growing wealth of information on current drugs and their pharmacological effects is available from online databases. As our understanding of systems biology increases, we have the opportunity to predict, model and quantify how drug combinations can be introduced that outperform conventional single-drug therapies. Here, we explore the feasibility of such systems pharmacology approaches with an analysis of the mevalonate branch of the cholesterol biosynthesis pathway.Using open online resources, we assembled a computational model of the mevalonate pathway and compiled a set of inhibitors directed against targets in this pathway. We used computational optimisation to identify combination and dose options that show not only maximal efficacy of inhibition on the cholesterol producing branch but also minimal impact on the geranylation branch, known to mediate the side effects of pharmaceutical treatment.We describe serious impediments to systems pharmacology studies arising from limitations in the data, incomplete coverage and inconsistent reporting. By curating a more complete dataset, we demonstrate the utility of computational optimization for identifying multi-drug treatments with high efficacy and minimal off-target effects.We suggest solutions that facilitate systems pharmacology studies, based on the introduction of standards for data capture that increase the power of experimental data. We propose a systems pharmacology work-flow for the refinement of data and the generation of future therapeutic hypotheses.
  // This model is hosted on BioModels Database and identified by: MODEL1506220000.
  // To cite BioModels Database, please use: Chelliah V et al. BioModels: ten-year anniversary. Nucl. Acids Res. 2015, 43(Database issue):D542-8.
  // To the extent possible under law, all copyright and related or neighbouring rights to this encoded model have been dedicated to the public domain worldwide. Please refer to CC0 Public Domain Dedication for more information.
  // biomodels.db:MODEL1506220000

  // Compartments:
  compartment default = 1 volume;

  // Species:
  species _3_hydroxy_3_methylglutaryl_CoA in default = 0; _3_hydroxy_3_methylglutaryl_CoA is "3-hydroxy-3-methylglutaryl-CoA";
  species presqualene_PP in default = 0; presqualene_PP is "presqualene-PP";
  species squalene in default = 0;
  species FDFT1 in default = 0;
  species mevalonate_P in default = 0; mevalonate_P is "mevalonate-P";
  species MVK in default = 0;
  species mevalonate_PP in default = 0; mevalonate_PP is "mevalonate-PP";
  species PMVK in default = 0;
  species isopentenyl_PP in default = 0; isopentenyl_PP is "isopentenyl-PP";
  species MVD in default = 0;
  species dimethylallyl_PP in default = 0; dimethylallyl_PP is "dimethylallyl-PP";
  species geranyl_PP in default = 0; geranyl_PP is "geranyl-PP";
  species FDPS in default = 0;
  species GGPS1 in default = 0;
  species IDI2 in default = 0;
  species IDI1 in default = 0;
  species geranylgeranyl_PP in default = 0; geranylgeranyl_PP is "geranylgeranyl-PP";
  species acetyl_CoA in default = 0; acetyl_CoA is "acetyl-CoA";
  species HMGCR in default = 0;
  species acetoacetyl_CoA in default = 0; acetoacetyl_CoA is "acetoacetyl-CoA";
  species HMGCS1 in default = 0;
  species mevaldyl_CoA in default = 0; mevaldyl_CoA is "mevaldyl-CoA";
  species mevalonate in default = 0;
  species farnesyl_PP in default = 0; farnesyl_PP is "farnesyl-PP";
  species L_659_699 in default = 0; L_659_699 is "L-659,699";
  species rosuvastatin in default = 0;
  species farnesyl_thiodiphosphate in default = 0;
  species cinnamic_acid in default = 0;
  species _6_fluoromevalonate_5_diphosphate in default = 0; _6_fluoromevalonate_5_diphosphate is "6-fluoromevalonate 5-diphosphate";
  species zoledronic_acid in default = 0;
  species BPH_628 in default = 0; BPH_628 is "BPH-628";
  species zaragozic_acid in default = 0;

  // Reactions:
  re14: acetyl_CoA + acetoacetyl_CoA => _3_hydroxy_3_methylglutaryl_CoA; kc1*acetyl_CoA*acetoacetyl_CoA*HMGCS1/((re14_km11*(1 + L_659_699/ki14) + acetoacetyl_CoA)*(re14_km12*(1 + L_659_699/ki14) + acetyl_CoA));  // modifiers: HMGCS1, L_659_699
    kc1 = 6.65 substance; re14_km11 = 0.0785 substance; re14_km12 = 0.0785 substance; ki14 = 53.7 substance;
  re12: isopentenyl_PP + geranyl_PP => farnesyl_PP; kc11*isopentenyl_PP*geranyl_PP*FDPS/((re12_km11*(1 + zoledronic_acid/ki12) + isopentenyl_PP)*(re12_km12*(1 + zoledronic_acid/ki12) + geranyl_PP)) + kc12*isopentenyl_PP*geranyl_PP*GGPS1/((re12_km11*(1 + BPH_628/ki12b) + isopentenyl_PP)*(re12_km12*(1 + BPH_628/ki12b) + geranyl_PP));  // modifiers: FDPS, GGPS1, zoledronic_acid, BPH_628
    kc11 = 6.65 substance; kc12 = 6.65 substance; re12_km11 = 0.0351 substance; re12_km12 = 0.0351 substance; ki12 = 0.07 substance; ki12b = 20 substance;
  re13: farnesyl_PP + isopentenyl_PP => geranylgeranyl_PP; kc13*GGPS1*isopentenyl_PP*farnesyl_PP/((km13*(1 + BPH_628/ki13) + farnesyl_PP)*(re13_km14*(1 + BPH_628/ki13) + isopentenyl_PP));  // modifiers: GGPS1, BPH_628
    kc13 = 0.204 substance; km13 = 0.0027 substance; re13_km14 = 0.0027 substance; ki13 = 20 substance;
  re17: farnesyl_PP => presqualene_PP; kc14*FDFT1*farnesyl_PP*farnesyl_PP/((re17_km14*(1 + zaragozic_acid/ki17) + farnesyl_PP)*(re17_km14*(1 + zaragozic_acid/ki17) + farnesyl_PP));  // modifiers: FDFT1, zaragozic_acid
    kc14 = 6.65 substance; re17_km14 = 0.0016 substance; ki17 = 0.25 substance;
  re18: presqualene_PP => squalene; kc15*presqualene_PP*FDFT1/(km15*(1 + zaragozic_acid/ki18) + presqualene_PP);  // modifiers: FDFT1, zaragozic_acid
    kc15 = 6.65 substance; km15 = 0.0016 substance; ki18 = 0.25 substance;
  re15: _3_hydroxy_3_methylglutaryl_CoA => mevaldyl_CoA; kc2*HMGCR*_3_hydroxy_3_methylglutaryl_CoA/(km2*(1 + rosuvastatin/ki15) + _3_hydroxy_3_methylglutaryl_CoA);  // modifiers: HMGCR, rosuvastatin
    kc2 = 0.0023 substance; km2 = 0.0765 substance; ki15 = 2.3 substance;
  re16: mevaldyl_CoA => mevalonate; kc3*HMGCR*mevaldyl_CoA/(km3*(1 + rosuvastatin/ki16) + mevaldyl_CoA);  // modifiers: HMGCR, rosuvastatin
    kc3 = 0.0023 substance; km3 = 0.0765 substance; ki16 = 2.3 substance;
  re7: mevalonate => mevalonate_P; kc4*MVK*mevalonate/(km4*(1 + farnesyl_thiodiphosphate/ki7) + mevalonate);  // modifiers: MVK, farnesyl_thiodiphosphate
    kc4 = 21.9 substance; km4 = 0.0337 substance; ki7 = 29 substance;
  re8: mevalonate_P => mevalonate_PP; kc5*PMVK*mevalonate_P/(km5*(1 + cinnamic_acid/ki8) + mevalonate_P);  // modifiers: PMVK, cinnamic_acid
    kc5 = 6.65 substance; km5 = 0.034 substance; ki8 = 2480000 substance;
  re9: mevalonate_PP => isopentenyl_PP; kc6*MVD*mevalonate_PP/(km6*(1 + _6_fluoromevalonate_5_diphosphate/ki9) + mevalonate_PP);  // modifiers: MVD, _6_fluoromevalonate_5_diphosphate
    kc6 = 4.5 substance; km6 = 0.0262 substance; ki9 = 62 substance;
  re10: isopentenyl_PP => dimethylallyl_PP; kc7*IDI1*isopentenyl_PP/(km7 + isopentenyl_PP) + kc8*IDI2*isopentenyl_PP/(km8 + isopentenyl_PP);  // modifiers: IDI1, IDI2
    kc7 = 6.65 substance; kc8 = 6.65 substance; km7 = 0.0279 substance; km8 = 0.0279 substance;
  re11: dimethylallyl_PP + isopentenyl_PP => geranyl_PP; kc9*isopentenyl_PP*dimethylallyl_PP*FDPS/((km9*(1 + zoledronic_acid/ki11) + dimethylallyl_PP)*(km10*(1 + zoledronic_acid/ki11) + isopentenyl_PP)) + kc10*isopentenyl_PP*dimethylallyl_PP*GGPS1/((km9*(1 + BPH_628/ki11b) + dimethylallyl_PP)*(km10*(1 + BPH_628/ki11b) + isopentenyl_PP));  // modifiers: FDPS, GGPS1, zoledronic_acid, BPH_628
    kc9 = 6.65 substance; kc10 = 6.65 substance; km9 = 0.0351 substance; km10 = 0.0351 substance; ki11 = 0.07 substance; ki11b = 20 substance;

  // Unit definitions:
  unit substance = mole;
  unit volume = litre;
  unit area = metre^2;
  unit length = metre;
  unit time = second;
end
