// SBML level 2 version 4
// dcterms:bibliographicCitation: urn:miriam:pubmed:22984498

model Brummel_Ziedins2012___Contribution_of_the_PC_pathway_to_thrombin_generation()
  // Brummel-Ziedins2012 - Contribution of the PC pathway to thrombin generation
  // Mathematical model of the blood coagulation cascade including meizothrombin, protein C, thrombomodulin, factor VIIIa fragments, partially proteolyzed factor Va species and inactive factor Va fragments.
  // isVersionOf GO:0007596
  // isDescribedBy pubmed:22984498

  // Compartments:
  compartment compartment = 1;

  // Species:
  species TF in compartment = 5e-12;
  species TF_VII in compartment = 0; TF_VII is "TF:VII";
  species VII in compartment = 1e-8;
  species TF_VIIa in compartment = 0; TF_VIIa is "TF:VIIa";
  species VIIa in compartment = 0;
  species Xa in compartment = 0;
  species IIa in compartment = 0;
  species TF_VIIa_X in compartment = 0; TF_VIIa_X is "TF:VIIa:X";
  species X in compartment = 1.6e-7;
  species TF_VIIa_Xa in compartment = 0; TF_VIIa_Xa is "TF:VIIa:Xa";
  species IX in compartment = 9e-8;
  species TF_VIIa_IX in compartment = 0; TF_VIIa_IX is "TF:VIIa:IX";
  species IXa in compartment = 0;
  species II in compartment = 1.4e-6;
  species VIII in compartment = 7e-10;
  species VIIIa in compartment = 0;
  species IXa_VIIIa in compartment = 0; IXa_VIIIa is "IXa:VIIIa";
  species IXa_VIIIa_X in compartment = 0; IXa_VIIIa_X is "IXa:VIIIa:X";
  species VIII_Ica1 in compartment = 0; VIII_Ica1 is "VIII.Ica1";
  species VIII_a2 in compartment = 0; VIII_a2 is "VIII.a2";
  species V in compartment = 2e-8;
  species Va in compartment = 0;
  species Xa_Va in compartment = 0; Xa_Va is "Xa:Va";
  species Xa_Va_II in compartment = 0; Xa_Va_II is "Xa:Va:II";
  species mIIa in compartment = 0;
  species TFPI in compartment = 2.5e-9;
  species Xa_TFPI in compartment = 0; Xa_TFPI is "Xa:TFPI";
  species TF_VIIa_Xa_TFPI in compartment = 0; TF_VIIa_Xa_TFPI is "TF:VIIa:Xa:TFPI";
  species ATIII in compartment = 3.6e-6;
  species Xa_ATIII in compartment = 0; Xa_ATIII is "Xa:ATIII";
  species mIIa_ATIII in compartment = 0; mIIa_ATIII is "mIIa:ATIII";
  species IXa_ATIII in compartment = 0; IXa_ATIII is "IXa:ATIII";
  species IIa_ATIII in compartment = 0; IIa_ATIII is "IIa:ATIII";
  species TF_VIIa_ATIII in compartment = 0; TF_VIIa_ATIII is "TF:VIIa:ATIII";
  species TM in compartment = 1e-9;
  species TM_IIa in compartment = 0; TM_IIa is "TM:IIa";
  species PC in compartment = 6.5e-8;
  species TM_IIa_PC in compartment = 0; TM_IIa_PC is "TM:IIa:PC";
  species APC in compartment = 0;
  species APC_Va in compartment = 0; APC_Va is "APC:Va";
  species Va5 in compartment = 0;
  species Va3 in compartment = 0;
  species APC_Va5 in compartment = 0; APC_Va5 is "APC:Va5";
  species APC_Va3 in compartment = 0; APC_Va3 is "APC:Va3";
  species Va53 in compartment = 0;
  species HCF in compartment = 0;
  species LCA1 in compartment = 0;
  species APC_LCA1 in compartment = 0; APC_LCA1 is "APC:LCA1";
  species TM_IIa_APC in compartment = 0; TM_IIa_APC is "TM:IIa:APC";
  species Xa_Va5 in compartment = 0; Xa_Va5 is "Xa:Va5";
  species Xa_Va3 in compartment = 0; Xa_Va3 is "Xa:Va3";
  species Xa_Va5_II in compartment = 0; Xa_Va5_II is "Xa:Va5:II";
  species Xa_Va3_II in compartment = 0; Xa_Va3_II is "Xa:Va3:II";
  species TM_mIIa in compartment = 0; TM_mIIa is "TM:mIIa";
  species TM_mIIa_PC in compartment = 0; TM_mIIa_PC is "TM:mIIa:PC";
  species Xa_Va53 in compartment = 0; Xa_Va53 is "Xa:Va53";
  species Xa_Va53_II in compartment = 0; Xa_Va53_II is "Xa:Va53:II";
  species II_Va in compartment = 0; II_Va is "II:Va";

  // Parameters:
  k01 = 0.0031;
  k02 = 3200000;
  k03 = 0.0031;
  k04 = 23000000;
  k05 = 440000;
  k06 = 13000000;
  k07 = 23000;
  k08 = 1.05;
  k09 = 25000000;
  k10 = 6;
  k11 = 19;
  k12 = 22000000;
  k13 = 2.4;
  k14 = 10000000;
  k15 = 1.8;
  k16 = 7500;
  k17 = 237;
  k18 = 0.005;
  k19 = 10000000;
  k20 = 0.001;
  k21 = 100000000;
  k22 = 8.2;
  k23 = 22000;
  k24 = 0.006;
  k25 = 0.001;
  k26 = 20000000;
  k27 = 0.075;
  k28 = 150000000;
  k29 = 103;
  k30 = 100000000;
  k31 = 63.5;
  k32 = 230000000;
  k33 = 0.00036;
  k34 = 900000;
  k35 = 0.00011;
  k36 = 320000000;
  k37 = 50000000;
  k38 = 4200;
  k39 = 7100;
  k40 = 490;
  k41 = 7100;
  k42 = 230;
  k43 = 0.33;
  k44 = 100000000;
  k45 = 100;
  k46 = 100000000;
  k47 = 0.41;
  k48 = 7100;
  k49 = 0.7;
  k50 = 100000000;
  k51 = 1;
  k52 = 0.192;
  k53 = 0.028;
  k54 = 0.15;
  k55 = 10.3;
  k56 = 10.3;
  k57 = 46000000;
  k58 = 46000000;
  k59 = 0.0035;
  k60 = 5700;
  k61 = 3000000;
  k62 = 70;
  k63 = 100000000;
  k64 = 4050000;

  // Reactions:
  R01: TF + VII -> TF_VII; compartment*(k02*TF*VII - k01*TF_VII);
  R02: TF + VIIa -> TF_VIIa; compartment*(k04*TF*VIIa - k03*TF_VIIa);
  R03: TF_VIIa + VII => TF_VIIa + VIIa; compartment*k05*TF_VIIa*VII;
  R04: Xa + VII => Xa + VIIa; compartment*k06*Xa*VII;
  R05: IIa + VII => IIa + VIIa; compartment*k07*IIa*VII;
  R06: TF_VIIa + X -> TF_VIIa_X; compartment*(k09*TF_VIIa*X - k08*TF_VIIa_X);
  R07: TF_VIIa_X => TF_VIIa_Xa; compartment*k10*TF_VIIa_X;
  R08: TF_VIIa + Xa -> TF_VIIa_Xa; compartment*(k12*TF_VIIa*Xa - k11*TF_VIIa_Xa);
  R09: TF_VIIa + IX -> TF_VIIa_IX; compartment*(k14*TF_VIIa*IX - k13*TF_VIIa_IX);
  R10: TF_VIIa_IX => TF_VIIa + IXa; compartment*k15*TF_VIIa_IX;
  R11: Xa + II => Xa + IIa; compartment*k16*Xa*II;
  R12: IIa + VIII => IIa + VIIIa; compartment*k17*IIa*VIII;
  R13: IXa + VIIIa -> IXa_VIIIa; compartment*(k19*IXa*VIIIa - k18*IXa_VIIIa);
  R14: IXa_VIIIa + X -> IXa_VIIIa_X; compartment*(k21*IXa_VIIIa*X - k20*IXa_VIIIa_X);
  R15: IXa_VIIIa_X => IXa_VIIIa + Xa; compartment*k22*IXa_VIIIa_X;
  R16: VIIIa -> VIII_Ica1 + VIII_a2; compartment*(k24*VIIIa - k23*VIII_Ica1*VIII_a2);
  R17: IXa_VIIIa_X => VIII_Ica1 + VIII_a2 + IXa; compartment*k25*IXa_VIIIa_X;
  R18: IXa_VIIIa => VIII_Ica1 + VIII_a2 + IXa; compartment*k25*IXa_VIIIa;
  R19: IIa + V => IIa + Va; compartment*k26*IIa*V;
  R20: Xa + Va -> Xa_Va; compartment*(k28*Xa*Va - k27*Xa_Va);
  R21: Xa_Va + II -> Xa_Va_II; compartment*(k30*Xa_Va*II - k29*Xa_Va_II);
  R22: Xa_Va_II => Xa_Va + mIIa; compartment*k31*Xa_Va_II;
  R23: mIIa + Xa_Va => IIa + Xa_Va; compartment*k32*mIIa*Xa_Va;
  R24: Xa + TFPI -> Xa_TFPI; compartment*(k34*Xa*TFPI - k33*Xa_TFPI);
  R25: TF_VIIa_Xa + TFPI -> TF_VIIa_Xa_TFPI; compartment*(k36*TF_VIIa_Xa*TFPI - k35*TF_VIIa_Xa_TFPI);
  R26: TF_VIIa + Xa_TFPI => TF_VIIa_Xa_TFPI; compartment*k37*TF_VIIa*Xa_TFPI;
  R27: Xa + ATIII => Xa_ATIII; compartment*k38*Xa*ATIII;
  R28: mIIa + ATIII => mIIa_ATIII; compartment*k39*mIIa*ATIII;
  R29: IXa + ATIII => IXa_ATIII; compartment*k40*IXa*ATIII;
  R30: IIa + ATIII => IIa_ATIII; compartment*k41*IIa*ATIII;
  R31: TF_VIIa + ATIII => TF_VIIa_ATIII; compartment*k42*TF_VIIa*ATIII;
  R32: TM + IIa -> TM_IIa; compartment*(k44*TM*IIa - k43*TM_IIa);
  R33: TM_IIa + PC -> TM_IIa_PC; compartment*(k46*TM_IIa*PC - k45*TM_IIa_PC);
  R34: TM_IIa_PC => TM_IIa + APC; compartment*k47*TM_IIa_PC;
  R35: TM_IIa + ATIII => IIa_ATIII + TM; compartment*k48*TM_IIa*ATIII;
  R36: APC + Va -> APC_Va; compartment*(k50*APC*Va - k49*APC_Va);
  R37: APC_Va => APC + Va5; compartment*k51*APC_Va;
  R38: APC_Va => APC + Va3; compartment*k52*APC_Va;
  R39: APC + Va5 -> APC_Va5; compartment*(k50*APC*Va5 - k49*APC_Va5);
  R40: APC + Va3 -> APC_Va3; compartment*(k50*APC*Va3 - k49*APC_Va3);
  R41: APC_Va3 => APC + Va53; compartment*k51*APC_Va3;
  R42: APC_Va5 => APC + Va53; compartment*k52*APC_Va5;
  R43: Va3 => HCF + LCA1; compartment*k53*Va3;
  R44: Va53 => HCF + LCA1; compartment*k53*Va53;
  R45: APC + LCA1 -> APC_LCA1; compartment*(k50*APC*LCA1 - k49*APC_LCA1);
  R46: APC + TM_IIa -> TM_IIa_APC; compartment*(k46*APC*TM_IIa - k45*TM_IIa_APC);
  R47: Xa + Va5 -> Xa_Va5; compartment*(k28*Xa*Va5 - k54*Xa_Va5);
  R48: Xa + Va3 -> Xa_Va3; compartment*(k28*Xa*Va3 - k54*Xa_Va3);
  R49: Xa_Va5 + II -> Xa_Va5_II; compartment*(k30*Xa_Va5*II - k29*Xa_Va5_II);
  R50: Xa_Va5_II => Xa_Va5 + mIIa; compartment*k55*Xa_Va5_II;
  R51: Xa_Va3 + II -> Xa_Va3_II; compartment*(k30*Xa_Va3*II - k29*Xa_Va3_II);
  R52: Xa_Va3_II => Xa_Va3 + mIIa; compartment*k56*Xa_Va3_II;
  R53: Xa_Va5 + mIIa => Xa_Va5 + IIa; compartment*k57*Xa_Va5*mIIa;
  R54: Xa_Va3 + mIIa => Xa_Va3 + IIa; compartment*k58*Xa_Va3*mIIa;
  R55: Xa_Va3 => HCF + LCA1 + Xa; compartment*k59*Xa_Va3;
  R56: Xa_Va3_II => HCF + LCA1 + Xa + II; compartment*k59*Xa_Va3_II;
  R57: IXa + X => IXa + Xa; compartment*k60*IXa*X;
  R58: mIIa + V => mIIa + Va; compartment*k61*mIIa*V;
  R59: TM + mIIa -> TM_mIIa; compartment*(k44*TM*mIIa - k43*TM_mIIa);
  R60: TM_mIIa + PC -> TM_mIIa_PC; compartment*(k46*TM_mIIa*PC - k45*TM_mIIa_PC);
  R61: TM_mIIa_PC => TM_mIIa + APC; compartment*k47*TM_mIIa_PC;
  R62: TM_mIIa + ATIII => mIIa_ATIII + TM; compartment*k48*TM_mIIa*ATIII;
  R63: Xa + Va53 -> Xa_Va53; compartment*(k28*Xa*Va53 - k54*Xa_Va53);
  R64: Xa_Va53 + II -> Xa_Va53_II; compartment*(k30*Xa_Va53*II - k29*Xa_Va53_II);
  R65: Xa_Va53_II => Xa_Va53 + mIIa; compartment*k56*Xa_Va53_II;
  R66: Xa_Va53 + mIIa => Xa_Va53 + IIa; compartment*k58*Xa_Va53*mIIa;
  R67: Xa_Va53 => HCF + LCA1 + Xa; compartment*k59*Xa_Va53;
  R68: Xa_Va53_II => HCF + LCA1 + Xa + II; compartment*k59*Xa_Va53_II;
  R69: II + Va -> II_Va; compartment*(k63*II*Va - k62*II_Va);
  R70: Xa_Va5 + APC => Xa_Va53 + APC; compartment*k64*Xa_Va5*APC;

  // Unit definitions:
  unit volume = 1e-3 litre;
end
