// SBML level 2 version 4

model Caruso2020_Alternative_Complement_Pathway_model()
  // Caruso2020 - Alternative Complement Pathway model
  // SBML export of the Alternative Complement Pathway model published by Caruso et al. 2020
  // hasProperty mamo:MAMO_0000046

  // Compartments:
  compartment Retina = 3 MWBUILTINUNIT_liter;

  // Species:
  species C3 in Retina = 5.4;  // substance in mole
  species C5 in Retina = 0.37;  // substance in mole
  species C6 in Retina = 0.5;  // substance in mole
  species C7 in Retina = 0.5;  // substance in mole
  species C8 in Retina = 0.36;  // substance in mole
  species C9 in Retina = 0.9;  // substance in mole
  species B in Retina = 2.2;  // substance in mole
  species D in Retina = 0.083;  // substance in mole
  species I in Retina = 0.4;  // substance in mole
  species P in Retina = 0.47;  // substance in mole
  species H in Retina = 3.2;  // substance in mole
  species CR1 in Retina = 0.0083;  // substance in mole
  species DAF in Retina = 0.027;  // substance in mole
  species Vn in Retina = 6;  // substance in mole
  species Cn in Retina = 0.43;  // substance in mole
  species CD59 in Retina = 0.21;  // substance in mole
  species Surface_host in Retina = 12.0611;  // substance in mole
  species H2O in Retina = 0;  // substance in mole
  species drug in Retina = 0;  // substance in mole
  // [Host compl deposit] = [C3b host] + [iC3b host] + [C3dg host] + [C3bBb host]+ [C3bBbC3b host] + [MAC host] + [C3bB host] + [C3bBbC3bC5bC6 host]+ [C5b7 host] + [C5b8 host]+ [C5b9_1 host]+[C5b9_2 host]+[C5b9_3 host]+[C5b9_4 host]+[C5b9_5 host]+ [C5b9_6 host]+[C5b9_7 host]+[C5b9_8 host]+[C5b9_9 host]+[C5b9_10 host]
  species Host_compl_deposit in Retina;  // substance in mole
  // [Terminal_fluid_phase] = [hC5b7 fluid] + [C5b8 fluid] + [C5b7 micelle]+ [VnC5b7 fluid] + [VnC5b8 fluid] + [VnC5b9_1 fluid]+ [CnC5b7 fluid] + [CnC5b8 fluid] + [CnC5b9_1 fluid]+ [C5b9_1 fluid]
  species Terminal_fluid_phase in Retina;  // substance in mole
  species sC5b9 in Retina;  // substance in mole
  species C3d_Ab_Wilcox in Retina;  // substance in mole
  species C3b_fluid_sum in Retina;  // substance in mole
  // [C3b_surf_deposit] = [C3b host] + [iC3b host] + [iC3bP host] + [C3bBb host] + [C3bBbC3b host]+ [C3bBbC3bCR1 host] + [C3bBbC3bDAF host] + [C3bBbC3bH host] + [C3bBbP host]+ [C3bBbC3bP host] + [C3bBP host] + [C3bBbC3bPC5 host] + [C3bBbC3bC5 host] + [C3bBbC3bPC5b host] + [C3bBbC3bC5b host] + [C3bBbC3bPC5bC6 host] + [C3bBbC3bC5bC6 host]+ [C3bCR1 host] + [C3bH host] + [C3bB host] + [C3bBbH host] + [C3bBbCR1 host] + [C3bBbDAF host] + [iC3bCR1 host]
  species C3b_surf_deposit in Retina;  // substance in mole
  // [Total_surface] = [Surface host] + [C3bBb host] + [C3bBbC3b host] + [C3bBbC3bCR1 host] + [C3b host]+ [C3bBbC3bDAF host] + [C3bBbC3bH host] + [C3bBbP host] + [C3bBbC3bP host] + [C3bBP host]+ [iC3b host] + [iC3bP host] + [C3bBbC3bPC5 host] + [C3bBbC3bC5 host] + [C3bBbC3bPC5b host]+ [C3bBbC3bC5b host] + [C3bBbC3bPC5bC6 host] + [C3bBbC3bC5bC6 host] + 4 * [C5b7 host] + [C3bCR1 host]+ [C3bH host] + [C3bB host] + [C3bBbH host] + [C3bBbCR1 host] + [C3bBbDAF host]+ [iC3bCR1 host] + [C3dg host] + 4 * [C5b8 host] + 4 * [C5b9_1 host] + 4 * [C5b9_2 host]+ 4 * [C5b9_3 host] + 4 * [C5b9_4 host] + 4 * [C5b9_5 host] + 4 * [C5b9_6 host] + 4 * [C5b9_7 host]+ 4 * [C5b9_8 host] + 4 * [C5b9_9 host] + 4 * [C5b9_10 host] + 4 * [C5b9_11 host] + 4 * [C5b9_12 host]+ 4 * [C5b9_13 host] + 4 * [C5b9_14 host] + 4 * [C5b9_15 host] + 4 * [C5b9_16 host] + 4 * [C5b9_17 host]+ 4 * [MAC host] + 4 * [CD59C5b9_1 host]
  species Total_surface in Retina;  // substance in mole
  species C3bBbC3b_P_sum in Retina;  // substance in mole
  species C3_ugmL in Retina;  // substance in mole
  species C3a_ugmL in Retina;  // substance in mole
  species C3b_fluid_ugmL in Retina;  // substance in mole
  species C3b_host_ugmL in Retina;  // substance in mole
  species iC3b_fluid_ugmL in Retina;  // substance in mole
  species iC3b_host_ugmL in Retina;  // substance in mole
  species C3dg_host_ugmL in Retina;  // substance in mole
  species C3dg_fluid_ugmL in Retina;  // substance in mole
  species C5_ugmL in Retina;  // substance in mole
  species C5a_ugmL in Retina;  // substance in mole
  species C6_ugmL in Retina;  // substance in mole
  species C7_ugmL in Retina;  // substance in mole
  species C8_ugmL in Retina;  // substance in mole
  species C9_ugmL in Retina;  // substance in mole
  species Bb_ugmL in Retina;  // substance in mole
  species B_ugmL in Retina;  // substance in mole
  species D_ugmL in Retina;  // substance in mole
  species I_ugmL in Retina;  // substance in mole
  species H_ugmL in Retina;  // substance in mole
  species CR1_ugmL in Retina;  // substance in mole
  species DAF_ugmL in Retina;  // substance in mole
  species Vn_ugmL in Retina;  // substance in mole
  species Cn_ugmL in Retina;  // substance in mole
  species CD59_ugmL in Retina;  // substance in mole
  species NumC8_host in Retina;  // substance in mole
  species NumC9_host in Retina;  // substance in mole
  species Erythrocytes_uM in Retina;  // substance in mole
  species Hemoglobin_g_dL in Retina;  // substance in mole
  species Erythrocytes_N_L in Retina;  // substance in mole
  species Hematocrit_Percent in Retina;  // substance in mole
  species LDH_U_L in Retina = 0;  // substance in mole
  species C3_H2O_fluid in Retina = 0; C3_H2O_fluid is "C3(H2O) fluid";  // substance in mole
  species C3_H2O_B_fluid in Retina = 0; C3_H2O_B_fluid is "C3(H2O)B fluid";  // substance in mole
  species C3_H2O_H_fluid in Retina = 0; C3_H2O_H_fluid is "C3(H2O)H fluid";  // substance in mole
  species C3_H2O_CR1_fluid in Retina = 0; C3_H2O_CR1_fluid is "C3(H2O)CR1 fluid";  // substance in mole
  species C3_H2O_Bb_fluid in Retina = 0; C3_H2O_Bb_fluid is "C3(H2O)Bb fluid";  // substance in mole
  species Bb in Retina = 0;  // substance in mole
  species C3_H2O_BbH_fluid in Retina = 0; C3_H2O_BbH_fluid is "C3(H2O)BbH fluid";  // substance in mole
  species Ba in Retina = 0;  // substance in mole
  species nfC3b in Retina = 0;  // substance in mole
  species C3b_fluid in Retina = 0;  // substance in mole
  species nhC3b in Retina = 0;  // substance in mole
  species C3bB_fluid in Retina = 0;  // substance in mole
  species C3bH_fluid in Retina = 0;  // substance in mole
  species C3bCR1_fluid in Retina = 0;  // substance in mole
  species C3bBb_fluid in Retina = 0;  // substance in mole
  species C3bBbH_fluid in Retina = 0;  // substance in mole
  species C3bBbCR1_fluid in Retina = 0;  // substance in mole
  species C3bBb_host in Retina = 0;  // substance in mole
  species C3bBbC3b_host in Retina = 0;  // substance in mole
  species C3bBbC3bCR1_host in Retina = 0;  // substance in mole
  species C3b_host in Retina = 0;  // substance in mole
  species C3bBbC3bDAF_host in Retina = 0;  // substance in mole
  species C3bBbC3bH_host in Retina = 0;  // substance in mole
  species C3a in Retina = 0;  // substance in mole
  species C3bBbP_host in Retina = 0;  // substance in mole
  species C3bBbC3bP_host in Retina = 0;  // substance in mole
  species C3bBP_host in Retina = 0;  // substance in mole
  species iC3b_host in Retina = 0;  // substance in mole
  species iC3bP_host in Retina = 0;  // substance in mole
  species C3bBbC3bPC5_host in Retina = 0;  // substance in mole
  species C3bBbC3bC5_host in Retina = 0;  // substance in mole
  species C3bBbC3bPC5b_host in Retina = 0;  // substance in mole
  species C3bBbC3bC5b_host in Retina = 0;  // substance in mole
  species C3bBbC3bPC5bC6_host in Retina = 0;  // substance in mole
  species C3bBbC3bC5bC6_host in Retina = 0;  // substance in mole
  species hC5b7_fluid in Retina = 0;  // substance in mole
  species C5b in Retina = 0;  // substance in mole
  species C5a in Retina = 0;  // substance in mole
  species C5b7_host in Retina = 0;  // substance in mole
  species C3bCR1_host in Retina = 0;  // substance in mole
  species C3bH_host in Retina = 0;  // substance in mole
  species C3bB_host in Retina = 0;  // substance in mole
  species C3bBbH_host in Retina = 0;  // substance in mole
  species C3bBbCR1_host in Retina = 0;  // substance in mole
  species C3bBbDAF_host in Retina = 0;  // substance in mole
  species iC3bCR1_host in Retina = 0;  // substance in mole
  species C3dg_host in Retina = 0;  // substance in mole
  species iC3b_fluid in Retina = 0;  // substance in mole
  species iC3bCR1_fluid in Retina = 0;  // substance in mole
  species C3dg_fluid in Retina = 0;  // substance in mole
  species C5b7_micelle in Retina = 0;  // substance in mole
  species C5b8_fluid in Retina = 0;  // substance in mole
  species CnC5b7_fluid in Retina = 0;  // substance in mole
  species VnC5b7_fluid in Retina = 0;  // substance in mole
  species C5b8_host in Retina = 0;  // substance in mole
  species C5b9_1_host in Retina = 0;  // substance in mole
  species C5b9_2_host in Retina = 0;  // substance in mole
  species C5b9_3_host in Retina = 0;  // substance in mole
  species C5b9_4_host in Retina = 0;  // substance in mole
  species C5b9_5_host in Retina = 0;  // substance in mole
  species C5b9_6_host in Retina = 0;  // substance in mole
  species C5b9_7_host in Retina = 0;  // substance in mole
  species C5b9_8_host in Retina = 0;  // substance in mole
  species C5b9_9_host in Retina = 0;  // substance in mole
  species C5b9_10_host in Retina = 0;  // substance in mole
  species C5b9_11_host in Retina = 0;  // substance in mole
  species C5b9_12_host in Retina = 0;  // substance in mole
  species C5b9_13_host in Retina = 0;  // substance in mole
  species C5b9_14_host in Retina = 0;  // substance in mole
  species C5b9_15_host in Retina = 0;  // substance in mole
  species C5b9_16_host in Retina = 0;  // substance in mole
  species C5b9_17_host in Retina = 0;  // substance in mole
  species MAC_host in Retina = 0;  // substance in mole
  species CD59C5b9_1_host in Retina = 0;  // substance in mole
  species VnC5b8_fluid in Retina = 0;  // substance in mole
  species VnC5b9_1_fluid in Retina = 0;  // substance in mole
  species CnC5b8_fluid in Retina = 0;  // substance in mole
  species CnC5b9_1_fluid in Retina = 0;  // substance in mole
  species C5b9_1_fluid in Retina = 0;  // substance in mole
  species C5drug in Retina = 0;  // substance in mole
  species C5drug_C5 in Retina = 0;  // substance in mole
  species Ecu in Retina = 0;  // substance in mole
  species Ecu_C5 in Retina = 0;  // substance in mole

  // Parameters:
  // Hydrolysis of C3(H2O) [1]
  k_p_C3_H20 = 8.3e-7 MWDERIVEDUNIT_1__second; k_p_C3_H20 is "k_p_C3(H20)";
  // Association of Factor B to C3(H2O) [E1]
  k_p_C3_H20_B = 213000 MWDERIVEDUNIT_1__molarity__second; k_p_C3_H20_B is "k_p_C3(H20)B";
  // Dissociation of complex C3(H2O)B [E1]
  k_m_C3_H20_B = 0.155 MWDERIVEDUNIT_1__second; k_m_C3_H20_B is "k_m_C3(H20)B";
  // Association of Factor H to C3(H2O) [E1]
  k_p_C3bH = 1100000 MWDERIVEDUNIT_1__molarity__second;
  // Dissociation of complex C3(H2O)H [E1]
  k_m_C3bH = 0.059 MWDERIVEDUNIT_1__second;
  // Association of Factor H to surface bound proteins
  k_p_C3bH_surf = 1100000 MWDERIVEDUNIT_1__molarity__second;
  // Association of CR1 to C3b [E2, 7, 8, 9]
  k_p_C3bCR1 = 4400000 MWDERIVEDUNIT_1__molarity__second;
  // Dissociation of complex C3bCR1 [E2, 7, 8, 9]
  k_m_C3bCR1 = 0.057 MWDERIVEDUNIT_1__second;
  // Dissociation of complex C3(H2O)Bb [2]
  k_m_C3_H2O_Bb = 0.009 MWDERIVEDUNIT_1__second; k_m_C3_H2O_Bb is "k_m_C3(H2O)Bb";
  // k_c
  k_m_C3bBbH_decay = 0.077 MWDERIVEDUNIT_1__second;
  // Association of nfC3b, nhC3b, and npC3b to water [C1]
  k_p_fC3b = 12000 MWDERIVEDUNIT_1__second;
  // Association of Factor B to C3b [3]
  k_p_C3bB = 222590 MWDERIVEDUNIT_1__molarity__second;
  // Dissociation of complex C3bB [3]
  k_m_C3bB = 0.155 MWDERIVEDUNIT_1__second;
  // Dissociation of complex C3bBb [2]
  k_m_C3bBb = 0.0077 MWDERIVEDUNIT_1__second;
  // Decay of C3 convertase by inhibitor CR1 on host cell [Assumption]
  k_m_C3bBbCR1_decay = 0.077 MWDERIVEDUNIT_1__second;
  // Association of C3b to C3bBb [5, Optimization]
  k_p_C3bBbC3b = 3500000 MWDERIVEDUNIT_1__molarity__second;
  // Dissociation of complex C3bBbC3b [12]
  k_m_C3bBbC3b = 0.0038 MWDERIVEDUNIT_1__second;
  // Decay of C3 convertase by inhibitor DAF on cell [Assumption]
  k_m_C3bBbDAF_decay = 0.0022756 MWDERIVEDUNIT_1__second;
  // Attachment of nfC3b to host cell [Calculated]
  k_p_C3b_surface = 2.160216e9 MWDERIVEDUNIT_1__molarity__second;
  // Attachment of nhC3b to cell [Calculated]
  k_p_hC3b = 26745.53 MWDERIVEDUNIT_1__molarity__second;
  // Attachment of C5b7 to cell [Calculated]
  k_p_C5b7_surface = 420000000 MWDERIVEDUNIT_1__molarity__second;
  // Association of DAF to C3 convertase on cell [E3, 10]
  k_p_C3bBbDAF = 2.5295e10 MWDERIVEDUNIT_1__molarity__second;
  // Association of iC3b to CR1 [E4, 8, 11]
  k_p_iC3bCR1 = 2000 MWDERIVEDUNIT_1__molarity__second;
  // Dissociation of complex iC3bCR1 [E4, 8, 11]
  k_m_iC3bCR1 = 0.01 MWDERIVEDUNIT_1__second;
  // Dissociation of complex C3bBbC3bC5b [14]
  k_m_C5b = 0.038 MWDERIVEDUNIT_1__second;
  // Association of C7 to C3bBbC3bC5bC6 [5, 15, 16]
  k_p_C5b7 = 730000 MWDERIVEDUNIT_1__molarity__second;
  // Dissociation of complex C3bBbC3bC5bC6C7 [5, 15, 16]
  k_m_C5b7 = 8e-7 MWDERIVEDUNIT_1__second;
  // Association of C8 to C5b7 [5, 15, 16]
  k_p_C5b8 = 1100000 MWDERIVEDUNIT_1__molarity__second;
  // Dissociation of complex C5b8 [5, 15, 16]
  k_m_C5b8 = 9.8e-7 MWDERIVEDUNIT_1__second;
  // Association of C9 to C5b8 [5, 15, 16]
  k_p_C5b9 = 2800000 MWDERIVEDUNIT_1__molarity__second;
  // Dissociation of complex C5b9 [5, 15, 16]
  k_m_C5b9 = 1e-6 MWDERIVEDUNIT_1__second;
  // Association of CD59 to C5b9 [Assumption]
  k_p_CD59C5b9 = 6.028e11 MWDERIVEDUNIT_1__molarity__second;
  // Dissociation of complex CD59C5b9 [Assumption]
  k_m_CD59C5b9 = 0.0002 MWDERIVEDUNIT_1__second;
  // Association of C6 to C3bBbC3bC5b [5, 15]
  k_p_C3bBbC3bC5bC6 = 77436 MWDERIVEDUNIT_1__molarity__second;
  // Dissociation of complex C3bBbC3bC5bC6 [5, 15]
  k_m_C3bBbC3bC5bC6 = 9e-8 MWDERIVEDUNIT_1__second;
  // Formation of C5b7 micelle in fluid [16]
  k_p_C5b7_micelle = 69.3 MWDERIVEDUNIT_1__second;
  // Association of Cn to C5b7 [E5]
  k_p_CnC5b7 = 410000 MWDERIVEDUNIT_1__molarity__second;
  // Dissociation of complex CnC5b7 [E5]
  k_m_CnC5b7 = 0.004 MWDERIVEDUNIT_1__second;
  // Association of Vn to C5b7 [5, 17]
  k_p_VnC5b7 = 240000 MWDERIVEDUNIT_1__molarity__second;
  // Dissociation of complex VnC5b7 [Assumption]
  k_m_VnC5b7 = 0.002 MWDERIVEDUNIT_1__second;
  // Association of C8 to VnC5b7 [A1]
  k_p_VnC5b8 = 1100000 MWDERIVEDUNIT_1__molarity__second;
  // Dissociation of complex VnC5b8 [A1]
  k_m_VnC5b8 = 9.8e-7 MWDERIVEDUNIT_1__second;
  // Association of C9 to VnC5b8 [A2]
  k_p_VnC5b9 = 2800000 MWDERIVEDUNIT_1__molarity__second;
  // Dissociation of complex VnC5b9 [A2]
  k_m_VnC5b9 = 1e-6 MWDERIVEDUNIT_1__second;
  // Association of Cn to C5b8 [A3]
  k_p_CnC5b8 = 1100000 MWDERIVEDUNIT_1__molarity__second;
  // Dissociation of complex CnC5b8 [A3]
  k_m_CnC5b8 = 730000 MWDERIVEDUNIT_1__second;
  // Association of C9 to CnC5b8 [A4]
  k_p_CnC5b9 = 2800000 MWDERIVEDUNIT_1__molarity__second;
  // Dissociation of complex CnC5b9 [A4]
  k_m_CnC5b9 = 1e-6 MWDERIVEDUNIT_1__second;
  // Activation of complex C3(H2O)B by enzyme Factor D [E6]
  k_D_cat_C3_H2O_B = 2.1 MWDERIVEDUNIT_1__second; k_D_cat_C3_H2O_B is "k_D_cat_C3(H2O)B";
  // Activation of complex C3(H2O)B by enzyme Factor D [E6]
  K_D_m_C3_H2O_B = 1e-7 MWBUILTINUNIT_molarity; K_D_m_C3_H2O_B is "K_D_m_C3(H2O)B";
  // Activation of complex C3bB by enzyme Factor D [5, Optimization]
  k_D_cat_C3bB = 2.1 MWDERIVEDUNIT_1__second;
  // Activation of complex C3bB by enzyme Factor D [5, Optimization]
  K_D_m_C3bB = 1e-7 MWBUILTINUNIT_molarity;
  // Cleavage of C3 by C3 convertase C3(H20)Bb [5, Optimization],
  k_C3_cat_C3_H2O_Bb = 1.8 MWDERIVEDUNIT_1__second; k_C3_cat_C3_H2O_Bb is "k_C3_cat_C3(H2O)Bb";
  // Cleavage of C3 by C3 convertase C3(H20)Bb [5, Optimization] Optimization,
  K_C3_m_C3_H2O_Bb = 4.191e-6 MWBUILTINUNIT_molarity; K_C3_m_C3_H2O_Bb is "K_C3_m_C3(H2O)Bb";
  // Cleavage of C3 by C3 convertase C3bBb [2],
  k_C3_cat_C3bBb = 1.8 MWDERIVEDUNIT_1__second;
  // Cleavage of C3 by C3 convertase C3bBb [2],
  K_C3_m_C3bBb = 5.9e-6 MWBUILTINUNIT_molarity;
  // Cleavage of C3b by inhibitor Factor I [6]
  k_FI_cat_C3bH = 1.3 MWDERIVEDUNIT_1__second;
  // Cleavage of C3b by inhibitor Factor I [6]
  K_FI_m_C3bH = 2.5e-7 MWBUILTINUNIT_molarity;
  // Cleavage of C5 by C5 convertase C3bBbC3b,
  k_C5_cat_C3bBbC3b = 0.003 MWDERIVEDUNIT_1__second;
  // Cleavage of C5 by C5 convertase C3bBbC3b,
  K_C5_m_C3bBbC3b = 1.6e-8 MWBUILTINUNIT_molarity;
  // Association of P to C3b on cell [5, Optimization]
  k_p_C3bP = 123700000 MWDERIVEDUNIT_1__molarity__second;
  // Dissociation of C3bP on cell [4]
  k_m_C3bP = 0.0005 MWDERIVEDUNIT_1__second;
  // Association of Factor B to C3bP [was set to k_p_C3bB]
  k_p_C3bBP = 213000 MWDERIVEDUNIT_1__molarity__second;
  // Dissociation of complex C3bBbP [?]
  k_m_C3bBbP = 0.00077 MWDERIVEDUNIT_1__second;
  // Association of Properdin to iC3b [5] Optimization
  k_p_iC3bP = 3000000 MWDERIVEDUNIT_1__molarity__second;
  // Dissociation of from iC3b [4]
  k_m_iC3bP = 0.00038 MWDERIVEDUNIT_1__second;
  // Cleavage of C3 by C3 convertase C3bBbP [5, Optimization]
  k_C3_cat_C3bBbP = 3.1 MWDERIVEDUNIT_1__second;
  // Cleavage of C3 by C3 convertase C3bBbP [5, Optimization]
  K_C3_m_C3bBbP = 1.8e-6 MWBUILTINUNIT_molarity;
  // Dissociation of DAF complexes on cell
  k_m_C3bBbDAF = 0.0012 MWDERIVEDUNIT_1__second;
  // Decay of C3bBbC3bP on cell
  k_m_C3bBbC3bP = 0.00057 MWDERIVEDUNIT_1__second;
  // Production of eryhtrocytes
  k_pr_erythrocytes = 0 MWDERIVEDUNIT_molarity__second;
  // Degradation of eryhtrocytes
  k_el_erythrocytes = 0 MWDERIVEDUNIT_1__second;
  // Production of eryhtrocytes surface
  k_pr_surface = 0 MWDERIVEDUNIT_molarity__second;
  // Max rate of lysis of eryhtrocytes
  k_hemolysis_max = 0 MWDERIVEDUNIT_1__second;
  // Logic indicator whether k_hemolysis should be calculated or not
  k_hemolysis_on = 0 dimensionless;
  // Typical time used to scale between percentage hemolysis and k_hemolysis
  k_hemolysis_typical_T = 0 second;
  // Actual rate of lysis of eryhtrocytes
  k_hemolysis = 0 MWDERIVEDUNIT_1__second;
  // Elimination of C3
  k_el_C3 = 0 MWDERIVEDUNIT_1__second;
  // Elimination of C5
  k_el_C5 = 0 MWDERIVEDUNIT_1__second;
  // Elimination of C6
  k_el_C6 = 0 MWDERIVEDUNIT_1__second;
  // Elimination of C7
  k_el_C7 = 0 MWDERIVEDUNIT_1__second;
  // elimnation of C8
  k_el_C8 = 0 MWDERIVEDUNIT_1__second;
  // Elimination of C9
  k_el_C9 = 0 MWDERIVEDUNIT_1__second;
  // Elimination of D
  k_el_D = 0 MWDERIVEDUNIT_1__second;
  // Elimination of B
  k_el_B = 0 MWDERIVEDUNIT_1__second;
  // Elimination of I
  k_el_I = 0 MWDERIVEDUNIT_1__second;
  // Elimination of H
  k_el_H = 0 MWDERIVEDUNIT_1__second;
  // Elimination of Vn
  k_el_Vn = 0 MWDERIVEDUNIT_1__second;
  // Elimination of Cn
  k_el_Cn = 0 MWDERIVEDUNIT_1__second;
  // Elimination of Properdin
  k_el_P = 0 MWDERIVEDUNIT_1__second;
  // Elimination of CR1
  k_el_CR1 = 0 MWDERIVEDUNIT_1__second;
  // Elimination of CD59
  k_el_CD59 = 0 MWDERIVEDUNIT_1__second;
  // Elimination of DAF
  k_el_DAF = 0 MWDERIVEDUNIT_1__second;
  // Elimination of generic surface protein
  k_el_SurfaceProtein = 0 MWDERIVEDUNIT_1__second;
  // Elimination of Ba
  k_el_Ba = 0 MWDERIVEDUNIT_1__second;
  // Elimination of Bb
  k_el_Bb = 0 MWDERIVEDUNIT_1__second;
  // Elimination of C3a
  k_el_C3a = 0 MWDERIVEDUNIT_1__second;
  // Elimination of C5a
  k_el_C5a = 0 MWDERIVEDUNIT_1__second;
  // Elimination of C5b_species
  k_el_C5b_species = 0 MWDERIVEDUNIT_1__second;
  // Elimination of iC3b
  k_el_iC3b = 0 MWDERIVEDUNIT_1__second;
  // Elimination of C3dg
  k_el_C3dg = 0 MWDERIVEDUNIT_1__second;
  // Elimination of generic drug
  k_el_Drug = 0 MWDERIVEDUNIT_1__second;
  // Production of C3
  k_pr_C3 = 0 MWDERIVEDUNIT_molarity__second;
  // Production of C5
  k_pr_C5 = 0 MWDERIVEDUNIT_molarity__second;
  // Production of C6
  k_pr_C6 = 0 MWDERIVEDUNIT_molarity__second;
  // Production of C7
  k_pr_C7 = 0 MWDERIVEDUNIT_molarity__second;
  // elimnation of C8
  k_pr_C8 = 0 MWDERIVEDUNIT_molarity__second;
  // Production of C9
  k_pr_C9 = 0 MWDERIVEDUNIT_molarity__second;
  // Production of D
  k_pr_D = 0 MWDERIVEDUNIT_molarity__second;
  // Production of B
  k_pr_B = 0 MWDERIVEDUNIT_molarity__second;
  // Production of P
  k_pr_P = 0 MWDERIVEDUNIT_molarity__second;
  // Production of I
  k_pr_I = 0 MWDERIVEDUNIT_molarity__second;
  // Production of H
  k_pr_H = 0 MWDERIVEDUNIT_molarity__second;
  // Production of Vn
  k_pr_Vn = 0 MWDERIVEDUNIT_molarity__second;
  // Production of Cn
  k_pr_Cn = 0 MWDERIVEDUNIT_molarity__second;
  // Production of CR1
  k_pr_CR1 = 0 MWDERIVEDUNIT_molarity__second;
  // Production of DAF
  k_pr_DAF = 0 MWDERIVEDUNIT_molarity__second;
  // Production of CD59
  k_pr_CD59 = 0 MWDERIVEDUNIT_molarity__second;
  // Concentrations of cells with ACP active surface
  cells_uM = NaN; cells_uM has MWBUILTINPREFIX_micro_MWBUILTINUNIT_molarity;
  // Concentrations of cells with ACP active surface at t = 0
  Surface_per_cell = 1452672 dimensionless;
  // DAF per cell
  DAF_per_Surface = 0.002238602 dimensionless;
  // CR1 per cell
  CR1_per_Surface = 0.000688163 dimensionless;
  // CD59 per cell
  CD59_per_Surface = 0.01741135 dimensionless;
  // Molecular weight of C3
  C3_MW = 185000 dimensionless;
  // Molecular weight of C3a
  C3a_MW = 9000 dimensionless;
  // Molecular weight of C33
  C3b_MW = 176000 dimensionless;
  // Molecular weight of iC3b
  iC3b_MW = 187000 dimensionless;
  // Molecular weight of C3dg
  C3dg_MW = 38000 dimensionless;
  // Molecular weight of C5
  C5_MW = 191000 dimensionless;
  // Molecular weight of C5a
  C5a_MW = 11200 dimensionless;
  // Molecular weight of C5b
  C5b_MW = 180000 dimensionless;
  // Molecular weight of C6
  C6_MW = 120000 dimensionless;
  // Molecular weight of C7
  C7_MW = 110000 dimensionless;
  // Molecular weight of C8
  C8_MW = 151000 dimensionless;
  // Molecular weight of C9
  C9_MW = 71000 dimensionless;
  // Molecular weight of Ba
  Ba_MW = 30000 dimensionless;
  // Molecular weight of Bb
  Bb_MW = 63000 dimensionless;
  // Molecular weight of B
  B_MW = 93000 dimensionless;
  // Molecular weight of D
  D_MW = 24000 dimensionless;
  // Molecular weight of I
  I_MW = 88000 dimensionless;
  // Molecular weight of P
  P_MW = 53000 dimensionless;
  // Molecular weight of H
  H_MW = 155000 dimensionless;
  // Molecular weight of CR1
  CR1_MW = 190000 dimensionless;
  // Molecular weight of DAF
  DAF_MW = 70000 dimensionless;
  // Molecular weight of Vn
  Vn_MW = 83000 dimensionless;
  // Molecular weight of Cn
  Cn_MW = 80000 dimensionless;
  // Molecular weight of CD59
  CD59_MW = 18000 dimensionless;
  // Lyis in percent based on Takeda
  Percent_Lysis_Takeda = 0 dimensionless;
  // Lyis in percent based on Kolb
  Percent_Lysis_Kolb = 0 dimensionless;
  // Lyis in percent as mean from lysis based on Takeda and Kolb
  Percent_Lysis_Mean has dimensionless;
  // Molecular weight of hemoglobin
  Hemoglobin_MW = 64500 dimensionless;
  // Number of hemoglobin molecules per cell
  Hemoglobin_Per_RBC = 270000000 dimensionless;
  // Avogadro constant [1/mol]
  Avogadro = 6.022141e23 dimensionless;
  // Volume of a single eryhthrocyte
  Volume_RBC = 9e-14 dimensionless;
  // kon of C5 therapeutic binder
  kon_C5drug = 0 MWDERIVEDUNIT_1__molarity__second;
  // koff of C5 therapeutic binder
  koff_C5drug = 0 MWDERIVEDUNIT_1__second;
  // kon of C5 therapeutic binder
  kon_Ecu = 0 MWDERIVEDUNIT_1__molarity__second;
  // koff of C5 therapeutic binder
  koff_Ecu = 0 MWDERIVEDUNIT_1__second;

  // Assignment rules:
  Host_compl_deposit := C3b_host + iC3b_host + C3dg_host + C3bBb_host + C3bBbC3b_host + MAC_host + C3bB_host + C3bBbC3bC5bC6_host + C5b7_host + C5b8_host + C5b9_1_host + C5b9_2_host + C5b9_3_host + C5b9_4_host + C5b9_5_host + C5b9_6_host + C5b9_7_host + C5b9_8_host + C5b9_9_host + C5b9_10_host;
  Terminal_fluid_phase := hC5b7_fluid + C5b8_fluid + C5b7_micelle + VnC5b7_fluid + VnC5b8_fluid + VnC5b9_1_fluid + CnC5b7_fluid + CnC5b8_fluid + CnC5b9_1_fluid + C5b9_1_fluid;
  sC5b9 := VnC5b9_1_fluid + CnC5b9_1_fluid + C5b9_1_fluid;
  C3d_Ab_Wilcox := C3b_host + iC3b_host + iC3bP_host + C3bBb_host + C3bBbC3b_host + C3bBbC3bCR1_host + C3bBbC3bDAF_host + C3bBbC3bH_host + C3bBbP_host + C3bBbC3bP_host + C3bBP_host + C3bBbC3bPC5_host + C3bBbC3bC5_host + C3bBbC3bPC5b_host + C3bBbC3bC5b_host + C3bBbC3bPC5bC6_host + C3bBbC3bC5bC6_host + C3bCR1_host + C3bH_host + C3bB_host + C3bBbH_host + C3bBbCR1_host + C3bBbDAF_host + iC3bCR1_host + C3dg_host;
  C3b_fluid_sum := nfC3b + nhC3b + C3b_fluid + C3bB_fluid + C3bH_fluid + C3bCR1_fluid + C3bBb_fluid + C3bBbH_fluid + C3bBbCR1_fluid + iC3b_fluid + iC3bCR1_fluid + C3dg_fluid;
  C3b_surf_deposit := C3b_host + iC3b_host + iC3bP_host + C3bBb_host + C3bBbC3b_host + C3bBbC3bCR1_host + C3bBbC3bDAF_host + C3bBbC3bH_host + C3bBbP_host + C3bBbC3bP_host + C3bBP_host + C3bBbC3bPC5_host + C3bBbC3bC5_host + C3bBbC3bPC5b_host + C3bBbC3bC5b_host + C3bBbC3bPC5bC6_host + C3bBbC3bC5bC6_host + C3bCR1_host + C3bH_host + C3bB_host + C3bBbH_host + C3bBbCR1_host + C3bBbDAF_host + iC3bCR1_host;
  Total_surface := Surface_host + C3bBb_host + C3bBbC3b_host + C3bBbC3bCR1_host + C3b_host + C3bBbC3bDAF_host + C3bBbC3bH_host + C3bBbP_host + C3bBbC3bP_host + C3bBP_host + iC3b_host + iC3bP_host + C3bBbC3bPC5_host + C3bBbC3bC5_host + C3bBbC3bPC5b_host + C3bBbC3bC5b_host + C3bBbC3bPC5bC6_host + C3bBbC3bC5bC6_host + 4*C5b7_host + C3bCR1_host + C3bH_host + C3bB_host + C3bBbH_host + C3bBbCR1_host + C3bBbDAF_host + iC3bCR1_host + C3dg_host + 4*C5b8_host + 4*C5b9_1_host + 4*C5b9_2_host + 4*C5b9_3_host + 4*C5b9_4_host + 4*C5b9_5_host + 4*C5b9_6_host + 4*C5b9_7_host + 4*C5b9_8_host + 4*C5b9_9_host + 4*C5b9_10_host + 4*C5b9_11_host + 4*C5b9_12_host + 4*C5b9_13_host + 4*C5b9_14_host + 4*C5b9_15_host + 4*C5b9_16_host + 4*C5b9_17_host + 4*MAC_host + 4*CD59C5b9_1_host;
  C3bBbC3b_P_sum := C3bBbC3b_host + C3bBbC3bP_host;
  C3_ugmL := C3*C3_MW/1000;
  C3a_ugmL := C3a*C3a_MW/1000;
  C3b_fluid_ugmL := C3b_fluid*C3b_MW/1000;
  C3b_host_ugmL := C3b_host*C3b_MW/1000;
  iC3b_fluid_ugmL := iC3b_fluid*iC3b_MW/1000;
  iC3b_host_ugmL := iC3b_host*iC3b_MW/1000;
  C3dg_host_ugmL := C3dg_host*C3dg_MW/1000;
  C3dg_fluid_ugmL := C3dg_fluid*C3dg_MW/1000;
  C5_ugmL := C5*C5_MW/1000;
  C5a_ugmL := C5a*C5a_MW/1000;
  C6_ugmL := C6*C6_MW/1000;
  C7_ugmL := C7*C7_MW/1000;
  C8_ugmL := C8*C8_MW/1000;
  C9_ugmL := C9*C9_MW/1000;
  Bb_ugmL := Bb*Bb_MW/1000;
  B_ugmL := B*B_MW/1000;
  D_ugmL := D*D_MW/1000;
  I_ugmL := I*I_MW/1000;
  H_ugmL := H*H_MW/1000;
  CR1_ugmL := CR1*CR1_MW/1000;
  DAF_ugmL := DAF*DAF_MW/1000;
  Vn_ugmL := Vn*Vn_MW/1000;
  Cn_ugmL := Cn*Cn_MW/1000;
  CD59_ugmL := CD59*CD59_MW/1000;
  NumC8_host := C5b8_host + C5b9_1_host + C5b9_2_host + C5b9_3_host + C5b9_4_host + C5b9_5_host + C5b9_6_host + C5b9_7_host + C5b9_8_host + C5b9_9_host + C5b9_10_host + C5b9_11_host + C5b9_12_host + C5b9_13_host + C5b9_14_host + C5b9_15_host + C5b9_16_host + C5b9_17_host + MAC_host;
  NumC9_host := C5b9_1_host*1 + C5b9_2_host*2 + C5b9_3_host*3 + C5b9_4_host*4 + C5b9_5_host*5 + C5b9_6_host*6 + C5b9_7_host*7 + C5b9_8_host*8 + C5b9_9_host*9 + C5b9_10_host*10 + C5b9_11_host*11 + C5b9_12_host*12 + C5b9_13_host*13 + C5b9_14_host*14 + C5b9_15_host*15 + C5b9_16_host*16 + C5b9_17_host*17 + MAC_host*18;
  Percent_Lysis_Mean := (Percent_Lysis_Kolb + Percent_Lysis_Takeda)/2;
  Erythrocytes_uM := Total_surface/Surface_per_cell;
  Hemoglobin_g_dL := Erythrocytes_uM*1e-6*Hemoglobin_Per_RBC*Hemoglobin_MW/10;
  Erythrocytes_N_L := Erythrocytes_uM/1e6*Avogadro;
  Hematocrit_Percent := Erythrocytes_N_L*Volume_RBC*100;

  // Reactions:
  r1: C3 => C3_H2O_fluid; C3*k_p_C3_H20*Retina;
  r2: C3_H2O_fluid + B -> C3_H2O_B_fluid; (k_p_C3_H20_B*C3_H2O_fluid*B - k_m_C3_H20_B*C3_H2O_B_fluid)*Retina;
  r4: C3_H2O_fluid + H -> C3_H2O_H_fluid; (k_p_C3bH*C3_H2O_fluid*H - k_m_C3bH*C3_H2O_H_fluid)*Retina;
  r5: C3_H2O_fluid + CR1 -> C3_H2O_CR1_fluid; (k_p_C3bCR1*C3_H2O_fluid*CR1 - k_m_C3bCR1*C3_H2O_CR1_fluid)*Retina;
  r8: C3_H2O_Bb_fluid => C3_H2O_fluid + Bb; k_m_C3_H2O_Bb*C3_H2O_Bb_fluid*Retina;
  r9: C3_H2O_BbH_fluid => H + Bb + C3_H2O_fluid; k_m_C3bBbH_decay*C3_H2O_BbH_fluid*Retina;
  r10: C3_H2O_B_fluid + D => C3_H2O_Bb_fluid + Ba + D; ;
  r11: C3_H2O_Bb_fluid + H => C3_H2O_BbH_fluid; k_p_C3bH*C3_H2O_Bb_fluid*H*Retina;
  r12: nfC3b => C3b_fluid; k_p_fC3b*nfC3b*Retina;
  r13: nhC3b => C3b_fluid; k_p_fC3b*nhC3b*Retina;
  r14: C3b_fluid + B -> C3bB_fluid; (k_p_C3bB*C3b_fluid*B - k_m_C3bB*C3bB_fluid)*Retina;
  r15: C3b_fluid + H -> C3bH_fluid; (k_p_C3bH*C3b_fluid*H - k_m_C3bH*C3bH_fluid)*Retina;
  r16: C3b_fluid + CR1 -> C3bCR1_fluid; (k_p_C3bCR1*C3b_fluid*CR1 - k_m_C3bCR1*C3bCR1_fluid)*Retina;
  r17: C3bBb_fluid => Bb + C3b_fluid; k_m_C3bBb*C3bBb_fluid*Retina;
  r18: C3bBbH_fluid => H + Bb + C3b_fluid; k_m_C3bBbH_decay*C3bBbH_fluid*Retina;
  r19: C3bBbCR1_fluid => CR1 + Bb + C3b_fluid; k_m_C3bBbCR1_decay*C3bBbCR1_fluid*Retina;
  r20: C3b_fluid + C3bBb_host -> C3bBbC3b_host; (k_p_C3bBbC3b*C3b_fluid*C3bBb_host - k_m_C3bBbC3b*C3bBbC3b_host)*Retina;
  r21: C3bBbC3bCR1_host => CR1 + C3b_fluid + C3b_host + Bb; k_m_C3bBbCR1_decay*C3bBbC3bCR1_host*Retina;
  r22: C3bBbC3bDAF_host => DAF + C3b_fluid + C3b_host + Bb; k_m_C3bBbDAF_decay*C3bBbC3bDAF_host*Retina;
  r23: C3bBbC3bH_host => H + C3b_fluid + C3b_host + Bb; k_m_C3bBbH_decay*C3bBbC3bH_host*Retina;
  r24: C3bB_fluid + D => C3bBb_fluid + Ba + D; ;
  r25: C3bBb_fluid + H => C3bBbH_fluid; k_p_C3bH*H*C3bBb_fluid*Retina;
  r26: CR1 + C3bBb_fluid => C3bBbCR1_fluid; k_p_C3bCR1*CR1*C3bBb_fluid*Retina;
  r27: C3 => C3a + nfC3b; ;
  r28: C3 + C3bBb_fluid => C3a + nfC3b + C3bBb_fluid; k_C3_cat_C3bBb*C3*C3bBb_fluid/(K_C3_m_C3bBb + C3)*Retina;
  r29: nfC3b + Surface_host => C3b_host; k_p_C3b_surface*nfC3b*Surface_host*Retina;
  pr3: C3bBbP_host => P + C3b_host + Bb; k_m_C3bBbP*C3bBbP_host*Retina;
  pr14: C3 + C3bBbP_host => C3a + nhC3b + C3bBbP_host; k_C3_cat_C3bBbP*C3*C3bBbP_host/(K_C3_m_C3bBbP + C3)*Retina;
  pr16: C3bBbP_host + nhC3b => C3bBbC3bP_host; k_p_C3bBbC3b*C3bBbP_host*nhC3b*Retina;
  pr24: C3bBP_host + D => C3bBbP_host + Ba + D; ;
  pr21: C3bBb_host + P => C3bBbP_host; k_p_C3bP*C3bBb_host*P*Retina;
  pr23: C3bBbP_host + C3b_fluid => C3bBbC3bP_host; k_p_C3bBbC3b*C3bBbP_host*C3b_fluid*Retina;
  pr31: iC3b_host + P -> iC3bP_host; (k_p_iC3bP*iC3b_host*P - k_m_iC3bP*iC3bP_host)*Retina;
  pr33_1: C3bBbC3b_host + P -> C3bBbC3bP_host; (k_p_C3bP*C3bBbC3b_host*P - k_m_C3bP*C3bBbC3bP_host)*Retina;
  pr32: C3bBbC3bPC5_host => C3bBbC3bC5_host + P; k_m_C3bP*C3bBbC3bPC5_host*Retina;
  pr33: C3bBbC3bPC5b_host => C3bBbC3bC5b_host + P; k_m_C3bP*C3bBbC3bPC5b_host*Retina;
  pr34: C3bBbC3bPC5bC6_host => C3bBbC3bC5bC6_host + P; k_m_C3bP*C3bBbC3bPC5bC6_host*Retina;
  pr35: C3bBbC3bPC5bC6_host + C7 => C3bBbC3bP_host + hC5b7_fluid; k_p_C5b7*C3bBbC3bPC5bC6_host*C7*Retina;
  pr37: C3bBbC3bPC5b_host => C3bBbC3bP_host + C5b; k_m_C5b*C3bBbC3bPC5b_host*Retina;
  pr38: C3bBbC3bP_host + C5 => C5a + C3bBbC3bPC5b_host; k_C5_cat_C3bBbC3b*C3bBbC3bP_host*C5/(K_C5_m_C3bBbC3b + C5)*Retina;
  pr39: C3bBbC3bPC5b_host + C6 -> C3bBbC3bPC5bC6_host; (k_p_C3bBbC3bC5bC6*C3bBbC3bPC5b_host*C6 - k_m_C3bBbC3bC5bC6*C3bBbC3bPC5bC6_host)*Retina;
  r30: C3 + C3bBb_host => C3a + nhC3b + C3bBb_host; k_C3_cat_C3bBb*C3*C3bBb_host/(K_C3_m_C3bBb + C3)*Retina;
  r31: nhC3b + Surface_host => C3b_host; k_p_hC3b*nhC3b*Surface_host*15.6*Retina;
  r32: nhC3b + C3bBb_host => C3bBbC3b_host; k_p_C3bBbC3b*nhC3b*C3bBb_host*Retina;
  r33: hC5b7_fluid + Surface_host + Surface_host + Surface_host + Surface_host => C5b7_host; k_p_C5b7_surface*hC5b7_fluid*Surface_host*1.4*Retina;
  r34: C3b_host + CR1 -> C3bCR1_host; (k_p_C3bCR1*C3b_host*CR1 - k_m_C3bCR1*C3bCR1_host)*Retina;
  r35: C3b_host + H -> C3bH_host; (k_p_C3bH_surf*C3b_host*H - k_m_C3bH*C3bH_host)*Retina;
  r36: C3b_host + B -> C3bB_host; (k_p_C3bB*C3b_host*B - k_m_C3bB*C3bB_host)*Retina;
  r37: C3bBbH_host => H + Bb + C3b_host; k_m_C3bBbH_decay*C3bBbH_host*Retina;
  r37_0: C3bBb_host => Bb + C3b_host; k_m_C3bBb*C3bBb_host*Retina;
  r38: C3bBbCR1_host => CR1 + Bb + C3b_host; k_m_C3bBbCR1_decay*C3bBbCR1_host*Retina;
  r39: C3bBbDAF_host => DAF + Bb + C3b_host; k_m_C3bBbDAF_decay*C3bBbDAF_host*Retina;
  r40: C3bBbC3b_host => Bb + C3b_host + C3b_fluid; k_m_C3bBbC3b*C3bBbC3b_host*Retina;
  r41: C3bB_host + D => C3bBb_host + Ba + D; ;
  r42: C3bBb_host + H => C3bBbH_host; k_p_C3bH_surf*C3bBb_host*H*Retina;
  r43: C3bBb_host + CR1 => C3bBbCR1_host; k_p_C3bCR1*C3bBb_host*CR1*Retina;
  r44: C3bBb_host + DAF => C3bBbDAF_host; k_p_C3bBbDAF*C3bBb_host*DAF*Retina;
  r45: C3bCR1_host + I => CR1 + iC3b_host + I; ;
  r46: iC3b_host + CR1 -> iC3bCR1_host; (k_p_iC3bCR1*iC3b_host*CR1 - k_m_iC3bCR1*iC3bCR1_host)*Retina;
  r47: C3bH_host + I => H + iC3b_host + I; ;
  r48: iC3bCR1_host + I => CR1 + C3dg_host + I; ;
  r49: C3bH_fluid + I => H + iC3b_fluid + I; ;
  r50: iC3b_fluid + CR1 -> iC3bCR1_fluid; (k_p_iC3bCR1*iC3b_fluid*CR1 - k_m_iC3bCR1*iC3bCR1_fluid)*Retina;
  r51: C3bCR1_fluid + I => CR1 + iC3b_fluid + I; ;
  r52: iC3bCR1_fluid + I => CR1 + C3dg_fluid + I; ;
  r53: C3bBbC3b_host + CR1 => C3bBbC3bCR1_host; k_p_C3bCR1*C3bBbC3b_host*CR1*Retina;
  r54: C3bBbC3b_host + DAF => C3bBbC3bDAF_host; k_p_C3bBbDAF*C3bBbC3b_host*DAF*Retina;
  r55: C3bBbC3b_host + H => C3bBbC3bH_host; k_p_C3bH_surf*C3bBbC3b_host*H*Retina;
  r57: C3bBbC3bC5b_host => C5b + C3bBbC3b_host; k_m_C5b*C3bBbC3bC5b_host*Retina;
  r58: C3bBbC3bC5bC6_host + C7 => C3bBbC3b_host + hC5b7_fluid; k_p_C5b7*C3bBbC3bC5bC6_host*C7*Retina;
  r59: C3bBbC3b_host + C5 => C5a + C3bBbC3bC5b_host; k_C5_cat_C3bBbC3b*C3bBbC3b_host*C5/(K_C5_m_C3bBbC3b + C5)*Retina;
  r60: C3bBbC3bC5b_host + C6 -> C3bBbC3bC5bC6_host; (k_p_C3bBbC3bC5bC6*C3bBbC3bC5b_host*C6 - k_m_C3bBbC3bC5bC6*C3bBbC3bC5bC6_host)*Retina;
  r62: hC5b7_fluid => C5b7_micelle; k_p_C5b7_micelle*hC5b7_fluid*Retina;
  r63: hC5b7_fluid + C8 -> C5b8_fluid; (k_p_C5b8*hC5b7_fluid*C8 - k_m_C5b8*C5b8_fluid)*Retina;
  r64: hC5b7_fluid + Cn -> CnC5b7_fluid; (k_p_CnC5b7*hC5b7_fluid*Cn - k_m_CnC5b7*CnC5b7_fluid)*Retina;
  r65: hC5b7_fluid + Vn -> VnC5b7_fluid; (k_p_VnC5b7*hC5b7_fluid*Vn - k_m_VnC5b7*VnC5b7_fluid)*Retina;
  r66: C5b7_host + C8 => C5b8_host; k_p_C5b8*C5b7_host*C8*Retina;
  r67: C5b8_host + C9 => C5b9_1_host; k_p_C5b9*C5b8_host*C9*Retina;
  r67_1: C5b9_1_host + C9 => C5b9_2_host; k_p_C5b9*C5b9_1_host*C9*Retina;
  r67_2: C5b9_2_host + C9 => C5b9_3_host; k_p_C5b9*C5b9_2_host*C9*Retina;
  r67_3: C5b9_3_host + C9 => C5b9_4_host; k_p_C5b9*C5b9_3_host*C9*Retina;
  r67_4: C5b9_4_host + C9 => C5b9_5_host; k_p_C5b9*C5b9_4_host*C9*Retina;
  r67_5: C5b9_5_host + C9 => C5b9_6_host; k_p_C5b9*C5b9_5_host*C9*Retina;
  r67_6: C5b9_6_host + C9 => C5b9_7_host; k_p_C5b9*C5b9_6_host*C9*Retina;
  r67_7: C5b9_7_host + C9 => C5b9_8_host; k_p_C5b9*C5b9_7_host*C9*Retina;
  r67_8: C5b9_8_host + C9 => C5b9_9_host; k_p_C5b9*C5b9_8_host*C9*Retina;
  r67_9: C5b9_9_host + C9 => C5b9_10_host; k_p_C5b9*C5b9_9_host*C9*Retina;
  r67_10: C5b9_10_host + C9 => C5b9_11_host; k_p_C5b9*C5b9_10_host*C9*Retina;
  r67_11: C5b9_11_host + C9 => C5b9_12_host; k_p_C5b9*C5b9_11_host*C9*Retina;
  r67_12: C5b9_12_host + C9 => C5b9_13_host; k_p_C5b9*C5b9_12_host*C9*Retina;
  r67_13: C5b9_13_host + C9 => C5b9_14_host; k_p_C5b9*C5b9_13_host*C9*Retina;
  r67_14: C5b9_14_host + C9 => C5b9_15_host; k_p_C5b9*C5b9_14_host*C9*Retina;
  r67_15: C5b9_15_host + C9 => C5b9_16_host; k_p_C5b9*C5b9_15_host*C9*Retina;
  r67_16: C5b9_16_host + C9 => C5b9_17_host; k_p_C5b9*C5b9_16_host*C9*Retina;
  r68: C5b9_17_host + C9 => MAC_host; k_p_C5b9*C5b9_17_host*C9*Retina;
  r69: C5b9_1_host + CD59 -> CD59C5b9_1_host; (k_p_CD59C5b9*C5b9_1_host*CD59 - k_m_CD59C5b9*CD59C5b9_1_host)*Retina;
  r70: VnC5b7_fluid + C8 -> VnC5b8_fluid; (k_p_VnC5b8*VnC5b7_fluid*C8 - k_m_VnC5b8*VnC5b8_fluid)*Retina;
  r71: VnC5b8_fluid + C9 -> VnC5b9_1_fluid; (k_p_VnC5b9*VnC5b8_fluid*C9 - k_m_VnC5b9*VnC5b9_1_fluid)*Retina;
  r72: CnC5b7_fluid + C8 -> CnC5b8_fluid; (k_p_CnC5b8*CnC5b7_fluid*C8 - k_m_CnC5b8*CnC5b8_fluid)*Retina;
  r73: CnC5b8_fluid + C9 -> CnC5b9_1_fluid; (k_p_CnC5b9*CnC5b8_fluid*C9 - k_m_CnC5b9*CnC5b9_1_fluid)*Retina;
  r74: C5b8_fluid + C9 -> C5b9_1_fluid; (k_p_C5b9*C5b8_fluid*C9 - k_m_C5b9*C5b9_1_fluid)*Retina;
  r25_rev: C3bBbH_fluid => C3bBb_fluid + H; k_m_C3bH*C3bBbH_fluid*Retina;
  r42_rev: C3bBbH_host => C3bBb_host + H; k_m_C3bH*C3bBbH_host*Retina;
  r55_rev: C3bBbC3bH_host => C3bBbC3b_host + H; k_m_C3bH*C3bBbC3bH_host*Retina;
  r26_rev: C3bBbCR1_fluid => CR1 + C3bBb_fluid; k_m_C3bCR1*C3bBbCR1_fluid*Retina;
  r43_rev: C3bBbCR1_host => C3bBb_host + CR1; k_m_C3bCR1*C3bBbCR1_host*Retina;
  r53_rev: C3bBbC3bCR1_host => C3bBbC3b_host + CR1; k_m_C3bCR1*C3bBbC3bCR1_host*Retina;
  r44_rev: C3bBbDAF_host => C3bBb_host + DAF; k_m_C3bBbDAF*C3bBbDAF_host*Retina;
  r54_rev: C3bBbC3bDAF_host => C3bBbC3b_host + DAF; k_m_C3bBbDAF*C3bBbC3bDAF_host*Retina;
  pr21_rev: C3bBbP_host => C3bBb_host + P; k_m_C3bP*C3bBbP_host*Retina;
  r40_properdin: C3bBbC3bP_host => Bb + C3b_host + C3b_fluid + P; k_m_C3bBbC3bP*C3bBbC3bP_host*Retina;
  p_cell_turnover_Surface: => Surface_host; k_pr_surface*Retina;
  e_cell_turnover_Surface: Surface_host => ; Surface_host*(k_el_erythrocytes + k_hemolysis)*Retina;
  p1: => C3; k_pr_C3*Retina;
  p2: => C5; k_pr_C5*Retina;
  p3: => C6; k_pr_C6*Retina;
  p4: => C7; k_pr_C7*Retina;
  p5: => C8; k_pr_C8*Retina;
  p6: => C9; k_pr_C9*Retina;
  p7: => B; k_pr_B*Retina;
  p8: => D; k_pr_D*Retina;
  p9: => P; k_pr_P*Retina;
  p10: => I; k_pr_I*Retina;
  p11: => H; k_pr_H*Retina;
  p12: => Vn; k_pr_Vn*Retina;
  p13: => Cn; k_pr_Cn*Retina;
  p14: => CR1; k_pr_CR1*Retina;
  p15: => DAF; k_pr_DAF*Retina;
  p16: => CD59; k_pr_CD59*Retina;
  e1: C3 => ; C3*k_el_C3*Retina;
  e2: C5 => ; C5*k_el_C5*Retina;
  e3: C6 => ; C6*k_el_C6*Retina;
  e4: C7 => ; C7*k_el_C7*Retina;
  e5: C8 => ; C8*k_el_C8*Retina;
  e6: C9 => ; C9*k_el_C9*Retina;
  e7: B => ; B*k_el_B*Retina;
  e8: D => ; D*k_el_D*Retina;
  e9: P => ; P*k_el_P*Retina;
  e10: I => ; I*k_el_I*Retina;
  e11: H => ; H*k_el_H*Retina;
  e12: Vn => ; Vn*k_el_Vn*Retina;
  e13: Cn => ; Cn*k_el_Cn*Retina;
  e14: CR1 => ; CR1*(k_el_CR1 + k_hemolysis)*Retina;
  e15: CD59 => ; CD59*(k_el_CD59 + k_hemolysis)*Retina;
  e16: DAF => ; DAF*(k_el_DAF + k_hemolysis)*Retina;
  e20: C3_H2O_fluid => ; C3_H2O_fluid*k_el_C3*Retina;
  e21: C3_H2O_B_fluid => ; C3_H2O_B_fluid*k_el_C3*Retina;
  e22: C3_H2O_H_fluid => ; C3_H2O_H_fluid*k_el_C3*Retina;
  e23: C3_H2O_CR1_fluid => ; C3_H2O_CR1_fluid*(k_el_SurfaceProtein + k_hemolysis)*Retina;
  e24: C3_H2O_Bb_fluid => ; C3_H2O_Bb_fluid*k_el_C3*Retina;
  e25: C3_H2O_BbH_fluid => ; C3_H2O_BbH_fluid*k_el_C3*Retina;
  e26: C3b_fluid => ; C3b_fluid*k_el_C3*Retina;
  e27: C3bB_fluid => ; C3bB_fluid*k_el_C3*Retina;
  e28: C3bH_fluid => ; C3bH_fluid*k_el_C3*Retina;
  e29: C3bCR1_fluid => ; C3bCR1_fluid*(k_el_SurfaceProtein + k_hemolysis)*Retina;
  e30: C3bBb_fluid => ; C3bBb_fluid*k_el_C3*Retina;
  e31: C3bBbH_fluid => ; C3bBbH_fluid*k_el_C3*Retina;
  e32: C3bBbCR1_fluid => ; C3bBbCR1_fluid*(k_el_SurfaceProtein + k_hemolysis)*Retina;
  e33: nfC3b => ; nfC3b*k_el_C3*Retina;
  e34: nhC3b => ; nhC3b*k_el_C3*Retina;
  e40: Ba => ; Ba*k_el_Ba*Retina;
  e41: Bb => ; Bb*k_el_Bb*Retina;
  e42: C3a => ; C3a*k_el_C3a*Retina;
  e43: C5a => ; C5a*k_el_C5a*Retina;
  e50: hC5b7_fluid => ; hC5b7_fluid*k_el_C5b_species*Retina;
  e51: iC3b_fluid => ; iC3b_fluid*k_el_iC3b*Retina;
  e52: iC3bCR1_fluid => ; iC3bCR1_fluid*(k_el_SurfaceProtein + k_hemolysis)*Retina;
  e53: C3dg_fluid => ; C3dg_fluid*k_el_C3dg*Retina;
  e54: C5b7_micelle => ; C5b7_micelle*k_el_C5b_species*Retina;
  e55: C5b8_fluid => ; C5b8_fluid*k_el_C5b_species*Retina;
  e56: CnC5b7_fluid => ; CnC5b7_fluid*k_el_C5b_species*Retina;
  e57: VnC5b7_fluid => ; VnC5b7_fluid*k_el_C5b_species*Retina;
  e58: VnC5b8_fluid => ; VnC5b8_fluid*k_el_C5b_species*Retina;
  e59: VnC5b9_1_fluid => ; VnC5b9_1_fluid*k_el_C5b_species*Retina;
  e60: CnC5b8_fluid => ; CnC5b8_fluid*k_el_C5b_species*Retina;
  e61: CnC5b9_1_fluid => ; CnC5b9_1_fluid*k_el_C5b_species*Retina;
  e62: C5b9_1_fluid => ; C5b9_1_fluid*k_el_C5b_species*Retina;
  e70: C3bBb_host => Surface_host; C3bBb_host*(k_el_SurfaceProtein + k_hemolysis)*Retina;
  e71: C3bBbC3b_host => Surface_host; C3bBbC3b_host*(k_el_SurfaceProtein + k_hemolysis)*Retina;
  e72: C3bBbC3bCR1_host => Surface_host; C3bBbC3bCR1_host*(k_el_SurfaceProtein + k_hemolysis)*Retina;
  e73: C3b_host => Surface_host; C3b_host*(k_el_SurfaceProtein + k_hemolysis)*Retina;
  e74: C3bBbC3bDAF_host => Surface_host; C3bBbC3bDAF_host*(k_el_SurfaceProtein + k_hemolysis)*Retina;
  e75: C3bBbC3bH_host => Surface_host; C3bBbC3bH_host*(k_el_SurfaceProtein + k_hemolysis)*Retina;
  e76: C3bBbP_host => Surface_host; C3bBbP_host*(k_el_SurfaceProtein + k_hemolysis)*Retina;
  e77: C3bBbC3bP_host => Surface_host; C3bBbC3bP_host*(k_el_SurfaceProtein + k_hemolysis)*Retina;
  e78: C3bBP_host => Surface_host; C3bBP_host*(k_el_SurfaceProtein + k_hemolysis)*Retina;
  e79: iC3b_host => Surface_host; iC3b_host*(k_el_SurfaceProtein + k_hemolysis)*Retina;
  e80: iC3bP_host => Surface_host; iC3bP_host*(k_el_SurfaceProtein + k_hemolysis)*Retina;
  e81: C3bBbC3bPC5_host => Surface_host; C3bBbC3bPC5_host*(k_el_SurfaceProtein + k_hemolysis)*Retina;
  e82: C3bBbC3bC5_host => Surface_host; C3bBbC3bC5_host*(k_el_SurfaceProtein + k_hemolysis)*Retina;
  e83: C3bBbC3bPC5b_host => Surface_host; C3bBbC3bPC5b_host*(k_el_SurfaceProtein + k_hemolysis)*Retina;
  e84: C3bBbC3bC5b_host => Surface_host; C3bBbC3bC5b_host*(k_el_SurfaceProtein + k_hemolysis)*Retina;
  e85: C3bBbC3bPC5bC6_host => Surface_host; C3bBbC3bPC5bC6_host*(k_el_SurfaceProtein + k_hemolysis)*Retina;
  e86: C3bBbC3bC5bC6_host => Surface_host; C3bBbC3bC5bC6_host*(k_el_SurfaceProtein + k_hemolysis)*Retina;
  e87: C5b7_host => Surface_host; C5b7_host*(k_el_SurfaceProtein + k_hemolysis)*Retina;
  e88: C3bCR1_host => Surface_host; C3bCR1_host*(k_el_SurfaceProtein + k_hemolysis)*Retina;
  e89: C3bH_host => Surface_host; C3bH_host*(k_el_SurfaceProtein + k_hemolysis)*Retina;
  e90: C3bB_host => Surface_host; C3bB_host*(k_el_SurfaceProtein + k_hemolysis)*Retina;
  e91: C3bBbH_host => Surface_host; C3bBbH_host*(k_el_SurfaceProtein + k_hemolysis)*Retina;
  e92: C3bBbCR1_host => Surface_host; C3bBbCR1_host*(k_el_SurfaceProtein + k_hemolysis)*Retina;
  e93: C3bBbDAF_host => Surface_host; C3bBbDAF_host*(k_el_SurfaceProtein + k_hemolysis)*Retina;
  e94: iC3bCR1_host => Surface_host; iC3bCR1_host*(k_el_SurfaceProtein + k_hemolysis)*Retina;
  e95: C3dg_host => Surface_host; C3dg_host*(k_el_SurfaceProtein + k_hemolysis)*Retina;
  e96: C5b8_host => Surface_host; C5b8_host*(k_el_SurfaceProtein + k_hemolysis)*Retina;
  e97: C5b9_1_host => Surface_host; C5b9_1_host*(k_el_SurfaceProtein + k_hemolysis)*Retina;
  e98: C5b9_2_host => Surface_host; C5b9_2_host*(k_el_SurfaceProtein + k_hemolysis)*Retina;
  e99: C5b9_3_host => Surface_host; C5b9_3_host*(k_el_SurfaceProtein + k_hemolysis)*Retina;
  e100: C5b9_4_host => Surface_host; C5b9_4_host*(k_el_SurfaceProtein + k_hemolysis)*Retina;
  e101: C5b9_5_host => Surface_host; C5b9_5_host*(k_el_SurfaceProtein + k_hemolysis)*Retina;
  e102: C5b9_6_host => Surface_host; C5b9_6_host*(k_el_SurfaceProtein + k_hemolysis)*Retina;
  e103: C5b9_7_host => Surface_host; C5b9_7_host*(k_el_SurfaceProtein + k_hemolysis)*Retina;
  e104: C5b9_8_host => Surface_host; C5b9_8_host*(k_el_SurfaceProtein + k_hemolysis)*Retina;
  e105: C5b9_9_host => Surface_host; C5b9_9_host*(k_el_SurfaceProtein + k_hemolysis)*Retina;
  e106: C5b9_10_host => Surface_host; C5b9_10_host*(k_el_SurfaceProtein + k_hemolysis)*Retina;
  e107: C5b9_11_host => Surface_host; C5b9_11_host*(k_el_SurfaceProtein + k_hemolysis)*Retina;
  e108: C5b9_12_host => Surface_host; C5b9_12_host*(k_el_SurfaceProtein + k_hemolysis)*Retina;
  e109: C5b9_13_host => Surface_host; C5b9_13_host*(k_el_SurfaceProtein + k_hemolysis)*Retina;
  e110: C5b9_14_host => Surface_host; C5b9_14_host*(k_el_SurfaceProtein + k_hemolysis)*Retina;
  e111: C5b9_15_host => Surface_host; C5b9_15_host*(k_el_SurfaceProtein + k_hemolysis)*Retina;
  e112: C5b9_16_host => Surface_host; C5b9_16_host*(k_el_SurfaceProtein + k_hemolysis)*Retina;
  e113: C5b9_17_host => Surface_host; C5b9_17_host*(k_el_SurfaceProtein + k_hemolysis)*Retina;
  e114: MAC_host => Surface_host; MAC_host*(k_el_SurfaceProtein + k_hemolysis)*Retina;
  e115: CD59C5b9_1_host => Surface_host; CD59C5b9_1_host*(k_el_SurfaceProtein + k_hemolysis)*Retina;
  e132: C5drug => ; C5drug*k_el_Drug*Retina;
  e133: C5drug_C5 => ; C5drug_C5*k_el_Drug*Retina;
  iC5: C5 + C5drug -> C5drug_C5; (C5*C5drug*kon_C5drug - C5drug_C5*koff_C5drug)*Retina;
  iEcu1: C5 + Ecu -> Ecu_C5; (C5*Ecu*kon_Ecu - Ecu_C5*koff_Ecu)*Retina;

  // Unit definitions:
  unit MWBUILTINUNIT_liter = metre^3 * 1e-3 dimensionless;
  unit MWDERIVEDUNIT_1__second = dimensionless / second; MWDERIVEDUNIT_1__second is "1/second";
  unit MWDERIVEDUNIT_1__molarity__second = metre^3 * 1e-3 dimensionless / (mole * second); MWDERIVEDUNIT_1__molarity__second is "1/molarity/second";
  unit MWBUILTINUNIT_molarity = mole * 1000 dimensionless / metre^3;
  unit MWDERIVEDUNIT_molarity__second = mole * 1000 dimensionless / (metre^3 * second); MWDERIVEDUNIT_molarity__second is "molarity/second";
  unit MWBUILTINPREFIX_micro_MWBUILTINUNIT_molarity = mole * 1e-3 dimensionless / metre^3; MWBUILTINPREFIX_micro_MWBUILTINUNIT_molarity is "micromolarity";
end
