// SBML level 3 version 1

model newmodel()
  // Harish2009 - nuclear–cytoplasmic ERK oscillation model
  // This model is based on the supplementary material of the publication “Rapid and sustained nuclear–cytoplasmic ERK oscillations induced by epidermal growth factor This model is an Antimony version of the original MATLAB model.
  // hasProperty mamo:MAMO_0000046
  // model units - substance: substance

  // Compartments:
  compartment cytoplasm = 1;
  compartment nucleus = 1;

  // Species:
  species E1_MKKK in cytoplasm = 0; E1_MKKK is "E1_Mos";
  species P_MKKK in cytoplasm = 0; P_MKKK is "Mos-P";
  species E2_P_MKKK in cytoplasm = 0; E2_P_MKKK is "E2_Mos-P";
  species MKK_c in cytoplasm = 1.2;
  species P_MKKK_MKK in cytoplasm = 0; P_MKKK_MKK is "P-Mos_Mek1";
  species P_MKK_c in cytoplasm = 0;
  species P1_P_MKK_c in cytoplasm = 0;
  species P_MKKK_P_MKK in cytoplasm = 0; P_MKKK_P_MKK is "P-Mos_P-Mek1";
  species PP_MKK_c in cytoplasm = 0;
  species P1_PP_MKK_c in cytoplasm = 0;
  species P1_c in cytoplasm = 0.03;
  species ERK_c in cytoplasm = 4.8;
  species PP_MKK_ERK_c in cytoplasm = 0;
  species P_ERK_c in cytoplasm = 0;
  species P2_P_ERK_c in cytoplasm = 0;
  species PP_MKK_P_ERK_c in cytoplasm = 0;
  species PP_ERK_c in cytoplasm = 0;
  species P2_PP_ERK_c in cytoplasm = 0;
  species P2_c in cytoplasm = 0.025;
  species P_MKK_n in nucleus = 0;
  species P1_P_MKK_n in nucleus = 0;
  species PP_MKK_n in nucleus = 0;
  species P1_PP_MKK_n in nucleus = 0;
  species PP_MKK_ERK_n in nucleus = 0;
  species P_ERK_n in nucleus = 0;
  species P2_P_ERK_n in nucleus = 0;
  species PP_MKK_P_ERK_n in nucleus = 0;
  species PP_ERK_n in nucleus = 0;
  species P2_PP_ERK_n in nucleus = 0;
  species MKK_ERK_c in cytoplasm = 0;
  species MKK_ERK_n in nucleus = 0;
  species E1 in cytoplasm = 0.02; E1 is "MAPKKK activator (Ras)";
  species E2 in cytoplasm = 0.012; E2 is "MAPKKK inactivator";
  species MKKK in cytoplasm = 0.1; MKKK is "Mos";
  species MKK_n in nucleus = 0;
  species ERK_n in nucleus = 0;
  species P2_n in nucleus = 0.025*6;
  species P1_n in nucleus = 0.03*6;

  // Parameters:
  Ki = 0.009;
  r1a_a1 = 1500;
  r1a_d1 = 4.5;
  r1b_k1 = 10.5;
  r2a_a2 = 1500;
  r2a_d2 = 1.5;
  r2b_k2 = 10.5;
  r3a_a3 = 1500;
  r3a_d3 = 12;
  r3b_k3 = 10.5;
  r4a_a4 = 1500;
  r4a_d4 = 12;
  r4b_k4 = 10.5;
  r5a_a5 = 1500;
  r5a_d5 = 12;
  r5b_k5 = 10.5;
  r6a_a6 = 1500;
  r6a_d6 = 12;
  r6b_k6 = 10.5;
  r7a_A7 = 15;
  r7a_Ks7 = 0.015;
  r7a_d7 = 12;
  r7b_k7 = 10.5;
  r8a_a8 = 1500;
  r8a_d8 = 12;
  r8b_k8 = 10.5;
  r9a_A9 = 15;
  r9a_Ks9 = 0.015;
  r9a_d9 = 12;
  r9b_k9 = 10.5;
  r10a_a10 = 1500;
  r10a_d10 = 12;
  r10b_k10 = 10.5;
  r11a_A11 = 15;
  r11a_Ks11 = 0.015;
  r11a_d11 = 48;
  t_imp_MKK = 2.76;
  t_exp_MKK = 36.6;
  V = 6;
  t_imp_P_MKK = 2.4;
  t_exp_P_MKK = 32.4;
  t_imp_ERK = 0.72;
  t_exp_ERK = 1.08;
  t_imp_P_ERK = 0.72;
  t_exp_P_ERK = 0.54;
  t_imp_MKKcom = 2.1;
  t_exp_MKKcom = 15.6;
  t_imp_Ptase = 0.72;
  t_exp_Ptase = 0.72;
  var MKK; MKK is "Mek1";
  var P_MKK; P_MKK is "Mek1-P";
  var PP_MKK; PP_MKK is "Mek1-PP";
  var ERK; ERK is "Erk2";
  var P_ERK; P_ERK is "Erk2-P";
  var PP_ERK; PP_ERK is "Erk2-PP";
  var MAPK_Pase; MAPK_Pase is "MAPK-Pase";
  var MAPKK_Pase; MAPKK_Pase is "MAPKK-Pase";
  var PP_MKK_ERK; PP_MKK_ERK is "PP-Mek1_Erk2";
  var PP_MKK_P_ERK; PP_MKK_P_ERK is "PP-Mek1_P-Erk2";
  var P1_PP_MKK; P1_PP_MKK is "MAPKK-Pase_PP-Mek1";
  var P1_P_MKK; P1_P_MKK is "MAPKK-Pase_P-Mek1";
  var P2_PP_ERK; P2_PP_ERK is "MAPK-Pase_PP-Erk2";
  var P2_P_ERK; P2_P_ERK is "MAPK-Pase_P-Erk2";
  var MKK_ERK; MKK_ERK is "Mek-Erk complexes";
  Vc = 6;
  Vn = 1/6;

  // Assignment rules:
  MKK := MKK_c + MKK_n;
  P_MKK := P_MKK_c + P_MKK_n;
  PP_MKK := PP_MKK_c + PP_MKK_n;
  ERK := ERK_c + ERK_n;
  nERK := (ERK_n + P_ERK_n + PP_ERK_n + PP_MKK_ERK_n + PP_MKK_P_ERK_n + P2_P_ERK_n + P2_PP_ERK_n + MKK_ERK_n)/6;
  cERK := ERK_c + P_ERK_c + PP_ERK_c + PP_MKK_ERK_c + PP_MKK_P_ERK_c + P2_P_ERK_c + P2_PP_ERK_c + MKK_ERK_c;
  ERK_T := ERK_n + ERK_c;
  P_ERK := P_ERK_c + P_ERK_n;
  PP_ERK := PP_ERK_c + PP_ERK_n;
  MAPK_Pase := P2_c + P2_n;
  MAPKK_Pase := P1_c + P1_n;
  PP_MKK_ERK := PP_MKK_ERK_n + PP_MKK_ERK_c;
  PP_MKK_P_ERK := PP_MKK_P_ERK_n + PP_MKK_P_ERK_c;
  P1_PP_MKK := P1_PP_MKK_c + P1_PP_MKK_n;
  P1_P_MKK := P1_P_MKK_c + P1_P_MKK_n;
  P2_PP_ERK := P2_PP_ERK_c + P2_PP_ERK_n;
  P2_P_ERK := P2_P_ERK_c + P2_P_ERK_n;
  MKK_ERK := MKK_ERK_c + MKK_ERK_n;
  ERK_n_per := (ERK_n + P_ERK_n + PP_ERK_n + PP_MKK_ERK_n + PP_MKK_P_ERK_n + P2_P_ERK_n + P2_PP_ERK_n + MKK_ERK_n)/4.8*100;
  PP_ERK_n_per := (PP_ERK_n + P2_PP_ERK_n)/4.8*100;

  // Reactions:
  r0: => E1; cytoplasm*(-0.02*Ki/(Ki + PP_ERK_c)^2)*(r9b - r10a + r6n_c);  // modifiers: PP_ERK_c
  r9b: PP_MKK_P_ERK_c => PP_MKK_c + PP_ERK_c; cytoplasm*r9b_k9*PP_MKK_P_ERK_c;
  r10a: PP_ERK_c + P2_c -> P2_PP_ERK_c; cytoplasm*(r10a_a10*PP_ERK_c*P2_c - r10a_d10*P2_PP_ERK_c);
  r6n_c: => PP_ERK_c; -t_imp_P_ERK*PP_ERK_c + t_exp_P_ERK/V*PP_ERK_n;  // modifiers: PP_ERK_n
  r1a: MKKK + E1 -> E1_MKKK; cytoplasm*(r1a_a1*E1*MKKK - r1a_d1*E1_MKKK);
  r1b: E1_MKKK => E1 + P_MKKK; cytoplasm*r1b_k1*E1_MKKK;
  r2a: P_MKKK + E2 -> E2_P_MKKK; cytoplasm*(r2a_a2*E2*P_MKKK - r2a_d2*E2_P_MKKK);
  r2b: E2_P_MKKK => E2 + MKKK; cytoplasm*r2b_k2*E2_P_MKKK;
  r3a: MKK_c + P_MKKK -> P_MKKK_MKK; cytoplasm*(r3a_a3*MKK_c*P_MKKK - r3a_d3*P_MKKK_MKK);
  r3b: P_MKKK_MKK => P_MKK_c + P_MKKK; cytoplasm*r3b_k3*P_MKKK_MKK;
  r4a: P_MKK_c + P1_c -> P1_P_MKK_c; cytoplasm*(r4a_a4*P_MKK_c*P1_c - r4a_d4*P1_P_MKK_c);
  r4b: P1_P_MKK_c => MKK_c + P1_c; cytoplasm*r4b_k4*P1_P_MKK_c;
  r5a: P_MKK_c + P_MKKK -> P_MKKK_P_MKK; cytoplasm*(r5a_a5*P_MKK_c*P_MKKK - r5a_d5*P_MKKK_P_MKK);
  r5b: P_MKKK_P_MKK => PP_MKK_c + P_MKKK; cytoplasm*r5b_k5*P_MKKK_P_MKK;
  r6a: PP_MKK_c + P1_c -> P1_PP_MKK_c; cytoplasm*(r6a_a6*PP_MKK_c*P1_c - r6a_d6*P1_PP_MKK_c);
  r6b: P1_PP_MKK_c => P_MKK_c + P1_c; cytoplasm*r6b_k6*P1_PP_MKK_c;
  r7a: ERK_c + PP_MKK_c -> PP_MKK_ERK_c; cytoplasm*(r7a_A7*PP_MKK_c*ERK_c/(r7a_Ks7 + ERK_c) - r7a_d7*PP_MKK_ERK_c);
  r7b: PP_MKK_ERK_c => P_ERK_c + PP_MKK_c; cytoplasm*r7b_k7*PP_MKK_ERK_c;
  r8a: P_ERK_c + P2_c -> P2_P_ERK_c; cytoplasm*(r8a_a8*P_ERK_c*P2_c - r8a_d8*P2_P_ERK_c);
  r8b: P2_P_ERK_c => ERK_c + P2_c; cytoplasm*r8b_k8*P2_P_ERK_c;
  r9a: P_ERK_c + PP_MKK_c -> PP_MKK_P_ERK_c; cytoplasm*(r9a_A9*PP_MKK_c*P_ERK_c/(r9a_Ks9 + P_ERK_c) - r9a_d9*PP_MKK_P_ERK_c);
  r10b: P2_PP_ERK_c => P_ERK_c + P2_c; cytoplasm*r10b_k10*P2_PP_ERK_c;
  r11a: ERK_c + MKK_c -> MKK_ERK_c; cytoplasm*(r11a_A11*MKK_c*ERK_c/(r11a_Ks11 + ERK_c) - r11a_d11*MKK_ERK_c);
  r4a_n: P_MKK_n + P1_n -> P1_P_MKK_n; nucleus*(r4a_a4*P_MKK_n*P1_n - r4a_d4*P1_P_MKK_n);
  r4b_n: P1_P_MKK_n => MKK_n + P1_n; nucleus*r4b_k4*P1_P_MKK_n;
  r6a_n: PP_MKK_n + P1_n -> P1_PP_MKK_n; nucleus*(r6a_a6*PP_MKK_n*P1_n - r6a_d6*P1_PP_MKK_n);
  r6b_n: P1_PP_MKK_n => P_MKK_n + P1_n; nucleus*r6b_k6*P1_PP_MKK_n;
  r7a_n: ERK_n + PP_MKK_n -> PP_MKK_ERK_n; nucleus*(r7a_A7*PP_MKK_n*ERK_n/(r7a_Ks7 + ERK_n) - r7a_d7*PP_MKK_ERK_n);
  r7b_n: PP_MKK_ERK_n => P_ERK_n + PP_MKK_n; nucleus*r7b_k7*PP_MKK_ERK_n;
  r8a_n: P_ERK_n + P2_n -> P2_P_ERK_n; nucleus*(r8a_a8*P_ERK_n*P2_n - r8a_d8*P2_P_ERK_n);
  r8b_n: P2_P_ERK_n => ERK_n + P2_n; nucleus*r8b_k8*P2_P_ERK_n;
  r9a_n: P_ERK_n + PP_MKK_n -> PP_MKK_P_ERK_n; nucleus*(r9a_A9*PP_MKK_n*P_ERK_n/(r9a_Ks9 + P_ERK_n) - r9a_d9*PP_MKK_P_ERK_n);
  r9b_n: PP_MKK_P_ERK_n => PP_MKK_n + PP_ERK_n; nucleus*r9b_k9*PP_MKK_P_ERK_n;
  r10a_n: PP_ERK_n + P2_n -> P2_PP_ERK_n; nucleus*(r10a_a10*PP_ERK_n*P2_n - r10a_d10*P2_PP_ERK_n);
  r10b_n: P2_PP_ERK_n => P_ERK_n + P2_n; nucleus*r10b_k10*P2_PP_ERK_n;
  r11a_n: ERK_n + MKK_n -> MKK_ERK_n; nucleus*(r11a_A11*MKK_n*ERK_n/(r11a_Ks11 + ERK_n) - r11a_d11*MKK_ERK_n);
  r1n_c: => MKK_c; -t_imp_MKK*MKK_c + t_exp_MKK/V*MKK_n;  // modifiers: MKK_n
  r1c_n: => MKK_n; t_imp_MKK*MKK_c*V + (-t_exp_MKK*MKK_n);  // modifiers: MKK_c
  r2n_c: => P_MKK_c; -t_imp_P_MKK*P_MKK_c + t_exp_P_MKK/V*P_MKK_n;  // modifiers: P_MKK_n
  r2c_n: => P_MKK_n; t_imp_P_MKK*V*P_MKK_c + (-t_exp_P_MKK*P_MKK_n);  // modifiers: P_MKK_c
  r3n_c: => PP_MKK_c; -t_imp_P_MKK*PP_MKK_c + t_exp_P_MKK/V*PP_MKK_n;  // modifiers: PP_MKK_n
  r3c_n: => PP_MKK_n; t_imp_P_MKK*V*PP_MKK_c + (-t_exp_P_MKK*PP_MKK_n);  // modifiers: PP_MKK_c
  r4n_c: => ERK_c; -t_imp_ERK*ERK_c + t_exp_ERK/V*ERK_n;  // modifiers: ERK_n
  r4c_n: => ERK_n; t_imp_ERK*V*ERK_c + (-t_exp_ERK*ERK_n);  // modifiers: ERK_c
  r5n_c: => P_ERK_c; -t_imp_P_ERK*P_ERK_c + t_exp_P_ERK/V*P_ERK_n;  // modifiers: P_ERK_n
  r5c_n: => P_ERK_n; t_imp_P_ERK*V*P_ERK_c + (-t_exp_P_ERK*P_ERK_n);  // modifiers: P_ERK_c
  r6c_n: => PP_ERK_n; t_imp_P_ERK*V*PP_ERK_c + (-t_exp_P_ERK*PP_ERK_n);  // modifiers: PP_ERK_c
  r7n_c: => P2_P_ERK_c; -t_imp_P_ERK*P2_P_ERK_c + t_exp_P_ERK/V*P2_P_ERK_n;  // modifiers: P2_P_ERK_n
  r7c_n: => P2_P_ERK_n; t_imp_P_ERK*V*P2_P_ERK_c + (-t_exp_P_ERK*P2_P_ERK_n);  // modifiers: P2_P_ERK_c
  r8n_c: => P2_PP_ERK_c; -t_imp_P_ERK*P2_PP_ERK_c + t_exp_P_ERK/V*P2_PP_ERK_n;  // modifiers: P2_PP_ERK_n
  r8c_n: => P2_PP_ERK_n; t_imp_P_ERK*V*P2_PP_ERK_c + (-t_exp_P_ERK*P2_PP_ERK_n);  // modifiers: P2_PP_ERK_c
  r9n_c: => PP_MKK_ERK_c; -t_imp_MKKcom*PP_MKK_ERK_c + t_exp_MKKcom/V*PP_MKK_ERK_n;  // modifiers: PP_MKK_ERK_n
  r9c_n: => PP_MKK_ERK_n; t_imp_MKKcom*V*PP_MKK_ERK_c + (-t_exp_MKKcom*PP_MKK_ERK_n);  // modifiers: PP_MKK_ERK_c
  r10n_c: => PP_MKK_P_ERK_c; -t_imp_MKKcom*PP_MKK_P_ERK_c + t_exp_MKKcom/V*PP_MKK_P_ERK_n;  // modifiers: PP_MKK_P_ERK_n
  r10c_n: => PP_MKK_P_ERK_n; t_imp_MKKcom*V*PP_MKK_P_ERK_c + (-t_exp_MKKcom*PP_MKK_P_ERK_n);  // modifiers: PP_MKK_P_ERK_c
  r11n_c: => P1_P_MKK_c; -t_imp_MKKcom*P1_P_MKK_c + t_exp_MKKcom/V*P1_P_MKK_n;  // modifiers: P1_P_MKK_n
  r11c_n: => P1_P_MKK_n; t_imp_MKKcom*V*P1_P_MKK_c + (-t_exp_MKKcom*P1_P_MKK_n);  // modifiers: P1_P_MKK_c
  r12n_c: => P1_PP_MKK_c; -t_imp_MKKcom*P1_PP_MKK_c + t_exp_MKKcom/V*P1_PP_MKK_n;  // modifiers: P1_PP_MKK_n
  r12c_n: => P1_PP_MKK_n; t_imp_MKKcom*V*P1_PP_MKK_c + (-t_exp_MKKcom*P1_PP_MKK_n);  // modifiers: P1_PP_MKK_c
  r13n_c: => MKK_ERK_c; -t_imp_MKKcom*MKK_ERK_c + t_exp_MKKcom/V*MKK_ERK_n;  // modifiers: MKK_ERK_n
  r13c_n: => MKK_ERK_n; t_imp_MKKcom*V*MKK_ERK_c + (-t_exp_MKKcom*MKK_ERK_n);  // modifiers: MKK_ERK_c
  r14n_c: => P1_c; -t_imp_Ptase*P1_c + t_exp_Ptase/V*P1_n;  // modifiers: P1_n
  r14c_n: => P1_n; t_imp_Ptase*V*P1_c + (-t_exp_Ptase*P1_n);  // modifiers: P1_c
  r15n_c: => P2_c; -t_imp_Ptase*P2_c + t_exp_Ptase/V*P2_n;  // modifiers: P2_n
  r15c_n: => P2_n; t_imp_Ptase*V*P2_c + (-t_exp_Ptase*P2_n);  // modifiers: P2_c

  // Unit definitions:
  unit substance = 1e-6 mole;
end
