// SBML level 2 version 4

function rateOf(a)
  NaN;
end

function Function_for_reaction1(X1_0, X1_1, Y1, default)
  (X1_1 - X1_0*Y1)/default;
end

function Function_for_reaction2(X1_0, X1_1, Y1, default)
  (X1_0*Y1 - X1_1)/default;
end

function Function_for_reaction3(X11_1, X11_3, X1_1, X2_0, X2_2, a1_X2_0, b_X2_2, default)
  (X2_2*b_X2_2 - X1_1*X2_0 - X2_0*a1_X2_0*(X11_1 + X11_3))/default;
end

function Function_for_reaction4(X11_1, X11_3, X1_1, X2_0, X2_1, default)
  (X1_1*X2_0 - X2_1*(X11_1 + X11_3))/default;
end

function Function_for_reaction5(X11_1, X11_3, X2_0, X2_1, X2_2, a1_X2_0, b_X2_2, default)
  (X2_1*(X11_1 + X11_3) - X2_2*b_X2_2 + X2_0*a1_X2_0*(X11_1 + X11_3))/default;
end

function Function_for_reaction6(X2_1, X4_0, X4_1, Y3, Y4, a_X4_0, b_X4_1, default, k_stress_1)
  (X4_1*b_X4_1 + X4_0*(X2_1*a_X4_0 + Y3*k_stress_1)*(Y4 - 1))/default;
end

function Function_for_reaction7(X2_1, X4_0, X4_1, Y3, Y4, a_X4_0, b_X4_1, default, k_stress_1)
  (-X4_1*b_X4_1 - X4_0*(X2_1*a_X4_0 + Y3*k_stress_1)*(Y4 - 1))/default;
end

function Function_for_reaction8(X4_1, X5_0, X5_1, a_X5_0, b_X5_1, default)
  (X5_1*b_X5_1 - X4_1*X5_0*a_X5_0)/default;
end

function Function_for_reaction9(X4_1, X5_0, X5_1, a_X5_0, b_X5_1, default)
  (X4_1*X5_0*a_X5_0 - X5_1*b_X5_1)/default;
end

function Function_for_reaction10(X4_1, X5_1, X8_0, X8_1, X8_2, Y3, Y5, a1_X8_0, a2_X8_0, b_X8_1, b_X8_2, default, k_stress_2)
  (X8_1*b_X8_1 + X8_2*b_X8_2 + X8_0*(0.83*Y5 - 1)*(X4_1*a2_X8_0 + Y3*k_stress_2) + X5_1*X8_0*a1_X8_0*(0.83*Y5 - 1))/default;
end

function Function_for_reaction11(X4_1, X5_1, X8_0, X8_1, X8_3, Y5, a1_X8_0, b_X8_1, b_X8_2, default)
  (X8_3*b_X8_2 - X8_1*b_X8_1 + 2*X4_1*X8_1*a1_X8_0*(0.83*Y5 - 1) - X5_1*X8_0*a1_X8_0*(0.83*Y5 - 1))/default;
end

function Function_for_reaction12(X4_1, X5_1, X8_0, X8_2, X8_3, Y3, Y5, a2_X8_0, b_X8_1, b_X8_2, default, k_stress_2)
  (X8_3*b_X8_1 - X8_2*b_X8_2 - X8_0*(0.83*Y5 - 1)*(X4_1*a2_X8_0 + Y3*k_stress_2) + 2*X5_1*X8_2*a2_X8_0*(0.83*Y5 - 1))/default;
end

function Function_for_reaction13(X4_1, X5_1, X8_1, X8_2, X8_3, Y5, a1_X8_0, a2_X8_0, b_X8_1, b_X8_2, default)
  (-X8_3*b_X8_1 - X8_3*b_X8_2 - 2*X4_1*X8_1*a1_X8_0*(0.83*Y5 - 1) - 2*X5_1*X8_2*a2_X8_0*(0.83*Y5 - 1))/default;
end

function Function_for_reaction14(X8_1, X8_3, X9_0, X9_2, a2_X9_0, b_X9_2, default)
  (X9_2*b_X9_2 - X9_0*a2_X9_0*(X8_1 + X8_3))/default;
end

function Function_for_reaction15(X8_1, X8_3, X9_0, X9_2, a2_X9_0, b_X9_2, default)
  (X9_0*a2_X9_0*(X8_1 + X8_3) - X9_2*b_X9_2)/default;
end

function Function_for_reaction16(X10_0, X10_1, X10_2, X10_3, X8_1, X8_3, X9_0, X9_2, Y2, Y3, a1_X10_0, a2_X10_0, a_X6_Y2, b_X10_1, b_X10_2, default, k_stress_3_X10)
  (X10_1*b_X10_1 + X10_2*b_X10_2 - X10_0*(Y2*a_X6_Y2 + Y3*k_stress_3_X10 + a1_X10_0*(X10_0/(X10_0 + X10_1 + X10_2 + X10_3) - 1)*(X9_0/(X9_0 + X9_2) - 1)) - X10_0*a2_X10_0*(X8_1 + X8_3))/default;
end

function Function_for_reaction17(X10_0, X10_1, X10_2, X10_3, X8_1, X8_3, X9_0, X9_2, Y2, Y3, a1_X10_0, a_X10_1, a_X6_Y2, b_X10_1, b_X10_2, default, k_stress_3_X10)
  (X10_3*b_X10_2 - X10_1*b_X10_1 + X10_0*(Y2*a_X6_Y2 + Y3*k_stress_3_X10 + a1_X10_0*(X10_0/(X10_0 + X10_1 + X10_2 + X10_3) - 1)*(X9_0/(X9_0 + X9_2) - 1)) - X10_1*a_X10_1*(X8_1 + X8_3))/default;
end

function Function_for_reaction18(X10_0, X10_1, X10_2, X10_3, X8_1, X8_3, X9_0, X9_2, Y2, Y3, a2_X10_0, a_X10_2, a_X6_Y2, b_X10_1, b_X10_2, default, k_stress_3_X10)
  (X10_3*b_X10_1 - X10_2*b_X10_2 - X10_2*(Y2*a_X6_Y2 + Y3*k_stress_3_X10 + a_X10_2*(X10_0/(X10_0 + X10_1 + X10_2 + X10_3) - 1)*(X9_0/(X9_0 + X9_2) - 1)) + X10_0*a2_X10_0*(X8_1 + X8_3))/default;
end

function Function_for_reaction19(X10_0, X10_1, X10_2, X10_3, X8_1, X8_3, X9_0, X9_2, Y2, Y3, a_X10_1, a_X10_2, a_X6_Y2, b_X10_1, b_X10_2, default, k_stress_3_X10)
  (X10_2*(Y2*a_X6_Y2 + Y3*k_stress_3_X10 + a_X10_2*(X10_0/(X10_0 + X10_1 + X10_2 + X10_3) - 1)*(X9_0/(X9_0 + X9_2) - 1)) - X10_3*b_X10_2 - X10_3*b_X10_1 + X10_1*a_X10_1*(X8_1 + X8_3))/default;
end

function Function_for_reaction20(X10_0, X10_1, X10_2, X10_3, X11_0, X11_1, X11_2, X5_0, X9_0, X9_2, Y2, Y3, a1_X11_0, a2_X11_0, a_X6_Y2, b_X11_1, b_X11_2, default, k_stress_3_X11)
  (X11_1*b_X11_1 + X11_2*b_X11_2 - X11_0*(Y2*a_X6_Y2 + Y3*k_stress_3_X11 + a1_X11_0*(X10_0/(X10_0 + X10_1 + X10_2 + X10_3) - 1)*(X9_0/(X9_0 + X9_2) - 1)) - X11_0*X5_0*a2_X11_0)/default;
end

function Function_for_reaction21(X10_0, X10_1, X10_2, X10_3, X11_0, X11_1, X11_3, X5_0, X9_0, X9_2, Y2, Y3, a1_X11_0, a_X6_Y2, b_X11_1, b_X11_2, default, k_stress_3_X11)
  (X11_3*b_X11_2 - X11_1*b_X11_1 + X11_0*(Y2*a_X6_Y2 + Y3*k_stress_3_X11 + a1_X11_0*(X10_0/(X10_0 + X10_1 + X10_2 + X10_3) - 1)*(X9_0/(X9_0 + X9_2) - 1)) - 2*X11_1*X5_0*a1_X11_0)/default;
end

function Function_for_reaction22(X10_0, X10_1, X10_2, X10_3, X11_0, X11_2, X11_3, X5_0, X9_0, X9_2, Y2, Y3, a2_X11_0, a_X6_Y2, b_X11_1, b_X11_2, default, k_stress_3_X11)
  (X11_3*b_X11_1 - X11_2*b_X11_2 - X11_2*(Y2*a_X6_Y2 + Y3*k_stress_3_X11 + 2*a2_X11_0*(X10_0/(X10_0 + X10_1 + X10_2 + X10_3) - 1)*(X9_0/(X9_0 + X9_2) - 1)) + X11_0*X5_0*a2_X11_0)/default;
end

function Function_for_reaction23(X10_0, X10_1, X10_2, X10_3, X11_1, X11_2, X11_3, X5_0, X9_0, X9_2, Y2, Y3, a1_X11_0, a2_X11_0, a_X6_Y2, b_X11_1, b_X11_2, default, k_stress_3_X11)
  (X11_2*(Y2*a_X6_Y2 + Y3*k_stress_3_X11 + 2*a2_X11_0*(X10_0/(X10_0 + X10_1 + X10_2 + X10_3) - 1)*(X9_0/(X9_0 + X9_2) - 1)) - X11_3*b_X11_2 - X11_3*b_X11_1 + 2*X11_1*X5_0*a1_X11_0)/default;
end

function Function_for_reaction24(X10_0, X10_1, X10_2, X10_3, X12_0, X12_1, X9_0, X9_2, Y2, Y3, a_X12_0, a_X6_Y2, b_X12_1, default, k_stress_3_X12)
  (X12_1*b_X12_1 - X12_0*(Y2*a_X6_Y2 + Y3*k_stress_3_X12 + a_X12_0*(X10_0/(X10_0 + X10_1 + X10_2 + X10_3) - 1)*(X9_0/(X9_0 + X9_2) - 1)))/default;
end

function Function_for_reaction25(X10_0, X10_1, X10_2, X10_3, X12_0, X12_1, X9_0, X9_2, Y2, Y3, a_X12_0, a_X6_Y2, b_X12_1, default, k_stress_3_X12)
  (X12_0*(Y2*a_X6_Y2 + Y3*k_stress_3_X12 + a_X12_0*(X10_0/(X10_0 + X10_1 + X10_2 + X10_3) - 1)*(X9_0/(X9_0 + X9_2) - 1)) - X12_1*b_X12_1)/default;
end

model Heberle_Razquin_Navas_2019_PI3K_MAPK_p38_mTOR_Model_V()
  // Model V simulating stress induction with stress inputs on PI3K, Akt-pS473 and mTORC1. The model scheme is depicted in Figure S11 and the simulations are shown in Figure S12.

  // Compartments:
  compartment default = 1;

  // Species:
  species X1_0 in default = 1;
  species X1_1 in default = 0;
  species X2_0 in default = init_X2_0_MCF7_Ars;
  species X2_1 in default = 0;
  species X2_2 in default = init_X2_2_MCF7_Ars;
  species X4_0 in default = init_X4_0_MCF7_Ars;
  species X4_1 in default = init_X4_1_MCF7_Ars;
  species X5_0 in default = init_X5_0_MCF7_Ars;
  species X5_1 in default = 0;
  species X8_0 in default = init_X8_0_MCF7_Ars;
  species X8_1 in default = init_X8_1_MCF7_Ars;
  species X8_2 in default = init_X8_2_MCF7_Ars;
  species X8_3 in default = 0;
  species X9_0 in default = init_X9_0_MCF7_Ars;
  species X9_2 in default = init_X9_2_MCF7_Ars;
  species X10_0 in default = init_X10_0_MCF7_Ars;
  species X10_1 in default = init_X10_1_MCF7_Ars;
  species X10_2 in default = init_X10_2_MCF7_Ars;
  species X10_3 in default = 0;
  species X11_0 in default = init_X11_0_MCF7_Ars;
  species X11_1 in default = init_X11_1_MCF7_Ars;
  species X11_2 in default = init_X11_2_MCF7_Ars;
  species X11_3 in default = 0;
  species X12_0 in default = init_X12_0_MCF7_Ars;
  species X12_1 in default = init_X12_1_MCF7_Ars;
  species $Akt_pT308_obs in default;
  species $Akt_pS473_obs in default;
  species $TSC1_TSC2_pT1462_obs in default;
  species $PRAS40_pT246_obs in default;
  species $PRAS40_pS183_obs in default;
  species $fourEBP1_pT37_46_obs in default;
  species $p70_S6K_pT389_obs in default;
  species $p70_S6K_pT229_obs in default;
  species $IRS1_pS636_639_obs in default; IRS1_pS636_639_obs is "IRS1_pS636-639_obs";

  // Parameters:
  a1_X10_0 = 0.4784243;
  a1_X11_0 = 0.2358962;
  a1_X2_0 = 0.005557005;
  a1_X8_0 = 1.809554;
  a2_X10_0 = 1.664344e-5;
  a2_X11_0 = 1e-5;
  a2_X8_0 = 0.6091557;
  a2_X9_0 = 1.648615e-5;
  a_X10_1 = 9.987692;
  a_X10_2 = 0.03481754;
  a_X12_0 = 6.82569;
  a_X4_0 = 5.756619e-5;
  a_X5_0 = 10;
  a_X6_Y2 = 1e-5;
  b_X10_1 = 0.1766837;
  b_X10_2 = 0.003885045;
  b_X11_1 = 0.008516602;
  b_X11_2 = 0.2472169;
  b_X12_1 = 0.08670632;
  b_X2_2 = 0.1041433;
  b_X4_1 = 0.009999991;
  b_X5_1 = 0.08407234;
  b_X8_1 = 0.06004013;
  b_X8_2 = 0.008237724;
  b_X9_2 = 0.007464725;
  init_X10_0_MCF7_Ars = 10;
  init_X10_1_MCF7_Ars = 0.0007727981;
  init_X10_2_MCF7_Ars = 0.03124886;
  init_X11_0_MCF7_Ars = 2.17966;
  init_X11_1_MCF7_Ars = 0.001534979;
  init_X11_2_MCF7_Ars = 0.001643563;
  init_X12_0_MCF7_Ars = 8.579118;
  init_X12_1_MCF7_Ars = 0.001268665;
  init_X2_0_MCF7_Ars = 3.763499;
  init_X2_2_MCF7_Ars = 0.0003072307;
  init_X4_0_MCF7_Ars = 0.000441623;
  init_X4_1_MCF7_Ars = 1e-5;
  init_X5_0_MCF7_Ars = 6.641596;
  init_X8_0_MCF7_Ars = 0.4780458;
  init_X8_1_MCF7_Ars = 0.1511822;
  init_X8_2_MCF7_Ars = 0.06623525;
  init_X9_0_MCF7_Ars = 3.199371;
  init_X9_2_MCF7_Ars = 0.0003876356;
  k_stress_1 = 9.998654;
  k_stress_2 = 0.01;
  k_stress_3_X10 = 1.025902e-5;
  k_stress_3_X11 = 0.0001;
  k_stress_3_X12 = 1e-5;
  Y1 = 0;
  Y2 = 1;
  Y3 = 1;
  Y4 = 0;
  Y5 = 0;
  scale_Akt_pT308 = 1.80537;
  scale_Akt_pT473 = 10.7313057;
  scale_TSC1_TSC2_pT1462 = 1000;
  scale_PRAS40_pT246 = 25.48679;
  scale_PRAS40_pS183 = 1000;
  scale_fourEBP1_pT37_46 = 480.2667;
  scale_p70_S6K_pT389 = 158.6081;
  scale_p70_S6K_pT229 = 176.7445;
  scale_IRS1_pS636_639 = 999.9922; scale_IRS1_pS636_639 is "scale_IRS1_pS636-639";
  ModelValue_53_0 = scale_Akt_pT308; ModelValue_53_0 is "Initial for scale_Akt_pT308";
  Initial_for_scale_Akt_pT473 = scale_Akt_pT473;
  Initial_for_scale_IRS1_pS636_639 = scale_IRS1_pS636_639; Initial_for_scale_IRS1_pS636_639 is "Initial for scale_IRS1_pS636-639";
  Initial_for_scale_PRAS40_pS183 = scale_PRAS40_pS183;
  ModelValue_56_0 = scale_PRAS40_pT246; ModelValue_56_0 is "Initial for scale_PRAS40_pT246";
  ModelValue_55_0 = scale_TSC1_TSC2_pT1462; ModelValue_55_0 is "Initial for scale_TSC1_TSC2_pT1462";
  ModelValue_58_0 = scale_fourEBP1_pT37_46; ModelValue_58_0 is "Initial for scale_fourEBP1_pT37_46";
  ModelValue_60_0 = scale_p70_S6K_pT229; ModelValue_60_0 is "Initial for scale_p70_S6K_pT229";
  ModelValue_59_0 = scale_p70_S6K_pT389; ModelValue_59_0 is "Initial for scale_p70_S6K_pT389";

  // Assignment rules:
  TSC1_TSC2_pT1462_obs := ModelValue_55_0*X9_2;
  PRAS40_pT246_obs := ModelValue_56_0*X10_2 + ModelValue_56_0*X10_3;
  Akt_pT308_obs := ModelValue_53_0*X8_1 + ModelValue_53_0*X8_3;
  Akt_pS473_obs := Initial_for_scale_Akt_pT473*X8_2 + Initial_for_scale_Akt_pT473*X8_3;
  p70_S6K_pT389_obs := ModelValue_59_0*X11_1 + ModelValue_59_0*X11_3;
  p70_S6K_pT229_obs := ModelValue_60_0*X11_2 + ModelValue_60_0*X11_3;
  PRAS40_pS183_obs := Initial_for_scale_PRAS40_pS183*X10_1 + Initial_for_scale_PRAS40_pS183*X10_3;
  IRS1_pS636_639_obs := Initial_for_scale_IRS1_pS636_639*X2_2;
  fourEBP1_pT37_46_obs := ModelValue_58_0*X12_1;

  // Reactions:
  reaction1: => X1_0; default*Function_for_reaction1(X1_0, X1_1, Y1, default);  // modifiers: X1_1
  reaction2: => X1_1; default*Function_for_reaction2(X1_0, X1_1, Y1, default);  // modifiers: X1_0
  reaction3: => X2_0; default*Function_for_reaction3(X11_1, X11_3, X1_1, X2_0, X2_2, a1_X2_0, b_X2_2, default);  // modifiers: X11_1, X11_3, X1_1, X2_2
  reaction4: => X2_1; default*Function_for_reaction4(X11_1, X11_3, X1_1, X2_0, X2_1, default);  // modifiers: X11_1, X11_3, X1_1, X2_0
  reaction5: => X2_2; default*Function_for_reaction5(X11_1, X11_3, X2_0, X2_1, X2_2, a1_X2_0, b_X2_2, default);  // modifiers: X11_1, X11_3, X2_0, X2_1
  reaction6: => X4_0; default*Function_for_reaction6(X2_1, X4_0, X4_1, Y3, Y4, a_X4_0, b_X4_1, default, k_stress_1);  // modifiers: X2_1, X4_1
  reaction7: => X4_1; default*Function_for_reaction7(X2_1, X4_0, X4_1, Y3, Y4, a_X4_0, b_X4_1, default, k_stress_1);  // modifiers: X2_1, X4_0
  reaction8: => X5_0; default*Function_for_reaction8(X4_1, X5_0, X5_1, a_X5_0, b_X5_1, default);  // modifiers: X4_1, X5_1
  reaction9: => X5_1; default*Function_for_reaction9(X4_1, X5_0, X5_1, a_X5_0, b_X5_1, default);  // modifiers: X4_1, X5_0
  reaction10: => X8_0; default*Function_for_reaction10(X4_1, X5_1, X8_0, X8_1, X8_2, Y3, Y5, a1_X8_0, a2_X8_0, b_X8_1, b_X8_2, default, k_stress_2);  // modifiers: X4_1, X5_1, X8_1, X8_2
  reaction11: => X8_1; default*Function_for_reaction11(X4_1, X5_1, X8_0, X8_1, X8_3, Y5, a1_X8_0, b_X8_1, b_X8_2, default);  // modifiers: X4_1, X5_1, X8_0, X8_3
  reaction12: => X8_2; default*Function_for_reaction12(X4_1, X5_1, X8_0, X8_2, X8_3, Y3, Y5, a2_X8_0, b_X8_1, b_X8_2, default, k_stress_2);  // modifiers: X4_1, X5_1, X8_0, X8_3
  reaction13: => X8_3; default*Function_for_reaction13(X4_1, X5_1, X8_1, X8_2, X8_3, Y5, a1_X8_0, a2_X8_0, b_X8_1, b_X8_2, default);  // modifiers: X4_1, X5_1, X8_1, X8_2
  reaction14: => X9_0; default*Function_for_reaction14(X8_1, X8_3, X9_0, X9_2, a2_X9_0, b_X9_2, default);  // modifiers: X8_1, X8_3, X9_2
  reaction15: => X9_2; default*Function_for_reaction15(X8_1, X8_3, X9_0, X9_2, a2_X9_0, b_X9_2, default);  // modifiers: X8_1, X8_3, X9_0
  reaction16: => X10_0; default*Function_for_reaction16(X10_0, X10_1, X10_2, X10_3, X8_1, X8_3, X9_0, X9_2, Y2, Y3, a1_X10_0, a2_X10_0, a_X6_Y2, b_X10_1, b_X10_2, default, k_stress_3_X10);  // modifiers: X10_1, X10_2, X10_3, X8_1, X8_3, X9_0, X9_2
  reaction17: => X10_1; default*Function_for_reaction17(X10_0, X10_1, X10_2, X10_3, X8_1, X8_3, X9_0, X9_2, Y2, Y3, a1_X10_0, a_X10_1, a_X6_Y2, b_X10_1, b_X10_2, default, k_stress_3_X10);  // modifiers: X10_0, X10_2, X10_3, X8_1, X8_3, X9_0, X9_2
  reaction18: => X10_2; default*Function_for_reaction18(X10_0, X10_1, X10_2, X10_3, X8_1, X8_3, X9_0, X9_2, Y2, Y3, a2_X10_0, a_X10_2, a_X6_Y2, b_X10_1, b_X10_2, default, k_stress_3_X10);  // modifiers: X10_0, X10_1, X10_3, X8_1, X8_3, X9_0, X9_2
  reaction19: => X10_3; default*Function_for_reaction19(X10_0, X10_1, X10_2, X10_3, X8_1, X8_3, X9_0, X9_2, Y2, Y3, a_X10_1, a_X10_2, a_X6_Y2, b_X10_1, b_X10_2, default, k_stress_3_X10);  // modifiers: X10_0, X10_1, X10_2, X8_1, X8_3, X9_0, X9_2
  reaction20: => X11_0; default*Function_for_reaction20(X10_0, X10_1, X10_2, X10_3, X11_0, X11_1, X11_2, X5_0, X9_0, X9_2, Y2, Y3, a1_X11_0, a2_X11_0, a_X6_Y2, b_X11_1, b_X11_2, default, k_stress_3_X11);  // modifiers: X10_0, X10_1, X10_2, X10_3, X11_1, X11_2, X5_0, X9_0, X9_2
  reaction21: => X11_1; default*Function_for_reaction21(X10_0, X10_1, X10_2, X10_3, X11_0, X11_1, X11_3, X5_0, X9_0, X9_2, Y2, Y3, a1_X11_0, a_X6_Y2, b_X11_1, b_X11_2, default, k_stress_3_X11);  // modifiers: X10_0, X10_1, X10_2, X10_3, X11_0, X11_3, X5_0, X9_0, X9_2
  reaction22: => X11_2; default*Function_for_reaction22(X10_0, X10_1, X10_2, X10_3, X11_0, X11_2, X11_3, X5_0, X9_0, X9_2, Y2, Y3, a2_X11_0, a_X6_Y2, b_X11_1, b_X11_2, default, k_stress_3_X11);  // modifiers: X10_0, X10_1, X10_2, X10_3, X11_0, X11_3, X5_0, X9_0, X9_2
  reaction23: => X11_3; default*Function_for_reaction23(X10_0, X10_1, X10_2, X10_3, X11_1, X11_2, X11_3, X5_0, X9_0, X9_2, Y2, Y3, a1_X11_0, a2_X11_0, a_X6_Y2, b_X11_1, b_X11_2, default, k_stress_3_X11);  // modifiers: X10_0, X10_1, X10_2, X10_3, X11_1, X11_2, X5_0, X9_0, X9_2
  reaction24: => X12_0; default*Function_for_reaction24(X10_0, X10_1, X10_2, X10_3, X12_0, X12_1, X9_0, X9_2, Y2, Y3, a_X12_0, a_X6_Y2, b_X12_1, default, k_stress_3_X12);  // modifiers: X10_0, X10_1, X10_2, X10_3, X12_1, X9_0, X9_2
  reaction25: => X12_1; default*Function_for_reaction25(X10_0, X10_1, X10_2, X10_3, X12_0, X12_1, X9_0, X9_2, Y2, Y3, a_X12_0, a_X6_Y2, b_X12_1, default, k_stress_3_X12);  // modifiers: X10_0, X10_1, X10_2, X10_3, X12_0, X9_0, X9_2
end
