// SBML level 2 version 4

function Function_for_reaction2_0(X1_0, X1_1, Y1, default)
  (X1_0*Y1 - X1_1)/default;
end

function Function_for_reaction3_0(X11_1, X11_3, X1_1, X2_0, X2_2, a1_X2_0, b_X2_2, default)
  (X2_2*b_X2_2 - X1_1*X2_0 - X2_0*a1_X2_0*(X11_1 + X11_3))/default;
end

function Function_for_reaction1_0(X1_0, X1_1, Y1, default)
  (X1_1 - X1_0*Y1)/default;
end

function Function_for_reaction6_0(X2_1, X4_0, X4_1, Y3, Y4, a_X4_0, b_X4_1, default, k_stress_1)
  (X4_1*b_X4_1 + X4_0*(X2_1*a_X4_0 + Y3*k_stress_1)*(Y4 - 1))/default;
end

function Function_for_reaction5_0(X11_1, X11_3, X2_0, X2_1, X2_2, a1_X2_0, b_X2_2, default)
  (X2_1*(X11_1 + X11_3) - X2_2*b_X2_2 + X2_0*a1_X2_0*(X11_1 + X11_3))/default;
end

function Function_for_reaction9_0(X4_1, X5_0, X5_1, a_X5_0, b_X5_1, default)
  (X4_1*X5_0*a_X5_0 - X5_1*b_X5_1)/default;
end

function Function_for_reaction7_0(X2_1, X4_0, X4_1, Y3, Y4, a_X4_0, b_X4_1, default, k_stress_1)
  (-X4_1*b_X4_1 - X4_0*(X2_1*a_X4_0 + Y3*k_stress_1)*(Y4 - 1))/default;
end

function Function_for_reaction4_0(X11_1, X11_3, X1_1, X2_0, X2_1, default)
  (X1_1*X2_0 - X2_1*(X11_1 + X11_3))/default;
end

function Function_for_reaction15_1_0(X8_1, X8_2, X8_3, X9_0, X9_2, a2_X9_0, b_X9_2, default)
  (X9_0*a2_X9_0*(X8_1 + X8_2 + X8_3) - X9_2*b_X9_2)/default;
end

function Function_for_reaction8_0(X4_1, X5_0, X5_1, a_X5_0, b_X5_1, default)
  (X5_1*b_X5_1 - X4_1*X5_0*a_X5_0)/default;
end

function Function_for_reaction13_0(X4_1, X5_1, X8_1, X8_2, X8_3, Y5, a1_X8_0, a2_X8_0, b_X8_1, b_X8_2, default)
  (-X8_3*b_X8_1 - X8_3*b_X8_2 - 2*X4_1*X8_1*a1_X8_0*(0.83*Y5 - 1) - 2*X5_1*X8_2*a2_X8_0*(0.83*Y5 - 1))/default;
end

function Function_for_reaction11_0(X4_1, X5_1, X8_0, X8_1, X8_3, Y5, a1_X8_0, b_X8_1, b_X8_2, default)
  (X8_3*b_X8_2 - X8_1*b_X8_1 + 2*X4_1*X8_1*a1_X8_0*(0.83*Y5 - 1) - X5_1*X8_0*a1_X8_0*(0.83*Y5 - 1))/default;
end

function Function_for_reaction14_1_0(X8_1, X8_2, X8_3, X9_0, X9_2, a2_X9_0, b_X9_2, default)
  (X9_2*b_X9_2 - X9_0*a2_X9_0*(X8_1 + X8_2 + X8_3))/default;
end

function Function_for_reaction21_1_0(X10_0, X10_1, X10_2, X10_3, X11_0, X11_1, X11_3, X5_0, X9_0, X9_2, Y2, a1_X11_0, a_X6_Y2, b_X11_1, b_X11_2, default)
  (X11_3*b_X11_2 - X11_1*b_X11_1 + X11_0*(Y2*a_X6_Y2 + a1_X11_0*(X10_0/(X10_0 + X10_1 + X10_2 + X10_3) - 1)*(X9_0/(X9_0 + X9_2) - 1)) - 2*X11_1*X5_0*a1_X11_0)/default;
end

function Function_for_reaction10_1_0(X4_1, X5_1, X8_0, X8_1, X8_2, Y5, a1_X8_0, a2_X8_0, b_X8_1, b_X8_2, default)
  (X8_1*b_X8_1 + X8_2*b_X8_2 + X5_1*X8_0*a1_X8_0*(0.83*Y5 - 1) + X4_1*X8_0*a2_X8_0*(0.83*Y5 - 1))/default;
end

function Function_for_reaction17_2_0(X10_0, X10_1, X10_2, X10_3, X8_1, X8_2, X8_3, X9_0, X9_2, Y2, a1_X10_0, a_X10_1, a_X6_Y2, b_X10_1, b_X10_2, default)
  (X10_3*b_X10_2 - X10_1*b_X10_1 + X10_0*(Y2*a_X6_Y2 + a1_X10_0*(X10_0/(X10_0 + X10_1 + X10_2 + X10_3) - 1)*(X9_0/(X9_0 + X9_2) - 1)) - X10_1*a_X10_1*(X8_1 + X8_2 + X8_3))/default;
end

function Function_for_reaction22_1_0(X10_0, X10_1, X10_2, X10_3, X11_0, X11_2, X11_3, X5_0, X9_0, X9_2, Y2, a2_X11_0, a_X6_Y2, b_X11_1, b_X11_2, default)
  (X11_3*b_X11_1 - X11_2*b_X11_2 - X11_2*(Y2*a_X6_Y2 + 2*a2_X11_0*(X10_0/(X10_0 + X10_1 + X10_2 + X10_3) - 1)*(X9_0/(X9_0 + X9_2) - 1)) + X11_0*X5_0*a2_X11_0)/default;
end

function Function_for_reaction18_2_0(X10_0, X10_1, X10_2, X10_3, X8_1, X8_2, X8_3, X9_0, X9_2, Y2, a2_X10_0, a_X10_2, a_X6_Y2, b_X10_1, b_X10_2, default)
  (X10_3*b_X10_1 - X10_2*b_X10_2 - X10_2*(Y2*a_X6_Y2 + a_X10_2*(X10_0/(X10_0 + X10_1 + X10_2 + X10_3) - 1)*(X9_0/(X9_0 + X9_2) - 1)) + X10_0*a2_X10_0*(X8_1 + X8_2 + X8_3))/default;
end

function Function_for_reaction16_2_0(X10_0, X10_1, X10_2, X10_3, X8_1, X8_2, X8_3, X9_0, X9_2, Y2, a1_X10_0, a2_X10_0, a_X6_Y2, b_X10_1, b_X10_2, default)
  (X10_1*b_X10_1 + X10_2*b_X10_2 - X10_0*(Y2*a_X6_Y2 + a1_X10_0*(X10_0/(X10_0 + X10_1 + X10_2 + X10_3) - 1)*(X9_0/(X9_0 + X9_2) - 1)) - X10_0*a2_X10_0*(X8_1 + X8_2 + X8_3))/default;
end

function Function_for_reaction19_2_0(X10_0, X10_1, X10_2, X10_3, X8_1, X8_2, X8_3, X9_0, X9_2, Y2, a_X10_1, a_X10_2, a_X6_Y2, b_X10_1, b_X10_2, default)
  (X10_2*(Y2*a_X6_Y2 + a_X10_2*(X10_0/(X10_0 + X10_1 + X10_2 + X10_3) - 1)*(X9_0/(X9_0 + X9_2) - 1)) - X10_3*b_X10_2 - X10_3*b_X10_1 + X10_1*a_X10_1*(X8_1 + X8_2 + X8_3))/default;
end

function Function_for_reaction23_1_0(X10_0, X10_1, X10_2, X10_3, X11_1, X11_2, X11_3, X5_0, X9_0, X9_2, Y2, a1_X11_0, a2_X11_0, a_X6_Y2, b_X11_1, b_X11_2, default)
  (X11_2*(Y2*a_X6_Y2 + 2*a2_X11_0*(X10_0/(X10_0 + X10_1 + X10_2 + X10_3) - 1)*(X9_0/(X9_0 + X9_2) - 1)) - X11_3*b_X11_2 - X11_3*b_X11_1 + 2*X11_1*X5_0*a1_X11_0)/default;
end

function Function_for_reaction24_1_0(X10_0, X10_1, X10_2, X10_3, X12_0, X12_1, X9_0, X9_2, Y2, a_X12_0, a_X6_Y2, b_X12_1, default)
  (X12_1*b_X12_1 - X12_0*(Y2*a_X6_Y2 + a_X12_0*(X10_0/(X10_0 + X10_1 + X10_2 + X10_3) - 1)*(X9_0/(X9_0 + X9_2) - 1)))/default;
end

function Function_for_reaction25_1_0(X10_0, X10_1, X10_2, X10_3, X12_0, X12_1, X9_0, X9_2, Y2, a_X12_0, a_X6_Y2, b_X12_1, default)
  (X12_0*(Y2*a_X6_Y2 + a_X12_0*(X10_0/(X10_0 + X10_1 + X10_2 + X10_3) - 1)*(X9_0/(X9_0 + X9_2) - 1)) - X12_1*b_X12_1)/default;
end

function Function_for_reaction12_1_0(X4_1, X5_1, X8_0, X8_2, X8_3, Y5, a2_X8_0, b_X8_1, b_X8_2, default)
  (X8_3*b_X8_1 - X8_2*b_X8_2 - X4_1*X8_0*a2_X8_0*(0.83*Y5 - 1) + 2*X5_1*X8_2*a2_X8_0*(0.83*Y5 - 1))/default;
end

function Function_for_reaction20_1_0(X10_0, X10_1, X10_2, X10_3, X11_0, X11_1, X11_2, X5_0, X9_0, X9_2, Y2, a1_X11_0, a2_X11_0, a_X6_Y2, b_X11_1, b_X11_2, default)
  (X11_1*b_X11_1 + X11_2*b_X11_2 - X11_0*(Y2*a_X6_Y2 + a1_X11_0*(X10_0/(X10_0 + X10_1 + X10_2 + X10_3) - 1)*(X9_0/(X9_0 + X9_2) - 1)) - X11_0*X5_0*a2_X11_0)/default;
end

model HeberleRazquinNavas2019_The_PI3K_and_MAPK_p38_pathways_control_stress_granuleassembly_in_a_hierarchical_manner_model_2()
  // All cells and organisms exhibit stress-coping mechanisms to ensure survival. Cytoplasmic protein-RNA assemblies termed stress granules are increasingly recognized to promote cellular survival under stress. Thus, they might represent tumor vulnerabilities that are currently poorly explored. The translation-inhibitory eIF2α kinases are established as main drivers of stress granule assembly. Using a systems approach, we identify the translation enhancers PI3K and MAPK/p38 as pro-stress-granule-kinases. They act through the metabolic master regulator mammalian target of rapamycin complex 1 (mTORC1) to promote stress granule assembly. When highly active, PI3K is the main driver of stress granules; however, the impact of p38 becomes apparent as PI3K activity declines. PI3K and p38 thus act in a hierarchical manner to drive mTORC1 activity and stress granule assembly. Of note, this signaling hierarchy is also present in human breast cancer tissue. Importantly, only the recognition of the PI3K-p38 hierarchy under stress enabled the discovery of p38’s role in stress granule formation. In summary, we assign a new pro-survival function to the key oncogenic kinases PI3K and p38, as they hierarchically promote stress granule formation.
  // isDescribedBy pubmed:30923191
  // hasProperty mamo:MAMO_0000003
  // biomodels.db:MODEL2001030002

  // Compartments:
  compartment default = 1;

  // Species:
  species X1_0 in default = 1;
  species X1_1 in default = 0;
  species X2_0 in default = init_X2_0_MCF7_Wm;
  species X2_1 in default = 0;
  species X2_2 in default = init_X2_2_MCF7_Wm;
  species X4_0 in default = 1;
  species X4_1 in default = 0;
  species X5_0 in default = init_X5_0_MCF7_Wm;
  species X5_1 in default = 0;
  species X8_0 in default = init_X8_0_MCF7_Wm;
  species X8_1 in default = init_X8_1_MCF7_Ars*init_X8_1_MCF7_WmFr;
  species X8_2 in default = init_X8_2_MCF7_Ars*init_X8_2_MCF7_WmFr;
  species X8_3 in default = 0;
  species X9_0 in default = init_X9_0_MCF7_Wm;
  species X9_2 in default = init_X9_2_MCF7_Wm;
  species X10_0 in default = init_X10_0_MCF7_Wm;
  species X10_1 in default = init_X10_1_MCF7_Wm;
  species X10_2 in default = init_X10_2_MCF7_Wm;
  species X10_3 in default = 0;
  species X11_0 in default = init_X11_0_MCF7_Wm;
  species X11_1 in default = init_X11_1_MCF7_Wm;
  species X11_2 in default = init_X11_2_MCF7_Wm;
  species X11_3 in default = 0;
  species X12_0 in default = init_X12_0_MCF7_Wm;
  species X12_1 in default = init_X12_1_MCF7_Wm;
  species $Akt_pT308_obs in default;
  species $Akt_pS473_obs in default;
  species $TSC1_TSC2_pT1462_obs in default;
  species $PRAS40_pT246_obs in default;
  species $PRAS40_pS183_obs in default;
  species $fourEBP1_pT37_46_obs in default;
  species $p70_S6K_pT389_obs in default;
  species $p70_S6K_pT229_obs in default;
  species $IRS1_pS636_639_obs in default; IRS1_pS636_639_obs is "IRS1_pS636-639_obs";

  // Parameters:
  a1_X10_0 = 0.002247463;
  a1_X11_0 = 10;
  a1_X2_0 = 0.04964631;
  a1_X8_0 = 7.542445;
  a2_X10_0 = 0.02100707;
  a2_X11_0 = 9.282285e-5;
  a2_X8_0 = 0.07190181;
  a2_X9_0 = 0.6407093;
  a_X10_1 = 0.3564175;
  a_X10_2 = 1.000293e-5;
  a_X12_0 = 0.6688832;
  a_X4_0 = 0.000292415;
  a_X5_0 = 1e-5;
  a_X6_Y2 = 6.462523e-5;
  b_X10_1 = 0.8479681;
  b_X10_2 = 0.01366012;
  b_X11_1 = 9.999913;
  b_X11_2 = 9.999996;
  b_X12_1 = 0.02966064;
  b_X2_2 = 0.04839911;
  b_X4_1 = 0.001158864;
  b_X5_1 = 0.5212742;
  b_X8_1 = 0.002641636;
  b_X8_2 = 1e-5;
  b_X9_2 = 10;
  init_X10_0_MCF7_Wm = 6.517372;
  init_X10_1_MCF7_Wm = 0.0005456979;
  init_X10_2_MCF7_Wm = 0.06359002;
  init_X11_0_MCF7_Wm = 1.717359;
  init_X11_1_MCF7_Wm = 0.0001235989;
  init_X11_2_MCF7_Wm = 0.0003818769;
  init_X12_0_MCF7_Wm = 3.79588;
  init_X12_1_MCF7_Wm = 0.007623452;
  init_X2_0_MCF7_Wm = 5.171003;
  init_X2_2_MCF7_Wm = 0.0009198837;
  init_X5_0_MCF7_Wm = 9.995234;
  init_X8_0_MCF7_Wm = 6.406127;
  init_X8_1_MCF7_Ars = 0.0007556648;
  init_X8_1_MCF7_WmFr = 1;
  init_X8_2_MCF7_Ars = 0.3947661;
  init_X8_2_MCF7_WmFr = 0.1256902;
  init_X9_0_MCF7_Wm = 1.287068;
  init_X9_2_MCF7_Wm = 0.003383854;
  k_stress_1 = 0.6265866;
  Y1 = 0;
  Y2 = 1;
  Y3 = 1;
  Y4 = 1;
  Y5 = 0;
  scale_Akt_pT308 = 284.632;
  scale_Akt_pT473 = 1.016011;
  scale_TSC1_TSC2_pT1462 = 42.93618;
  scale_PRAS40_pT246 = 0.2094705;
  scale_PRAS40_pS183 = 999.9973;
  scale_fourEBP1_pT37_46 = 55.93901;
  scale_p70_S6K_pT389 = 688.8682;
  scale_p70_S6K_pT229 = 508.2774;
  scale_IRS1_pS636_639 = 257.9382; scale_IRS1_pS636_639 is "scale_IRS1_pS636-639";
  Initial_for_scale_Akt_pT308 = scale_Akt_pT308;
  Initial_for_scale_Akt_pT473 = scale_Akt_pT473;
  Initial_for_scale_IRS1_pS636_639 = scale_IRS1_pS636_639; Initial_for_scale_IRS1_pS636_639 is "Initial for scale_IRS1_pS636-639";
  Initial_for_scale_PRAS40_pS183 = scale_PRAS40_pS183;
  Initial_for_scale_PRAS40_pT246 = scale_PRAS40_pT246;
  ModelValue_75 = scale_TSC1_TSC2_pT1462; ModelValue_75 is "Initial for scale_TSC1_TSC2_pT1462";
  ModelValue_78 = scale_fourEBP1_pT37_46; ModelValue_78 is "Initial for scale_fourEBP1_pT37_46";
  Initial_for_scale_p70_S6K_pT229 = scale_p70_S6K_pT229;
  Initial_for_scale_p70_S6K_pT389 = scale_p70_S6K_pT389;

  // Assignment rules:
  Akt_pT308_obs := Initial_for_scale_Akt_pT308*X8_1 + Initial_for_scale_Akt_pT308*X8_3;
  IRS1_pS636_639_obs := Initial_for_scale_IRS1_pS636_639*X2_2;
  fourEBP1_pT37_46_obs := ModelValue_78*X12_1;
  Akt_pS473_obs := Initial_for_scale_Akt_pT473*X8_2 + Initial_for_scale_Akt_pT473*X8_3;
  PRAS40_pT246_obs := Initial_for_scale_PRAS40_pT246*X10_2 + Initial_for_scale_PRAS40_pT246*X10_3;
  p70_S6K_pT389_obs := Initial_for_scale_p70_S6K_pT389*X11_1 + Initial_for_scale_p70_S6K_pT389*X11_3;
  PRAS40_pS183_obs := Initial_for_scale_PRAS40_pS183*X10_1 + Initial_for_scale_PRAS40_pS183*X10_3;
  TSC1_TSC2_pT1462_obs := ModelValue_75*X9_2;
  p70_S6K_pT229_obs := Initial_for_scale_p70_S6K_pT229*X11_2 + Initial_for_scale_p70_S6K_pT229*X11_3;

  // Reactions:
  reaction1: => X1_0; default*Function_for_reaction1_0(X1_0, X1_1, Y1, default);  // modifiers: X1_1
  reaction2: => X1_1; default*Function_for_reaction2_0(X1_0, X1_1, Y1, default);  // modifiers: X1_0
  reaction3: => X2_0; default*Function_for_reaction3_0(X11_1, X11_3, X1_1, X2_0, X2_2, a1_X2_0, b_X2_2, default);  // modifiers: X11_1, X11_3, X1_1, X2_2
  reaction4: => X2_1; default*Function_for_reaction4_0(X11_1, X11_3, X1_1, X2_0, X2_1, default);  // modifiers: X11_1, X11_3, X1_1, X2_0
  reaction5: => X2_2; default*Function_for_reaction5_0(X11_1, X11_3, X2_0, X2_1, X2_2, a1_X2_0, b_X2_2, default);  // modifiers: X11_1, X11_3, X2_0, X2_1
  reaction6: => X4_0; default*Function_for_reaction6_0(X2_1, X4_0, X4_1, Y3, Y4, a_X4_0, b_X4_1, default, k_stress_1);  // modifiers: X2_1, X4_1
  reaction7: => X4_1; default*Function_for_reaction7_0(X2_1, X4_0, X4_1, Y3, Y4, a_X4_0, b_X4_1, default, k_stress_1);  // modifiers: X2_1, X4_0
  reaction8: => X5_0; default*Function_for_reaction8_0(X4_1, X5_0, X5_1, a_X5_0, b_X5_1, default);  // modifiers: X4_1, X5_1
  reaction9: => X5_1; default*Function_for_reaction9_0(X4_1, X5_0, X5_1, a_X5_0, b_X5_1, default);  // modifiers: X4_1, X5_0
  reaction10: => X8_0; default*Function_for_reaction10_1_0(X4_1, X5_1, X8_0, X8_1, X8_2, Y5, a1_X8_0, a2_X8_0, b_X8_1, b_X8_2, default);  // modifiers: X4_1, X5_1, X8_1, X8_2
  reaction11: => X8_1; default*Function_for_reaction11_0(X4_1, X5_1, X8_0, X8_1, X8_3, Y5, a1_X8_0, b_X8_1, b_X8_2, default);  // modifiers: X4_1, X5_1, X8_0, X8_3
  reaction12: => X8_2; default*Function_for_reaction12_1_0(X4_1, X5_1, X8_0, X8_2, X8_3, Y5, a2_X8_0, b_X8_1, b_X8_2, default);  // modifiers: X4_1, X5_1, X8_0, X8_3
  reaction13: => X8_3; default*Function_for_reaction13_0(X4_1, X5_1, X8_1, X8_2, X8_3, Y5, a1_X8_0, a2_X8_0, b_X8_1, b_X8_2, default);  // modifiers: X4_1, X5_1, X8_1, X8_2
  reaction14: => X9_0; default*Function_for_reaction14_1_0(X8_1, X8_2, X8_3, X9_0, X9_2, a2_X9_0, b_X9_2, default);  // modifiers: X8_1, X8_2, X8_3, X9_2
  reaction15: => X9_2; default*Function_for_reaction15_1_0(X8_1, X8_2, X8_3, X9_0, X9_2, a2_X9_0, b_X9_2, default);  // modifiers: X8_1, X8_2, X8_3, X9_0
  reaction16: => X10_0; default*Function_for_reaction16_2_0(X10_0, X10_1, X10_2, X10_3, X8_1, X8_2, X8_3, X9_0, X9_2, Y2, a1_X10_0, a2_X10_0, a_X6_Y2, b_X10_1, b_X10_2, default);  // modifiers: X10_1, X10_2, X10_3, X8_1, X8_2, X8_3, X9_0, X9_2
  reaction17: => X10_1; default*Function_for_reaction17_2_0(X10_0, X10_1, X10_2, X10_3, X8_1, X8_2, X8_3, X9_0, X9_2, Y2, a1_X10_0, a_X10_1, a_X6_Y2, b_X10_1, b_X10_2, default);  // modifiers: X10_0, X10_2, X10_3, X8_1, X8_2, X8_3, X9_0, X9_2
  reaction18: => X10_2; default*Function_for_reaction18_2_0(X10_0, X10_1, X10_2, X10_3, X8_1, X8_2, X8_3, X9_0, X9_2, Y2, a2_X10_0, a_X10_2, a_X6_Y2, b_X10_1, b_X10_2, default);  // modifiers: X10_0, X10_1, X10_3, X8_1, X8_2, X8_3, X9_0, X9_2
  reaction19: => X10_3; default*Function_for_reaction19_2_0(X10_0, X10_1, X10_2, X10_3, X8_1, X8_2, X8_3, X9_0, X9_2, Y2, a_X10_1, a_X10_2, a_X6_Y2, b_X10_1, b_X10_2, default);  // modifiers: X10_0, X10_1, X10_2, X8_1, X8_2, X8_3, X9_0, X9_2
  reaction20: => X11_0; default*Function_for_reaction20_1_0(X10_0, X10_1, X10_2, X10_3, X11_0, X11_1, X11_2, X5_0, X9_0, X9_2, Y2, a1_X11_0, a2_X11_0, a_X6_Y2, b_X11_1, b_X11_2, default);  // modifiers: X10_0, X10_1, X10_2, X10_3, X11_1, X11_2, X5_0, X9_0, X9_2
  reaction21: => X11_1; default*Function_for_reaction21_1_0(X10_0, X10_1, X10_2, X10_3, X11_0, X11_1, X11_3, X5_0, X9_0, X9_2, Y2, a1_X11_0, a_X6_Y2, b_X11_1, b_X11_2, default);  // modifiers: X10_0, X10_1, X10_2, X10_3, X11_0, X11_3, X5_0, X9_0, X9_2
  reaction22: => X11_2; default*Function_for_reaction22_1_0(X10_0, X10_1, X10_2, X10_3, X11_0, X11_2, X11_3, X5_0, X9_0, X9_2, Y2, a2_X11_0, a_X6_Y2, b_X11_1, b_X11_2, default);  // modifiers: X10_0, X10_1, X10_2, X10_3, X11_0, X11_3, X5_0, X9_0, X9_2
  reaction23: => X11_3; default*Function_for_reaction23_1_0(X10_0, X10_1, X10_2, X10_3, X11_1, X11_2, X11_3, X5_0, X9_0, X9_2, Y2, a1_X11_0, a2_X11_0, a_X6_Y2, b_X11_1, b_X11_2, default);  // modifiers: X10_0, X10_1, X10_2, X10_3, X11_1, X11_2, X5_0, X9_0, X9_2
  reaction24: => X12_0; default*Function_for_reaction24_1_0(X10_0, X10_1, X10_2, X10_3, X12_0, X12_1, X9_0, X9_2, Y2, a_X12_0, a_X6_Y2, b_X12_1, default);  // modifiers: X10_0, X10_1, X10_2, X10_3, X12_1, X9_0, X9_2
  reaction25: => X12_1; default*Function_for_reaction25_1_0(X10_0, X10_1, X10_2, X10_3, X12_0, X12_1, X9_0, X9_2, Y2, a_X12_0, a_X6_Y2, b_X12_1, default);  // modifiers: X10_0, X10_1, X10_2, X10_3, X12_0, X9_0, X9_2
end
