// SBML level 3 version 1
// dcterms:bibliographicCitation: urn:miriam:pubmed:
// dcterms:bibliographicCitation: urn:miriam:pubmed:22229411
// dcterms:bibliographicCitation: urn:miriam:pubmed:18823127
// dcterms:bibliographicCitation: Km from recombinant human enzyme, similar to mouse Km urn:miriam:pubmed:8182091
// dcterms:bibliographicCitation: turnover calculated from enzyme 1300 fold purified from porcine liver, Km=0.83 urn:miriam:pubmed:2963591
// dcterms:bibliographicCitation: Km, turnover forward reaction urn:miriam:pubmed:17402747
// dcterms:bibliographicCitation: Keq used to calculate turnover for reverse reaction urn:miriam:pubmed:16118205
// dcterms:bibliographicCitation: urn:miriam:pubmed:4340699
// dcterms:bibliographicCitation: urn:miriam:doi:10.1021/bi049592e
// dcterms:bibliographicCitation: Km urn:miriam:pubmed:26385918
// dcterms:bibliographicCitation: Vmax of purified anzyme and Km for NR urn:miriam:pubmed:19027704
// dcterms:bibliographicCitation: original work calf Km and kcat calculated with MW of 92kDa urn:miriam:pubmed:9030766
// dcterms:bibliographicCitation: urn:miriam:doi:

function MM_with_ET_and_scaling(ET, scaling, kcat, S, Km)
  ET*scaling*kcat*S/(Km + S);
end

function TwosubstratesMMs2constant(E_T, turnover, s1, s2, scaling, Km)
  E_T*turnover*s1*s2*scaling/(Km + s1);
end

function Competitie_inhibition_two_substrates_s2_const_scaling(E_T, scaling, kcat_A, A, Km_A, kcat_PA, PA, Km_PA, B, Km_B, PB, Km_PB)
  E_T*scaling*(kcat_A*A/Km_A - kcat_PA*PA/Km_PA)/(1 + A/Km_A + B/Km_B + PA/Km_PA + PB/Km_PB);
end

function Product_inhibition_scaling(ET, scaling, Kcat, S, Km, I, Ki)
  ET*scaling*Kcat*S/(Km + S + Km*I/Ki);
end

function Product_inhibition_two_susbtrates_s2_const_scaling(ET, scaling, Kcat, S1, S2, Km, I, Ki)
  ET*scaling*Kcat*S1*S2/((Km + S1)*(1 + I/Ki));
end

function Competitive_inhibition_scaling(ET, scaling, Kcat, S, Km, I, Ki)
  ET*scaling*Kcat*S/(Km + S + Km*I/Ki);
end

function Two_substrate_product_inhibiton_scaling(ET, scaling, Kcat, I, Ki, Kma, Kmb, B, A)
  ET*scaling*Kcat*A*B/(Kma*(Kmb + B)*(1 + I/Ki) + A*Kmb + A*B);
end

function Constant_flux__irreversible(v)
  v;
end
Constant_flux__irreversible is "Constant flux (irreversible)";

model New_Model()
  // Heiland2019 - NAD pathway model analysing the impact of NNMT on pathway dynamics and evolution
  // This is a detailed model of NAD biosynthesis and consumption representing pathway variances across kingdoms.
  // model units - substance: substance, time: time, volume: volume, area: area, length: length, extent: substance

  // Compartments:
  compartment Cytosol = 1 volume;

  // Species:
  species NA in Cytosol = 0;
  species NaMN in Cytosol = 0;
  species NAM in Cytosol = 0;
  species NAD in Cytosol = 0;
  species NaAD in Cytosol = 0;
  species NMN in Cytosol = 0;
  species NAR in Cytosol = 0;
  species $H2O in Cytosol = 1;
  species $ADP in Cytosol = 1;
  species $ATP in Cytosol = 1;
  species $PPi in Cytosol = 0.012;
  species $PRPP in Cytosol = 1;
  species $_1_methyl_NAM in Cytosol = 0; _1_methyl_NAM is "1-methyl-NAM";
  species $SAH in Cytosol = 1;
  species $SAM in Cytosol = 0.08;
  species $AMP in Cytosol = 1;
  species $Gln in Cytosol = 1;
  species $Glu in Cytosol = 1;
  species $H3_ac in Cytosol = 1;
  species $H3_deac in Cytosol = 1;
  species $Pi in Cytosol = 1;
  species NR in Cytosol = 0;
  species NADbound in Cytosol = 0;

  // Parameters:
  scaling = 0.001;
  NADbiosynthesis = 10; NADbiosynthesis is "NMNAT E_T";
  cell_division_rate = 1e-5;
  var NamPT_NNMT_flux; NamPT_NNMT_flux is "NamPT/NNMT flux";

  // Assignment rules:
  NamPT_NNMT_flux := NAMPT/NNMT;

  // Reactions:
  NADA: NAM + $H2O => NA; Cytosol*Product_inhibition_scaling(NADA_ET, scaling, NADA_Kcat, NAM, NADA_Km, NA, NADA_Ki);  // isPartOf ec-code:3.5.1.19; isDescribedBy pubmed:22229411
    NADA_ET = 0; NADA_Kcat = 0.69; NADA_Km = 0.009; NADA_Ki = 0.1;
  NAPRT: NA + $ATP + $PRPP => NaMN + $ADP + $PPi; Cytosol*TwosubstratesMMs2constant(NAPRT_E_T, NAPRT_turnover, NA, ATP, scaling, NAPRT_Km);  // ec-code:2.4.2.11; isDescribedBy pubmed:18823127
    NAPRT_E_T = 10; NAPRT_turnover = 3.3; NAPRT_Km = 0.0015;
  NNMT: NAM + $SAM => $_1_methyl_NAM + $SAH; Cytosol*Two_substrate_product_inhibiton_scaling(NNMT_ET, scaling, NNMT_Kcat, _1_methyl_NAM, NNMT_Ki, Kma, Kmb, NAM, SAM);  // brenda:441255; ec-code:2.1.1.1; isDescribedBy pubmed:8182091; isDescribedBy pubmed:2963591
    NNMT_ET = 10; NNMT_Kcat = 8.1; NNMT_Ki = 0.06; Kma = 0.0018; Kmb = 0.4;
  NMNAT1_NaMN: NaMN + $ATP -> NaAD + $PPi; Cytosol*Competitie_inhibition_two_substrates_s2_const_scaling(NADbiosynthesis, scaling, NMNAT1_NaMN_kcat_A, NaMN, NMNAT1_NaMN_Km_A, NMNAT1_NaMN_kcat_PA, NaAD, NMNAT1_NaMN_Km_PA, NMN, NMNAT1_NaMN_Km_B, NAD, NMNAT1_NaMN_Km_PB); NMNAT1_NaMN is "NMNAT1-NaMN";  // modifiers: NMN, NAD; ec-code:2.7.7.18; ec-code:2.7.7.1; isDescribedBy pubmed:17402747; isDescribedBy pubmed:16118205
    NMNAT1_NaMN_kcat_A = 42.9; NMNAT1_NaMN_Km_A = 0.0677; NMNAT1_NaMN_kcat_PA = 103.8; NMNAT1_NaMN_Km_PA = 0.502; NMNAT1_NaMN_Km_B = 0.0223; NMNAT1_NaMN_Km_PB = 0.059;
  NADS: NaAD + $ATP + $Gln + $H2O => $Glu + NAD + $PPi + $AMP; Cytosol*TwosubstratesMMs2constant(NADS_E_T, NADS_turnover, NaAD, ATP, scaling, NADS_Km);  // ec-code:6.3.5.1; isDescribedBy pubmed:4340699
    NADS_E_T = 10; NADS_turnover = 21; NADS_Km = 0.19;
  SIRT: NAD + $H3_ac => NAM + $H3_deac; Cytosol*Product_inhibition_two_susbtrates_s2_const_scaling(SIRT_ET, scaling, SIRT_Kcat, NAD, H3_ac, SIRT_Km, NAM, SIRT_Ki);  // isDescribedBy doi:10.1021/bi049592e
    SIRT_ET = 10; SIRT_Kcat = 0.67; SIRT_Km = 0.029; SIRT_Ki = 0.06;
  // cell size HeLa 3e-12 l
  // fibro blast 1e-12l
  // maximal E. coli uptake NA http://www.jbc.org/content/248/14/5144.full.pdf 630 molceules per cell and s
  // thus approx. 1 mikroM/s
  // HeLa (epithelial; 8.2 ± 0.3 fmol/10 min),
  // NIH-3T3 cells : The apparent Km of NAD transport was ∼190 μM while the Vmax was 429 pmol/well/10 min.
  // http://www.jbc.org/content/283/10/6367.full
  // (1.2e6 cells per well according to thermo fisher cell culture specifications)
  // thus approx. 0.2 mikroM/s
  // 15mg uptake per 60kg body = 2.5e-8 mmol/ls
  NAM_import: => NAM; Cytosol*Constant_flux__irreversible(v);
    v = 0.0001;
  NAMPT: NAM + $PRPP => NMN + $Pi; Cytosol*Competitive_inhibition_scaling(NAMPT_ET, scaling, NAMPT_Kcat, NAM, NAMPT_Km, NAD, NAMPT_Ki);  // modifiers: NAD; ec-code:2.4.2.12; isDescribedBy pubmed:18823127
    NAMPT_ET = 400; NAMPT_Kcat = 0.0077; NAMPT_Km = 5e-6; NAMPT_Ki = 0.0021;
  NMNAT1_NMN: NMN + $ATP -> NAD + $PPi; Cytosol*Competitie_inhibition_two_substrates_s2_const_scaling(NADbiosynthesis, scaling, NMNAT1_NMN_kcat_A, NMN, NMNAT1_NMN_Km_A, NMNAT1_NMN_kcat_PA, NAD, NMNAT1_NMN_Km_PA, NaMN, NMNAT1_NMN_Km_B, NaAD, NMNAT1_NMN_Km_PB); NMNAT1_NMN is "NMNAT1-NMN";  // modifiers: NaMN, NaAD; ec-code:2.7.7.1; ec-code:2.7.7.18; isDescribedBy pubmed:17402747; isDescribedBy pubmed:16118205
    NMNAT1_NMN_kcat_A = 53.8; NMNAT1_NMN_Km_A = 0.0223; NMNAT1_NMN_kcat_PA = 129.1; NMNAT1_NMN_Km_PA = 0.059; NMNAT1_NMN_Km_B = 0.0677; NMNAT1_NMN_Km_PB = 0.502;
  // Km and Kcat from CN-II
  NT5_NaMN: NaMN + $H2O => NAR; Cytosol*MM_with_ET_and_scaling(NT5_NaMN_ET, scaling, NT5_NaMN_kcat, NaMN, NT5_NaMN_Km); NT5_NaMN is "NT5-NaMN";  // ec-code:3.1.3.5; isDescribedBy pubmed:26385918
    NT5_NaMN_ET = 10; NT5_NaMN_kcat = 2.8; NT5_NaMN_Km = 3.5;
  // KM and Kcat for CN-III
  NT5_NMN: NMN + $H2O => NR; Cytosol*MM_with_ET_and_scaling(NT5_NMN_ET, scaling, NT5_NMN_kcat, NMN, NT5_NMN_Km); NT5_NMN is "NT5-NMN";  // ec-code:3.1.3.5; isDescribedBy pubmed:26385918
    NT5_NMN_ET = 10; NT5_NMN_kcat = 0.5; NT5_NMN_Km = 5;
  Nam_efflux: NAM => ; Cytosol*cell_division_rate*NAM; Nam_efflux is "Nam-efflux";
  // Kcat calculated from vmax of purified enzyme (600nmol/min*mg) using an MW of 23193 g/mol
  NRK1_NMN: NR => NMN; Cytosol*MM_with_ET_and_scaling(NRK1_NMN_ET, scaling, NRK1_NMN_kcat, NR, NRK1_NMN_Km); NRK1_NMN is "NRK1-NMN";  // modifiers: NAR; ec-code:2.7.1.173; isDescribedBy pubmed:19027704
    NRK1_NMN_ET = 10; NRK1_NMN_kcat = 0.23; NRK1_NMN_Km = 0.0034;
  PNP_NR: NR + $Pi => NAM; Cytosol*TwosubstratesMMs2constant(PNP_NR_E_T, PNP_NR_turnover, NR, Pi, scaling, PNP_NR_Km); PNP_NR is "PNP-NR";  // modifiers: NAR; isDescribedBy pubmed:9030766
    PNP_NR_E_T = 10; PNP_NR_turnover = 40; PNP_NR_Km = 1.48;
  NAD_binding: NAD -> NADbound; Cytosol*(k1*NAD - k2*NADbound); NAD_binding is "NAD-binding";
    k1 = 100; k2 = 10;
  // Kcat calculated from vmax of purified enzyme (600nmol/min*mg) using an MW of 23193 g/mol for NMN
  NRK1_NaMN: NAR => NaMN; Cytosol*MM_with_ET_and_scaling(NRK1_NaMN_ET, scaling, NRK1_NaMN_kcat, NAR, NRK1_NaMN_Km); NRK1_NaMN is "NRK1-NaMN";  // modifiers: NR; ec-code:2.7.1.173; isDescribedBy pubmed:19027704
    NRK1_NaMN_ET = 10; NRK1_NaMN_kcat = 0.23; NRK1_NaMN_Km = 0.0034;
  // Parameter have to be adjusted for NAR...currently NR affinities are used
  PNP_NAR: NAR + $Pi => NA; Cytosol*TwosubstratesMMs2constant(PNP_NAR_E_T, PNP_NAR_turnover, NAR, Pi, scaling, PNP_NAR_Km); PNP_NAR is "PNP-NAR";  // modifiers: NR; isDescribedBy pubmed:9030766
    PNP_NAR_E_T = 10; PNP_NAR_turnover = 40; PNP_NAR_Km = 1.48;
  NAD_efflux: NAD => ; Cytosol*cell_division_rate*NAD; NAD_efflux is "NAD-efflux";
  NMN_efflux: NMN => ; Cytosol*cell_division_rate*NMN; NMN_efflux is "NMN-efflux";
  NR_efflux: NR => ; Cytosol*cell_division_rate*NR; NR_efflux is "NR-efflux";
  NAR_efflux: NAR => ; Cytosol*cell_division_rate*NAR; NAR_efflux is "NAR-efflux";
  NA_efflux: NA => ; Cytosol*cell_division_rate*NA; NA_efflux is "NA-efflux";
  NAMN_efflux: NaMN => ; Cytosol*cell_division_rate*NaMN; NAMN_efflux is "NAMN-efflux";
  NaAD_efflux: NaAD => ; Cytosol*cell_division_rate*NaAD; NaAD_efflux is "NaAD-efflux";
  NAD_consumption_without_inhibition: NAD => NAM; Cytosol*MM_with_ET_and_scaling(NAD_consumption_without_inhibition_ET, scaling, NAD_consumption_without_inhibition_kcat, NAD, NAD_consumption_without_inhibition_Km);  // isDescribedBy doi:10.1021/bi049592e
    NAD_consumption_without_inhibition_ET = 10; NAD_consumption_without_inhibition_kcat = 1; NAD_consumption_without_inhibition_Km = 0.3;

  // Unit definitions:
  unit length = metre;
  unit area = metre^2;
  unit volume = litre;
  unit time = second;
  unit substance = 1e-3 mole;
end
