// SBML level 2 version 4

function Rate_Law_for_reaction_1_1_1_1(Cell, cJun_P, k)
  k*cJun_P*Cell*(cJun_P*Cell - 1)*0.5/Cell;
end

function Rate_Law_for_reaction_1_1_2(Alk5, Cell, k)
  k*Alk5*Cell*(Alk5*Cell - 1)*0.5/Cell;
end

model IL1_OSM_TGF()
  // Hodgson2018 - TGFbeta signalling and inflammatory response

  // Compartments:
  compartment Cell = 1;

  // Species:
  species IL1 in Cell = 100;
  species Jnk_P in Cell = 0;
  species Jnk in Cell = 100;
  species IL1R in Cell = 100;
  species IL1RR in Cell = 0;
  species IL1RR_int in Cell = 0; IL1RR_int is "IL1RR.int";
  species cJun in Cell = 100;
  species cJun_P in Cell = 0;
  species cJun_dimer in Cell = 0;
  species OSM in Cell = 1000;
  species OSMR in Cell = 100;
  species OSMRR in Cell = 0;
  species Jak1 in Cell = 100;
  species Jak1_P in Cell = 0;
  species Stat3_nuc in Cell = 0;
  species cFos_mRNA in Cell = 0;
  species Stat3_cyt in Cell = 75;
  species cFos in Cell = 0;
  species p38 in Cell = 100;
  species p38_P in Cell = 0;
  species cFos_P in Cell = 0;
  species cFos_cJun in Cell = 0;
  species Block in Cell = 0;
  species MMP13_mRNA in Cell = 0;
  species Integrin in Cell = 0;
  species $Source in Cell = 1;
  species $Sink in Cell = 1;
  species Alk5 in Cell = 500;
  species Tgfb_A in Cell = 0;
  species Tgfb_I in Cell = 200;
  species Alk5_dimer in Cell = 0;
  species Alk1 in Cell = 300;
  species Alk1_Alk5 in Cell = 0;
  species Tgfb_Alk5_dimer in Cell = 0;
  species Smad7 in Cell = 0;
  species Tgfb_Alk5_dimer_Smad7 in Cell = 0;
  species Tgfb_Alk1_Alk5 in Cell = 0;
  species Smad2_3 in Cell = 600; Smad2_3 is "Smad2/3";
  species Smad2_3_P in Cell = 0; Smad2_3_P is "Smad2/3_P";
  species Smad2_3_P_Smad4 in Cell = 0; Smad2_3_P_Smad4 is "Smad2/3_P_Smad4";
  species Smad4 in Cell = 600;
  species Runx2_A in Cell = 0;
  species Runx2_I in Cell = 100;
  species Smad1_5_8 in Cell = 600; Smad1_5_8 is "Smad1/5/8";
  species Smad1_5_8_P in Cell = 0; Smad1_5_8_P is "Smad1/5/8_P";
  species Smad1_5_8_P_Smad4 in Cell = 0; Smad1_5_8_P_Smad4 is "Smad1/5/8_P_Smad4";
  species Tgfb_Alk1_Alk5_Smad7 in Cell = 0;
  species JunB_mRNA in Cell = 0;
  species JunB in Cell = 0;
  species JunB_cJun in Cell = 0;
  species A in Cell = 100;
  species Dummy_mRNA in Cell = 0;
  species Dummy in Cell = 0;
  species A_phos in Cell = 0;

  // Reactions:
  IL1_degradation: IL1 => $Sink; Cell*IL1_degradation_k1*IL1;
    IL1_degradation_k1 = 0.0134391;
  Jnk_phosphorylation: Jnk + IL1RR_int => Jnk_P + IL1RR_int; Cell*Jnk_phosphorylation_k1*Jnk*IL1RR_int;
    Jnk_phosphorylation_k1 = 7.0703e-5;
  Jnk_dephosphorylation: Jnk_P => Jnk; Cell*Jnk_dephosphorylation_k1*Jnk_P;
    Jnk_dephosphorylation_k1 = 0.00117396;
  IL1_receptor_binding: IL1 + IL1R => IL1RR; Cell*IL1_receptor_binding_k1*IL1*IL1R;
    IL1_receptor_binding_k1 = 1.56398e-5;
  IL1_receptor_release: IL1RR => IL1 + IL1R; Cell*IL1_receptor_release_k1*IL1RR;
    IL1_receptor_release_k1 = 0.000456021;
  IL1_receptor_internalisation: IL1RR => IL1RR_int; Cell*IL1_receptor_internalisation_k1*IL1RR;
    IL1_receptor_internalisation_k1 = 0.000526143;
  IL1_receptor_externalisation: IL1RR_int => IL1RR; Cell*IL1_receptor_externalisation_k1*IL1RR_int;
    IL1_receptor_externalisation_k1 = 0.000108915;
  cJun_phosphorylation: cJun + Jnk_P => cJun_P + Jnk_P; Cell*cJun_phosphorylation_k1*cJun*Jnk_P;
    cJun_phosphorylation_k1 = 0.000517838;
  cJun_dephosphorylation: cJun_P => cJun; Cell*cJun_dephosphorylation_k1*cJun_P;
    cJun_dephosphorylation_k1 = 0.0101011;
  cJun_dimerisation: 2 cJun_P => cJun_dimer; Cell*Rate_Law_for_reaction_1_1_1_1(Cell, cJun_P, cJun_dimerisation_k);
    cJun_dimerisation_k = 3.46215e-5;
  cJun_dimer_dissociation: cJun_dimer => 2 cJun_P; Cell*cJun_dimer_dissociation_k1*cJun_dimer;
    cJun_dimer_dissociation_k1 = 0.00597931;
  OSM_receptor_binding: OSM + OSMR => OSMRR; Cell*OSM_receptor_binding_k1*OSM*OSMR;
    OSM_receptor_binding_k1 = 5.65049e-6;
  OSM_receptor_realease: OSMRR => OSM + OSMR; Cell*OSM_receptor_realease_k1*OSMRR;
    OSM_receptor_realease_k1 = 0.000145815;
  OSM_degradation: OSM => $Sink; Cell*OSM_degradation_k1*OSM;
    OSM_degradation_k1 = 0.00489815;
  Jak1_phosphorylation: Jak1 + OSMRR => Jak1_P + OSMRR; Cell*Jak1_phosphorylation_k1*Jak1*OSMRR;
    Jak1_phosphorylation_k1 = 1.15141e-5;
  Stat3_nuclear_localisation: Stat3_cyt + Jak1_P => Stat3_nuc + Jak1_P; Cell*Stat3_nuclear_localisation_k1*Stat3_cyt*Jak1_P;
    Stat3_nuclear_localisation_k1 = 0.000254544;
  Jak1_dephosphorylation: Jak1_P => Jak1; Cell*Jak1_dephosphorylation_k1*Jak1_P;
    Jak1_dephosphorylation_k1 = 0.000112793;
  Stat3_cytoplasmic_localisation: Stat3_nuc => Stat3_cyt; Cell*Stat3_cytoplasmic_localisation_k1*Stat3_nuc;
    Stat3_cytoplasmic_localisation_k1 = 0.00516542;
  cFos_mRNA_degradation: cFos_mRNA => $Sink; Cell*cFos_mRNA_degradation_k1*cFos_mRNA;
    cFos_mRNA_degradation_k1 = 0.00192809;
  cFos_transcription: Stat3_nuc => Stat3_nuc + cFos_mRNA; Cell*cFos_transcription_k1*Stat3_nuc;
    cFos_transcription_k1 = 0.0373275;
  Jak1_dephosphorylation_2: Stat3_nuc + Jak1_P => Jak1 + Stat3_nuc; Cell*Jak1_dephosphorylation_2_k1*Stat3_nuc*Jak1_P;
    Jak1_dephosphorylation_2_k1 = 2.52445e-6;
  cFos_translation: cFos_mRNA => cFos_mRNA + cFos; Cell*cFos_translation_k1*cFos_mRNA;
    cFos_translation_k1 = 0.000638263;
  cFos_degradation: cFos => $Sink; Cell*cFos_degradation_k1*cFos;
    cFos_degradation_k1 = 8.93372e-5;
  p38_phosphorylation: p38 + IL1RR_int => p38_P + IL1RR_int; Cell*p38_phosphorylation_k1*p38*IL1RR_int;
    p38_phosphorylation_k1 = 0.000103442;
  p38_dephosphorylation: p38_P => p38; Cell*p38_dephosphorylation_k1*p38_P;
    p38_dephosphorylation_k1 = 0.000375499;
  cFos_phosphorylation: p38_P + cFos => p38_P + cFos_P; Cell*cFos_phosphorylation_k1*p38_P*cFos;
    cFos_phosphorylation_k1 = 1.23346e-5;
  cFos_dephosphorylation: cFos_P => cFos; Cell*cFos_dephosphorylation_k1*cFos_P;
    cFos_dephosphorylation_k1 = 0.0248604;
  cFos_cJun_binding: cFos_P + cJun_P => cFos_cJun; Cell*cFos_cJun_binding_k1*cFos_P*cJun_P;
    cFos_cJun_binding_k1 = 5.17349e-5;
  cFos_cJun_unbinding: cFos_cJun => cFos_P + cJun_P; Cell*cFos_cJun_unbinding_k1*cFos_cJun;
    cFos_cJun_unbinding_k1 = 3.81247e-5;
  cJun_Block_formation: cJun_dimer => cJun_dimer + Block; Cell*cJun_Block_formation_k1*cJun_dimer;
    cJun_Block_formation_k1 = 0.000209119;
  cFos_cJun_Block_formation: cFos_cJun => cFos_cJun + Block; Cell*cFos_cJun_Block_formation_k1*cFos_cJun;
    cFos_cJun_Block_formation_k1 = 0.00417795;
  Block_degradation: Block => $Sink; Cell*Block_degradation_k1*Block;
    Block_degradation_k1 = 1.81712e-5;
  IL1_receptor_externiliastaion: Block + IL1RR_int => Block + IL1R; Cell*IL1_receptor_externiliastaion_k1*Block*IL1RR_int;
    IL1_receptor_externiliastaion_k1 = 0.000181358;
  Jnk_dephosphorylation_2: Jnk_P + Block => Jnk + Block; Cell*Jnk_dephosphorylation_2_k1*Jnk_P*Block;
    Jnk_dephosphorylation_2_k1 = 0.000351332;
  Block_induced_Stat3_cytoplasmic_localisation: Stat3_nuc + Block => Stat3_cyt + Block; Cell*Block_induced_Stat3_cytoplasmic_localisation_k1*Stat3_nuc*Block;
    Block_induced_Stat3_cytoplasmic_localisation_k1 = 0.00291324;
  Block_mediated_cFos_dephosphorylation: cFos_P + Block => cFos + Block; Cell*Block_mediated_cFos_dephosphorylation_k1*cFos_P*Block;
    Block_mediated_cFos_dephosphorylation_k1 = 6.57757e-5;
  cJun_MMP13_transcription: cJun_dimer => MMP13_mRNA + cJun_dimer; Cell*cJun_MMP13_transcription_k1*cJun_dimer;
    cJun_MMP13_transcription_k1 = 0.00154276;
  cFos_cJun_MMP13_transcription: cFos_cJun => MMP13_mRNA + cFos_cJun; Cell*cFos_cJun_MMP13_transcription_k1*cFos_cJun;
    cFos_cJun_MMP13_transcription_k1 = 0.000474983;
  MMP13_mRNA_degradation: MMP13_mRNA => $Sink; Cell*MMP13_mRNA_degradation_k1*MMP13_mRNA;
    MMP13_mRNA_degradation_k1 = 3.4771e-6;
  Integrin_formation: $Source => Integrin; Cell*Integrin_formation_k1*Source;
    Integrin_formation_k1 = 2.26437e-7;
  Integrin_degradation: Integrin => $Sink; Cell*Integrin_degradation_k1*Integrin;
    Integrin_degradation_k1 = 0.000509024;
  Alk5_formation: $Source => Alk5; Cell*Alk5_formation_k1*Source;
    Alk5_formation_k1 = 2.58842e-6;
  Tgf_activation: Tgfb_I + Integrin => Tgfb_A + Integrin; Cell*Tgf_activation_k1*Tgfb_I*Integrin;
    Tgf_activation_k1 = 0.0008328;
  Tgf_inactivation: Tgfb_A => Tgfb_I; Cell*Tgf_inactivation_k1*Tgfb_A;
    Tgf_inactivation_k1 = 0.0308993;
  Alk5_dimerisation: 2 Alk5 => Alk5_dimer; Cell*Rate_Law_for_reaction_1_1_2(Alk5, Cell, Alk5_dimerisation_k);
    Alk5_dimerisation_k = 0.00011916;
  Alk5_dimer_dissociation: Alk5_dimer => 2 Alk5; Cell*Alk5_dimer_dissociation_k1*Alk5_dimer;
    Alk5_dimer_dissociation_k1 = 0.000742759;
  Alk1_Alk5_binding: Alk1 + Alk5 => Alk1_Alk5; Cell*Alk1_Alk5_binding_k1*Alk1*Alk5;
    Alk1_Alk5_binding_k1 = 7.6479e-5;
  Alk1_Alk5_unbinding: Alk1_Alk5 => Alk1 + Alk5; Cell*Alk1_Alk5_unbinding_k1*Alk1_Alk5;
    Alk1_Alk5_unbinding_k1 = 0.0104896;
  Active_Tgf_Alk5_dimer_binding: Tgfb_A + Alk5_dimer => Tgfb_Alk5_dimer; Cell*Active_Tgf_Alk5_dimer_binding_k1*Tgfb_A*Alk5_dimer;
    Active_Tgf_Alk5_dimer_binding_k1 = 3.53971e-5;
  Active_Tgf_Alk5_dimer_unbinding: Tgfb_Alk5_dimer => Tgfb_A + Alk5_dimer; Cell*Active_Tgf_Alk5_dimer_unbinding_k1*Tgfb_Alk5_dimer;
    Active_Tgf_Alk5_dimer_unbinding_k1 = 1.1069e-6;
  Active_Tgf_Alk5_dimer_Smad7_binding: Tgfb_Alk5_dimer + Smad7 => Tgfb_Alk5_dimer_Smad7; Cell*Active_Tgf_Alk5_dimer_Smad7_binding_k1*Tgfb_Alk5_dimer*Smad7;
    Active_Tgf_Alk5_dimer_Smad7_binding_k1 = 1.64992e-5;
  Active_Tgf_Alk5_dimer_Smad7_unbinding: Tgfb_Alk5_dimer_Smad7 => Tgfb_Alk5_dimer + Smad7; Cell*Active_Tgf_Alk5_dimer_Smad7_unbinding_k1*Tgfb_Alk5_dimer_Smad7;
    Active_Tgf_Alk5_dimer_Smad7_unbinding_k1 = 1.64157e-6;
  Smad7_induced_Alk5_degradation: Tgfb_Alk5_dimer_Smad7 => Tgfb_I; Cell*Smad7_induced_Alk5_degradation_k1*Tgfb_Alk5_dimer_Smad7;
    Smad7_induced_Alk5_degradation_k1 = 2.06172e-5;
  Active_Tgf_Alk1_Alk5_binding: Tgfb_A + Alk1_Alk5 => Tgfb_Alk1_Alk5; Cell*Active_Tgf_Alk1_Alk5_binding_k1*Tgfb_A*Alk1_Alk5;
    Active_Tgf_Alk1_Alk5_binding_k1 = 4.76993e-6;
  Active_Tgf_Alk1_Alk5_unbinding: Tgfb_Alk1_Alk5 => Tgfb_A + Alk1_Alk5; Cell*Active_Tgf_Alk1_Alk5_unbinding_k1*Tgfb_Alk1_Alk5;
    Active_Tgf_Alk1_Alk5_unbinding_k1 = 1.55514e-6;
  Smad2_3_phosphorylation: Tgfb_Alk5_dimer + Smad2_3 => Tgfb_Alk5_dimer + Smad2_3_P; Cell*Smad2_3_phosphorylation_k1*Tgfb_Alk5_dimer*Smad2_3; Smad2_3_phosphorylation is "Smad2/3_phosphorylation";
    Smad2_3_phosphorylation_k1 = 3.12276e-5;
  Phospho_Smad2_3_Smad4_binding: Smad2_3_P + Smad4 => Smad2_3_P_Smad4; Cell*Phospho_Smad2_3_Smad4_binding_k1*Smad2_3_P*Smad4; Phospho_Smad2_3_Smad4_binding is "Phospho_Smad2/3_Smad4_binding";
    Phospho_Smad2_3_Smad4_binding_k1 = 5.29927e-5;
  Phospho_Smad2_3_Smad4_unbinding: Smad2_3_P_Smad4 => Smad2_3_P + Smad4; Cell*Phospho_Smad2_3_Smad4_unbinding_k1*Smad2_3_P_Smad4; Phospho_Smad2_3_Smad4_unbinding is "Phospho_Smad2/3_Smad4_unbinding";
    Phospho_Smad2_3_Smad4_unbinding_k1 = 0.0109173;
  Smad2_3_unphosphorylation: Smad2_3_P => Smad2_3; Cell*Smad2_3_unphosphorylation_k1*Smad2_3_P; Smad2_3_unphosphorylation is "Smad2/3_unphosphorylation";
    Smad2_3_unphosphorylation_k1 = 0.00880227;
  Smad7_formation: Smad2_3_P_Smad4 => Smad2_3_P_Smad4 + Smad7; Cell*Smad7_formation_k1*Smad2_3_P_Smad4;
    Smad7_formation_k1 = 8.94386e-6;
  Runx2_inactivation: Runx2_A + Smad2_3_P_Smad4 => Runx2_I + Smad2_3_P_Smad4; Cell*Runx2_inactivation_k1*Runx2_A*Smad2_3_P_Smad4;
    Runx2_inactivation_k1 = 0.000717341;
  Alk5_degradation: Alk5 => $Sink; Cell*Alk5_degradation_k1*Alk5;
    Alk5_degradation_k1 = 3.45415e-7;
  Active_Tgf_Smad1_5_8_binding: Tgfb_Alk1_Alk5 + Smad1_5_8 => Tgfb_Alk1_Alk5 + Smad1_5_8_P; Cell*Active_Tgf_Smad1_5_8_binding_k1*Tgfb_Alk1_Alk5*Smad1_5_8; Active_Tgf_Smad1_5_8_binding is "Active_Tgf_Smad1/5/8_binding";
    Active_Tgf_Smad1_5_8_binding_k1 = 1.69024e-5;
  Smad1_5_8_dephosphrolyation: Smad1_5_8_P => Smad1_5_8; Cell*Smad1_5_8_dephosphrolyation_k1*Smad1_5_8_P; Smad1_5_8_dephosphrolyation is "Smad1/5/8_dephosphrolyation";
    Smad1_5_8_dephosphrolyation_k1 = 0.000216743;
  Smad7_induced_Smad1_5_8_dephosphrolyation: Smad1_5_8_P + Smad7 => Smad1_5_8 + Smad7; Cell*Smad7_induced_Smad1_5_8_dephosphrolyation_k1*Smad1_5_8_P*Smad7; Smad7_induced_Smad1_5_8_dephosphrolyation is "Smad7_induced_Smad1/5/8_dephosphrolyation";
    Smad7_induced_Smad1_5_8_dephosphrolyation_k1 = 0.000376915;
  Smad1_5_8_Smad4_binding: Smad1_5_8_P + Smad4 => Smad1_5_8_P_Smad4; Cell*Smad1_5_8_Smad4_binding_k1*Smad1_5_8_P*Smad4; Smad1_5_8_Smad4_binding is "Smad1/5/8_Smad4_binding";
    Smad1_5_8_Smad4_binding_k1 = 4.69808e-5;
  Smad1_5_8_Smad4_unbinding: Smad1_5_8_P_Smad4 => Smad1_5_8_P + Smad4; Cell*Smad1_5_8_Smad4_unbinding_k1*Smad1_5_8_P_Smad4; Smad1_5_8_Smad4_unbinding is "Smad1/5/8_Smad4_unbinding";
    Smad1_5_8_Smad4_unbinding_k1 = 0.0176848;
  Runx2_activation: Runx2_I + Smad1_5_8_P_Smad4 => Runx2_A + Smad1_5_8_P_Smad4; Cell*Runx2_activation_k1*Runx2_I*Smad1_5_8_P_Smad4;
    Runx2_activation_k1 = 0.00166138;
  Runx2_driven_MMP13_transcription: Runx2_A => MMP13_mRNA + Runx2_A; Cell*Runx2_driven_MMP13_transcription_k1*Runx2_A;
    Runx2_driven_MMP13_transcription_k1 = 1.592e-6;
  Alk1_formation: $Source => Alk1; Cell*Alk1_formation_k1*Source;
    Alk1_formation_k1 = 4.88038e-6;
  Alk1_degredation: Alk1 => $Sink; Cell*Alk1_degredation_k1*Alk1;
    Alk1_degredation_k1 = 1.72504e-8;
  Tgf_Alk1_Alk5_Smad7_binding: Tgfb_Alk1_Alk5 + Smad7 => Tgfb_Alk1_Alk5_Smad7; Cell*Tgf_Alk1_Alk5_Smad7_binding_k1*Tgfb_Alk1_Alk5*Smad7;
    Tgf_Alk1_Alk5_Smad7_binding_k1 = 0.265037;
  Tgf_Alk1_Alk5_Smad7_unbinding: Tgfb_Alk1_Alk5_Smad7 => Tgfb_Alk1_Alk5 + Smad7; Cell*Tgf_Alk1_Alk5_Smad7_unbinding_k1*Tgfb_Alk1_Alk5_Smad7;
    Tgf_Alk1_Alk5_Smad7_unbinding_k1 = 0.000760035;
  Smad7_induced_Alk1_Alk5_degradation: Tgfb_Alk1_Alk5_Smad7 => Tgfb_I; Cell*Smad7_induced_Alk1_Alk5_degradation_k1*Tgfb_Alk1_Alk5_Smad7;
    Smad7_induced_Alk1_Alk5_degradation_k1 = 9.76558e-6;
  Smad7_degradation: Smad7 => $Sink; Cell*Smad7_degradation_k1*Smad7;
    Smad7_degradation_k1 = 0.00797289;
  JunB_transcription: Smad2_3_P_Smad4 => Smad2_3_P_Smad4 + JunB_mRNA; Cell*JunB_transcription_k1*Smad2_3_P_Smad4;
    JunB_transcription_k1 = 1.7054e-5;
  JunB_translation: JunB_mRNA => JunB_mRNA + JunB; Cell*JunB_translation_k1*JunB_mRNA;
    JunB_translation_k1 = 0.000851564;
  JunB_mRNA_degradation: JunB_mRNA => $Sink; Cell*JunB_mRNA_degradation_k1*JunB_mRNA;
    JunB_mRNA_degradation_k1 = 1.47909e-5;
  JunB_degradation: JunB => $Sink; Cell*JunB_degradation_k1*JunB;
    JunB_degradation_k1 = 0.00924242;
  Smad1_5_8_P_induced_p38_phosphorylation: p38 + Smad1_5_8_P_Smad4 => p38_P + Smad1_5_8_P_Smad4; Cell*Smad1_5_8_P_induced_p38_phosphorylation_k1*p38*Smad1_5_8_P_Smad4; Smad1_5_8_P_induced_p38_phosphorylation is "Smad1/5/8_P_induced_p38_phosphorylation";
    Smad1_5_8_P_induced_p38_phosphorylation_k1 = 1.90077e-5;
  JunB_displacing_cJun_cJun_dimers: JunB + cJun_dimer => cJun_P + JunB_cJun; Cell*JunB_displacing_cJun_cJun_dimers_k1*JunB*cJun_dimer;
    JunB_displacing_cJun_cJun_dimers_k1 = 1.38216e-6;
  JunB_binding: JunB + cJun_P => JunB_cJun; Cell*JunB_binding_k1*JunB*cJun_P; JunB_binding is "JunB_cJun_binding";
    JunB_binding_k1 = 0.000697187;
  JunB_cJun_unbinding: JunB_cJun => JunB + cJun_P; Cell*JunB_cJun_unbinding_k1*JunB_cJun;
    JunB_cJun_unbinding_k1 = 3.37417e-5;
  JunB_displacing_cFos_cJun_dimers: cFos_cJun + JunB => JunB_cJun + cFos_P; Cell*JunB_displacing_cFos_cJun_dimers_k1*cFos_cJun*JunB;
    JunB_displacing_cFos_cJun_dimers_k1 = 6.74594e-6;
  A_phosphorylation: Smad2_3_P_Smad4 + A => Smad2_3_P_Smad4 + A_phos; Cell*A_phosphorylation_k1*Smad2_3_P_Smad4*A;
    A_phosphorylation_k1 = 1.41928e-5;
  Dummy_transcription: A_phos => Dummy_mRNA + A_phos; Cell*Dummy_transcription_k1*A_phos;
    Dummy_transcription_k1 = 1.46315e-5;
  Dummy_translation: Dummy_mRNA => Dummy; Cell*Dummy_translation_k1*Dummy_mRNA;
    Dummy_translation_k1 = 1.54253e-5;
  Dummy_induced_degradation: Dummy + MMP13_mRNA => Dummy; Cell*Dummy_induced_degradation_k1*Dummy*MMP13_mRNA;
    Dummy_induced_degradation_k1 = 1.07064e-6;
  Dummy_mRNA_degradadtion: Dummy_mRNA => $Sink; Cell*Dummy_mRNA_degradadtion_k1*Dummy_mRNA;
    Dummy_mRNA_degradadtion_k1 = 3.86479e-5;
  Dummy_degradadtion: Dummy => $Sink; Cell*Dummy_degradadtion_k1*Dummy;
    Dummy_degradadtion_k1 = 3.22331e-5;
  A_dephosphorylation: A_phos => A; Cell*A_dephosphorylation_k1*A_phos;
    A_dephosphorylation_k1 = 0.000378601;

  // Unit definitions:
  unit substance = item;
end
