// SBML level 3 version 2

model Konrath2023_genotoxic_stress_induced_IKK_NFkB_signaling()
  // hasProperty mamo:MAMO_0000046
  // isDescribedBy doi:10.1016/j.isci.2023.107917
  // model units - substance: substance, time: time_unit, volume: volume, area: area, length: length

  // Compartments:
  compartment cyt = 1 dimensionless;
  compartment nucl = 1 dimensionless;

  // Species:
  species BS_P in nucl = 0;
  species PARP1 in nucl = init_PARP1;
  species PARP1DSB_b in nucl = 0;
  species PARP1_b in nucl = 0;
  species parPARP1_b in nucl = 0;
  species parPARP1 in nucl = 0;
  species BS_M in nucl = 0;
  species MRN in nucl = init_MRN;
  species MRN_b in nucl = 0;
  species AMRN_b in nucl = 0;
  species ATM_n in nucl = init_ATM_n;
  species pATM_n in nucl = 0;
  species IKKg in nucl = init_IKKg;
  species sig in nucl = 0;
  species spIKKg_n in nucl = 0;
  species TRAF6 in cyt = init_TRAF6;
  species AT in cyt = 0;
  species ATT in cyt = 0;
  species TAK1 in cyt = init_TAK1;
  species pIKK in cyt = 0;

  // Parameters:
  DNAb has dimensionless;
  AB has dimensionless;
  k_DNAb = 1400 item_per_second;
  kon = 1.250745e-9 _1_inv_item_second;
  koff = 0.04086201 _1_inv_second;
  kr = 0.008361348 _1_inv_item_second;
  koff2 = 823.3493 _1_inv_second;
  vact = 6.775586 _1_inv_second;
  koff_act = 12.90047 _1_inv_second;
  kdepar = 1 _1_inv_second;
  k4 = 3.331164e-10 _1_inv_item_second;
  n = 2 dimensionless;
  k1 = 1.101653e-9 _1_inv_item_second;
  km = 6115.954 item2;
  k2 = 6.275252e-6 _1_inv_item_second;
  k5 = 0.0003928781 _1_inv_second;
  k3 = 0.0006463535 _1_inv_second;
  km2 = 88.32297 item2;
  SFM_k1 = 9.845083e-8 _1_inv_item2_second;
  SFM_k2 = 0.05278337 _1_inv_second;
  TM_k1 = 2.905002e-5 _1_inv_item_second;
  TM_k2 = 5.727721e-11 _1_inv_item_second;
  TM_k3 = 0.0001452477 _1_inv_item_second;
  init_PARP1 = 187881 item;
  init_MRN = 8786494 item;
  init_ATM_n = 7282.317 item;
  init_IKKg = 97513 item;
  init_TRAF6 = 100 item;
  init_TAK1 = 1647850 item;

  // Assignment rules:
  DNAb := piecewise(0, time < 0, 1) - piecewise(0, time - 1 < 0, 1);
  AB := 1;

  // Reactions:
  reaction1: => BS_P; DNAb*k_DNAb;
  reaction2: BS_P + PARP1 => PARP1DSB_b; BS_P*PARP1*kon;
  reaction3: PARP1DSB_b => BS_P + PARP1; PARP1DSB_b*koff;
  reaction4: PARP1 => PARP1_b; PARP1*kr*parPARP1_b;  // modifiers: parPARP1_b
  reaction5: PARP1_b => PARP1; PARP1_b*koff2;
  reaction6: PARP1DSB_b => parPARP1_b; AB*PARP1DSB_b*vact;
  reaction7: PARP1_b => parPARP1_b; AB*PARP1_b*vact;
  reaction8: parPARP1_b => parPARP1; koff_act*parPARP1_b;
  reaction9: parPARP1 => PARP1; kdepar*parPARP1;
  reaction10: => BS_M; DNAb*k_DNAb;
  reaction11: BS_M + MRN => MRN_b; BS_M*MRN*k4 + BS_M*MRN*MRN_b^n*k1/(km + MRN_b^n);
  reaction12: MRN_b + ATM_n => AMRN_b; ATM_n*MRN_b*k2;
  reaction13: AMRN_b => MRN_b + pATM_n; AMRN_b*k5 + AMRN_b*k3*pATM_n^n/(km2 + pATM_n^n);
  reaction14: parPARP1 + pATM_n + IKKg => sig; IKKg*SFM_k1*pATM_n*parPARP1;
  reaction15: sig => PARP1 + pATM_n + spIKKg_n; SFM_k2*sig;
  reaction16: pATM_n + TRAF6 => AT; TM_k1*TRAF6*pATM_n;
  reaction17: AT + TAK1 => ATT; AT*TAK1*TM_k2;
  reaction18: spIKKg_n => pIKK; ATT*TM_k3*spIKKg_n;  // modifiers: ATT

  // Unit definitions:
  unit _1_inv_item2_second = 1 / (item^2 * second);
  unit _1_inv_second = 1 / second;
  unit _1_inv_item_second = 1 / (item * second);
  unit item_per_second = item / second;
  unit item2 = item^2;
  unit time_unit = second;
  unit volume = dimensionless;
  unit substance = item;
  unit area = dimensionless;
  unit length = dimensionless;
end
