// SBML level 2 version 4

model chassagnole1hyb()
  // Pinto2022 - Hybrid SBML/ANN model
  // This model picks up an already published mechanistic model by Chassagnole et al. (2001) for the threonine synthesis pathway model of E. coli and turns it into a hybrid model with a deep neural network, fully compatible with the SBML format
  // hasProperty mamo:OTHER

  // Compartments:
  compartment compartment = 1;

  // Species:
  species adp in compartment = 0;
  species asa in compartment = 0;
  species asp in compartment = 2;
  species aspp in compartment = 0;
  species atp in compartment = 10;
  species hs in compartment = 0;
  species hsp in compartment = 0;
  species nadp in compartment = 0;
  species nadph in compartment = 2;
  species phos in compartment = 0;
  species thr in compartment = 2;

  // Parameters:
  vm11 = 0.15;
  keqak = 0.00064;
  k11 = 0.97;
  k1thr = 0.167;
  nak1 = 4.09;
  alpha = 2.47;
  k1aspp = 0.017;
  k1atp = 0.98;
  k1adp = 0.25;
  vm13 = 0.0722;
  lys = 0.46;
  k1lys = 0.391;
  nak3 = 2.8;
  k13 = 0.32;
  k13aspp = 0.017;
  k13atp = 0.22;
  k13adp = 0.25;
  vm2f = 0.1812;
  k2eq = 56.41503;
  k2aspp = 0.022;
  k2asa = 0.11;
  k2p = 10;
  k2nadph = 0.029;
  k2nadp = 0.144;
  katpase = 4.1e-5;
  prot = 202;
  vm3f = 1.001;
  k3eq = 3162.278;
  k3thr = 0.097;
  nhdh1 = 1.41;
  alpha3 = 3.93;
  k3asa = 0.24;
  k3hs = 3.39;
  k3nadph = 0.037;
  k3nadp = 0.067;
  vm4f = 0.1;
  lys1 = 0.46;
  k4lys = 9.45;
  k4atp = 0.072;
  k4ihs = 4.7;
  k4hs = 0.11;
  k4thr = 1.09;
  k4iatp = 4.35;
  knadph = 5.4e-6;
  prot1 = 202;
  vm5 = 0.0434;
  k5hsp = 0.31;
  w1 = -0.1659467;
  w2 = -0.3751319;
  w3 = 0.3915012;
  w4 = 0.4026407;
  w5 = -0.1477501;
  w6 = -1.218138;
  w7 = -0.1263178;
  w8 = -1.571002;
  w9 = -0.6607407;
  w10 = 0.03360112;
  w11 = 0.02182757;
  w12 = 0.2891537;
  w13 = -0.1701653;
  w14 = 0.4540826;
  w15 = -0.7704508;
  w16 = -0.06960951;
  w17 = 0.366576;
  w18 = 0.4251847;
  w19 = -1.282411;
  w20 = 0.9341107;
  w21 = -0.04953887;
  w22 = 0.1664667;
  w23 = -0.1635673;
  w24 = 0.1805135;
  w25 = -0.115207;
  w26 = 0.3173292;
  w27 = 0.755424;
  w28 = 0.5236433;
  w29 = 0.001495309;
  w30 = 0.0510645;
  w31 = -0.07677575;
  w32 = -0.08975437;
  w33 = 0.1875744;
  w34 = -0.3410362;
  w35 = 0.2434451;
  w36 = 0.501274;
  w37 = -0.6450988;
  w38 = -0.648334;
  w39 = 0.6748304;
  w40 = -0.1750654;
  w41 = 0.1070333;
  w42 = 0.5419024;
  w43 = -0.4641628;
  w44 = -0.417166;
  w45 = 0.2200681;
  w46 = -0.1053694;
  w47 = -0.4349538;
  w48 = -0.02086292;
  w49 = 0.133869;
  w50 = -0.6689352;
  w51 = -0.09562031;
  w52 = 0.09178847;
  w53 = 0.2095972;
  w54 = 0.8776772;
  w55 = -0.5075219;
  w56 = -0.009643371;
  w57 = 0.5373323;
  w58 = -0.2394222;
  w59 = 0.4752194;
  w60 = -0.4297237;
  w61 = 0.07333423;
  w62 = -0.8363519;
  w63 = 0.3598007;
  w64 = -0.220513;
  w65 = 0.04822737;
  w66 = -0.2300881;
  w67 = 0.4723889;
  w68 = 0.2237018;
  w69 = -0.003800362;
  w70 = -0.05613918;
  w71 = -0.1419727;
  w72 = -0.2577192;
  w73 = 1.019895;
  w74 = -0.4688456;
  w75 = -0.321715;
  w76 = 0.3959012;
  w77 = -0.6419494;
  w78 = -1.197242;
  w79 = 0.579587;
  w80 = 0.2454379;
  w81 = 0.4949217;
  w82 = -0.06111612;
  w83 = -0.4260047;
  w84 = 0.07155323;
  w85 = 0.05177777;
  w86 = 1.066046;
  w87 = 0.9768084;
  w88 = -0.3274115;
  w89 = -0.1144624;
  w90 = -0.1934473;
  w91 = -0.1370445;
  w92 = -0.1407066;
  w93 = -0.1460036;
  w94 = -0.6606546;
  w95 = -0.4534556;
  w96 = -0.373911;
  w97 = 0.006669966;
  w98 = -0.01238409;
  w99 = -0.005326931;
  w100 = -0.007432686;
  w101 = 0.04960694;
  w102 = 0.4006316;
  w103 = 0.05315989;
  w104 = 0.05912182;
  w105 = 0.8288003;
  w106 = -0.1107837;
  w107 = -0.3800201;
  w108 = -0.1737322;
  w109 = 0.3138838;
  w110 = 0.102926;
  w111 = -0.004056269;
  w112 = 0.4972684;
  w113 = -0.2760294;
  w114 = -0.1303953;
  w115 = 0.308434;
  w116 = 0.009362512;
  w117 = 0.2732071;
  w118 = 0.3706983;
  w119 = 0.1190184;
  w120 = 0.08248766;
  w121 = -0.03518451;
  w122 = 0.3388362;
  w123 = 1.924714;
  w124 = 0.4172044;
  w125 = -0.08710911;
  w126 = 0.5868376;
  w127 = 0.1477977;
  w128 = -0.1458837;
  w129 = 0.1135216;
  w130 = 0.133832;
  w131 = 0.1484768;
  w132 = -0.2211025;

  // Assignment rules:
  vakr := w91*tanh(w61*tanh(w1*adp/5 + w6*asa/0.1 + w11*asp/3 + w16*aspp/0.01 + w21*atp/15 + w26*hs/0.3 + w31*hsp/0.15 + w36*nadp/2 + w41*nadph/3 + w46*phos/5 + w51*thr/3 + w56) + w66*tanh(w2*adp/5 + w7*asa/0.1 + w12*asp/3 + w17*aspp/0.01 + w22*atp/15 + w27*hs/0.3 + w32*hsp/0.15 + w37*nadp/2 + w42*nadph/3 + w47*phos/5 + w52*thr/3 + w57) + w71*tanh(w3*adp/5 + w8*asa/0.1 + w13*asp/3 + w18*aspp/0.01 + w23*atp/15 + w28*hs/0.3 + w33*hsp/0.15 + w38*nadp/2 + w43*nadph/3 + w48*phos/5 + w53*thr/3 + w58) + w76*tanh(w4*adp/5 + w9*asa/0.1 + w14*asp/3 + w19*aspp/0.01 + w24*atp/15 + w29*hs/0.3 + w34*hsp/0.15 + w39*nadp/2 + w44*nadph/3 + w49*phos/5 + w54*thr/3 + w59) + w81*tanh(w5*adp/5 + w10*asa/0.1 + w15*asp/3 + w20*aspp/0.01 + w25*atp/15 + w30*hs/0.3 + w35*hsp/0.15 + w40*nadp/2 + w45*nadph/3 + w50*phos/5 + w55*thr/3 + w60) + w86) + w98*tanh(w62*tanh(w1*adp/5 + w6*asa/0.1 + w11*asp/3 + w16*aspp/0.01 + w21*atp/15 + w26*hs/0.3 + w31*hsp/0.15 + w36*nadp/2 + w41*nadph/3 + w46*phos/5 + w51*thr/3 + w56) + w67*tanh(w2*adp/5 + w7*asa/0.1 + w12*asp/3 + w17*aspp/0.01 + w22*atp/15 + w27*hs/0.3 + w32*hsp/0.15 + w37*nadp/2 + w42*nadph/3 + w47*phos/5 + w52*thr/3 + w57) + w72*tanh(w3*adp/5 + w8*asa/0.1 + w13*asp/3 + w18*aspp/0.01 + w23*atp/15 + w28*hs/0.3 + w33*hsp/0.15 + w38*nadp/2 + w43*nadph/3 + w48*phos/5 + w53*thr/3 + w58) + w77*tanh(w4*adp/5 + w9*asa/0.1 + w14*asp/3 + w19*aspp/0.01 + w24*atp/15 + w29*hs/0.3 + w34*hsp/0.15 + w39*nadp/2 + w44*nadph/3 + w49*phos/5 + w54*thr/3 + w59) + w82*tanh(w5*adp/5 + w10*asa/0.1 + w15*asp/3 + w20*aspp/0.01 + w25*atp/15 + w30*hs/0.3 + w35*hsp/0.15 + w40*nadp/2 + w45*nadph/3 + w50*phos/5 + w55*thr/3 + w60) + w87) + w105*tanh(w63*tanh(w1*adp/5 + w6*asa/0.1 + w11*asp/3 + w16*aspp/0.01 + w21*atp/15 + w26*hs/0.3 + w31*hsp/0.15 + w36*nadp/2 + w41*nadph/3 + w46*phos/5 + w51*thr/3 + w56) + w68*tanh(w2*adp/5 + w7*asa/0.1 + w12*asp/3 + w17*aspp/0.01 + w22*atp/15 + w27*hs/0.3 + w32*hsp/0.15 + w37*nadp/2 + w42*nadph/3 + w47*phos/5 + w52*thr/3 + w57) + w73*tanh(w3*adp/5 + w8*asa/0.1 + w13*asp/3 + w18*aspp/0.01 + w23*atp/15 + w28*hs/0.3 + w33*hsp/0.15 + w38*nadp/2 + w43*nadph/3 + w48*phos/5 + w53*thr/3 + w58) + w78*tanh(w4*adp/5 + w9*asa/0.1 + w14*asp/3 + w19*aspp/0.01 + w24*atp/15 + w29*hs/0.3 + w34*hsp/0.15 + w39*nadp/2 + w44*nadph/3 + w49*phos/5 + w54*thr/3 + w59) + w83*tanh(w5*adp/5 + w10*asa/0.1 + w15*asp/3 + w20*aspp/0.01 + w25*atp/15 + w30*hs/0.3 + w35*hsp/0.15 + w40*nadp/2 + w45*nadph/3 + w50*phos/5 + w55*thr/3 + w60) + w88) + w112*tanh(w64*tanh(w1*adp/5 + w6*asa/0.1 + w11*asp/3 + w16*aspp/0.01 + w21*atp/15 + w26*hs/0.3 + w31*hsp/0.15 + w36*nadp/2 + w41*nadph/3 + w46*phos/5 + w51*thr/3 + w56) + w69*tanh(w2*adp/5 + w7*asa/0.1 + w12*asp/3 + w17*aspp/0.01 + w22*atp/15 + w27*hs/0.3 + w32*hsp/0.15 + w37*nadp/2 + w42*nadph/3 + w47*phos/5 + w52*thr/3 + w57) + w74*tanh(w3*adp/5 + w8*asa/0.1 + w13*asp/3 + w18*aspp/0.01 + w23*atp/15 + w28*hs/0.3 + w33*hsp/0.15 + w38*nadp/2 + w43*nadph/3 + w48*phos/5 + w53*thr/3 + w58) + w79*tanh(w4*adp/5 + w9*asa/0.1 + w14*asp/3 + w19*aspp/0.01 + w24*atp/15 + w29*hs/0.3 + w34*hsp/0.15 + w39*nadp/2 + w44*nadph/3 + w49*phos/5 + w54*thr/3 + w59) + w84*tanh(w5*adp/5 + w10*asa/0.1 + w15*asp/3 + w20*aspp/0.01 + w25*atp/15 + w30*hs/0.3 + w35*hsp/0.15 + w40*nadp/2 + w45*nadph/3 + w50*phos/5 + w55*thr/3 + w60) + w89) + w119*tanh(w65*tanh(w1*adp/5 + w6*asa/0.1 + w11*asp/3 + w16*aspp/0.01 + w21*atp/15 + w26*hs/0.3 + w31*hsp/0.15 + w36*nadp/2 + w41*nadph/3 + w46*phos/5 + w51*thr/3 + w56) + w70*tanh(w2*adp/5 + w7*asa/0.1 + w12*asp/3 + w17*aspp/0.01 + w22*atp/15 + w27*hs/0.3 + w32*hsp/0.15 + w37*nadp/2 + w42*nadph/3 + w47*phos/5 + w52*thr/3 + w57) + w75*tanh(w3*adp/5 + w8*asa/0.1 + w13*asp/3 + w18*aspp/0.01 + w23*atp/15 + w28*hs/0.3 + w33*hsp/0.15 + w38*nadp/2 + w43*nadph/3 + w48*phos/5 + w53*thr/3 + w58) + w80*tanh(w4*adp/5 + w9*asa/0.1 + w14*asp/3 + w19*aspp/0.01 + w24*atp/15 + w29*hs/0.3 + w34*hsp/0.15 + w39*nadp/2 + w44*nadph/3 + w49*phos/5 + w54*thr/3 + w59) + w85*tanh(w5*adp/5 + w10*asa/0.1 + w15*asp/3 + w20*aspp/0.01 + w25*atp/15 + w30*hs/0.3 + w35*hsp/0.15 + w40*nadp/2 + w45*nadph/3 + w50*phos/5 + w55*thr/3 + w60) + w90) + w126;
  vasdr := w92*tanh(w61*tanh(w1*adp/5 + w6*asa/0.1 + w11*asp/3 + w16*aspp/0.01 + w21*atp/15 + w26*hs/0.3 + w31*hsp/0.15 + w36*nadp/2 + w41*nadph/3 + w46*phos/5 + w51*thr/3 + w56) + w66*tanh(w2*adp/5 + w7*asa/0.1 + w12*asp/3 + w17*aspp/0.01 + w22*atp/15 + w27*hs/0.3 + w32*hsp/0.15 + w37*nadp/2 + w42*nadph/3 + w47*phos/5 + w52*thr/3 + w57) + w71*tanh(w3*adp/5 + w8*asa/0.1 + w13*asp/3 + w18*aspp/0.01 + w23*atp/15 + w28*hs/0.3 + w33*hsp/0.15 + w38*nadp/2 + w43*nadph/3 + w48*phos/5 + w53*thr/3 + w58) + w76*tanh(w4*adp/5 + w9*asa/0.1 + w14*asp/3 + w19*aspp/0.01 + w24*atp/15 + w29*hs/0.3 + w34*hsp/0.15 + w39*nadp/2 + w44*nadph/3 + w49*phos/5 + w54*thr/3 + w59) + w81*tanh(w5*adp/5 + w10*asa/0.1 + w15*asp/3 + w20*aspp/0.01 + w25*atp/15 + w30*hs/0.3 + w35*hsp/0.15 + w40*nadp/2 + w45*nadph/3 + w50*phos/5 + w55*thr/3 + w60) + w86) + w99*tanh(w62*tanh(w1*adp/5 + w6*asa/0.1 + w11*asp/3 + w16*aspp/0.01 + w21*atp/15 + w26*hs/0.3 + w31*hsp/0.15 + w36*nadp/2 + w41*nadph/3 + w46*phos/5 + w51*thr/3 + w56) + w67*tanh(w2*adp/5 + w7*asa/0.1 + w12*asp/3 + w17*aspp/0.01 + w22*atp/15 + w27*hs/0.3 + w32*hsp/0.15 + w37*nadp/2 + w42*nadph/3 + w47*phos/5 + w52*thr/3 + w57) + w72*tanh(w3*adp/5 + w8*asa/0.1 + w13*asp/3 + w18*aspp/0.01 + w23*atp/15 + w28*hs/0.3 + w33*hsp/0.15 + w38*nadp/2 + w43*nadph/3 + w48*phos/5 + w53*thr/3 + w58) + w77*tanh(w4*adp/5 + w9*asa/0.1 + w14*asp/3 + w19*aspp/0.01 + w24*atp/15 + w29*hs/0.3 + w34*hsp/0.15 + w39*nadp/2 + w44*nadph/3 + w49*phos/5 + w54*thr/3 + w59) + w82*tanh(w5*adp/5 + w10*asa/0.1 + w15*asp/3 + w20*aspp/0.01 + w25*atp/15 + w30*hs/0.3 + w35*hsp/0.15 + w40*nadp/2 + w45*nadph/3 + w50*phos/5 + w55*thr/3 + w60) + w87) + w106*tanh(w63*tanh(w1*adp/5 + w6*asa/0.1 + w11*asp/3 + w16*aspp/0.01 + w21*atp/15 + w26*hs/0.3 + w31*hsp/0.15 + w36*nadp/2 + w41*nadph/3 + w46*phos/5 + w51*thr/3 + w56) + w68*tanh(w2*adp/5 + w7*asa/0.1 + w12*asp/3 + w17*aspp/0.01 + w22*atp/15 + w27*hs/0.3 + w32*hsp/0.15 + w37*nadp/2 + w42*nadph/3 + w47*phos/5 + w52*thr/3 + w57) + w73*tanh(w3*adp/5 + w8*asa/0.1 + w13*asp/3 + w18*aspp/0.01 + w23*atp/15 + w28*hs/0.3 + w33*hsp/0.15 + w38*nadp/2 + w43*nadph/3 + w48*phos/5 + w53*thr/3 + w58) + w78*tanh(w4*adp/5 + w9*asa/0.1 + w14*asp/3 + w19*aspp/0.01 + w24*atp/15 + w29*hs/0.3 + w34*hsp/0.15 + w39*nadp/2 + w44*nadph/3 + w49*phos/5 + w54*thr/3 + w59) + w83*tanh(w5*adp/5 + w10*asa/0.1 + w15*asp/3 + w20*aspp/0.01 + w25*atp/15 + w30*hs/0.3 + w35*hsp/0.15 + w40*nadp/2 + w45*nadph/3 + w50*phos/5 + w55*thr/3 + w60) + w88) + w113*tanh(w64*tanh(w1*adp/5 + w6*asa/0.1 + w11*asp/3 + w16*aspp/0.01 + w21*atp/15 + w26*hs/0.3 + w31*hsp/0.15 + w36*nadp/2 + w41*nadph/3 + w46*phos/5 + w51*thr/3 + w56) + w69*tanh(w2*adp/5 + w7*asa/0.1 + w12*asp/3 + w17*aspp/0.01 + w22*atp/15 + w27*hs/0.3 + w32*hsp/0.15 + w37*nadp/2 + w42*nadph/3 + w47*phos/5 + w52*thr/3 + w57) + w74*tanh(w3*adp/5 + w8*asa/0.1 + w13*asp/3 + w18*aspp/0.01 + w23*atp/15 + w28*hs/0.3 + w33*hsp/0.15 + w38*nadp/2 + w43*nadph/3 + w48*phos/5 + w53*thr/3 + w58) + w79*tanh(w4*adp/5 + w9*asa/0.1 + w14*asp/3 + w19*aspp/0.01 + w24*atp/15 + w29*hs/0.3 + w34*hsp/0.15 + w39*nadp/2 + w44*nadph/3 + w49*phos/5 + w54*thr/3 + w59) + w84*tanh(w5*adp/5 + w10*asa/0.1 + w15*asp/3 + w20*aspp/0.01 + w25*atp/15 + w30*hs/0.3 + w35*hsp/0.15 + w40*nadp/2 + w45*nadph/3 + w50*phos/5 + w55*thr/3 + w60) + w89) + w120*tanh(w65*tanh(w1*adp/5 + w6*asa/0.1 + w11*asp/3 + w16*aspp/0.01 + w21*atp/15 + w26*hs/0.3 + w31*hsp/0.15 + w36*nadp/2 + w41*nadph/3 + w46*phos/5 + w51*thr/3 + w56) + w70*tanh(w2*adp/5 + w7*asa/0.1 + w12*asp/3 + w17*aspp/0.01 + w22*atp/15 + w27*hs/0.3 + w32*hsp/0.15 + w37*nadp/2 + w42*nadph/3 + w47*phos/5 + w52*thr/3 + w57) + w75*tanh(w3*adp/5 + w8*asa/0.1 + w13*asp/3 + w18*aspp/0.01 + w23*atp/15 + w28*hs/0.3 + w33*hsp/0.15 + w38*nadp/2 + w43*nadph/3 + w48*phos/5 + w53*thr/3 + w58) + w80*tanh(w4*adp/5 + w9*asa/0.1 + w14*asp/3 + w19*aspp/0.01 + w24*atp/15 + w29*hs/0.3 + w34*hsp/0.15 + w39*nadp/2 + w44*nadph/3 + w49*phos/5 + w54*thr/3 + w59) + w85*tanh(w5*adp/5 + w10*asa/0.1 + w15*asp/3 + w20*aspp/0.01 + w25*atp/15 + w30*hs/0.3 + w35*hsp/0.15 + w40*nadp/2 + w45*nadph/3 + w50*phos/5 + w55*thr/3 + w60) + w90) + w127;
  vatpaser := w93*tanh(w61*tanh(w1*adp/5 + w6*asa/0.1 + w11*asp/3 + w16*aspp/0.01 + w21*atp/15 + w26*hs/0.3 + w31*hsp/0.15 + w36*nadp/2 + w41*nadph/3 + w46*phos/5 + w51*thr/3 + w56) + w66*tanh(w2*adp/5 + w7*asa/0.1 + w12*asp/3 + w17*aspp/0.01 + w22*atp/15 + w27*hs/0.3 + w32*hsp/0.15 + w37*nadp/2 + w42*nadph/3 + w47*phos/5 + w52*thr/3 + w57) + w71*tanh(w3*adp/5 + w8*asa/0.1 + w13*asp/3 + w18*aspp/0.01 + w23*atp/15 + w28*hs/0.3 + w33*hsp/0.15 + w38*nadp/2 + w43*nadph/3 + w48*phos/5 + w53*thr/3 + w58) + w76*tanh(w4*adp/5 + w9*asa/0.1 + w14*asp/3 + w19*aspp/0.01 + w24*atp/15 + w29*hs/0.3 + w34*hsp/0.15 + w39*nadp/2 + w44*nadph/3 + w49*phos/5 + w54*thr/3 + w59) + w81*tanh(w5*adp/5 + w10*asa/0.1 + w15*asp/3 + w20*aspp/0.01 + w25*atp/15 + w30*hs/0.3 + w35*hsp/0.15 + w40*nadp/2 + w45*nadph/3 + w50*phos/5 + w55*thr/3 + w60) + w86) + w100*tanh(w62*tanh(w1*adp/5 + w6*asa/0.1 + w11*asp/3 + w16*aspp/0.01 + w21*atp/15 + w26*hs/0.3 + w31*hsp/0.15 + w36*nadp/2 + w41*nadph/3 + w46*phos/5 + w51*thr/3 + w56) + w67*tanh(w2*adp/5 + w7*asa/0.1 + w12*asp/3 + w17*aspp/0.01 + w22*atp/15 + w27*hs/0.3 + w32*hsp/0.15 + w37*nadp/2 + w42*nadph/3 + w47*phos/5 + w52*thr/3 + w57) + w72*tanh(w3*adp/5 + w8*asa/0.1 + w13*asp/3 + w18*aspp/0.01 + w23*atp/15 + w28*hs/0.3 + w33*hsp/0.15 + w38*nadp/2 + w43*nadph/3 + w48*phos/5 + w53*thr/3 + w58) + w77*tanh(w4*adp/5 + w9*asa/0.1 + w14*asp/3 + w19*aspp/0.01 + w24*atp/15 + w29*hs/0.3 + w34*hsp/0.15 + w39*nadp/2 + w44*nadph/3 + w49*phos/5 + w54*thr/3 + w59) + w82*tanh(w5*adp/5 + w10*asa/0.1 + w15*asp/3 + w20*aspp/0.01 + w25*atp/15 + w30*hs/0.3 + w35*hsp/0.15 + w40*nadp/2 + w45*nadph/3 + w50*phos/5 + w55*thr/3 + w60) + w87) + w107*tanh(w63*tanh(w1*adp/5 + w6*asa/0.1 + w11*asp/3 + w16*aspp/0.01 + w21*atp/15 + w26*hs/0.3 + w31*hsp/0.15 + w36*nadp/2 + w41*nadph/3 + w46*phos/5 + w51*thr/3 + w56) + w68*tanh(w2*adp/5 + w7*asa/0.1 + w12*asp/3 + w17*aspp/0.01 + w22*atp/15 + w27*hs/0.3 + w32*hsp/0.15 + w37*nadp/2 + w42*nadph/3 + w47*phos/5 + w52*thr/3 + w57) + w73*tanh(w3*adp/5 + w8*asa/0.1 + w13*asp/3 + w18*aspp/0.01 + w23*atp/15 + w28*hs/0.3 + w33*hsp/0.15 + w38*nadp/2 + w43*nadph/3 + w48*phos/5 + w53*thr/3 + w58) + w78*tanh(w4*adp/5 + w9*asa/0.1 + w14*asp/3 + w19*aspp/0.01 + w24*atp/15 + w29*hs/0.3 + w34*hsp/0.15 + w39*nadp/2 + w44*nadph/3 + w49*phos/5 + w54*thr/3 + w59) + w83*tanh(w5*adp/5 + w10*asa/0.1 + w15*asp/3 + w20*aspp/0.01 + w25*atp/15 + w30*hs/0.3 + w35*hsp/0.15 + w40*nadp/2 + w45*nadph/3 + w50*phos/5 + w55*thr/3 + w60) + w88) + w114*tanh(w64*tanh(w1*adp/5 + w6*asa/0.1 + w11*asp/3 + w16*aspp/0.01 + w21*atp/15 + w26*hs/0.3 + w31*hsp/0.15 + w36*nadp/2 + w41*nadph/3 + w46*phos/5 + w51*thr/3 + w56) + w69*tanh(w2*adp/5 + w7*asa/0.1 + w12*asp/3 + w17*aspp/0.01 + w22*atp/15 + w27*hs/0.3 + w32*hsp/0.15 + w37*nadp/2 + w42*nadph/3 + w47*phos/5 + w52*thr/3 + w57) + w74*tanh(w3*adp/5 + w8*asa/0.1 + w13*asp/3 + w18*aspp/0.01 + w23*atp/15 + w28*hs/0.3 + w33*hsp/0.15 + w38*nadp/2 + w43*nadph/3 + w48*phos/5 + w53*thr/3 + w58) + w79*tanh(w4*adp/5 + w9*asa/0.1 + w14*asp/3 + w19*aspp/0.01 + w24*atp/15 + w29*hs/0.3 + w34*hsp/0.15 + w39*nadp/2 + w44*nadph/3 + w49*phos/5 + w54*thr/3 + w59) + w84*tanh(w5*adp/5 + w10*asa/0.1 + w15*asp/3 + w20*aspp/0.01 + w25*atp/15 + w30*hs/0.3 + w35*hsp/0.15 + w40*nadp/2 + w45*nadph/3 + w50*phos/5 + w55*thr/3 + w60) + w89) + w121*tanh(w65*tanh(w1*adp/5 + w6*asa/0.1 + w11*asp/3 + w16*aspp/0.01 + w21*atp/15 + w26*hs/0.3 + w31*hsp/0.15 + w36*nadp/2 + w41*nadph/3 + w46*phos/5 + w51*thr/3 + w56) + w70*tanh(w2*adp/5 + w7*asa/0.1 + w12*asp/3 + w17*aspp/0.01 + w22*atp/15 + w27*hs/0.3 + w32*hsp/0.15 + w37*nadp/2 + w42*nadph/3 + w47*phos/5 + w52*thr/3 + w57) + w75*tanh(w3*adp/5 + w8*asa/0.1 + w13*asp/3 + w18*aspp/0.01 + w23*atp/15 + w28*hs/0.3 + w33*hsp/0.15 + w38*nadp/2 + w43*nadph/3 + w48*phos/5 + w53*thr/3 + w58) + w80*tanh(w4*adp/5 + w9*asa/0.1 + w14*asp/3 + w19*aspp/0.01 + w24*atp/15 + w29*hs/0.3 + w34*hsp/0.15 + w39*nadp/2 + w44*nadph/3 + w49*phos/5 + w54*thr/3 + w59) + w85*tanh(w5*adp/5 + w10*asa/0.1 + w15*asp/3 + w20*aspp/0.01 + w25*atp/15 + w30*hs/0.3 + w35*hsp/0.15 + w40*nadp/2 + w45*nadph/3 + w50*phos/5 + w55*thr/3 + w60) + w90) + w128;
  vhdhr := w94*tanh(w61*tanh(w1*adp/5 + w6*asa/0.1 + w11*asp/3 + w16*aspp/0.01 + w21*atp/15 + w26*hs/0.3 + w31*hsp/0.15 + w36*nadp/2 + w41*nadph/3 + w46*phos/5 + w51*thr/3 + w56) + w66*tanh(w2*adp/5 + w7*asa/0.1 + w12*asp/3 + w17*aspp/0.01 + w22*atp/15 + w27*hs/0.3 + w32*hsp/0.15 + w37*nadp/2 + w42*nadph/3 + w47*phos/5 + w52*thr/3 + w57) + w71*tanh(w3*adp/5 + w8*asa/0.1 + w13*asp/3 + w18*aspp/0.01 + w23*atp/15 + w28*hs/0.3 + w33*hsp/0.15 + w38*nadp/2 + w43*nadph/3 + w48*phos/5 + w53*thr/3 + w58) + w76*tanh(w4*adp/5 + w9*asa/0.1 + w14*asp/3 + w19*aspp/0.01 + w24*atp/15 + w29*hs/0.3 + w34*hsp/0.15 + w39*nadp/2 + w44*nadph/3 + w49*phos/5 + w54*thr/3 + w59) + w81*tanh(w5*adp/5 + w10*asa/0.1 + w15*asp/3 + w20*aspp/0.01 + w25*atp/15 + w30*hs/0.3 + w35*hsp/0.15 + w40*nadp/2 + w45*nadph/3 + w50*phos/5 + w55*thr/3 + w60) + w86) + w101*tanh(w62*tanh(w1*adp/5 + w6*asa/0.1 + w11*asp/3 + w16*aspp/0.01 + w21*atp/15 + w26*hs/0.3 + w31*hsp/0.15 + w36*nadp/2 + w41*nadph/3 + w46*phos/5 + w51*thr/3 + w56) + w67*tanh(w2*adp/5 + w7*asa/0.1 + w12*asp/3 + w17*aspp/0.01 + w22*atp/15 + w27*hs/0.3 + w32*hsp/0.15 + w37*nadp/2 + w42*nadph/3 + w47*phos/5 + w52*thr/3 + w57) + w72*tanh(w3*adp/5 + w8*asa/0.1 + w13*asp/3 + w18*aspp/0.01 + w23*atp/15 + w28*hs/0.3 + w33*hsp/0.15 + w38*nadp/2 + w43*nadph/3 + w48*phos/5 + w53*thr/3 + w58) + w77*tanh(w4*adp/5 + w9*asa/0.1 + w14*asp/3 + w19*aspp/0.01 + w24*atp/15 + w29*hs/0.3 + w34*hsp/0.15 + w39*nadp/2 + w44*nadph/3 + w49*phos/5 + w54*thr/3 + w59) + w82*tanh(w5*adp/5 + w10*asa/0.1 + w15*asp/3 + w20*aspp/0.01 + w25*atp/15 + w30*hs/0.3 + w35*hsp/0.15 + w40*nadp/2 + w45*nadph/3 + w50*phos/5 + w55*thr/3 + w60) + w87) + w108*tanh(w63*tanh(w1*adp/5 + w6*asa/0.1 + w11*asp/3 + w16*aspp/0.01 + w21*atp/15 + w26*hs/0.3 + w31*hsp/0.15 + w36*nadp/2 + w41*nadph/3 + w46*phos/5 + w51*thr/3 + w56) + w68*tanh(w2*adp/5 + w7*asa/0.1 + w12*asp/3 + w17*aspp/0.01 + w22*atp/15 + w27*hs/0.3 + w32*hsp/0.15 + w37*nadp/2 + w42*nadph/3 + w47*phos/5 + w52*thr/3 + w57) + w73*tanh(w3*adp/5 + w8*asa/0.1 + w13*asp/3 + w18*aspp/0.01 + w23*atp/15 + w28*hs/0.3 + w33*hsp/0.15 + w38*nadp/2 + w43*nadph/3 + w48*phos/5 + w53*thr/3 + w58) + w78*tanh(w4*adp/5 + w9*asa/0.1 + w14*asp/3 + w19*aspp/0.01 + w24*atp/15 + w29*hs/0.3 + w34*hsp/0.15 + w39*nadp/2 + w44*nadph/3 + w49*phos/5 + w54*thr/3 + w59) + w83*tanh(w5*adp/5 + w10*asa/0.1 + w15*asp/3 + w20*aspp/0.01 + w25*atp/15 + w30*hs/0.3 + w35*hsp/0.15 + w40*nadp/2 + w45*nadph/3 + w50*phos/5 + w55*thr/3 + w60) + w88) + w115*tanh(w64*tanh(w1*adp/5 + w6*asa/0.1 + w11*asp/3 + w16*aspp/0.01 + w21*atp/15 + w26*hs/0.3 + w31*hsp/0.15 + w36*nadp/2 + w41*nadph/3 + w46*phos/5 + w51*thr/3 + w56) + w69*tanh(w2*adp/5 + w7*asa/0.1 + w12*asp/3 + w17*aspp/0.01 + w22*atp/15 + w27*hs/0.3 + w32*hsp/0.15 + w37*nadp/2 + w42*nadph/3 + w47*phos/5 + w52*thr/3 + w57) + w74*tanh(w3*adp/5 + w8*asa/0.1 + w13*asp/3 + w18*aspp/0.01 + w23*atp/15 + w28*hs/0.3 + w33*hsp/0.15 + w38*nadp/2 + w43*nadph/3 + w48*phos/5 + w53*thr/3 + w58) + w79*tanh(w4*adp/5 + w9*asa/0.1 + w14*asp/3 + w19*aspp/0.01 + w24*atp/15 + w29*hs/0.3 + w34*hsp/0.15 + w39*nadp/2 + w44*nadph/3 + w49*phos/5 + w54*thr/3 + w59) + w84*tanh(w5*adp/5 + w10*asa/0.1 + w15*asp/3 + w20*aspp/0.01 + w25*atp/15 + w30*hs/0.3 + w35*hsp/0.15 + w40*nadp/2 + w45*nadph/3 + w50*phos/5 + w55*thr/3 + w60) + w89) + w122*tanh(w65*tanh(w1*adp/5 + w6*asa/0.1 + w11*asp/3 + w16*aspp/0.01 + w21*atp/15 + w26*hs/0.3 + w31*hsp/0.15 + w36*nadp/2 + w41*nadph/3 + w46*phos/5 + w51*thr/3 + w56) + w70*tanh(w2*adp/5 + w7*asa/0.1 + w12*asp/3 + w17*aspp/0.01 + w22*atp/15 + w27*hs/0.3 + w32*hsp/0.15 + w37*nadp/2 + w42*nadph/3 + w47*phos/5 + w52*thr/3 + w57) + w75*tanh(w3*adp/5 + w8*asa/0.1 + w13*asp/3 + w18*aspp/0.01 + w23*atp/15 + w28*hs/0.3 + w33*hsp/0.15 + w38*nadp/2 + w43*nadph/3 + w48*phos/5 + w53*thr/3 + w58) + w80*tanh(w4*adp/5 + w9*asa/0.1 + w14*asp/3 + w19*aspp/0.01 + w24*atp/15 + w29*hs/0.3 + w34*hsp/0.15 + w39*nadp/2 + w44*nadph/3 + w49*phos/5 + w54*thr/3 + w59) + w85*tanh(w5*adp/5 + w10*asa/0.1 + w15*asp/3 + w20*aspp/0.01 + w25*atp/15 + w30*hs/0.3 + w35*hsp/0.15 + w40*nadp/2 + w45*nadph/3 + w50*phos/5 + w55*thr/3 + w60) + w90) + w129;
  vhkr := w95*tanh(w61*tanh(w1*adp/5 + w6*asa/0.1 + w11*asp/3 + w16*aspp/0.01 + w21*atp/15 + w26*hs/0.3 + w31*hsp/0.15 + w36*nadp/2 + w41*nadph/3 + w46*phos/5 + w51*thr/3 + w56) + w66*tanh(w2*adp/5 + w7*asa/0.1 + w12*asp/3 + w17*aspp/0.01 + w22*atp/15 + w27*hs/0.3 + w32*hsp/0.15 + w37*nadp/2 + w42*nadph/3 + w47*phos/5 + w52*thr/3 + w57) + w71*tanh(w3*adp/5 + w8*asa/0.1 + w13*asp/3 + w18*aspp/0.01 + w23*atp/15 + w28*hs/0.3 + w33*hsp/0.15 + w38*nadp/2 + w43*nadph/3 + w48*phos/5 + w53*thr/3 + w58) + w76*tanh(w4*adp/5 + w9*asa/0.1 + w14*asp/3 + w19*aspp/0.01 + w24*atp/15 + w29*hs/0.3 + w34*hsp/0.15 + w39*nadp/2 + w44*nadph/3 + w49*phos/5 + w54*thr/3 + w59) + w81*tanh(w5*adp/5 + w10*asa/0.1 + w15*asp/3 + w20*aspp/0.01 + w25*atp/15 + w30*hs/0.3 + w35*hsp/0.15 + w40*nadp/2 + w45*nadph/3 + w50*phos/5 + w55*thr/3 + w60) + w86) + w102*tanh(w62*tanh(w1*adp/5 + w6*asa/0.1 + w11*asp/3 + w16*aspp/0.01 + w21*atp/15 + w26*hs/0.3 + w31*hsp/0.15 + w36*nadp/2 + w41*nadph/3 + w46*phos/5 + w51*thr/3 + w56) + w67*tanh(w2*adp/5 + w7*asa/0.1 + w12*asp/3 + w17*aspp/0.01 + w22*atp/15 + w27*hs/0.3 + w32*hsp/0.15 + w37*nadp/2 + w42*nadph/3 + w47*phos/5 + w52*thr/3 + w57) + w72*tanh(w3*adp/5 + w8*asa/0.1 + w13*asp/3 + w18*aspp/0.01 + w23*atp/15 + w28*hs/0.3 + w33*hsp/0.15 + w38*nadp/2 + w43*nadph/3 + w48*phos/5 + w53*thr/3 + w58) + w77*tanh(w4*adp/5 + w9*asa/0.1 + w14*asp/3 + w19*aspp/0.01 + w24*atp/15 + w29*hs/0.3 + w34*hsp/0.15 + w39*nadp/2 + w44*nadph/3 + w49*phos/5 + w54*thr/3 + w59) + w82*tanh(w5*adp/5 + w10*asa/0.1 + w15*asp/3 + w20*aspp/0.01 + w25*atp/15 + w30*hs/0.3 + w35*hsp/0.15 + w40*nadp/2 + w45*nadph/3 + w50*phos/5 + w55*thr/3 + w60) + w87) + w109*tanh(w63*tanh(w1*adp/5 + w6*asa/0.1 + w11*asp/3 + w16*aspp/0.01 + w21*atp/15 + w26*hs/0.3 + w31*hsp/0.15 + w36*nadp/2 + w41*nadph/3 + w46*phos/5 + w51*thr/3 + w56) + w68*tanh(w2*adp/5 + w7*asa/0.1 + w12*asp/3 + w17*aspp/0.01 + w22*atp/15 + w27*hs/0.3 + w32*hsp/0.15 + w37*nadp/2 + w42*nadph/3 + w47*phos/5 + w52*thr/3 + w57) + w73*tanh(w3*adp/5 + w8*asa/0.1 + w13*asp/3 + w18*aspp/0.01 + w23*atp/15 + w28*hs/0.3 + w33*hsp/0.15 + w38*nadp/2 + w43*nadph/3 + w48*phos/5 + w53*thr/3 + w58) + w78*tanh(w4*adp/5 + w9*asa/0.1 + w14*asp/3 + w19*aspp/0.01 + w24*atp/15 + w29*hs/0.3 + w34*hsp/0.15 + w39*nadp/2 + w44*nadph/3 + w49*phos/5 + w54*thr/3 + w59) + w83*tanh(w5*adp/5 + w10*asa/0.1 + w15*asp/3 + w20*aspp/0.01 + w25*atp/15 + w30*hs/0.3 + w35*hsp/0.15 + w40*nadp/2 + w45*nadph/3 + w50*phos/5 + w55*thr/3 + w60) + w88) + w116*tanh(w64*tanh(w1*adp/5 + w6*asa/0.1 + w11*asp/3 + w16*aspp/0.01 + w21*atp/15 + w26*hs/0.3 + w31*hsp/0.15 + w36*nadp/2 + w41*nadph/3 + w46*phos/5 + w51*thr/3 + w56) + w69*tanh(w2*adp/5 + w7*asa/0.1 + w12*asp/3 + w17*aspp/0.01 + w22*atp/15 + w27*hs/0.3 + w32*hsp/0.15 + w37*nadp/2 + w42*nadph/3 + w47*phos/5 + w52*thr/3 + w57) + w74*tanh(w3*adp/5 + w8*asa/0.1 + w13*asp/3 + w18*aspp/0.01 + w23*atp/15 + w28*hs/0.3 + w33*hsp/0.15 + w38*nadp/2 + w43*nadph/3 + w48*phos/5 + w53*thr/3 + w58) + w79*tanh(w4*adp/5 + w9*asa/0.1 + w14*asp/3 + w19*aspp/0.01 + w24*atp/15 + w29*hs/0.3 + w34*hsp/0.15 + w39*nadp/2 + w44*nadph/3 + w49*phos/5 + w54*thr/3 + w59) + w84*tanh(w5*adp/5 + w10*asa/0.1 + w15*asp/3 + w20*aspp/0.01 + w25*atp/15 + w30*hs/0.3 + w35*hsp/0.15 + w40*nadp/2 + w45*nadph/3 + w50*phos/5 + w55*thr/3 + w60) + w89) + w123*tanh(w65*tanh(w1*adp/5 + w6*asa/0.1 + w11*asp/3 + w16*aspp/0.01 + w21*atp/15 + w26*hs/0.3 + w31*hsp/0.15 + w36*nadp/2 + w41*nadph/3 + w46*phos/5 + w51*thr/3 + w56) + w70*tanh(w2*adp/5 + w7*asa/0.1 + w12*asp/3 + w17*aspp/0.01 + w22*atp/15 + w27*hs/0.3 + w32*hsp/0.15 + w37*nadp/2 + w42*nadph/3 + w47*phos/5 + w52*thr/3 + w57) + w75*tanh(w3*adp/5 + w8*asa/0.1 + w13*asp/3 + w18*aspp/0.01 + w23*atp/15 + w28*hs/0.3 + w33*hsp/0.15 + w38*nadp/2 + w43*nadph/3 + w48*phos/5 + w53*thr/3 + w58) + w80*tanh(w4*adp/5 + w9*asa/0.1 + w14*asp/3 + w19*aspp/0.01 + w24*atp/15 + w29*hs/0.3 + w34*hsp/0.15 + w39*nadp/2 + w44*nadph/3 + w49*phos/5 + w54*thr/3 + w59) + w85*tanh(w5*adp/5 + w10*asa/0.1 + w15*asp/3 + w20*aspp/0.01 + w25*atp/15 + w30*hs/0.3 + w35*hsp/0.15 + w40*nadp/2 + w45*nadph/3 + w50*phos/5 + w55*thr/3 + w60) + w90) + w130;
  vnadph_endor := w96*tanh(w61*tanh(w1*adp/5 + w6*asa/0.1 + w11*asp/3 + w16*aspp/0.01 + w21*atp/15 + w26*hs/0.3 + w31*hsp/0.15 + w36*nadp/2 + w41*nadph/3 + w46*phos/5 + w51*thr/3 + w56) + w66*tanh(w2*adp/5 + w7*asa/0.1 + w12*asp/3 + w17*aspp/0.01 + w22*atp/15 + w27*hs/0.3 + w32*hsp/0.15 + w37*nadp/2 + w42*nadph/3 + w47*phos/5 + w52*thr/3 + w57) + w71*tanh(w3*adp/5 + w8*asa/0.1 + w13*asp/3 + w18*aspp/0.01 + w23*atp/15 + w28*hs/0.3 + w33*hsp/0.15 + w38*nadp/2 + w43*nadph/3 + w48*phos/5 + w53*thr/3 + w58) + w76*tanh(w4*adp/5 + w9*asa/0.1 + w14*asp/3 + w19*aspp/0.01 + w24*atp/15 + w29*hs/0.3 + w34*hsp/0.15 + w39*nadp/2 + w44*nadph/3 + w49*phos/5 + w54*thr/3 + w59) + w81*tanh(w5*adp/5 + w10*asa/0.1 + w15*asp/3 + w20*aspp/0.01 + w25*atp/15 + w30*hs/0.3 + w35*hsp/0.15 + w40*nadp/2 + w45*nadph/3 + w50*phos/5 + w55*thr/3 + w60) + w86) + w103*tanh(w62*tanh(w1*adp/5 + w6*asa/0.1 + w11*asp/3 + w16*aspp/0.01 + w21*atp/15 + w26*hs/0.3 + w31*hsp/0.15 + w36*nadp/2 + w41*nadph/3 + w46*phos/5 + w51*thr/3 + w56) + w67*tanh(w2*adp/5 + w7*asa/0.1 + w12*asp/3 + w17*aspp/0.01 + w22*atp/15 + w27*hs/0.3 + w32*hsp/0.15 + w37*nadp/2 + w42*nadph/3 + w47*phos/5 + w52*thr/3 + w57) + w72*tanh(w3*adp/5 + w8*asa/0.1 + w13*asp/3 + w18*aspp/0.01 + w23*atp/15 + w28*hs/0.3 + w33*hsp/0.15 + w38*nadp/2 + w43*nadph/3 + w48*phos/5 + w53*thr/3 + w58) + w77*tanh(w4*adp/5 + w9*asa/0.1 + w14*asp/3 + w19*aspp/0.01 + w24*atp/15 + w29*hs/0.3 + w34*hsp/0.15 + w39*nadp/2 + w44*nadph/3 + w49*phos/5 + w54*thr/3 + w59) + w82*tanh(w5*adp/5 + w10*asa/0.1 + w15*asp/3 + w20*aspp/0.01 + w25*atp/15 + w30*hs/0.3 + w35*hsp/0.15 + w40*nadp/2 + w45*nadph/3 + w50*phos/5 + w55*thr/3 + w60) + w87) + w110*tanh(w63*tanh(w1*adp/5 + w6*asa/0.1 + w11*asp/3 + w16*aspp/0.01 + w21*atp/15 + w26*hs/0.3 + w31*hsp/0.15 + w36*nadp/2 + w41*nadph/3 + w46*phos/5 + w51*thr/3 + w56) + w68*tanh(w2*adp/5 + w7*asa/0.1 + w12*asp/3 + w17*aspp/0.01 + w22*atp/15 + w27*hs/0.3 + w32*hsp/0.15 + w37*nadp/2 + w42*nadph/3 + w47*phos/5 + w52*thr/3 + w57) + w73*tanh(w3*adp/5 + w8*asa/0.1 + w13*asp/3 + w18*aspp/0.01 + w23*atp/15 + w28*hs/0.3 + w33*hsp/0.15 + w38*nadp/2 + w43*nadph/3 + w48*phos/5 + w53*thr/3 + w58) + w78*tanh(w4*adp/5 + w9*asa/0.1 + w14*asp/3 + w19*aspp/0.01 + w24*atp/15 + w29*hs/0.3 + w34*hsp/0.15 + w39*nadp/2 + w44*nadph/3 + w49*phos/5 + w54*thr/3 + w59) + w83*tanh(w5*adp/5 + w10*asa/0.1 + w15*asp/3 + w20*aspp/0.01 + w25*atp/15 + w30*hs/0.3 + w35*hsp/0.15 + w40*nadp/2 + w45*nadph/3 + w50*phos/5 + w55*thr/3 + w60) + w88) + w117*tanh(w64*tanh(w1*adp/5 + w6*asa/0.1 + w11*asp/3 + w16*aspp/0.01 + w21*atp/15 + w26*hs/0.3 + w31*hsp/0.15 + w36*nadp/2 + w41*nadph/3 + w46*phos/5 + w51*thr/3 + w56) + w69*tanh(w2*adp/5 + w7*asa/0.1 + w12*asp/3 + w17*aspp/0.01 + w22*atp/15 + w27*hs/0.3 + w32*hsp/0.15 + w37*nadp/2 + w42*nadph/3 + w47*phos/5 + w52*thr/3 + w57) + w74*tanh(w3*adp/5 + w8*asa/0.1 + w13*asp/3 + w18*aspp/0.01 + w23*atp/15 + w28*hs/0.3 + w33*hsp/0.15 + w38*nadp/2 + w43*nadph/3 + w48*phos/5 + w53*thr/3 + w58) + w79*tanh(w4*adp/5 + w9*asa/0.1 + w14*asp/3 + w19*aspp/0.01 + w24*atp/15 + w29*hs/0.3 + w34*hsp/0.15 + w39*nadp/2 + w44*nadph/3 + w49*phos/5 + w54*thr/3 + w59) + w84*tanh(w5*adp/5 + w10*asa/0.1 + w15*asp/3 + w20*aspp/0.01 + w25*atp/15 + w30*hs/0.3 + w35*hsp/0.15 + w40*nadp/2 + w45*nadph/3 + w50*phos/5 + w55*thr/3 + w60) + w89) + w124*tanh(w65*tanh(w1*adp/5 + w6*asa/0.1 + w11*asp/3 + w16*aspp/0.01 + w21*atp/15 + w26*hs/0.3 + w31*hsp/0.15 + w36*nadp/2 + w41*nadph/3 + w46*phos/5 + w51*thr/3 + w56) + w70*tanh(w2*adp/5 + w7*asa/0.1 + w12*asp/3 + w17*aspp/0.01 + w22*atp/15 + w27*hs/0.3 + w32*hsp/0.15 + w37*nadp/2 + w42*nadph/3 + w47*phos/5 + w52*thr/3 + w57) + w75*tanh(w3*adp/5 + w8*asa/0.1 + w13*asp/3 + w18*aspp/0.01 + w23*atp/15 + w28*hs/0.3 + w33*hsp/0.15 + w38*nadp/2 + w43*nadph/3 + w48*phos/5 + w53*thr/3 + w58) + w80*tanh(w4*adp/5 + w9*asa/0.1 + w14*asp/3 + w19*aspp/0.01 + w24*atp/15 + w29*hs/0.3 + w34*hsp/0.15 + w39*nadp/2 + w44*nadph/3 + w49*phos/5 + w54*thr/3 + w59) + w85*tanh(w5*adp/5 + w10*asa/0.1 + w15*asp/3 + w20*aspp/0.01 + w25*atp/15 + w30*hs/0.3 + w35*hsp/0.15 + w40*nadp/2 + w45*nadph/3 + w50*phos/5 + w55*thr/3 + w60) + w90) + w131;
  vtsyr := w97*tanh(w61*tanh(w1*adp/5 + w6*asa/0.1 + w11*asp/3 + w16*aspp/0.01 + w21*atp/15 + w26*hs/0.3 + w31*hsp/0.15 + w36*nadp/2 + w41*nadph/3 + w46*phos/5 + w51*thr/3 + w56) + w66*tanh(w2*adp/5 + w7*asa/0.1 + w12*asp/3 + w17*aspp/0.01 + w22*atp/15 + w27*hs/0.3 + w32*hsp/0.15 + w37*nadp/2 + w42*nadph/3 + w47*phos/5 + w52*thr/3 + w57) + w71*tanh(w3*adp/5 + w8*asa/0.1 + w13*asp/3 + w18*aspp/0.01 + w23*atp/15 + w28*hs/0.3 + w33*hsp/0.15 + w38*nadp/2 + w43*nadph/3 + w48*phos/5 + w53*thr/3 + w58) + w76*tanh(w4*adp/5 + w9*asa/0.1 + w14*asp/3 + w19*aspp/0.01 + w24*atp/15 + w29*hs/0.3 + w34*hsp/0.15 + w39*nadp/2 + w44*nadph/3 + w49*phos/5 + w54*thr/3 + w59) + w81*tanh(w5*adp/5 + w10*asa/0.1 + w15*asp/3 + w20*aspp/0.01 + w25*atp/15 + w30*hs/0.3 + w35*hsp/0.15 + w40*nadp/2 + w45*nadph/3 + w50*phos/5 + w55*thr/3 + w60) + w86) + w104*tanh(w62*tanh(w1*adp/5 + w6*asa/0.1 + w11*asp/3 + w16*aspp/0.01 + w21*atp/15 + w26*hs/0.3 + w31*hsp/0.15 + w36*nadp/2 + w41*nadph/3 + w46*phos/5 + w51*thr/3 + w56) + w67*tanh(w2*adp/5 + w7*asa/0.1 + w12*asp/3 + w17*aspp/0.01 + w22*atp/15 + w27*hs/0.3 + w32*hsp/0.15 + w37*nadp/2 + w42*nadph/3 + w47*phos/5 + w52*thr/3 + w57) + w72*tanh(w3*adp/5 + w8*asa/0.1 + w13*asp/3 + w18*aspp/0.01 + w23*atp/15 + w28*hs/0.3 + w33*hsp/0.15 + w38*nadp/2 + w43*nadph/3 + w48*phos/5 + w53*thr/3 + w58) + w77*tanh(w4*adp/5 + w9*asa/0.1 + w14*asp/3 + w19*aspp/0.01 + w24*atp/15 + w29*hs/0.3 + w34*hsp/0.15 + w39*nadp/2 + w44*nadph/3 + w49*phos/5 + w54*thr/3 + w59) + w82*tanh(w5*adp/5 + w10*asa/0.1 + w15*asp/3 + w20*aspp/0.01 + w25*atp/15 + w30*hs/0.3 + w35*hsp/0.15 + w40*nadp/2 + w45*nadph/3 + w50*phos/5 + w55*thr/3 + w60) + w87) + w111*tanh(w63*tanh(w1*adp/5 + w6*asa/0.1 + w11*asp/3 + w16*aspp/0.01 + w21*atp/15 + w26*hs/0.3 + w31*hsp/0.15 + w36*nadp/2 + w41*nadph/3 + w46*phos/5 + w51*thr/3 + w56) + w68*tanh(w2*adp/5 + w7*asa/0.1 + w12*asp/3 + w17*aspp/0.01 + w22*atp/15 + w27*hs/0.3 + w32*hsp/0.15 + w37*nadp/2 + w42*nadph/3 + w47*phos/5 + w52*thr/3 + w57) + w73*tanh(w3*adp/5 + w8*asa/0.1 + w13*asp/3 + w18*aspp/0.01 + w23*atp/15 + w28*hs/0.3 + w33*hsp/0.15 + w38*nadp/2 + w43*nadph/3 + w48*phos/5 + w53*thr/3 + w58) + w78*tanh(w4*adp/5 + w9*asa/0.1 + w14*asp/3 + w19*aspp/0.01 + w24*atp/15 + w29*hs/0.3 + w34*hsp/0.15 + w39*nadp/2 + w44*nadph/3 + w49*phos/5 + w54*thr/3 + w59) + w83*tanh(w5*adp/5 + w10*asa/0.1 + w15*asp/3 + w20*aspp/0.01 + w25*atp/15 + w30*hs/0.3 + w35*hsp/0.15 + w40*nadp/2 + w45*nadph/3 + w50*phos/5 + w55*thr/3 + w60) + w88) + w118*tanh(w64*tanh(w1*adp/5 + w6*asa/0.1 + w11*asp/3 + w16*aspp/0.01 + w21*atp/15 + w26*hs/0.3 + w31*hsp/0.15 + w36*nadp/2 + w41*nadph/3 + w46*phos/5 + w51*thr/3 + w56) + w69*tanh(w2*adp/5 + w7*asa/0.1 + w12*asp/3 + w17*aspp/0.01 + w22*atp/15 + w27*hs/0.3 + w32*hsp/0.15 + w37*nadp/2 + w42*nadph/3 + w47*phos/5 + w52*thr/3 + w57) + w74*tanh(w3*adp/5 + w8*asa/0.1 + w13*asp/3 + w18*aspp/0.01 + w23*atp/15 + w28*hs/0.3 + w33*hsp/0.15 + w38*nadp/2 + w43*nadph/3 + w48*phos/5 + w53*thr/3 + w58) + w79*tanh(w4*adp/5 + w9*asa/0.1 + w14*asp/3 + w19*aspp/0.01 + w24*atp/15 + w29*hs/0.3 + w34*hsp/0.15 + w39*nadp/2 + w44*nadph/3 + w49*phos/5 + w54*thr/3 + w59) + w84*tanh(w5*adp/5 + w10*asa/0.1 + w15*asp/3 + w20*aspp/0.01 + w25*atp/15 + w30*hs/0.3 + w35*hsp/0.15 + w40*nadp/2 + w45*nadph/3 + w50*phos/5 + w55*thr/3 + w60) + w89) + w125*tanh(w65*tanh(w1*adp/5 + w6*asa/0.1 + w11*asp/3 + w16*aspp/0.01 + w21*atp/15 + w26*hs/0.3 + w31*hsp/0.15 + w36*nadp/2 + w41*nadph/3 + w46*phos/5 + w51*thr/3 + w56) + w70*tanh(w2*adp/5 + w7*asa/0.1 + w12*asp/3 + w17*aspp/0.01 + w22*atp/15 + w27*hs/0.3 + w32*hsp/0.15 + w37*nadp/2 + w42*nadph/3 + w47*phos/5 + w52*thr/3 + w57) + w75*tanh(w3*adp/5 + w8*asa/0.1 + w13*asp/3 + w18*aspp/0.01 + w23*atp/15 + w28*hs/0.3 + w33*hsp/0.15 + w38*nadp/2 + w43*nadph/3 + w48*phos/5 + w53*thr/3 + w58) + w80*tanh(w4*adp/5 + w9*asa/0.1 + w14*asp/3 + w19*aspp/0.01 + w24*atp/15 + w29*hs/0.3 + w34*hsp/0.15 + w39*nadp/2 + w44*nadph/3 + w49*phos/5 + w54*thr/3 + w59) + w85*tanh(w5*adp/5 + w10*asa/0.1 + w15*asp/3 + w20*aspp/0.01 + w25*atp/15 + w30*hs/0.3 + w35*hsp/0.15 + w40*nadp/2 + w45*nadph/3 + w50*phos/5 + w55*thr/3 + w60) + w90) + w132;

  // Reactions:
  vak: asp + atp -> adp + aspp; vakr;
  vasd: aspp + nadph -> asa + nadp + phos; vasdr;
  vatpase: atp -> adp + phos; vatpaser;
  vhdh: asa + nadph -> hs + nadp; vhdhr;
  vhk: atp + hs -> adp + hsp; vhkr;
  vnadph_endo: nadph -> nadp; vnadph_endor;
  vtsy: hsp -> phos + thr; vtsyr;
end
