// SBML level 2 version 4

function Constant_flux_irreversible(v)
  v;
end
Constant_flux_irreversible is "Constant flux (irreversible)";

function Hill_Cooperativity(substrate, Shalve, V, h)
  V*substrate^h/(Shalve^h + substrate^h);
end

function Rate_Law_for_IP3R_closing(IP3Ro, k3, L5, Ca, IP3Rs, km3)
  IP3Ro*(k3*L5/(L5 + Ca)) - IP3Rs*km3;
end

function Rate_Law_for_membrane(A, B, C, Po, ca1, ca2)
  A*B*C*Po*(8.31*310/(2*96485))*ln(ca1/ca2);
end

function Rate_Law_for_IP3R_binding_IP3(IP3Rn, IP3, k2, L3, l4, Ca, L1, IP3Ro, km2, lm4, L5)
  IP3Rn*IP3*((k2*L3 + l4*Ca)/(L3 + Ca*(1 + L3/L1))) - IP3Ro*((km2 + lm4*Ca)/(1 + Ca/L5));
end

function Rate_Law_for_IP3R_activation(IP3Ro, k4, L5, l6, Ca, IP3Ra, L1, km4, lm6)
  IP3Ro*((k4*L5 + l6)*Ca/(L5 + Ca)) - IP3Ra*(L1*(km4 + lm6)/(L1 + Ca));
end

function function_6(a, b, c, d, V)
  a*b*c*d/V;
end
function_6 is "multiplied constant flux with volume";

function multiplied_constant_flux(a, b, c)
  a*b*c;
end

function Rate_Law_for_IP3R_activatin_bw(IP3Ra, L1, km4, lm6, Ca)
  IP3Ra*(L1*(km4 + lm6)/(L1 + Ca));
end

function Rate_Law_for_IP3R_binding_IP3_bw(IP3Ro, km2, lm4, Ca, L5)
  IP3Ro*((km2 + lm4*Ca)/(1 + Ca/L5));
end

function mass_action_with_volume(k, V, s)
  k*V*s;
end

function Mass_action_with_modifier(a, b, mod)
  a*b*mod;
end

function function_10(IP3Rn, k1, L1, l2, Ca, L3)
  IP3Rn*((k1*L1 + l2)*Ca/(L1 + Ca*(1 + L1/L3)));
end
function_10 is "Rate law for IP3R inhibition (forward part)";

function function_11(IP3Ri1, km1, lm2)
  IP3Ri1*(km1 + lm2);
end
function_11 is "Rate law for IP3R inhibition (backward part)";

function function_12(IP3Rn, k1, L1, l2, Ca)
  IP3Rn*((k1*L1 + l2)*Ca/(L1 + Ca));
end
function_12 is "Rate Law for IP3R inhibition 2 (forward part)";

function function_13(IP3Ri1, km1, lm2)
  IP3Ri1*(km1 + lm2);
end
function_13 is "Rate Law for IP3R inhibition 2 (backward part)";

model New_Model()
  // Platelet PAR1 with SOCE
  // Mathematical model of platelet intracellular signaling network

  // Compartments:
  compartment cytosol = 3e-15;
  compartment DTS = 1.5e-15;
  compartment Mit;
  compartment plasma_membrane = 6e-13;

  // Species:
  substanceOnly species Ca_cyt in cytosol = 3.9e-17;
  substanceOnly species IP3 in cytosol = 1.5e-16;
  substanceOnly species IP3Ra in cytosol = 0.4*(IP3Rn/cytosol)/5*cytosol;
  substanceOnly species IP3Ri1 in cytosol = 0.6*(IP3Rn/cytosol)/5*cytosol;
  substanceOnly species IP3Ri2 in cytosol = 0;
  substanceOnly species IP3Rn in cytosol = 1000000*IP3R_num/(2*Avogadro*cytosol)*cytosol;
  substanceOnly species IP3Ro in cytosol = 4*(IP3Rn/cytosol)/5*cytosol;
  substanceOnly species IP3Rs in cytosol = 0;
  substanceOnly species $Ca_prp in cytosol = 6e-12;
  substanceOnly species delta_psi in cytosol = 4.161e-13;
  substanceOnly species so_1 in cytosol = 3e-15;
  substanceOnly species so in cytosol = 0;
  substanceOnly species Ca_dts in DTS = 1.5e-12;
  substanceOnly species stim in DTS = 0;
  substanceOnly species stimCa in DTS = 1.5e-15;
  substanceOnly species Ca_mit in Mit = 3e-17;
  substanceOnly species Tcl in Mit = 3e-16;
  substanceOnly species Top in Mit = 0;
  // 1 uM of agonist = 2.5 nM of thrombin
  substanceOnly species $PAR1AP in plasma_membrane = 6e-11;
  substanceOnly species species_16 in plasma_membrane = 3.6e-15; species_16 is "PAR";
  substanceOnly species species_17 in plasma_membrane = 0; species_17 is "PAR*";
  substanceOnly species PAR_Gq in plasma_membrane = 0; PAR_Gq is "PAR*Gq";
  substanceOnly species PAR_GqGDP in plasma_membrane = 0; PAR_GqGDP is "PAR*GqGDP";
  substanceOnly species PAR_GqGTP in plasma_membrane = 0; PAR_GqGTP is "PAR*GqGTP";
  substanceOnly species PIP2 in plasma_membrane = 1.2e-10;
  substanceOnly species PLC in plasma_membrane = 3.6e-15;
  substanceOnly species PLCGqGDP in plasma_membrane = 0;
  substanceOnly species PLCGqGTP in plasma_membrane = 0;
  substanceOnly species PLCGqGTPPIP2 in plasma_membrane = 0;
  substanceOnly species GDP in plasma_membrane = 0;
  substanceOnly species GqGDP in plasma_membrane = 2.58e-15;
  substanceOnly species GqGTP in plasma_membrane = 0;
  substanceOnly species GTP in plasma_membrane = 6e-13;

  // Parameters:
  L1 = 0.12;
  L3 = 0.025;
  L5 = 54.7;
  k1_IP3R = 0.64;
  km1_IP3R = 0.04;
  l2_IP3R = 1.7;
  lm2_IP3R = 0.8;
  // Channel open probability
  var P0;
  var IP3Rtotal;
  var cyt_vol;
  IP3R_num = 1100;
  SERCA_number = 60000;
  var IP3_number;
  var V_forSERCA;
  UNI_number = 0.1;
  var V_forNCX;
  NCX_number = 1;
  alpha = 1;
  nm = 3;
  var V_forSERCA3;
  Density_mit_prot = 1000000;
  fm = 0.003;
  var UNI_permeab;
  delta_psi_offset = 91;
  var UNI_FLUX;
  var V_forUNI;
  var Nernst;
  PTP_number = 40000;
  var V_forNCX_PM;
  var PTP_opening;
  var PTP_closing;
  var PTP_p_delta_psi;
  var PTP_L_hydrogen;
  PTP_ca_sensitivity = 1;
  var Nernst_w_offset;
  var _1_per_copacity_mitoch;
  var V_JHres;
  var V_JHleak;
  Hydrogen_leak_permeab = 1000;
  k_PM_leak = 853.306;
  NCX_PM_number = 50;
  V_for_PMCA = 6;
  Avogadro = 6.02214129e23;
  var so_val;
  lag_time = 0;
  par1ap_add = 0;

  // Assignment rules:
  Mit := nm*1e-16;
  V_forNCX_PM := NCX_PM_number*(Ca_cyt/cytosol)*(Ca_cyt/cytosol + 1)^3/((Ca_cyt/cytosol + 1)^4 + 50);
  P0 := ((0.9*(IP3Ra/cytosol) + 0.1*(IP3Ro/cytosol))/(IP3Ra/cytosol + IP3Ro/cytosol + IP3Ri1/cytosol + IP3Ri2/cytosol + IP3Rn/cytosol + IP3Rs/cytosol))^4;
  cyt_vol := cytosol;
  so_val := so/cytosol;
  IP3Rtotal := IP3Ra/cytosol + IP3Ri1/cytosol + IP3Ri2/cytosol + IP3Rn/cytosol + IP3Ro/cytosol + IP3Rs/cytosol;
  IP3_number := IP3/cytosol*1e-6*Avogadro*cytosol;
  V_forSERCA := cytosol*SERCA_number;
  V_forSERCA3 := cytosol*SERCA_number*alpha;
  UNI_permeab := 0.0385/60*Mit*Density_mit_prot*(Ca_cyt/cytosol/((Ca_cyt/cytosol)^2 + 0.07^2))*((delta_psi/cytosol - 13)^3/(124^3 + (delta_psi/cytosol - 13)^3));
  Nernst := 96.485*(delta_psi/cytosol)/(8.31*310);
  UNI_FLUX := 2*Nernst*(Ca_cyt/cytosol - Ca_mit/Mit*exp(-2*Nernst))/(1 - exp(-2*Nernst));
  V_forUNI := UNI_number*UNI_permeab*UNI_FLUX;
  PTP_closing := 100/60*(10^(-2)/(10^(-2) + 3.2*10^(-2)))/(1 + exp(-1*(delta_psi/cytosol - 90)));
  PTP_p_delta_psi := exp((110 - delta_psi/cytosol)/20);
  PTP_opening := (Ca_mit/Mit)^4/((Ca_mit/Mit)^4 + 5^4)*(1/PTP_ca_sensitivity)*PTP_p_delta_psi;
  PTP_L_hydrogen := PTP_number*3e-6/60*Density_mit_prot*Mit*(Top/Mit)*Nernst*(10^(-1)*exp(-1*Nernst) - 10^(-1)*exp(Nernst))/(1 - exp(-1*Nernst));
  Nernst_w_offset := 96.485*(delta_psi/cytosol - delta_psi_offset)/(8.31*310);
  V_forNCX := NCX_number*1/60*0.025*exp(0.5*Nernst_w_offset)/((1 + 9.4/30)^3*(1 + 3/(Ca_mit/Mit)))*Mit*Density_mit_prot;
  _1_per_copacity_mitoch := 1/(1.45*1e-6*Mit*Density_mit_prot);
  V_JHres := 0.05*0.1*Density_mit_prot*Mit;
  V_JHleak := Hydrogen_leak_permeab*Mit*Density_mit_prot*10^(-7.6)*exp(Nernst);

  // Reactions:
  IP3R_binding_IP3_fw: IP3Rn + IP3 => IP3Ro; cytosol*Rate_Law_for_IP3R_binding_IP3(IP3Rn/cytosol, IP3/cytosol, k2, L3, l4, Ca_cyt/cytosol, L1, IP3Ro/cytosol, IP3R_binding_IP3_fw_km2, IP3R_binding_IP3_fw_lm4, L5);  // modifiers: Ca_cyt
    k2 = 37.4; l4 = 1.7; IP3R_binding_IP3_fw_km2 = 0; IP3R_binding_IP3_fw_lm4 = 0;
  IP3R_activation_fw: IP3Ro + Ca_cyt => IP3Ra; cytosol*Rate_Law_for_IP3R_activation(IP3Ro/cytosol, k4, L5, l6, Ca_cyt/cytosol, IP3Ra/cytosol, L1, IP3R_activation_fw_km4, IP3R_activation_fw_lm6);
    k4 = 4; l6 = 4707; IP3R_activation_fw_km4 = 0; IP3R_activation_fw_lm6 = 0;
  IP3R_closing_fw: IP3Ro => IP3Rs; cytosol*Rate_Law_for_IP3R_closing(IP3Ro/cytosol, k3, L5, Ca_cyt/cytosol, IP3Rs/cytosol, km3);  // modifiers: Ca_cyt
    k3 = 0.11; km3 = 0;
  Ca2_release_from_DTS: Ca_dts => Ca_cyt; Rate_Law_for_membrane(IP3Rtotal, cyt_vol, Ca2_release_from_DTS_C, P0, Ca_dts/DTS, Ca_cyt/cytosol);
    Ca2_release_from_DTS_C = 31250000;
  Ca2_leak_across_PM: $Ca_prp => Ca_cyt; cytosol*Rate_Law_for_membrane(k_PM_leak, B, Ca2_leak_across_PM_C, Ca2_leak_across_PM_Po, Ca_prp/cytosol, Ca_cyt/cytosol);
    B = 0.1; Ca2_leak_across_PM_C = 0.1; Ca2_leak_across_PM_Po = 0.1;
  SERCA3a: Ca_cyt => Ca_dts; Hill_Cooperativity(Ca_cyt/cytosol, SERCA3a_Shalve, V_forSERCA3, SERCA3a_h);
    SERCA3a_Shalve = 1.1; SERCA3a_h = 1.8;
  SERCA2b: Ca_cyt => Ca_dts; Hill_Cooperativity(Ca_cyt/cytosol, SERCA2b_Shalve, V_forSERCA, SERCA2b_h);
    SERCA2b_Shalve = 0.27; SERCA2b_h = 1.7;
  Uniporter_cyt: Ca_cyt => ; cytosol*function_6(V_forUNI, Uniporter_cyt_b, Uniporter_cyt_c, Uniporter_cyt_d, cytosol);
    Uniporter_cyt_b = 1; Uniporter_cyt_c = 1; Uniporter_cyt_d = 1;
  Exchanger_mit: Ca_mit => ; Mit*function_6(V_forNCX, fm, Exchanger_mit_c, Exchanger_mit_d, Mit);
    Exchanger_mit_c = 1; Exchanger_mit_d = 1;
  Leak_from_mitochondria: Ca_mit => Ca_cyt; Leak_from_mitochondria_k1*(Ca_mit/Mit);
    Leak_from_mitochondria_k1 = 0;
  Exchanger_cyt: => Ca_cyt; cytosol*function_6(V_forNCX, Exchanger_cyt_b, Exchanger_cyt_c, Exchanger_cyt_d, cytosol);
    Exchanger_cyt_b = 1; Exchanger_cyt_c = 1; Exchanger_cyt_d = 1;
  Uniporter_mit: => Ca_mit; Mit*function_6(V_forUNI, Uniporter_mit_b, fm, Uniporter_mit_d, Mit);
    Uniporter_mit_b = 1; Uniporter_mit_d = 1;
  PMCA: Ca_cyt => $Ca_prp; cytosol*Hill_Cooperativity(Ca_cyt/cytosol, PMCA_Shalve, V_for_PMCA, PMCA_h);
    PMCA_Shalve = 0.05; PMCA_h = 2;
  NCX_PM: Ca_cyt => $Ca_prp; cytosol*Constant_flux_irreversible(V_forNCX_PM);
  PTP_delta_psi: delta_psi => ; cytosol*multiplied_constant_flux(PTP_L_hydrogen, _1_per_copacity_mitoch, PTP_delta_psi_c);
    PTP_delta_psi_c = -1;
  Degradation_of_PAR: species_17 => ; Degradation_of_PAR_k1*species_17; Degradation_of_PAR is "Degradation of PAR*";
    Degradation_of_PAR_k1 = 20;
  PAR_release_GqGTP: PAR_GqGTP => species_17 + GqGTP; PAR_release_GqGTP_k1*PAR_GqGTP; PAR_release_GqGTP is "PAR* release GqGTP";
    PAR_release_GqGTP_k1 = 2;
  GqGTP_into_GqGDP: GqGTP => GqGDP; GqGTP_into_GqGDP_k1*GqGTP;
    GqGTP_into_GqGDP_k1 = 0.02;
  GTP_hydrolysis_by_PLC: PLCGqGTP => PLCGqGDP; GTP_hydrolysis_by_PLC_k1*PLCGqGTP;
    GTP_hydrolysis_by_PLC_k1 = 15;
  PIP2_into_IP3: PLCGqGTPPIP2 => PLCGqGTP + IP3; mass_action_with_volume(PIP2_into_IP3_k, plasma_membrane, PLCGqGTPPIP2/plasma_membrane);
    PIP2_into_IP3_k = 320;
  Jhleak: delta_psi => ; cytosol*multiplied_constant_flux(V_JHleak, _1_per_copacity_mitoch, Jhleak_c);
    Jhleak_c = 1;
  Exchanger_delta_psi: delta_psi => ; cytosol*multiplied_constant_flux(V_forNCX, _1_per_copacity_mitoch, Exchanger_delta_psi_c);
    Exchanger_delta_psi_c = 1;
  Uniporter_delta_psi: delta_psi => ; cytosol*multiplied_constant_flux(V_forUNI, _1_per_copacity_mitoch, Uniporter_delta_psi_c);
    Uniporter_delta_psi_c = 2;
  Jhres: => delta_psi; cytosol*multiplied_constant_flux(V_JHres, _1_per_copacity_mitoch, Jhres_c);
    Jhres_c = 1;
  Ca2_leak_from_DTS: Ca_dts => Ca_cyt; Rate_Law_for_membrane(Ca2_leak_from_DTS_A, cyt_vol, Ca2_leak_from_DTS_C, Ca2_leak_from_DTS_Po, Ca_dts/DTS, Ca_cyt/cytosol);
    Ca2_leak_from_DTS_A = 1600; Ca2_leak_from_DTS_C = 1; Ca2_leak_from_DTS_Po = 1;
  IP3R_inhibition_forward: IP3Rn + Ca_cyt => IP3Ri1; cytosol*function_10(IP3Rn/cytosol, k1_IP3R, L1, l2_IP3R, Ca_cyt/cytosol, L3); IP3R_inhibition_forward is "IP3R inhibition (forward)";
  IP3R_inhibition_backward: IP3Ri1 => IP3Rn + Ca_cyt; cytosol*function_11(IP3Ri1/cytosol, km1_IP3R, lm2_IP3R); IP3R_inhibition_backward is "IP3R inhibition (backward)";
  IP3R_inhibition_2_forward: IP3Ra + Ca_cyt => IP3Ri2; cytosol*function_12(IP3Ra/cytosol, k1_IP3R, L1, l2_IP3R, Ca_cyt/cytosol); IP3R_inhibition_2_forward is "IP3R inhibition 2 (forward)";
  IP3R_inhibition_2_backward: IP3Ri2 => IP3Ra + Ca_cyt; cytosol*function_13(IP3Ri2/cytosol, km1_IP3R, lm2_IP3R); IP3R_inhibition_2_backward is "IP3R inhibition 2 (backward)";
  Opening_of_PTP_forward: Top => Tcl; PTP_closing*Top; Opening_of_PTP_forward is "Opening of PTP (forward)";
  Opening_of_PTP_backward: Tcl => Top; PTP_opening*Tcl; Opening_of_PTP_backward is "Opening of PTP (backward)";
  PAR_activation_forward: species_16 + $PAR1AP => species_17; PAR_activation_forward_k1*species_16*(PAR1AP/plasma_membrane); PAR_activation_forward is "PAR activation (forward)";
    PAR_activation_forward_k1 = 0.075;
  PAR_activation_backward: species_17 => species_16 + $PAR1AP; PAR_activation_backward_k1*species_17; PAR_activation_backward is "PAR activation (backward)";
    PAR_activation_backward_k1 = 0.001;
  PAR_bind_Gq_forward: species_17 + GqGDP => PAR_GqGDP; PAR_bind_Gq_forward_k1*species_17*(GqGDP/plasma_membrane); PAR_bind_Gq_forward is "PAR* bind Gq (forward)";
    PAR_bind_Gq_forward_k1 = 100;
  PAR_bind_Gq_backward: PAR_GqGDP => species_17 + GqGDP; PAR_bind_Gq_backward_k1*PAR_GqGDP; PAR_bind_Gq_backward is "PAR* bind Gq (backward)";
    PAR_bind_Gq_backward_k1 = 1;
  PAR_Gq_release_GDP_forward: PAR_GqGDP => PAR_Gq + GDP; PAR_Gq_release_GDP_forward_k1*PAR_GqGDP; PAR_Gq_release_GDP_forward is "PAR*Gq release GDP (forward)";
    PAR_Gq_release_GDP_forward_k1 = 5;
  reaction_38: PAR_Gq + GDP => PAR_GqGDP; reaction_38_k1*PAR_Gq*(GDP/plasma_membrane); reaction_38 is "PAR*Gq release GDP (backward) (backward)";
    reaction_38_k1 = 1;
  PAR_Gq_bind_GTP_forward: PAR_Gq + GTP => PAR_GqGTP; PAR_Gq_bind_GTP_forward_k1*PAR_Gq*(GTP/plasma_membrane); PAR_Gq_bind_GTP_forward is "PAR*Gq bind GTP (forward)";
    PAR_Gq_bind_GTP_forward_k1 = 1;
  PAR_Gq_bind_GTP_backward: PAR_GqGTP => PAR_Gq + GTP; PAR_Gq_bind_GTP_backward_k1*PAR_GqGTP; PAR_Gq_bind_GTP_backward is "PAR*Gq bind GTP (backward)";
    PAR_Gq_bind_GTP_backward_k1 = 0.1;
  PLC_bind_GqGTP_forward: PLC + GqGTP => PLCGqGTP; PLC_bind_GqGTP_forward_k1*PLC*(GqGTP/plasma_membrane); PLC_bind_GqGTP_forward is "PLC bind GqGTP (forward)";
    PLC_bind_GqGTP_forward_k1 = 500;
  PLC_binds_GqGTP_backward: PLCGqGTP => PLC + GqGTP; PLC_binds_GqGTP_backward_k1*PLCGqGTP; PLC_binds_GqGTP_backward is "PLC binds GqGTP (backward)";
    PLC_binds_GqGTP_backward_k1 = 5;
  PLC_release_GqGDP_forward: PLCGqGDP => PLC + GqGDP; PLC_release_GqGDP_forward_k1*PLCGqGDP; PLC_release_GqGDP_forward is "PLC release GqGDP (forward)";
    PLC_release_GqGDP_forward_k1 = 100000;
  PLC_release_GqGDP_backward: PLC + GqGDP => PLCGqGDP; PLC_release_GqGDP_backward_k1*PLC*(GqGDP/plasma_membrane); PLC_release_GqGDP_backward is "PLC release GqGDP (backward)";
    PLC_release_GqGDP_backward_k1 = 0.0001;
  PLC_bind_PIP2_forward: PLCGqGTP + PIP2 => PLCGqGTPPIP2; PLC_bind_PIP2_forward_k1*PLCGqGTP*(PIP2/plasma_membrane); PLC_bind_PIP2_forward is "PLC bind PIP2 (forward)";
    PLC_bind_PIP2_forward_k1 = 1000;
  PLC_bind_PIP2_backward: PLCGqGTPPIP2 => PLCGqGTP + PIP2; PLC_bind_PIP2_backward_k1*PLCGqGTPPIP2; PLC_bind_PIP2_backward is "PLC bind PIP2 (backward)";
    PLC_bind_PIP2_backward_k1 = 1;
  reaction_47: IP3 => PIP2; mass_action_with_volume(reaction_47_k, plasma_membrane, IP3/cytosol); reaction_47 is "PIP2 into IP3 stationary (backward)";
    reaction_47_k = 0.17;
  PIP2_into_IP3_stationary_forward: PIP2 => IP3; mass_action_with_volume(PIP2_into_IP3_stationary_forward_k, plasma_membrane, PIP2/plasma_membrane); PIP2_into_IP3_stationary_forward is "PIP2 into IP3 stationary (forward)";
    PIP2_into_IP3_stationary_forward_k = 1.8e-5;
  IP3R_closing_bw: IP3Rs => IP3Ro; IP3R_closing_bw_k1*IP3Rs;
    IP3R_closing_bw_k1 = 29.8;
  IP3R_activation_bw: IP3Ra => IP3Ro + Ca_cyt; cytosol*Rate_Law_for_IP3R_activatin_bw(IP3Ra/cytosol, L1, IP3R_activation_bw_km4, IP3R_activation_bw_lm6, Ca_cyt/cytosol);
    IP3R_activation_bw_km4 = 0.54; IP3R_activation_bw_lm6 = 11.4;
  IP3R_binding_IP3_bw: IP3Ro => IP3Rn + IP3; cytosol*Rate_Law_for_IP3R_binding_IP3_bw(IP3Ro/cytosol, IP3R_binding_IP3_bw_km2, IP3R_binding_IP3_bw_lm4, Ca_cyt/cytosol, L5);  // modifiers: Ca_cyt
    IP3R_binding_IP3_bw_km2 = 1.4; IP3R_binding_IP3_bw_lm4 = 2.5;
  soce_Activation_of_SO: so_1 => so; cytosol*Mass_action_with_modifier(a, so_1/cytosol, stim/DTS);  // modifiers: stim
    a = 1.226;
  soce_desactivation_of_Stim: stimCa => stim + 3 Ca_dts; soce_desactivation_of_Stim_k1*stimCa;
    soce_desactivation_of_Stim_k1 = 2.535;
  soce_desactivation_of_SO: so => so_1; soce_desactivation_of_SO_k1*so;
    soce_desactivation_of_SO_k1 = 0.06774;
  soce_activation_of_stim: stim + 3 Ca_dts => stimCa; soce_activation_of_stim_k1*stim*(Ca_dts/DTS)^3;
    soce_activation_of_stim_k1 = 6.663e-6;
  soce_Store_operated_calcium_entry__my: $Ca_prp => Ca_cyt; cytosol*Rate_Law_for_membrane(soce_Store_operated_calcium_entry__my_A, so_val, soce_Store_operated_calcium_entry__my_C, soce_Store_operated_calcium_entry__my_Po, Ca_prp/cytosol, Ca_cyt/cytosol);
    soce_Store_operated_calcium_entry__my_A = 115.943329; soce_Store_operated_calcium_entry__my_C = 1; soce_Store_operated_calcium_entry__my_Po = 1;

  // Unit definitions:
  unit substance = 1e-6 mole;
end
