// SBML level 2 version 4
// dcterms:bibliographicCitation: urn:miriam:doi:10.1006/jtbi.1997.0584

model Pokhilko1998___Intrinsic_Activation_Kinetics__Dimensional_Model()
  // Pokhilko1998 - Intrinsic Activation Kinetics (Dimensional Model)
  // Mathematical model of intrinsic pathway activation consisting of XIIa, kallikrein and HMWKa.
  // isPartOf GO:0007596
  // isDescribedBy doi:10.1006/jtbi.1997.0584

  // Compartments:
  compartment compartment = 1;

  // Species:
  species $X in compartment = 0.5;
  species $Y in compartment = 0.5;
  species $Z in compartment = 2;
  species S in compartment = 2.6;

  // Parameters:
  K1 = 2.1e-6;
  K2 = 0.0004;
  K3 = 0.007;
  K4 = 0.1;
  K5 = 0.012;
  K6 = 0.011;
  K7 = 0.2;
  K9 = 0.01;
  K8 = 0.002;

  // Rate rules:
  X' = K1*(S - X - Z)*X + K2*(S - X - Z)*Y - K3*X;
  Y' = K4*X*(S - X - Z)*(Z + K5) - K6*Y;
  Z' = K7*Y + K9*X - K8*Z;

  // Unit definitions:
  unit volume = 1e-3 litre;
  unit substance = 1e-9 mole;
end
