// SBML level 2 version 4
// dcterms:bibliographicCitation: urn:miriam:pubmed:18596227

function f57(kcat, PLC_B_star_Gq_GTP)
  kcat*PLC_B_star_Gq_GTP;
end

function f58(k1, PLC_B_Gq_GDP, k_1, PLC_b, Gq_GDP)
  k1*PLC_B_Gq_GDP - k_1*PLC_b*Gq_GDP;
end

function f01(k1f, Serca_e2, k1r, Serca_e1)
  k1f*Serca_e2 - k1r*Serca_e1;
end

function f02(k1, SERCA_e1, Ca_cyt, kr, SERCA_E1_Ca_2)
  k1*SERCA_e1*Ca_cyt*Ca_cyt - kr*SERCA_E1_Ca_2;
end

function f03(k, SERCA_e1_Ca, kr, SERCA_e1_P_Ca)
  k*SERCA_e1_Ca - kr*SERCA_e1_P_Ca;
end

function f04(k, SERCA_e1_P_Ca, kr, SERCA_e2_P_Ca)
  k*SERCA_e1_P_Ca - kr*SERCA_e2_P_Ca;
end

function f05(k, SERCA_e2_P_Ca, kr, SERCA_e2_p, Ca_dts)
  k*SERCA_e2_P_Ca - kr*SERCA_e2_p*Ca_dts*Ca_dts;
end

function f06(k, SERCA_e2_P, kr, SERCA_e2)
  k*SERCA_e2_P - kr*SERCA_e2;
end

function f07(IP3Rn, Ca_cyt, IP3Ri1, k1, L1, I2, L3, kr, I_2)
  IP3Rn*((k1*L1 + I2)*Ca_cyt/(L1 + Ca_cyt*(1 + L1/L3))) - IP3Ri1*(kr + I_2);
end

function f08(IP3Rn, IP3, Ca_cyt, IP3R0, k2, L3, I4, L1, k_2, I_4, L5)
  IP3Rn*IP3*((k2*L3 + I4*Ca_cyt)/(L3 + Ca_cyt*(1 + L3/L1))) - IP3R0*((k_2 + I_4*Ca_cyt)/(1 + Ca_cyt/L5));
end

function f09(IP3R0, k4, L5, I6, Ca_cyt, IP3Ra, L1, k_4, I_6)
  IP3R0*((k4*L5 + I6)*Ca_cyt/(L5 + Ca_cyt)) - IP3Ra*(L1*(k_4 + I_6)/(L1 + Ca_cyt));
end

function f10(IP3Ra, k1, L1, I2, Ca_cyt, IP3Ri2, k_1, I_2)
  IP3Ra*(k1*L1 + I2)*Ca_cyt/(L1 + Ca_cyt) - IP3Ri2*(k_1 + I_2);
end

function f11(IP3R0, k3, L5, Ca_cyt, IP3Rs, k_3)
  IP3R0*(k3*L5/(L5 + Ca_cyt)) - IP3Rs*k_3;
end

function f12(N_IP3R, P0, gamma_IP3R, e, psi_IM)
  N_IP3R*P0*gamma_IP3R*e*psi_IM;
end

function f13(SA_PM, gamma_leak, psi_PM)
  SA_PM*gamma_leak*psi_PM;
end

function f14(k1, PLC_b_star, Pi, k_1, PLC_b_star_PI)
  k1*PLC_b_star*Pi - k_1*PLC_b_star_PI;
end

function f15(kcat, PLC_b_Pi)
  kcat*PLC_b_Pi;
end

function f16(k1, PLC_B_star, PIP, k_1, PLC_B_star_PIP)
  k1*PLC_B_star*PIP - k_1*PLC_B_star_PIP;
end

function f17(kcat, PLC_B_star_PIP)
  kcat*PLC_B_star_PIP;
end

function f18(k1, PLC_b_star, PIP_2, k_1, PLC_b_star_PIP_2)
  k1*PLC_b_star*PIP_2 - k_1*PLC_b_star_PIP_2;
end

function f19(kcat, PLC_b_star_PIP_2)
  kcat*PLC_b_star_PIP_2;
end

function f20(kcat, PIK, Pi, Km)
  kcat*PIK*Pi/(Km + Pi);
end

function f21(kcat, PIPK, PIP, Km)
  kcat*PIPK*PIP/(Km + PIP);
end

function f22(kcat, PIP_2_P, PIP_2, Km)
  kcat*PIP_2_P*PIP_2/(Km + PIP_2);
end

function f23(kcat, IPP, I1P, Km)
  kcat*IPP*I1P/(Km + I1P);
end

function f24(kcat, IPP, I4P, Km)
  kcat*IPP*I4P/(Km + I4P);
end

function f25(kcat, IP_2_P, IP_2, Km)
  kcat*IP_2_P*IP_2/(Km + IP_2);
end

function f26(kcat, IP_3_P, IP_3, Km)
  kcat*IP_3_P*IP_3/(Km + IP_3);
end

function f27(kcat, DGK, DAG, Km)
  kcat*DGK*DAG/(Km + DAG);
end

function f28(Kcat, CDS, PA, CTP, Km1, Km2, I, CDPDG)
  Kcat*CDS*PA*CTP/(Km1*Km2 + Km1*I + Km2*CDPDG + I*CDPDG);
end

function f29(kcat, PIS, CDPDG, I, Km1, Km2)
  kcat*PIS*CDPDG*I/(Km1*Km2 + Km1*I + Km2*CDPDG + I*CDPDG);
end

function f30(k1, PKC, k_1, PKC_a)
  k1*PKC - k_1*PKC_a;
end

function f31(k1, PKC_Ca_cyt, k_1, PKC_a_Ca_cyt)
  k1*PKC_Ca_cyt - k_1*PKC_a_Ca_cyt;
end

function f32(k1, PKC_Ca_cyt_DAG, k_1, PKC_a_Ca_cyt_DAG)
  k1*PKC_Ca_cyt_DAG - k_1*PKC_a_Ca_cyt_DAG;
end

function f33(kon, PKC, CA_cyt, koff, PKC_Ca_cyt)
  kon*PKC*CA_cyt - koff*PKC_Ca_cyt;
end

function f34(kon, PKC_Ca_cyt, DAG, koff, PKC_Ca_cyt_DAG)
  kon*PKC_Ca_cyt*DAG - koff*PKC_Ca_cyt_DAG;
end

function f35(kon, PKC_a, Ca_cyt, koff, PKC_a_Ca_cyt)
  kon*PKC_a*Ca_cyt - koff*PKC_a_Ca_cyt;
end

function f36(kon, PKC_a_Ca_cyt, DAG, koff, PKC_a_Ca_cyt_DAG)
  kon*PKC_a_Ca_cyt*DAG - koff*PKC_a_Ca_cyt_DAG;
end

function f37(k1, P2Y1, Kact, P2Y1_star)
  k1*P2Y1 - k1/Kact*P2Y1_star;
end

function f38(alpha, k1, P2Y1_ADP, Kact, P2Y1_star_ADP)
  alpha*k1*P2Y1_ADP - k1/Kact*P2Y1_star_ADP;
end

function f39(beta, k1, P2Y1_Gq_GDP, Kact, P2Y1_star_Gq_GDP)
  beta*k1*P2Y1_Gq_GDP - k1/Kact*P2Y1_star_Gq_GDP;
end

function f40(alpha, beta, delta, k1, P2Y1_ADP_Gq_GDP, Kact, P2Y1_star_ADP_Gq_GDP)
  alpha*beta*delta*k1*P2Y1_ADP_Gq_GDP - k1/Kact*P2Y1_star_ADP_Gq_GDP;
end

function f41(beta, k11, P2Y1_star, Gq_GDP, Kg, P2Y1_star_Gq_GDP)
  beta*k11*P2Y1_star*Gq_GDP - k11/Kg*P2Y1_star_Gq_GDP;
end

function f42(beta, k11, P2Y1_star_ADP, Gq_GDP, delta, gamma, Kg, P2Y1_star_Gq_GDP)
  beta*k11*P2Y1_star_ADP*Gq_GDP - k11/(delta*gamma*Kg)*P2Y1_star_Gq_GDP;
end

function f43(k3, P2Y1, ADP, Kd, P2Y1_ADP)
  k3*P2Y1*ADP - Kd*k3*P2Y1_ADP;
end

function f44(k3, P2Y1_Gq_GDP, ADP, kd, gamma, P2Y1_ADP_Gq_GDP)
  k3*P2Y1_Gq_GDP*ADP - kd*k3/gamma*P2Y1_ADP_Gq_GDP;
end

function f45(alpha, k3, P2Y1_star, ADP, kd, P2Y1_star_ADP)
  alpha*k3*P2Y1_star*ADP - kd*k3*P2Y1_star_ADP;
end

function f46(alpha, k3, P2Y1_star_Gq_GDP, ADP, kd, delta, gamma, P2Y1_star_ADP_Gq_GDP)
  alpha*k3*P2Y1_star_Gq_GDP*ADP - kd*k3/(delta*gamma)*P2Y1_star_ADP_Gq_GDP;
end

function f47(k1, P2Y1_star_Gq_GDP, k_1, P2Y1_star_Gq, GDP)
  k1*P2Y1_star_Gq_GDP - k_1*P2Y1_star_Gq*GDP;
end

function f48(k1, P2Y1_star_Gq, GTP, k_1, P2Y1_star_Gq_GTP)
  k1*P2Y1_star_Gq*GTP - k_1*P2Y1_star_Gq_GTP;
end

function f49(k1, P2Y1_star_ADP_Gq_GDP, k_1, P2Y1_star_ADP_Gq, GDP)
  k1*P2Y1_star_ADP_Gq_GDP - k_1*P2Y1_star_ADP_Gq*GDP;
end

function f50(k1, P2Y1_star_ADP_Gq, GTP, k_1, P2Y1_star_ADP_Gq_GTP)
  k1*P2Y1_star_ADP_Gq*GTP - k_1*P2Y1_star_ADP_Gq_GTP;
end

function f51(k1, P2Y1_star_Gq_GTP, k_1, P2Y1_star, Gq_GTP)
  k1*P2Y1_star_Gq_GTP - k_1*P2Y1_star*Gq_GTP;
end

function f52(k1, P2Y1_Star_ADP_Gq_GTP, k_1, P2Y1_star, Gq_GTP)
  k1*P2Y1_Star_ADP_Gq_GTP - k_1*P2Y1_star*Gq_GTP;
end

function f53(k_GTP, Gq_GTP, k, G_alpha_GDP, G_beta_gamma)
  k_GTP*Gq_GTP + 0*k*G_alpha_GDP*G_beta_gamma;
end

function f54(k1, G_alpha_GTP, G_beta_gamma, k_1, Gq_GTP)
  k1*G_alpha_GTP*G_beta_gamma - k_1*Gq_GTP;
end

function f55(k1, G_alpha_GDP, G_beta_gamma, k_1, Gq_GDP)
  k1*G_alpha_GDP*G_beta_gamma - k_1*Gq_GDP;
end

function f56(k1, PLC_B, Gq_GTP, k_1, PLC_b_star_Gq_GTP)
  k1*PLC_B*Gq_GTP - k_1*PLC_b_star_Gq_GTP;
end

model Purvis2008___A_molecular_signaling_model_of_platelet_phosphoinositide_and_calcium_regulation_during_homeostasis_and_P2Y1_activation()
  // Purvis2008 - A molecular signaling model of platelet phosphoinositide and calcium regulation during homeostasis and P2Y1 activation
  // Mathematical model
  // hasPart uniprot:P47900
  // isVersionOf GO:0050848
  // isVersionOf GO:1905219
  // isVersionOf GO:0042592
  // isDescribedBy pubmed:18596227

  // Compartments:
  compartment compartment = 1;

  // Species:
  // e1 = open conformation?
  species SERCA_E1 in compartment = 0;
  // e2 = closed conformation?
  species SERCA_E2 in compartment = 0;
  species Ca_cyt in compartment = 0;  // isVersionOf kegg.compound:C00076; occursIn GO:0005829
  // inositol triphosphate receptor
  species IP3Ri1 in compartment = 0;
  // inositol triphosphate receptor
  species IP3Rn in compartment = 0;
  // inositol triphosphate receptor
  species IP3R0 in compartment = 0;
  // inositol triphosphate receptor
  species IP3Ra in compartment = 0;
  // inositol triphosphate receptor
  species IP3Ri2 in compartment = 0;
  // inositol triphosphate receptor
  species IP3Rs in compartment = 0;
  // dts = dense tubular system?
  species Ca_dts in compartment = 0;  // isVersionOf kegg.compound:C00076; occursIn GO:0031094
  species Ca_prp in compartment = 0;  // isVersionOf kegg.compound:C00076; occursIn ncit:C106557
  // Phosphoinositide?
  species PI in compartment = 0;
  species SERCA_E1_Ca_2 in compartment = 0; SERCA_E1_Ca_2 is "SERCA_E1-Ca_2";
  species SERCA_E1_Ca in compartment = 0; SERCA_E1_Ca is "SERCA_E1-Ca";
  species DAG in compartment = 0;  // isVersionOf kegg.compound:C00165
  species I1P in compartment = 0;  // isVersionOf kegg.compound:C01177
  // Phosphatidylinositol 4,5-bisphosphate
  species PIP_2 in compartment = 0;  // isVersionOf kegg.compound:C04637
  // inositol diphosphate?
  species IP_2 in compartment = 0;
  // phosphatidylinositol
  species PIP in compartment = 0;
  species PLC_B in compartment = 0; PLC_B is "PLC-B*";  // isVersionOf uniprot:Q9NQ66
  species PLC_B__PIP_2 in compartment = 0; PLC_B__PIP_2 is "PLC-B*-PIP_2";
  species PLC_B__PI in compartment = 0; PLC_B__PI is "PLC-B*-PI";
  species I in compartment = 0;  // isVersionOf kegg.compound:C00137
  species I4P in compartment = 0;  // isVersionOf kegg.compound:C03546
  species IP_3 in compartment = 0;
  // plasminogen activator? platelet aggreg?
  species PA in compartment = 0;
  // Cytidine Diphosphate Diglycerides
  species CDPDG in compartment = 0;  // isVersionOf kegg.compound:C00269
  // Cyclic thrombocytopenia
  species CTP in compartment = 0;
  species PKC in compartment = 0;  // isVersionOf ec-code:2.7.11.13
  species PKC_a in compartment = 0;  // isVersionOf ec-code:2.7.11.13
  species PKC_Ca_cyt in compartment = 0; PKC_Ca_cyt is "PKC-Ca_cyt";
  species PKC_a_Ca_cyt in compartment = 0; PKC_a_Ca_cyt is "PKC_a-Ca_cyt";
  species PKC_Ca_cyt_DAG in compartment = 0; PKC_Ca_cyt_DAG is "PKC-Ca_cyt-DAG";
  species PKC_a_Ca_cyt_DAG in compartment = 0; PKC_a_Ca_cyt_DAG is "PKC_a-Ca_cyt-DAG";
  species P2Y__1 in compartment = 0; P2Y__1 is "P2Y*_1";  // isVersionOf uniprot:P47900
  species P2Y_1 in compartment = 0;  // isVersionOf uniprot:P47900
  species P2Y__1_ADP in compartment = 0; P2Y__1_ADP is "P2Y*_1-ADP";  // hasPart uniprot:P47900
  species P2Y_1_ADP in compartment = 0; P2Y_1_ADP is "P2Y_1-ADP";  // hasPart uniprot:P47900
  species P2Y__1_ADP_G_q_GDP in compartment = 0; P2Y__1_ADP_G_q_GDP is "P2Y*_1-ADP-G_q-GDP";  // hasPart uniprot:P47900
  species P2Y_1_G_q_GDP in compartment = 0; P2Y_1_G_q_GDP is "P2Y_1-G_q-GDP";  // hasPart uniprot:P47900
  species P2Y__1_G_q_GDP in compartment = 0; P2Y__1_G_q_GDP is "P2Y*_1-G_q-GDP";  // hasPart uniprot:P47900
  species P2Y_1_ADP_G_q_GDP in compartment = 0; P2Y_1_ADP_G_q_GDP is "P2Y_1-ADP-G_q-GDP";  // hasPart uniprot:P47900
  species G_q_GDP in compartment = 0; G_q_GDP is "G_q-GDP";  // hasPart kegg.compound:C00035; hasPart uniprot:P50148
  species ADP in compartment = 0;  // isVersionOf kegg.compound:C00008
  species P2Y__1_ADP_G_q_GDP_0 in compartment = 0; P2Y__1_ADP_G_q_GDP_0 is "P2Y*_1-ADP_G_q-GDP";  // hasPart uniprot:P47900
  species P2Y__1_G_q in compartment = 0; P2Y__1_G_q is "P2Y*_1-G_q";  // hasPart uniprot:P47900
  species P2Y__1_G_q_GTP in compartment = 0; P2Y__1_G_q_GTP is "P2Y*_1-G_q-GTP";  // hasPart uniprot:P47900
  species P2Y__1_ADP_G_q in compartment = 0; P2Y__1_ADP_G_q is "P2Y*_1-ADP-G_q";  // hasPart uniprot:P47900
  species P2Y__1_ADP_GTP in compartment = 0; P2Y__1_ADP_GTP is "P2Y*_1-ADP-GTP";  // hasPart uniprot:P47900
  species G_q_GTP in compartment = 0; G_q_GTP is "G_q-GTP";  // hasPart kegg.compound:C00044; hasPart uniprot:P50148
  species P2Y__1_ADP_G_q_GTP in compartment = 0; P2Y__1_ADP_G_q_GTP is "P2Y*_1-ADP-G_q-GTP";  // hasPart uniprot:P47900
  species G_alpha_GDP in compartment = 0; G_alpha_GDP is "G_alpha-GDP";  // hasPart interpro:IPR001019; hasPart kegg.compound:C00035
  species G_beta_gamma in compartment = 0;  // hasPart reactome:R-HSA-167434; hasPart interpro:IPR001632
  species G_alpha_GTP in compartment = 0; G_alpha_GTP is "G_alpha-GTP";  // hasPart kegg.compound:C00044; hasPart interpro:IPR001019
  species PLC_B_0 in compartment = 0; PLC_B_0 is "PLC-B";  // isVersionOf uniprot:Q9NQ66
  species PLC_B__G_q_GTP in compartment = 0; PLC_B__G_q_GTP is "PLC-B*-G_q-GTP";
  species PLC_B_G_q_GDP in compartment = 0; PLC_B_G_q_GDP is "PLC-B-G_q-GDP";
  species SERCA_E1_P_Ca in compartment = 0; SERCA_E1_P_Ca is "SERCA_E1-P-Ca";
  species SERCA_E2_P_Ca in compartment = 0; SERCA_E2_P_Ca is "SERCA_E2-P-Ca";
  species SERCA_E2_P in compartment = 0; SERCA_E2_P is "SERCA_E2-P";
  species SERCA_E2_P_Ca_2 in compartment = 0; SERCA_E2_P_Ca_2 is "SERCA_E2-P-Ca_2";
  species PLC_B__PIP in compartment = 0; PLC_B__PIP is "PLC-B*-PIP";
  // Phosphoinositide kinase?
  species PIK in compartment = 0;
  species PIPK in compartment = 0;
  species PIP_2_P in compartment = 0; PIP_2_P is "PIP_2-P";
  species IPP in compartment = 0;
  species IP_2_P in compartment = 0; IP_2_P is "IP_2-P";
  species IP_3_P in compartment = 0; IP_3_P is "IP_3-P";
  species DGK in compartment = 0;  // isVersionOf PR:000022432
  species CDS in compartment = 0;
  species PIS in compartment = 0;
  species GDP in compartment = 0;  // isVersionOf kegg.compound:C00035
  species GTP in compartment = 0;  // isVersionOf kegg.compound:C00044
  // inositol triphosphate receptor
  species IP3R_total in compartment = 0;
  species pIP3R0 in compartment = 0;

  // Parameters:
  r01_k1 = 600;
  r01_k_1 = 600;
  r02_k1 = 1e15;
  r02_k_1 = 10;
  r03_k1 = 700;
  r03_k_1 = 5;
  r04_k1 = 600;
  r04_k_1 = 50;
  r05_k1 = 1000;
  r05_k_1 = 4e9;
  r06_k1 = 500;
  r06_k_1 = 1;
  r07_k1 = 0.64;
  r07_L1 = 0.12;
  r07_I2 = 1.7;
  r07_L3 = 0.025;
  r07_k_1 = 0.04;
  r07_I_2 = 0.8;
  r08_k2 = 37.4;
  r08_I4 = 1.7;
  r08_k_2 = 1.4;
  r08_I_4 = 2.5;
  r08_L5 = 54.7;
  r09_k4 = 4;
  r09_L5 = 54.7;
  r09_I6 = 4707;
  r09_L1 = 0.12;
  r09_k_4 = 0.54;
  r09_I_6 = 11.4;
  r10_k1 = 0.64;
  r10_L1 = 0.12;
  r10_I2 = 1.7;
  r10_k_1 = 0.04;
  r10_I_2 = 0.8;
  r11_k3 = 11;
  r11_L5 = 54.7;
  r11_k_3 = 29.8;
  gamma_IP3R = 10;
  gamma_leak = 0.7;
  r14_k1 = 100000000;
  r14_k_1 = 70499;
  r15_kcat = 1.43;
  r16_k1 = 100000000;
  r16_k_1 = 19000;
  r17_kcat = 0.35;
  r18_k1 = 100000000;
  r18_k_1 = 49990;
  r19_kcat = 9.8505;
  r20_Km = 0.016;
  r20_kcat = 2.77;
  r21_Km = 0.01;
  r21_kcat = 1.021;
  r22_Km = 250;
  r22_kcat = 1;
  r23_Km = 0.12;
  r23_kcat = 1;
  r24_Km = 0.12;
  r24_kcat = 1;
  r25_Km = 0.9;
  r25_kcat = 0.05;
  r26_Km = 24;
  r26_kcat = 31;
  r27_Km = 0.25;
  r27_kcat = 0.26;
  r28_Km1 = 0.5;
  r28_Km2 = 1;
  r28_kcat = 8.9;
  r29_Km1 = 13;
  r29_Km2 = 0.28;
  r29_kcat = 13.6;
  r30_k1 = 1;
  r30_k_1 = 2;
  r31_k1 = 1.3;
  r31_k_1 = 3.5;
  r32_k1 = 1;
  r32_k_1 = 0.1;
  r33_kon = 600000;
  r33_koff = 0.5;
  r34_kon = 8000;
  r34_koff = 8.6348;
  r35_kon = 600000;
  r35_koff = 0.5;
  r36_kon = 8000;
  r36_koff = 8.6348;
  r37_k1 = 7.9;
  r37_Kact = 0.0001;
  r38_alpha = 3.35;
  r38_k1 = 7.9;
  r38_Kact = 0.0001;
  r39_beta = 6.62;
  r39_k1 = 7.9;
  r39_Kact = 0.0001;
  r40_alpha = 3.35;
  r40_beta = 6.62;
  r40_delta = 9.85;
  r40_k1 = 7.9;
  r40_Kact = 0.0001;
  r41_beta = 6.62;
  r41_k11 = 0.59;
  r41_Kq = 0.032;
  r42_beta = 6.62;
  r42_k11 = 0.59;
  r42_delta = 9.85;
  r42_gamma = 9.39;
  r42_Kg = 0.032;
  r43_k3 = 96000000;
  r43_Kd = 99;
  r44_k3 = 96000000;
  r44_Kd = 99;
  r44_gamma = 9.39;
  r45_alpha = 3.35;
  r45_k3 = 96000000;
  r45_Kd = 99;
  r46_alpha = 3.35;
  r46_k3 = 96000000;
  r46_Kd = 99;
  r46_delta = 9.85;
  r46_gamma = 9.39;
  r47_k1 = 17.8;
  r47_k_1 = 1000000;
  r48_k1 = 100000;
  r48_k_1 = 8;
  r49_k1 = 17.8;
  r49_k_1 = 1000000;
  r50_k1 = 100000;
  r50_k_1 = 8;
  r51_k1 = 850;
  r51_k_1 = 10000000;
  r52_k1 = 850;
  r52_k_1 = 10000000;
  r53_k_GTP = 0.013;
  r54_k1 = 0.1;
  r54_k_1 = 7.78;
  r55_k1 = 0.1;
  r55_k_1 = 7.78;
  r56_k1 = 1.61;
  r56_k_1 = 0.19;
  r57_kcat = 25;
  r58_k1 = 100000;
  r58_k_1 = 100;
  Missing_r08_L3 = 0.025;
  Missing_r08_L1 = 0.12;
  N_IP3R = 0;
  RT_zF = 0; RT_zF is "RT/zF";
  e = 6.24e18;
  SA_PM = 0;

  // Assignment rules:
  P0 := (0.9*IP3Ra/IP3R_total + 0.1*pIP3R0/IP3R_total)^4;
  Psi_IM := RT_zF*ln(Ca_dts/Ca_cyt);
  Psi_PM := RT_zF*ln(Ca_prp/Ca_cyt);

  // Reactions:
  r01_SERCA_shuttling: SERCA_E2 -> SERCA_E1; compartment*f01(r01_k1, SERCA_E2, r01_k_1, SERCA_E1);
  r02_Ca2_cyt_binding_SERCA: SERCA_E1 + 2 Ca_cyt -> SERCA_E1_Ca_2; compartment*f02(r02_k1, SERCA_E1, Ca_cyt, r02_k_1, SERCA_E1_Ca_2); r02_Ca2_cyt_binding_SERCA is "r02_Ca2+cyt binding SERCA";
  r03_Phosphorylation_of_SERCA: SERCA_E1_Ca -> SERCA_E1_P_Ca; compartment*f03(r03_k1, SERCA_E1_Ca, r03_k_1, SERCA_E1_P_Ca);
  r04_Ca2__transport_across_IM: SERCA_E1_P_Ca -> SERCA_E2_P_Ca; compartment*f04(r04_k1, SERCA_E1_P_Ca, r04_k_1, SERCA_E2_P_Ca); r04_Ca2__transport_across_IM is "r04_Ca2+ transport across IM";
  r05_Ca2_dts_release_into_DTS: SERCA_E2_P_Ca_2 -> SERCA_E2_P + 2 Ca_dts; compartment*f05(r05_k1, SERCA_E2_P_Ca_2, r05_k_1, SERCA_E2_P, Ca_dts); r05_Ca2_dts_release_into_DTS is "r05_Ca2+dts release into DTS";
  r06_SERCA_dephosphorylation: SERCA_E2_P -> SERCA_E2; compartment*f06(r06_k1, SERCA_E2_P, r06_k_1, SERCA_E2);
  r07_IP3R_inhibition: IP3Rn + Ca_cyt -> IP3Ri1; compartment*f07(IP3Rn, Ca_cyt, IP3Ri1, r07_k1, r07_L1, r07_I2, r07_L3, r07_k_1, r07_I_2);
  r08_IP3R_binding_IP3: IP3Rn + IP_3 -> IP3R0; compartment*f08(IP3Rn, IP_3, Ca_cyt, IP3R0, r08_k2, Missing_r08_L3, r08_I_4, Missing_r08_L1, r08_k_2, r08_I_4, r08_L5);  // modifiers: Ca_cyt
  r09_IP3R_activation: IP3R0 + Ca_cyt -> IP3Ra; compartment*f09(IP3R0, r09_k4, r09_L5, r09_I6, Ca_cyt, IP3Ra, r09_L1, r09_k_4, r09_I_6);
  r10_IP3R_inhibition: IP3Ra + Ca_cyt -> IP3Ri2; compartment*f10(IP3Ra, r10_k1, r10_L1, r10_I2, Ca_cyt, IP3Ri2, r10_k_1, r10_I_2);
  r11_IP3R_closing: IP3R0 -> IP3Rs; compartment*f11(IP3R0, r11_k3, r11_L5, Ca_cyt, IP3Rs, r11_k_3);  // modifiers: Ca_cyt
  r12_Ca2__release_from_DTS: Ca_dts -> Ca_cyt; compartment*f12(N_IP3R, P0, gamma_IP3R, e, Psi_IM); r12_Ca2__release_from_DTS is "r12_Ca2+ release from DTS";
  r13_Ca2__leak_across_PM: Ca_prp -> Ca_cyt; compartment*f13(SA_PM, gamma_leak, Psi_PM); r13_Ca2__leak_across_PM is "r13_Ca2+ leak across PM";
  r14_PLC____binding_PI: PLC_B + PI -> PLC_B__PI; compartment*f14(r14_k1, PLC_B, PI, r14_k_1, PLC_B__PI); r14_PLC____binding_PI is "r14_PLC-þ* binding PI";
  r15_PLC____hydrolyzing_PI: PI => DAG + I1P; compartment*f15(r15_kcat, PI); r15_PLC____hydrolyzing_PI is "r15_PLC-þ* hydrolyzing PI";
  r16_PLC____binding_PIP: PLC_B + PIP -> PLC_B__PIP; compartment*f16(r16_k1, PLC_B, PIP, r16_k_1, PLC_B__PIP); r16_PLC____binding_PIP is "r16_PLC-þ* binding PIP";
  r17_PLC____hydrolyzing_PIP: PIP => DAG + IP_2; compartment*f17(r17_kcat, PIP); r17_PLC____hydrolyzing_PIP is "r17_PLC-þ* hydrolyzing PIP";
  r18_PLC____binding_PIP2: PLC_B + PIP_2 -> PLC_B__PIP_2; compartment*f18(r18_k1, PLC_B, PIP_2, r18_k_1, PLC_B__PIP_2); r18_PLC____binding_PIP2 is "r18_PLC-þ* binding PIP2";
  r19_PLC____hydrolyzing_PIP2: PIP_2 => DAG + IP_3; compartment*f19(r19_kcat, PIP_2); r19_PLC____hydrolyzing_PIP2 is "r19_PLC-þ* hydrolyzing PIP2";
  r20_Phosphorylation_of_PI: PI => PIP; compartment*f20(r20_kcat, PIK, PI, r20_Km);  // modifiers: PIK
  r21_Phosphorylation_of_PIP: PIP => PIP_2; compartment*f21(r21_kcat, PIPK, PIP, r21_Km);  // modifiers: PIPK
  r22_Dephosphorylation_of_PIP2: PIP_2 => PIP; compartment*f22(r22_kcat, PIP_2_P, PIP_2, r22_Km);  // modifiers: PIP_2_P
  r23_Dephosphorylation_of_I1P: I1P => I; compartment*f23(r23_kcat, IPP, I1P, r23_Km);  // modifiers: IPP
  r24_Dephosphorylation_of_I4P: I4P => I; compartment*f24(r24_kcat, IPP, I4P, r24_Km);  // modifiers: IPP
  r25_Dephosphorylation_of_IP2: IP_2 => I4P; compartment*f25(r25_kcat, IP_2_P, IP_2, r25_Km);  // modifiers: IP_2_P
  r26_Dephosphorylation_of_IP3: IP_3 => IP_2; compartment*f26(r26_kcat, IP_3_P, IP_3, r26_Km);  // modifiers: IP_3_P
  r27_Phosphorylation_of_DAG: DAG => PA; compartment*f27(r27_kcat, DGK, DAG, r27_Km);  // modifiers: DGK
  r28_Synthesis_of_CDPDG: CTP + PA => CDPDG; compartment*f28(r28_kcat, CDS, CTP, PA, r28_Km1, r28_Km2, I, CDPDG);  // modifiers: CDS, I
  r29_Synthesis_of_PI: CDPDG + I => PI; compartment*f29(r29_kcat, PIS, CDPDG, I, r29_Km1, r29_Km2);  // modifiers: PIS
  r30_Activation_of_PKC: PKC -> PKC_a; compartment*f30(r30_k1, PKC, r30_k_1, PKC_a);
  r31_Activation_of_PKC_Ca2_cyt: PKC_Ca_cyt -> PKC_a_Ca_cyt; compartment*f31(r31_k1, PKC_Ca_cyt, r31_k_1, PKC_a_Ca_cyt); r31_Activation_of_PKC_Ca2_cyt is "r31_Activation of PKC·Ca2+cyt";
  r32_Activation_of_PKC_Ca2_cyt__DG: PKC_Ca_cyt_DAG -> PKC_a_Ca_cyt_DAG; compartment*f32(r32_k1, PKC_Ca_cyt_DAG, r32_k_1, PKC_a_Ca_cyt_DAG); r32_Activation_of_PKC_Ca2_cyt__DG is "r32_Activation of PKC·Ca2+cyt ·DG";
  r33_PKC_binding_Ca2_cyt: PKC + Ca_cyt -> PKC_Ca_cyt; compartment*f33(r33_kon, PKC, Ca_cyt, r33_koff, PKC_Ca_cyt); r33_PKC_binding_Ca2_cyt is "r33_PKC binding Ca2+cyt";
  r34_PKC_Ca2_cyt_binding_DAG: PKC_Ca_cyt + DAG -> PKC_Ca_cyt_DAG; compartment*f34(r34_kon, PKC_Ca_cyt, DAG, r34_koff, PKC_Ca_cyt_DAG); r34_PKC_Ca2_cyt_binding_DAG is "r34_PKC·Ca2+cyt binding DAG";
  r35_PKCa_binding_Ca2_cyt: PKC_a + Ca_cyt -> PKC_a_Ca_cyt; compartment*f35(r35_kon, PKC_a, Ca_cyt, r35_koff, PKC_a_Ca_cyt); r35_PKCa_binding_Ca2_cyt is "r35_PKCa binding Ca2+cyt";
  r36_PKCa_Ca2_cyt_binding_DAG: PKC_a_Ca_cyt + DAG -> PKC_a_Ca_cyt_DAG; compartment*f36(r36_kon, PKC_a_Ca_cyt, DAG, r36_koff, PKC_a_Ca_cyt_DAG); r36_PKCa_Ca2_cyt_binding_DAG is "r36_PKCa·Ca2+cyt binding DAG";
  r37_Activation_of_P2Y1: P2Y_1 -> P2Y__1; compartment*f37(r37_k1, P2Y_1, r37_Kact, P2Y__1);
  r38_Activation_of_P2Y1_ADP: P2Y_1_ADP -> P2Y__1_ADP; compartment*f38(r38_alpha, r38_k1, P2Y_1_ADP, r38_Kact, P2Y__1_ADP); r38_Activation_of_P2Y1_ADP is "r38_Activation of P2Y1·ADP";
  r39_Activation_of_P2Y1_Gq_GDP: P2Y_1_G_q_GDP -> P2Y__1_G_q_GDP; compartment*f39(r39_beta, r39_k1, P2Y_1_G_q_GDP, r39_Kact, P2Y__1_G_q_GDP); r39_Activation_of_P2Y1_Gq_GDP is "r39_Activation of P2Y1·Gq·GDP";
  r40_Activation_of_P2Y1_ADP_Gq_GDP: P2Y_1_ADP_G_q_GDP -> P2Y__1_ADP_G_q_GDP; compartment*f40(r40_alpha, r40_beta, r40_delta, r40_k1, P2Y_1_ADP_G_q_GDP, r40_Kact, P2Y__1_ADP_G_q_GDP); r40_Activation_of_P2Y1_ADP_Gq_GDP is "r40_Activation of P2Y1·ADP·Gq·GDP";
  r41_P2Y1__binding_Gq_GDP: P2Y__1 + G_q_GDP -> P2Y__1_ADP_G_q_GDP; compartment*f41(r41_beta, r41_k11, P2Y__1, G_q_GDP, r41_Kq, P2Y__1_ADP_G_q_GDP); r41_P2Y1__binding_Gq_GDP is "r41_P2Y1* binding Gq·GDP";
  r42_P2Y1__ADP_binding_Gq_GDP: P2Y__1_ADP + G_q_GDP -> P2Y__1_ADP_G_q_GDP_0; compartment*f42(r42_beta, r42_k11, P2Y__1_ADP, G_q_GDP, r42_delta, r42_gamma, r42_Kg, P2Y__1_ADP_G_q_GDP_0); r42_P2Y1__ADP_binding_Gq_GDP is "r42_P2Y1*·ADP binding Gq·GDP";
  r43_P2Y1_binding_ADP: P2Y_1 + ADP -> P2Y_1_ADP; compartment*f43(r43_k3, P2Y_1, ADP, r43_Kd, P2Y_1_ADP);
  r44_P2Y1_Gq_GDP_binding_ADP: P2Y_1_G_q_GDP + ADP -> P2Y_1_ADP_G_q_GDP; compartment*f44(r44_k3, P2Y_1_G_q_GDP, ADP, r44_Kd, r44_gamma, P2Y_1_ADP_G_q_GDP); r44_P2Y1_Gq_GDP_binding_ADP is "r44_P2Y1·Gq·GDP binding ADP";
  r45_P2Y1__binding_ADP: P2Y__1 + ADP -> P2Y__1_ADP; compartment*f45(r45_alpha, r45_k3, P2Y__1, ADP, r45_Kd, P2Y__1_ADP); r45_P2Y1__binding_ADP is "r45_P2Y1* binding ADP";
  r46_P2Y1__Gq_GDP_binding_ADP: P2Y__1_G_q_GDP + ADP -> P2Y__1_ADP_G_q_GDP; compartment*f46(r46_alpha, r46_k3, P2Y__1_G_q_GDP, ADP, r46_Kd, r46_delta, r46_gamma, P2Y__1_ADP_G_q_GDP); r46_P2Y1__Gq_GDP_binding_ADP is "r46_P2Y1*·Gq·GDP binding ADP";
  r47_P2Y1__Gq_GDP_releasing_GDP: P2Y__1_G_q_GDP -> P2Y__1_G_q + GDP; compartment*f47(r47_k1, P2Y__1_G_q_GDP, r47_k_1, P2Y__1_G_q, GDP); r47_P2Y1__Gq_GDP_releasing_GDP is "r47_P2Y1*·Gq·GDP releasing GDP";
  r48_P2Y1__Gq_binding_GTP: P2Y__1_G_q + GTP -> P2Y__1_G_q_GTP; compartment*f48(r48_k1, P2Y__1_G_q, GTP, r48_k_1, P2Y__1_G_q_GTP); r48_P2Y1__Gq_binding_GTP is "r48_P2Y1*·Gq binding GTP";
  r49_P2Y1__ADP_Gq_GDP_releasing_GDP: P2Y__1_ADP_G_q_GDP -> P2Y__1_ADP_G_q + GDP; compartment*f49(r49_k1, P2Y__1_ADP_G_q_GDP, r49_k_1, P2Y__1_ADP_G_q, GDP); r49_P2Y1__ADP_Gq_GDP_releasing_GDP is "r49_P2Y1*·ADP·Gq·GDP releasing GDP";
  r50_P2Y1__ADP_Gq_binding_GTP: P2Y__1_ADP_G_q + GTP -> P2Y__1_ADP_GTP; compartment*f50(r50_k1, P2Y__1_ADP_G_q, GTP, r50_k_1, P2Y__1_ADP_GTP); r50_P2Y1__ADP_Gq_binding_GTP is "r50_P2Y1*·ADP·Gq binding GTP";
  r51_P2Y1__Gq_GTP_releasing_Gq_GTP: P2Y__1_G_q_GTP -> P2Y__1 + G_q_GTP; compartment*f51(r51_k1, P2Y__1_G_q_GTP, r51_k_1, P2Y__1, G_q_GTP); r51_P2Y1__Gq_GTP_releasing_Gq_GTP is "r51_P2Y1*·Gq·GTP releasing Gq·GTP";
  r52_P2Y1__ADP_Gq_GTP_releasing_Gq_GTP: P2Y__1_ADP_G_q_GTP -> P2Y__1_ADP + G_q_GTP; compartment*f52(r52_k1, P2Y__1_ADP_G_q_GTP, r52_k_1, P2Y__1_ADP, G_q_GTP); r52_P2Y1__ADP_Gq_GTP_releasing_Gq_GTP is "r52_P2Y1*·ADP·Gq·GTP releasing Gq·GTP";
  r53_Gq_GTP_autohydrolysis: G_q_GTP -> G_alpha_GDP + G_beta_gamma; compartment*f53(r53_k_GTP, G_q_GTP, k, G_alpha_GDP, G_beta_gamma); r53_Gq_GTP_autohydrolysis is "r53_Gq·GTP autohydrolysis";
    k = 0;
  r54_Activated_Gq_subunit_association: G_alpha_GTP + G_beta_gamma -> G_q_GTP; compartment*f54(r54_k1, G_alpha_GTP, G_beta_gamma, r54_k_1, G_q_GTP);
  r55_Unactivated_Gq_subunit_association: G_alpha_GDP + G_beta_gamma -> G_q_GDP; compartment*f55(r55_k1, G_alpha_GDP, G_beta_gamma, r55_k_1, G_q_GDP);
  r56_PLC___binding_Gq_GTP: PLC_B_0 + G_q_GTP -> PLC_B__G_q_GTP; compartment*f56(r56_k1, PLC_B_0, G_q_GTP, r56_k_1, PLC_B__G_q_GTP); r56_PLC___binding_Gq_GTP is "r56_PLC-þ binding Gq·GTP";
  r57_PLC____hydrolyzing_Gq_GTP: PLC_B__G_q_GTP => PLC_B_G_q_GDP; compartment*f57(r57_kcat, PLC_B__G_q_GTP); r57_PLC____hydrolyzing_Gq_GTP is "r57_PLC-þ* hydrolyzing Gq·GTP";
  r58_PLC___releasing_Gq_GDP: PLC_B_G_q_GDP -> PLC_B_0 + G_q_GDP; compartment*f58(r58_k1, PLC_B_G_q_GDP, r58_k_1, PLC_B_0, G_q_GDP); r58_PLC___releasing_Gq_GDP is "r58_PLC-þ releasing Gq·GDP";

  // Unit definitions:
  unit volume = 1e-3 litre;
  unit substance = 1e-3 mole;
end
