// SBML level 2 version 4

model il6_model()
  // Sobotta2017 - IL-6-induced JAK1-STAT3-signaling
  // Here we present a mathematical model of IL-6-induced JAK1-STAT3 signaling that quantitatively links physiological IL-6 concentrations to the dynamics of IL-6-induced signal transduction and expression of target genes in hepatocytes. The mathematical model consists of coupled ordinary differential equations (ODE) and the model parameters were estimated by a maximum likelihood approach, whereas identifiability of the dynamic model parameters was ensured by the Profile Likelihood. Using model simulations coupled with experimental validation we could optimize the long-term impact of the JAK-inhibitor Ruxolitinib, a therapeutic compound that is quickly metabolized.
  // hasProperty mamo:MAMO_0000046
  // isDescribedBy pubmed:29062282

  // Compartments:
  compartment cyt = 12.67 pL;
  compartment nuc = 0.5 pL;

  // Species:
  species JAK1_gp130 in cyt = 0.5552147; JAK1_gp130 is "Unphosphorylated receptor";  // substance in nmol
  species pJAK1_gp130 in cyt = 0.0004880883; pJAK1_gp130 is "Phosphorylated JAK1 receptor";  // substance in nmol
  species pJAK1_pgp130 in cyt = 0.003178106; pJAK1_pgp130 is "Active receptor";  // substance in nmol
  species STAT3 in cyt = 28.92597; STAT3 is "Unphosphorylated cytoplasmic STAT3";  // substance in nmol
  species tpSTAT3 in cyt = 0.8321617; tpSTAT3 is "Phosphorylated STAT3";  // substance in nmol
  species nSTAT3 in nuc = 25.86983; nSTAT3 is "Unphosphorylated nuclear STAT3";  // substance in nmol
  species nSOCS3RNA1 in nuc = 0.002828838; nSOCS3RNA1 is "SOCS3 transcriptional delay";  // substance in au
  species nSOCS3RNA2 in nuc = 0.002828838; nSOCS3RNA2 is "SOCS3 transcriptional delay";  // substance in au
  species nSOCS3RNA3 in nuc = 0.002828838; nSOCS3RNA3 is "SOCS3 transcriptional delay";  // substance in au
  species nSOCS3RNA4 in nuc = 0.002828838; nSOCS3RNA4 is "SOCS3 transcriptional delay";  // substance in au
  species nSOCS3RNA5 in nuc = 0.002828838; nSOCS3RNA5 is "SOCS3 transcriptional delay";  // substance in au
  species SOCS3RNA in cyt = 0.0001116491; SOCS3RNA is "SOCS3 mRNA";  // substance in au
  species SOCS3 in cyt = 0.02560115; SOCS3 is "SOCS3 protein";  // substance in nmol
  species nIL33RNA1 in nuc = 0.006018841; nIL33RNA1 is "IL33 transcriptional delay";  // substance in au
  species nIL33RNA2 in nuc = 0.006018841; nIL33RNA2 is "IL33 transcriptional delay";  // substance in au
  species nIL33RNA3 in nuc = 0.006018841; nIL33RNA3 is "IL33 transcriptional delay";  // substance in au
  species nIL33RNA4 in nuc = 0.006018841; nIL33RNA4 is "IL33 transcriptional delay";  // substance in au
  species nIL33RNA5 in nuc = 0.006018841; nIL33RNA5 is "IL33 transcriptional delay";  // substance in au
  species nCXCL10RNA1 in nuc = 1.480329e-13; nCXCL10RNA1 is "CXCL10 transcriptional delay";  // substance in au
  species nCXCL10RNA2 in nuc = 1.480329e-13; nCXCL10RNA2 is "CXCL10 transcriptional delay";  // substance in au
  species nCXCL10RNA3 in nuc = 1.480329e-13; nCXCL10RNA3 is "CXCL10 transcriptional delay";  // substance in au
  species nFGGRNA1 in nuc = 5.129921e-5; nFGGRNA1 is "FGG transcriptional delay";  // substance in au
  species nFGGRNA2 in nuc = 5.129921e-5; nFGGRNA2 is "FGG transcriptional delay";  // substance in au
  species nFGGRNA3 in nuc = 5.129921e-5; nFGGRNA3 is "FGG transcriptional delay";  // substance in au
  species nFGGRNA4 in nuc = 5.129921e-5; nFGGRNA4 is "FGG transcriptional delay";  // substance in au
  species nFGGRNA5 in nuc = 5.129921e-5; nFGGRNA5 is "FGG transcriptional delay";  // substance in au
  species nHPRNA1 in nuc = 0.01316856; nHPRNA1 is "HP transcriptional delay";  // substance in au
  species nHPXRNA1 in nuc = 7.078074; nHPXRNA1 is "HPX transcriptional delay";  // substance in au
  species CXCL10RNA in cyt = 5.84498e-15; CXCL10RNA is "CXCL10 mRNA";  // substance in au
  species FGGRNA in cyt = 3.172415e-5; FGGRNA is "FGG mRNA";  // substance in au
  species HAMPRNA in cyt = 0.008855831; HAMPRNA is "HAMP mRNA";  // substance in au
  species IL33RNA in cyt = 0.02911349; IL33RNA is "IL33 mRNA";  // substance in au
  species APCSRNA in cyt = 9.141112e-7; APCSRNA is "APCS mRNA";  // substance in au
  species HPRNA in cyt = 0.0005137014; HPRNA is "HP mRNA";  // substance in au
  species HPXRNA in cyt = 0.2790578; HPXRNA is "HPX mRNA";  // substance in au

  // Parameters:
  apcsrna_des = 0.001059446 permin;
  apcsrna_hill = 4.232764 dimensionless;
  apcsrna_ka = 50.09404 nmolperLmin;
  apcsrna_pro = 0.001394608 aupermin;
  cxcl10rna_delay = 0.04522937 permin;
  cxcl10rna_des = 0.04520527 permin;
  cxcl10rna_hill = 9.7495 dimensionless;
  cxcl10rna_ka = 142.7572 nmolperLmin;
  cxcl10rna_pro = 5.686089 aupermin;
  f_pstat3_imp = 4.971186 dimensionless;
  fggrna_delay = 0.1207793 permin;
  fggrna_des = 0.007707375 permin;
  fggrna_hill = 3.936952 dimensionless;
  fggrna_ka = 49.15558 nmolperLmin;
  fggrna_pro = 0.2356058 aupermin;
  gp130_act_jak1 = 0.5369997 permin;
  gp130_deg = 0.003807695 permin;
  gp130_pro = 0.002404809 nmolperLmin;
  hamprna_des = 0.0002123685 permin;
  hamprna_hill = 3.25698 dimensionless;
  hamprna_ka = 47.32053 nmolperLmin;
  hamprna_pro = 0.003028935 aupermin;
  hprna_delay = 0.001184549 permin;
  hprna_des = 0.001198323 permin;
  hprna_hill = 2.816311 dimensionless;
  hprna_ka = 50.46992 nmolperLmin;
  hprna_pro = 0.05983709 aupermin;
  hpxrna_delay = 0.0003726107 permin;
  hpxrna_des = 0.0003729663 permin;
  hpxrna_hill = 1.310857 dimensionless;
  hpxrna_pro = 0.0002367418;
  il33rna_delay = 0.1343234 permin;
  il33rna_des = 0.001095882 permin;
  il33rna_hill = 1.761187 dimensionless;
  il33rna_pro = 3.43137e-5;
  input_rux1 = 500 nmolperL;
  input_rux2 = 187 nmolperL;
  input_rux3 = 187 nmolperL;
  input_rux4 = 0 nmolperL;
  jak1_act_basal = 0.004312958 permin;
  jak1_act_il6 = 0.009075951 perminngpermL;
  jak1_gp130_dea = 0.07816864 permin;
  jak1_inh_ruxolitinib = 0.006023147 pernmolperL;
  loc_rux1 = 0 min;
  loc_rux2 = 480 min;
  loc_rux3 = 960 min;
  loc_rux4 = 1440 min;
  rux_degrade = 0.0009706407 permin;
  scale_apcs_qpcr_braun_calibration_hep_2014_01_27_IL6DR_24h_Replicate1 = 458.2334 dimensionless;
  scale_cxcl10_qpcr_braun_calibration_hep_2011_06_06_qPCR_140109_IL6DR_1h_CXCL10 = 275.2439 dimensionless;
  scale_fgg_qpcr_braun_calibration_hep_2014_01_13_IL6DR_6h_Replicate1 = 22.87756 dimensionless;
  scale_hamp_qpcr_braun_calibration_hep_2014_01_13_IL6DR_6h_Replicate1 = 3.940262 dimensionless;
  scale_hp_qpcr_braun_calibration_hep_2014_01_27_IL6DR_24h_Replicate1 = 17.61468 dimensionless;
  scale_hpx_qpcr_braun_calibration_hep_2014_01_27_IL6DR_24h_Replicate1 = 1.253831 dimensionless;
  scale_il33_qpcr_braun_calibration_hep_2014_01_13_IL6DR_6h_Replicate1 = 1.466679 dimensionless;
  scale_pgp130_wb_bohl_hep_2005_07_26_Pulse5min = 7.919845 dimensionless;
  scale_socs3_qpcr_braun_hep_2013_07_08_qPCR_Socs3_Stat3 = 62.05325 dimensionless;
  socs3_assoc = 0.01934311 perminnmolperL;
  socs3_des = 0.4486494 permin;
  socs3_pro = 1.697803 permin;
  socs3rna_delay = 0.3039425 permin;
  socs3rna_des = 0.3039049 permin;
  socs3rna_hill = 1.713297 dimensionless;
  socs3rna_pro = 0.001700076;
  stat3_act_gp130 = 0.4115513 perminnmolperL;
  stat3_exp = 1.970833 permin;
  stat3_imp = 0.05936107 permin;
  stat3_inh_socs3 = 0.6188679 pernmolperL;
  stat3_inh_stattic = 0.100364 perumolperL;
  var_il6 = 40 dimensionless;
  IL6 has ngpermL;
  ActD has dimensionless;
  Stattic has umol;
  Ruxolitinib has nmolperL;

  // Assignment rules:
  IL6 := 0 + (var_il6 - 0)*piecewise(0, time - 0 < 0, 1);
  ActD := 0 + (0 - 0)*piecewise(0, time - (-10) < 0, 1);
  Stattic := 0 + (0 - 0)*piecewise(0, time - (-60) < 0, 1);
  Ruxolitinib := exp(rux_degrade*(loc_rux1 - time))*(0 + (input_rux1 - 0)*piecewise(0, time - loc_rux1 < 0, 1)) + exp(rux_degrade*(loc_rux2 - time))*(0 + (input_rux2 - 0)*piecewise(0, time - loc_rux2 < 0, 1)) + exp(rux_degrade*(loc_rux3 - time))*(0 + (input_rux3 - 0)*piecewise(0, time - loc_rux3 < 0, 1)) + exp(rux_degrade*(loc_rux4 - time))*(0 + (input_rux4 - 0)*piecewise(0, time - loc_rux4 < 0, 1));

  // Reactions:
  v1_Receptor_production: => JAK1_gp130; cyt*(-gp130_pro)*(ActD - 1);
  v2_Receptor_degradation: JAK1_gp130 => ; cyt*JAK1_gp130*gp130_deg;
  v3_Receptor_degradation: pJAK1_pgp130 => ; cyt*gp130_deg*pJAK1_pgp130;
  v4_Receptor_degradation: pJAK1_gp130 => ; cyt*gp130_deg*pJAK1_gp130;
  v5_Activation_of_the_JAK1_receptor: JAK1_gp130 => pJAK1_gp130; cyt*(JAK1_gp130*(jak1_act_basal/scale_pgp130_wb_bohl_hep_2005_07_26_Pulse5min + IL6*jak1_act_il6/scale_pgp130_wb_bohl_hep_2005_07_26_Pulse5min)/(Ruxolitinib*jak1_inh_ruxolitinib + 1));
  v6_Activation_of_the_gp130_subunit: pJAK1_gp130 => pJAK1_pgp130; cyt*(gp130_act_jak1*pJAK1_gp130/(Ruxolitinib*jak1_inh_ruxolitinib + 1));
  v7_Receptor_dephosphorylation: pJAK1_gp130 => JAK1_gp130; cyt*jak1_gp130_dea*pJAK1_gp130;
  v8_Receptor_dephosphorylation: pJAK1_pgp130 => JAK1_gp130; cyt*jak1_gp130_dea*pJAK1_pgp130;
  v9_SOCS3_mediated_degradation: JAK1_gp130 + SOCS3 => ; cyt*JAK1_gp130*SOCS3*socs3_assoc;
  v10_SOCS3_mediated_degradation: pJAK1_gp130 + SOCS3 => ; cyt*SOCS3*pJAK1_gp130*socs3_assoc;
  v11_SOCS3_mediated_degradation: pJAK1_pgp130 + SOCS3 => ; cyt*SOCS3*pJAK1_pgp130*socs3_assoc;
  v12_Import_of_unphosphorylated_STAT3: STAT3 => nSTAT3; cyt*STAT3*stat3_imp;
  v13_Export_of_unphosphorylated_STAT3: nSTAT3 => STAT3; nuc*nSTAT3*stat3_exp;
  v14_STAT3_phosphorylation_and_dimerization: STAT3 => tpSTAT3; cyt*(STAT3*pJAK1_pgp130*stat3_act_gp130*scale_pgp130_wb_bohl_hep_2005_07_26_Pulse5min/((SOCS3*stat3_inh_socs3 + 1)*(Stattic*stat3_inh_stattic + 1)));  // modifiers: SOCS3, pJAK1_pgp130
  v15_STAT3_import_and_deactivation: tpSTAT3 => nSTAT3; cyt*stat3_imp*tpSTAT3*(f_pstat3_imp + 1);
  v16_Initiation_of_SOCS3_mRNA_transcription: => nSOCS3RNA1; nuc*(-(socs3rna_pro*(ActD - 1)*(25.34*stat3_imp*tpSTAT3*(f_pstat3_imp + 1))^socs3rna_hill)/scale_socs3_qpcr_braun_hep_2013_07_08_qPCR_Socs3_Stat3);  // modifiers: tpSTAT3
  v17_SOCS3_transcriptional_delay: nSOCS3RNA1 => nSOCS3RNA2; nuc*nSOCS3RNA1*socs3rna_delay; v17_SOCS3_transcriptional_delay is "SOCS3 transcriptional delay SOCS3";
  v18_SOCS3_transcriptional_delay: nSOCS3RNA2 => nSOCS3RNA3; nuc*nSOCS3RNA2*socs3rna_delay;
  v19_SOCS3_transcriptional_delay: nSOCS3RNA3 => nSOCS3RNA4; nuc*nSOCS3RNA3*socs3rna_delay;
  v20_SOCS3_transcriptional_delay: nSOCS3RNA4 => nSOCS3RNA5; nuc*nSOCS3RNA4*socs3rna_delay;
  v21_SOCS3_transcriptional_delay: nSOCS3RNA5 => SOCS3RNA; nuc*nSOCS3RNA5*socs3rna_delay;
  v22_SOCS3_mRNA_degradation: SOCS3RNA => ; cyt*SOCS3RNA*socs3rna_des;
  v23_SOCS3_mRNA_translation: => SOCS3; cyt*SOCS3RNA*socs3_pro*scale_socs3_qpcr_braun_hep_2013_07_08_qPCR_Socs3_Stat3;  // modifiers: SOCS3RNA
  v24_SOCS3_degradation: SOCS3 => ; cyt*SOCS3*socs3_des;
  v25_Initiation_of_CXCL10_mRNA_transcription: => nCXCL10RNA1; nuc*(-(cxcl10rna_pro*(ActD - 1))/(scale_cxcl10_qpcr_braun_calibration_hep_2011_06_06_qPCR_140109_IL6DR_1h_CXCL10*((0.0394633*cxcl10rna_ka/(stat3_imp*tpSTAT3*(f_pstat3_imp + 1)))^cxcl10rna_hill + 1)));  // modifiers: tpSTAT3
  v26_Initiation_of_FGG_mRNA_transcription: => nFGGRNA1; nuc*(-(fggrna_pro*(ActD - 1))/(scale_fgg_qpcr_braun_calibration_hep_2014_01_13_IL6DR_6h_Replicate1*((0.0394633*fggrna_ka/(stat3_imp*tpSTAT3*(f_pstat3_imp + 1)))^fggrna_hill + 1)));  // modifiers: tpSTAT3
  v27_Initiation_of_HAMP_mRNA_transcription: => HAMPRNA; cyt*(-(hamprna_pro*(ActD - 1))/(scale_hamp_qpcr_braun_calibration_hep_2014_01_13_IL6DR_6h_Replicate1*((0.0394633*hamprna_ka/(stat3_imp*tpSTAT3*(f_pstat3_imp + 1)))^hamprna_hill + 1)));  // modifiers: tpSTAT3
  v28_Initiation_of_APCS_mRNA_transcription: => APCSRNA; cyt*(-(apcsrna_pro*(ActD - 1))/(scale_apcs_qpcr_braun_calibration_hep_2014_01_27_IL6DR_24h_Replicate1*((0.0394633*apcsrna_ka/(stat3_imp*tpSTAT3*(f_pstat3_imp + 1)))^apcsrna_hill + 1)));  // modifiers: tpSTAT3
  v29_Initiation_of_HP_mRNA_transcription: => nHPRNA1; nuc*(-(hprna_pro*(ActD - 1))/(scale_hp_qpcr_braun_calibration_hep_2014_01_27_IL6DR_24h_Replicate1*((0.0394633*hprna_ka/(stat3_imp*tpSTAT3*(f_pstat3_imp + 1)))^hprna_hill + 1)));  // modifiers: tpSTAT3
  v30_Initiation_of_HPX_mRNA_transcription: => nHPXRNA1; nuc*(-(hpxrna_pro*(ActD - 1)*(25.34*stat3_imp*tpSTAT3*(f_pstat3_imp + 1))^hpxrna_hill)/scale_hpx_qpcr_braun_calibration_hep_2014_01_27_IL6DR_24h_Replicate1);  // modifiers: tpSTAT3
  v31_CXCL10_transcriptional_delay: nCXCL10RNA1 => nCXCL10RNA2; nuc*cxcl10rna_delay*nCXCL10RNA1;
  v32_CXCL10_transcriptional_delay: nCXCL10RNA2 => nCXCL10RNA3; nuc*cxcl10rna_delay*nCXCL10RNA2;
  v33_CXCL10_transcriptional_delay: nCXCL10RNA3 => CXCL10RNA; nuc*cxcl10rna_delay*nCXCL10RNA3;
  v34_HPX_transcriptional_delay: nHPXRNA1 => HPXRNA; nuc*hpxrna_delay*nHPXRNA1;
  v35_HP_transcriptional_delay: nHPRNA1 => HPRNA; nuc*hprna_delay*nHPRNA1;
  v36_FGG_transcriptional_delay: nFGGRNA1 => nFGGRNA2; nuc*fggrna_delay*nFGGRNA1;
  v37_FGG_transcriptional_delay: nFGGRNA2 => nFGGRNA3; nuc*fggrna_delay*nFGGRNA2;
  v38_FGG_transcriptional_delay: nFGGRNA3 => nFGGRNA4; nuc*fggrna_delay*nFGGRNA3;
  v39_FGG_transcriptional_delay: nFGGRNA4 => nFGGRNA5; nuc*fggrna_delay*nFGGRNA4;
  v40_FGG_transcriptional_delay: nFGGRNA5 => FGGRNA; nuc*fggrna_delay*nFGGRNA5;
  v41_Initiation_of_IL33_mRNA_transcription: => nIL33RNA1; nuc*(-(il33rna_pro*(ActD - 1)*(25.34*stat3_imp*tpSTAT3*(f_pstat3_imp + 1))^il33rna_hill)/scale_il33_qpcr_braun_calibration_hep_2014_01_13_IL6DR_6h_Replicate1);  // modifiers: tpSTAT3
  v42_IL33_transcriptional_delay: nIL33RNA1 => nIL33RNA2; nuc*il33rna_delay*nIL33RNA1;
  v43_IL33_transcriptional_delay: nIL33RNA2 => nIL33RNA3; nuc*il33rna_delay*nIL33RNA2;
  v44_IL33_transcriptional_delay: nIL33RNA3 => nIL33RNA4; nuc*il33rna_delay*nIL33RNA3;
  v45_IL33_transcriptional_delay: nIL33RNA4 => nIL33RNA5; nuc*il33rna_delay*nIL33RNA4;
  v46_IL33_transcriptional_delay: nIL33RNA5 => IL33RNA; nuc*il33rna_delay*nIL33RNA5;
  v47_CXCL10_mRNA_degradation: CXCL10RNA => ; cyt*CXCL10RNA*cxcl10rna_des;
  v48_FGG_mRNA_degradation: FGGRNA => ; cyt*FGGRNA*fggrna_des;
  v49_HAMP_mRNA_degradation: HAMPRNA => ; cyt*HAMPRNA*hamprna_des;
  v50_IL33_mRNA_degradation: IL33RNA => ; cyt*IL33RNA*il33rna_des;
  v51_APCS_mRNA_degradation: APCSRNA => ; cyt*APCSRNA*apcsrna_des;
  v52_HP_mRNA_degradation: HPRNA => ; cyt*HPRNA*hprna_des;
  v53_HPX_mRNA_degradation: HPXRNA => ; cyt*HPXRNA*hpxrna_des;

  // Unit definitions:
  unit pL = 1e-12 litre;
  unit min = 60 second;
  unit nmol = 1e-9 mole;
  unit nmolperL = 1e-9 mole / litre;
  unit nmolperLmin = 1e-9 mole / (litre * 60 second);
  unit ngpermL = 1e-9 gram / (1e-3 litre);
  unit permin = 1 / (60 second);
  unit perminnmolperL = litre / (1e-9 mole * 60 second);
  unit perminngpermL = 1e-3 litre / (1e-9 gram * 60 second);
  unit umol = 1e-6 mole;
  unit perumolperL = litre / (1e-6 mole);
  unit pernmolperL = litre / (1e-9 mole);
  unit au = 10 dimensionless;
  unit auperL = 10 dimensionless / litre;
  unit aupermin = dimensionless / (60 second);
end
