// SBML level 3 version 1

model __main()
  // Thomson2009 – Unlimited multistability in multisite phosphorylation systems
  // This model describes a distributive, sequential system with n = 4, which is a simplified example of unlimited multistability in multisite phosphorylation systems. This method can be applied to systems with multiple substrates and enzymes. This model is described in the article: Unlimited multistability in multisite phosphorylation systems. Thomson, Matthew &amp;amp; Gunawardena, Jeremy. (2009). Nature. 460. 274-7. 10.1038/nature08102 (https://www.nature.com/articles/nature08102). Antimony and Tellurium used. Figure 2 of the reference publication has been reproduced. The code files are available on Github (https://github.com/SunnyXu/Unlimited_multistability). The simulation was performed using Spyder for Tellurium 3.7 (http://tellurium.analogmachine.org/).
  // hasProperty mamo:OTHER mamo:MAMO_0000045

  // Compartments:
  compartment default_compartment = 1;

  // Species:
  species E in default_compartment = 2800;
  species S0 in default_compartment = 2000;
  species ES0 in default_compartment;
  species S1 in default_compartment = 0;
  species ES1 in default_compartment;
  species S2 in default_compartment = 0;
  species ES2 in default_compartment;
  species S3 in default_compartment = 0;
  species ES3 in default_compartment;
  species S4 in default_compartment = 8000;
  species F in default_compartment = 2800;
  species FS4 in default_compartment;
  species FS3 in default_compartment;
  species FS2 in default_compartment;
  species FS1 in default_compartment;

  // Parameters:
  a_E_0 = 0.00812;
  b_E_0 = 0.016;
  c_E_0_1 = 0.1;
  a_E_1 = 0.102;
  b_E_1 = 0.204;
  c_E_1_2 = 10;
  a_E_2 = 0.00812;
  b_E_2 = 0.016;
  c_E_2_3 = 0.1;
  a_E_3 = 0.102;
  b_E_3 = 0.204;
  c_E_3_4 = 10;
  a_F_4 = 0.00285;
  b_F_4 = 0.006;
  c_F_4_3 = 0.136;
  a_F_3 = 0.651;
  b_F_3 = 1.3;
  c_F_3_2 = 63.9;
  a_F_2 = 0.00264;
  b_F_2 = 0.005;
  c_F_2_1 = 0.017;
  a_F_1 = 0.112;
  b_F_1 = 0.224;
  c_F_1_0 = 11;

  // Reactions:
  _J0: E + S0 -> ES0; a_E_0*E*S0 - b_E_0*ES0;
  _J1: ES0 -> E + S1; c_E_0_1*ES0;
  _J2: E + S1 -> ES1; a_E_1*E*S1 - b_E_1*ES1;
  _J3: ES1 -> E + S2; c_E_1_2*ES1;
  _J4: E + S2 -> ES2; a_E_2*E*S2 - b_E_2*ES2;
  _J5: ES2 -> E + S3; c_E_2_3*ES2;
  _J6: E + S3 -> ES3; a_E_3*E*S3 - b_E_3*ES3;
  _J7: ES3 -> E + S4; c_E_3_4*ES3;
  _J8: S4 + F -> FS4; a_F_4*S4*F - b_F_4*FS4;
  _J9: FS4 -> S3 + F; c_F_4_3*FS4;
  _J10: S3 + F -> FS3; a_F_3*S3*F - b_F_3*FS3;
  _J11: FS3 -> S2 + F; c_F_3_2*FS3;
  _J12: S2 + F -> FS2; a_F_2*S2*F - b_F_2*FS2;
  _J13: FS2 -> S1 + F; c_F_2_1*FS2;
  _J14: S1 + F -> FS1; a_F_1*S1*F - b_F_1*FS1;
  _J15: FS1 -> S0 + F; c_F_1_0*FS1;
end
