// SBML level 3 version 1

model MODEL1611150001()
  // Yao2016_Calcium_Signaling
  // This model is described in the article:
  // Distinct cellular states determine calcium signaling response
  // Jason Yao, Anna Pilko, Roy Wollman
  // Molecular Systems Biology
  // Abstract:
  // The heterogeneity in mammalian cells signaling response is largely a result of preexisting cell to cell variability. It is unknown whether cell to cell variability rises from biochemical stochastic fluctuations or distinct cellular states. Here, we utilize calcium response to adenosine trisphosphate as a model for investigating the structure of heterogeneity within a population of cells and analyze whether distinct cellular response states coexist. We use a functional definition of cellular state that is based on a mechanistic dynamical systems model of calcium signaling. Using Bayesian parameter inference, we obtain high confidence parameter value distributions for several hundred cells, each fitted individually. Clustering the inferred parameter distributions revealed three major distinct cellular states within the population. The existence of distinct cellular states raises the possibility that the observed variability in response is a result of structured heterogeneity between cells. The inferred parameter distribution predicts, and experiments confirm that variability in IP3R response explains the majority of calcium heterogeneity. Our work shows how mechanistic models and single cell parameter fitting can uncover hidden population structure and demonstrate the need for parameter inference at the single cell level.
  // This model is hosted on BioModels Database and identified by: MODEL1611150001.
  // To cite BioModels Database, please use: BioModels Database: An enhanced, curated and annotated resource for published quantitative kinetic models.
  // To the extent possible under law, all copyright and related or neighbouring rights to this encoded model have been dedicated to the public domain worldwide. Please refer to CC0 Public Domain Dedication for more information.
  // model units - time: second

  // Compartments:
  compartment c1 = 1000;

  // Parameters:
  PLC = 0;
  IP3 = 0;
  h = 0.7;
  ca = 0.1;
  KonATP = 1;
  Katp = 0.0083;
  KoffPLC = 1.25;
  Vplc = 1;
  Kip3 = 0.5;
  KoffIP3 = 1.25;
  a = 1;
  dinh = 0.4;
  d1 = 0.13;
  d5 = 0.0823;
  Be = 150;
  Ke = 10;
  k3 = 0.4;
  eta1 = 575;
  eta2 = 5.2;
  eta3 = 45;
  c0 = 2;
  epr = 0.185;
  L = 10;

  // Assignment rules:
  beta := 1/(1 + Ke*Be/(Ke + ca)^2);
  minf := IP3/(d1 + IP3)*(ca/(d5 + ca));

  // Rate rules:
  PLC' = KonATP*L*exp(-Katp*time) - KoffPLC*PLC;
  IP3' = Vplc*PLC^2/(Kip3^2 + PLC^2) - KoffIP3*IP3;
  h' = a*(ca + dinh)*(dinh/(ca + dinh) - h);
  ca' = beta*(epr*(eta1*minf^3*h^3 + eta2)*(c0 - (1 + epr)*ca) - eta3*(ca^2/(k3^2 + ca^2)));

  // Unit definitions:
  unit micromolar = 1e-6 mole / litre;
  unit micro_meter_cubed = (1e18 metre)^3;
  unit per_second = 1 / second;
  unit micromolar_per_second = 1e-6 mole / (litre * second);
end
