// SBML level 2 version 4
// dcterms:bibliographicCitation: urn:miriam:pubmed:8948047

function Function_for_MM(Vmax, mod, sub, Km)
  Vmax*mod*sub/(Km + sub);
end

function Function_for_modifiers(kcat, mod, sub)
  kcat*mod*sub;
end

model Zarnitsina1996___Reactions_of_the_Intrinsic_Pathway_of_Blood_Coagulation()
  // Zarnitsina1996 - Reactions of the Intrinsic Pathway of Blood Coagulation
  // Model listing the reactions of the intrinsic pathway as listed in Zarnitsina1996. Publication model is a spatio-termporal mathematical model of blood coagulation. Model used as the example of the numerical intrinsic pathway in Braescu et al. (2011). L. Braescu, M. Leretter, T. George, New direct inhibitors and their computed effect on the dynamics of thrombin formation in blood coagulation, in: T. F. George (Ed.), Computational Studies of New Materials II, World Scientific, 2011, 173–190. doi:10.3389/fphys.2012.00266.
  // isVersionOf GO:0007596
  // isDescribedBy pubmed:8948047

  // Compartments:
  compartment compartment = 1;

  // Species:
  species IX in compartment = 0;
  species IXa in compartment = 0;
  species XIa in compartment = 0;
  species AT in compartment = 0;
  species IXa_AT in compartment = 0; IXa_AT is "IXa:AT";
  species IIa in compartment = 0;
  species VIII in compartment = 0;
  species VIIIa in compartment = 0;
  species VIIIi in compartment = 0;
  species APC in compartment = 0;
  species V in compartment = 0;
  species Va in compartment = 0;
  species Vi in compartment = 0;
  species VIIIa_IXa in compartment = 0; VIIIa_IXa is "VIIIa:IXa";
  species Va_Xa in compartment = 0; Va_Xa is "Va:Xa";
  species Xa in compartment = 0;
  species X in compartment = 0;
  species IXa_VIIIa in compartment = 0; IXa_VIIIa is "IXa-VIIIa";
  species Xa_AT in compartment = 0; Xa_AT is "Xa:AT";
  species II in compartment = 0;
  species IIa_AT in compartment = 0; IIa_AT is "IIa:AT";
  species PC in compartment = 0;
  species APC_L1_AT in compartment = 0; APC_L1_AT is "APC:L1:AT";
  species L1_AT in compartment = 0; L1_AT is "L1:AT";  // isVersionOf kegg.orthology:K03984
  species Fibrin in compartment = 0;
  species Fibrinogen in compartment = 0;
  species XI in compartment = 0;
  species XIi in compartment = 0;

  // Parameters:
  R01a_k9 = 20;
  R01b_h9 = 0.2;
  R02a_k8 = 1e-5;
  R02b_h8 = 0.31;
  R02c_ka = 1.2;
  R03a_k5 = 0.17;
  R03b_h5 = 0.31;
  R03c_ka = 1.2;
  R04a_kd = 1;
  R04a_k8_9 = 50; R04a_k8_9 is "R04a_k8,9";
  var R04a_h8_9; R04a_h8_9 is "R04a_h8,9";
  R04b_ka = 1.2;
  R05a_kd = 1;
  R05a_k5_10 = 150; R05a_k5_10 is "R05a_k5,10";
  var R05a_h5_10; R05a_h5_10 is "R05a_h5,10";
  R05b_ka = 1.2;
  R06a_k10 = 0.003;
  R06b_k10_bar = 500;
  R06c_h10 = 1;
  R07a_k2cat_max = 2.3; R07a_k2cat_max is "R07a_k2cat.max";
  R07a_k2m = 58;
  R07b_k2cat_max_bar = 2000; R07b_k2cat_max_bar is "R07b_k2cat.max_bar";
  R07b_k2m_bar = 210;
  R07c_h2 = 1.3;
  R08a_kapc = 0.0014;
  R08b_hapc = 0.1;
  R09_k1 = 2.82;
  R10a_k11 = 0.0078;
  R10b_h11 = 0.2;

  // Assignment rules:
  R05a_h5_10 := R05a_kd*R05a_k5_10;
  R04a_h8_9 := R04a_kd*R04a_k8_9;

  // Reactions:
  R01a___Activation_of_IX_by_XIa: IX => IXa; compartment*Function_for_modifiers(R01a_k9, XIa, IX); R01a___Activation_of_IX_by_XIa is "R01a : Activation of IX by XIa";  // modifiers: XIa
  R01b___Inactivation_of_IXA_by_AT: IXa + AT => IXa_AT; compartment*R01b_h9*IXa*AT; R01b___Inactivation_of_IXA_by_AT is "R01b : Inactivation of IXA by AT";
  R02a___Activation_of_VIII_by_IIa: VIII => VIIIa; compartment*Function_for_modifiers(R02a_k8, IIa, VIII); R02a___Activation_of_VIII_by_IIa is "R02a : Activation of VIII by IIa";  // modifiers: IIa
  R02b___Inactivation_of_VIIIa: VIIIa => VIIIi; compartment*R02b_h8*VIIIa; R02b___Inactivation_of_VIIIa is "R02b : Inactivation of VIIIa";
  R02c___Inactivation_of_VIIIa_by_APC: VIIIa => VIIIi; compartment*Function_for_modifiers(R02c_ka, APC, VIIIa); R02c___Inactivation_of_VIIIa_by_APC is "R02c : Inactivation of VIIIa by APC";  // modifiers: APC
  R03a___Activation_of_V_by_IIa: V => Va; compartment*Function_for_modifiers(R03a_k5, IIa, V); R03a___Activation_of_V_by_IIa is "R03a : Activation of V by IIa";  // modifiers: IIa
  R03b___Inactivation_of_Va: Va => Vi; compartment*R03b_h5*Va; R03b___Inactivation_of_Va is "R03b : Inactivation of Va";
  R03c___Inactivation_of_Va_by_APC: Va => Vi; compartment*Function_for_modifiers(R03c_ka, APC, Va); R03c___Inactivation_of_Va_by_APC is "R03c : Inactivation of Va by APC";  // modifiers: APC
  R04a___Formation_of_VIIIa_IXa: VIIIa + IXa -> VIIIa_IXa; compartment*(R04a_k8_9*VIIIa*IXa - R04a_h8_9*VIIIa_IXa); R04a___Formation_of_VIIIa_IXa is "R04a : Formation of VIIIa:IXa";
  R04b___Dissociation_of_VIIIa_IXa_by_APC: VIIIa_IXa => VIIIi + IXa; compartment*Function_for_modifiers(R04b_ka, APC, VIIIa_IXa); R04b___Dissociation_of_VIIIa_IXa_by_APC is "R04b : Dissociation of VIIIa-IXa by APC";  // modifiers: APC
  R05a___Formation_of_Va_Xa: Va + Xa -> Va_Xa; compartment*(R05a_k5_10*Va*Xa - R05a_h5_10*Va_Xa); R05a___Formation_of_Va_Xa is "R05a : Formation of Va:Xa";
  R05b___Dissociation_of_Va_Xa_by_APC: Va_Xa => Vi + Xa; compartment*Function_for_modifiers(R05b_ka, APC, Va_Xa); R05b___Dissociation_of_Va_Xa_by_APC is "R05b : Dissociation of Va:Xa by APC";  // modifiers: APC
  R06a___Activation_of_X_by_IXa: X => Xa; compartment*Function_for_modifiers(R06a_k10, IXa, X); R06a___Activation_of_X_by_IXa is "R06a : Activation of X by IXa";  // modifiers: IXa
  R06b___Activation_of_X_by_IXa_VIIIa: X => Xa; compartment*Function_for_modifiers(R06b_k10_bar, IXa_VIIIa, X); R06b___Activation_of_X_by_IXa_VIIIa is "R06b : Activation of X by IXa-VIIIa";  // modifiers: IXa_VIIIa
  R06c___Inactivation_of_Xa_by_AT: Xa + AT => Xa_AT; compartment*R06c_h10*Xa*AT; R06c___Inactivation_of_Xa_by_AT is "R06c : Inactivation of Xa by AT";
  R07a___Activation_of_II_by_Xa: II => IIa; compartment*Function_for_MM(R07a_k2cat_max, Xa, II, R07a_k2m); R07a___Activation_of_II_by_Xa is "R07a : Activation of II by Xa";  // modifiers: Xa
  R07b___Activation_of_II_by_Xa_Va: II => IIa; compartment*Function_for_MM(R07b_k2cat_max_bar, Va_Xa, II, R07b_k2m_bar); R07b___Activation_of_II_by_Xa_Va is "R07b : Activation of II by Xa:Va";  // modifiers: Va_Xa
  R07c___Inactivation_of_IIa_by_AT: IIa + AT => IIa_AT; compartment*R07c_h2*IIa*AT; R07c___Inactivation_of_IIa_by_AT is "R07c : Inactivation of IIa by AT";
  R08a___Activation_of_PC_by_IIa: PC => APC; compartment*Function_for_modifiers(R08a_kapc, IIa, PC); R08a___Activation_of_PC_by_IIa is "R08a : Activation of PC by IIa";  // modifiers: IIa
  R08b___Inactivation_of_APC_by_antitrypsin: APC + L1_AT => APC_L1_AT; compartment*R08b_hapc*APC*L1_AT; R08b___Inactivation_of_APC_by_antitrypsin is "R08b : Inactivation of APC by antitrypsin";
  R09___Activation_of_fibrinogen_by_IIa: Fibrinogen => Fibrin; compartment*Function_for_modifiers(R09_k1, IIa, Fibrinogen); R09___Activation_of_fibrinogen_by_IIa is "R09 : Activation of fibrinogen by IIa";  // modifiers: IIa
  R10a___Activation_of_XI_by_IIa: XI => XIa; compartment*Function_for_modifiers(R10a_k11, IIa, XI); R10a___Activation_of_XI_by_IIa is "R10a : Activation of XI by IIa";  // modifiers: IIa
  R10b___Inactivation_of_XIa: XIa => XIi; compartment*R10b_h11*XIa; R10b___Inactivation_of_XIa is "R10b : Inactivation of XIa";

  // Unit definitions:
  unit volume = 1e-3 litre;
  unit substance = 1e-9 mole;
end
