// SBML level 2 version 4

function Function_for_Receptor_phosphorylation(IL6, JAK1_gp130, delta_il6_act, ref_il6_act)
  IL6*JAK1_gp130*delta_il6_act*ref_il6_act;
end

function Function_for_Basal_receptor_phosphorylation(APAP, DCF, JAK1_gp130, delta_apap_il6_basal, delta_dcf_il6_basal, delta_il6_act, delta_il6_basal, ref_apap_il6_basal, ref_dcf_il6_basal, ref_il6_act, ref_il6_basal)
  JAK1_gp130*delta_il6_act*delta_il6_basal*ref_il6_act*ref_il6_basal*(APAP*delta_apap_il6_basal*ref_apap_il6_basal + 1)*(DCF*delta_dcf_il6_basal*ref_dcf_il6_basal + 1);
end

function Function_for_Phosphorylated_receptor_degradation(delta_receptor_deg, pJAK1_pgp130, ref_receptor_deg)
  delta_receptor_deg*pJAK1_pgp130*ref_receptor_deg;
end

function Function_for_Receptor_degradation(JAK1_gp130, delta_receptor_deg, ref_receptor_deg)
  JAK1_gp130*delta_receptor_deg*ref_receptor_deg;
end

function Function_for_Receptor_production(APAP, ActD, DCF, cycloHex, delta_apap_receptor_pro, delta_dcf_receptor_pro, delta_receptor_pro, ref_apap_receptor_pro, ref_dcf_receptor_pro, ref_receptor_pro)
  delta_receptor_pro*ref_receptor_pro*(ActD - 1)*(cycloHex - 1)/((APAP*delta_apap_receptor_pro*ref_apap_receptor_pro + 1)*(DCF*delta_dcf_receptor_pro*ref_dcf_receptor_pro + 1));
end

function Function_for_SOCS3_transcriptional_delay_4(APAP, ActD, DCF, delta_apap_socs3rna_delay, delta_dcf_socs3rna_delay, delta_socs3rna_delay, nSOCS3RNA4, ref_apap_socs3rna_delay, ref_dcf_socs3rna_delay, ref_socs3rna_delay)
  -(delta_socs3rna_delay*nSOCS3RNA4*ref_socs3rna_delay*(ActD - 1))/((APAP*delta_apap_socs3rna_delay*ref_apap_socs3rna_delay + 1)*(DCF*delta_dcf_socs3rna_delay*ref_dcf_socs3rna_delay + 1));
end

function Function_for_SOCS3_transcriptional_delay_5(APAP, ActD, DCF, delta_apap_socs3rna_delay, delta_dcf_socs3rna_delay, delta_socs3rna_delay, nSOCS3RNA5, nuc, ref_apap_socs3rna_delay, ref_dcf_socs3rna_delay, ref_socs3rna_delay)
  nuc*(-(delta_socs3rna_delay*nSOCS3RNA5*ref_socs3rna_delay*(ActD - 1))/((APAP*delta_apap_socs3rna_delay*ref_apap_socs3rna_delay + 1)*(DCF*delta_dcf_socs3rna_delay*ref_dcf_socs3rna_delay + 1)));
end

function Function_for_SOCS3_mRNA_degradation(APAP, DCF, SOCS3RNA, delta_apap_socs3rna_deg, delta_dcf_socs3rna_deg, delta_socs3rna_deg, ref_apap_socs3rna_deg, ref_dcf_socs3rna_deg, ref_socs3rna_deg)
  SOCS3RNA*delta_socs3rna_deg*ref_socs3rna_deg/((APAP*delta_apap_socs3rna_deg*ref_apap_socs3rna_deg + 1)*(DCF*delta_dcf_socs3rna_deg*ref_dcf_socs3rna_deg + 1));
end

function Function_for_SOCS3_translation(APAP, DCF, SOCS3RNA, cycloHex, delta_apap_socs3_pro, delta_dcf_socs3_pro, delta_socs3_pro, delta_socs3_sat, ref_apap_socs3_pro, ref_dcf_socs3_pro, ref_socs3_pro, ref_socs3_sat)
  -(SOCS3RNA*delta_socs3_pro*ref_socs3_pro*(cycloHex - 1))/((APAP*delta_apap_socs3_pro*ref_apap_socs3_pro + 1)*(DCF*delta_dcf_socs3_pro*ref_dcf_socs3_pro + 1)*(SOCS3RNA + delta_socs3_sat*ref_socs3_sat));
end

function Function_for_SOCS3_degradation(APAP, DCF, SOCS3, delta_apap_socs3_deg, delta_dcf_socs3_deg, delta_socs3_deg, ref_apap_socs3_deg, ref_dcf_socs3_deg, ref_socs3_deg)
  SOCS3*delta_socs3_deg*ref_socs3_deg/((APAP*delta_apap_socs3_deg*ref_apap_socs3_deg + 1)*(DCF*delta_dcf_socs3_deg*ref_dcf_socs3_deg + 1));
end

function Function_for_HAMP_mRNA_transcription(ActD, delta_f_HAMP_STAT3, f_HAMP_basal, n_STAT3, npSTAT3, ref_f_HAMP_STAT3)
  -(f_HAMP_basal + delta_f_HAMP_STAT3*npSTAT3^n_STAT3*ref_f_HAMP_STAT3)*(ActD - 1);
end

function Function_for_HAMP_transcriptional_delay(APAP, ActD, delta_apap_hamprna_delay, delta_hamprna_delay, nHAMPRNA1, ref_apap_hamprna_delay, ref_hamprna_delay)
  -(delta_hamprna_delay*nHAMPRNA1*ref_hamprna_delay*(ActD - 1))/(APAP*delta_apap_hamprna_delay*ref_apap_hamprna_delay + 1);
end

function Function_for_HAMP_transcriptional_delay_2(APAP, ActD, delta_apap_hamprna_delay, delta_hamprna_delay, nHAMPRNA2, ref_apap_hamprna_delay, ref_hamprna_delay)
  -(delta_hamprna_delay*nHAMPRNA2*ref_hamprna_delay*(ActD - 1))/(APAP*delta_apap_hamprna_delay*ref_apap_hamprna_delay + 1);
end

function Function_for_HAMP_transcriptional_delay_3(APAP, ActD, delta_apap_hamprna_delay, delta_hamprna_delay, nHAMPRNA3, ref_apap_hamprna_delay, ref_hamprna_delay)
  -(delta_hamprna_delay*nHAMPRNA3*ref_hamprna_delay*(ActD - 1))/(APAP*delta_apap_hamprna_delay*ref_apap_hamprna_delay + 1);
end

function Function_for_HAMP_transcriptional_delay_4(APAP, ActD, delta_apap_hamprna_delay, delta_hamprna_delay, nHAMPRNA4, ref_apap_hamprna_delay, ref_hamprna_delay)
  -(delta_hamprna_delay*nHAMPRNA4*ref_hamprna_delay*(ActD - 1))/(APAP*delta_apap_hamprna_delay*ref_apap_hamprna_delay + 1);
end

function Function_for_HAMP_transcriptional_delay_5(APAP, ActD, delta_apap_hamprna_delay, delta_hamprna_delay, nHAMPRNA5, ref_apap_hamprna_delay, ref_hamprna_delay)
  -(delta_hamprna_delay*nHAMPRNA5*ref_hamprna_delay*(ActD - 1))/(APAP*delta_apap_hamprna_delay*ref_apap_hamprna_delay + 1);
end

function Function_for_HAMP_transcriptional_delay_6(APAP, ActD, delta_apap_hamprna_delay, delta_hamprna_delay, nHAMPRNA6, ref_apap_hamprna_delay, ref_hamprna_delay)
  -(delta_hamprna_delay*nHAMPRNA6*ref_hamprna_delay*(ActD - 1))/(APAP*delta_apap_hamprna_delay*ref_apap_hamprna_delay + 1);
end

function Function_for_HAMP_transcriptional_delay_7(APAP, ActD, delta_apap_hamprna_delay, delta_hamprna_delay, nHAMPRNA7, nuc, ref_apap_hamprna_delay, ref_hamprna_delay)
  nuc*(-(delta_hamprna_delay*nHAMPRNA7*ref_hamprna_delay*(ActD - 1))/(APAP*delta_apap_hamprna_delay*ref_apap_hamprna_delay + 1));
end

function Function_for_SOCS3_Bound_receptor_degradation(SOCS3, delta_receptor_deg_socs3, k_sat_SOCS3, pJAK1_pgp130, ref_receptor_deg_socs3)
  SOCS3*delta_receptor_deg_socs3*pJAK1_pgp130*ref_receptor_deg_socs3/(SOCS3 + k_sat_SOCS3);
end

function Function_for_Import_phosphorylated_STAT3(DCF, cpSTAT3, cyt, delta_dcf_pstat3_imp, delta_pstat3_imp, ref_dcf_pstat3_imp, ref_pstat3_imp)
  cyt*cpSTAT3*delta_pstat3_imp*ref_pstat3_imp*(DCF*delta_dcf_pstat3_imp*ref_dcf_pstat3_imp + 1);
end

function Function_for_Phosphorylation_STAT3(APAP, STAT3, delta_K_transport, delta_apap_stat3_act, delta_receptor_pro, delta_stat3_act, pJAK1_pgp130, ref_K_transport, ref_apap_stat3_act, ref_receptor_pro, ref_stat3_act)
  STAT3*delta_stat3_act^2*pJAK1_pgp130*ref_stat3_act/(delta_receptor_pro*ref_receptor_pro*(delta_K_transport*ref_K_transport + 1)*(APAP*delta_apap_stat3_act*ref_apap_stat3_act + 1));
end

function Function_for_STAT3_dephosphorylation__cytoplasm(delta_stat3_dea, npSTAT3, nuc, ref_stat3_dea)
  nuc*delta_stat3_dea*npSTAT3*ref_stat3_dea;
end
Function_for_STAT3_dephosphorylation__cytoplasm is "Function for STAT3 dephosphorylation (cytoplasm)";

function Function_for_SOCS3_transcription(ActD, DCF, delta_dcf_f_SOCS3_STAT3, delta_f_SOCS3_STAT3, n_STAT3, npSTAT3, ref_dcf_f_SOCS3_STAT3, ref_f_SOCS3_STAT3)
  -delta_f_SOCS3_STAT3*npSTAT3^n_STAT3*ref_f_SOCS3_STAT3*(ActD - 1)*(DCF*delta_dcf_f_SOCS3_STAT3*ref_dcf_f_SOCS3_STAT3 + 1);
end

function Function_for_SOCS3_transcriptional_delay(APAP, ActD, DCF, delta_apap_socs3rna_delay, delta_dcf_socs3rna_delay, delta_socs3rna_delay, nSOCS3RNA1, ref_apap_socs3rna_delay, ref_dcf_socs3rna_delay, ref_socs3rna_delay)
  -(delta_socs3rna_delay*nSOCS3RNA1*ref_socs3rna_delay*(ActD - 1))/((APAP*delta_apap_socs3rna_delay*ref_apap_socs3rna_delay + 1)*(DCF*delta_dcf_socs3rna_delay*ref_dcf_socs3rna_delay + 1));
end

function Function_for_SOCS3_transcriptional_delay_2(APAP, ActD, DCF, delta_apap_socs3rna_delay, delta_dcf_socs3rna_delay, delta_socs3rna_delay, nSOCS3RNA2, ref_apap_socs3rna_delay, ref_dcf_socs3rna_delay, ref_socs3rna_delay)
  -(delta_socs3rna_delay*nSOCS3RNA2*ref_socs3rna_delay*(ActD - 1))/((APAP*delta_apap_socs3rna_delay*ref_apap_socs3rna_delay + 1)*(DCF*delta_dcf_socs3rna_delay*ref_dcf_socs3rna_delay + 1));
end

function Function_for_SOCS3_transcriptional_delay_3(APAP, ActD, DCF, delta_apap_socs3rna_delay, delta_dcf_socs3rna_delay, delta_socs3rna_delay, nSOCS3RNA3, ref_apap_socs3rna_delay, ref_dcf_socs3rna_delay, ref_socs3rna_delay)
  -(delta_socs3rna_delay*nSOCS3RNA3*ref_socs3rna_delay*(ActD - 1))/((APAP*delta_apap_socs3rna_delay*ref_apap_socs3rna_delay + 1)*(DCF*delta_dcf_socs3rna_delay*ref_dcf_socs3rna_delay + 1));
end

function Function_for_HAMP_mRNA_degradation(APAP, DCF, HAMPRNA, delta_apap_hamprna_deg, delta_dcf_hamprna_deg, delta_hamprna_deg, ref_apap_hamprna_deg, ref_dcf_hamprna_deg, ref_hamprna_deg)
  HAMPRNA*delta_hamprna_deg*ref_hamprna_deg/((APAP*delta_apap_hamprna_deg*ref_apap_hamprna_deg + 1)*(DCF*delta_dcf_hamprna_deg*ref_dcf_hamprna_deg + 1));
end

model PHH_model_sim()
  // Zeilfelder2025 - Model for primary human hepatocytes (PHH)
  // Mathematical multi-compartment model described by sets of coupled ordinary differential equations (ODEs) for studying the IL6 and SMAD signaling in PHH cells.
  // hasProperty mamo:MAMO_0000046
  // biomodels.db:MODEL2503270002

  // Compartments:
  compartment cyt = 2.82e-12;
  compartment nuc = 1.8e-13;

  // Species:
  species JAK1_gp130 in cyt = 6.405938; JAK1_gp130 is "Inactive receptor";
  species pJAK1_pgp130 in cyt = 0.2427008; pJAK1_pgp130 is "Total phosphorylated receptor";
  species STAT3 in cyt = 174.9048; STAT3 is "Unphosphorylated STAT3";
  species cpSTAT3 in cyt = 0.02610698; cpSTAT3 is "Active cytoplasmic STAT3";
  species npSTAT3 in nuc = 2.642021; npSTAT3 is "Active nuclear STAT3";
  species nSOCS3RNA1 in nuc = 0.0001273452; nSOCS3RNA1 is "SOCS3 transcriptional delay";
  species nSOCS3RNA2 in nuc = 0.0001273452; nSOCS3RNA2 is "SOCS3 transcriptional delay_2";
  species nSOCS3RNA3 in nuc = 0.0001273452; nSOCS3RNA3 is "SOCS3 transcriptional delay_3";
  species nSOCS3RNA4 in nuc = 0.0001273452; nSOCS3RNA4 is "SOCS3 transcriptional delay_4";
  species nSOCS3RNA5 in nuc = 0.0001273452; nSOCS3RNA5 is "SOCS3 transcriptional delay_5";
  species SOCS3RNA in cyt = 0.002162788; SOCS3RNA is "SOCS3 mRNA";
  species SOCS3 in cyt = 0.008281284; SOCS3 is "SOCS3 protein";
  species nHAMPRNA1 in nuc = 2.126169e-5; nHAMPRNA1 is "HAMP transcriptional delay";
  species nHAMPRNA2 in nuc = 2.126169e-5; nHAMPRNA2 is "HAMP transcriptional delay_2";
  species nHAMPRNA3 in nuc = 2.126169e-5; nHAMPRNA3 is "HAMP transcriptional delay_3";
  species nHAMPRNA4 in nuc = 2.126169e-5; nHAMPRNA4 is "HAMP transcriptional delay_4";
  species nHAMPRNA5 in nuc = 2.126169e-5; nHAMPRNA5 is "HAMP transcriptional delay_5";
  species nHAMPRNA6 in nuc = 2.126169e-5; nHAMPRNA6 is "HAMP transcriptional delay_6";
  species nHAMPRNA7 in nuc = 2.126169e-5; nHAMPRNA7 is "HAMP transcriptional delay_7";
  species HAMPRNA in cyt = 0.0001555467; HAMPRNA is "HAMP mRNA";

  // Parameters:
  delta_K_transport = 1;
  delta_STAT3_total = 0.1727667;
  delta_apap_hamprna_deg = 1;
  delta_apap_hamprna_delay = 0.5573024;
  delta_apap_il6_basal = 1.524545;
  delta_apap_receptor_pro = 1;
  delta_apap_socs3_deg = 1;
  delta_apap_socs3_pro = 1;
  delta_apap_socs3rna_deg = 0;
  delta_apap_socs3rna_delay = 8.007182;
  delta_apap_stat3_act = 0.2464848;
  delta_dcf_f_SOCS3_STAT3 = 2.618912;
  delta_dcf_hamprna_deg = 1;
  delta_dcf_il6_basal = 7.281166;
  delta_dcf_pstat3_imp = 1;
  delta_dcf_receptor_pro = 24.56534;
  delta_dcf_socs3_deg = 1;
  delta_dcf_socs3_pro = 5.426444;
  delta_dcf_socs3rna_deg = 1e8;
  delta_dcf_socs3rna_delay = 9.406408;
  delta_f_HAMP_STAT3 = 1;
  delta_f_SOCS3_STAT3 = 1;
  delta_hamprna_deg = 0.0847173;
  delta_hamprna_delay = 0.566484;
  delta_il6_act = 1.19003e7;
  delta_il6_basal = 1e-7;
  delta_pstat3_imp = 18.65997;
  delta_receptor_deg = 1;
  delta_receptor_deg_socs3 = 2.994618;
  delta_receptor_pro = 0.0311005;
  delta_socs3_deg = 1;
  delta_socs3_pro = 1;
  delta_socs3_sat = 1;
  delta_socs3rna_deg = 0.1067442;
  delta_socs3rna_delay = 5.74434;
  delta_stat3_act = 0.2640249;
  delta_stat3_dea = 1;
  f_HAMP_basal = 0;
  input_apap = 0 unit_0;
  input_cyclo = 0;
  input_dcf = 0 unit_1;
  input_il6 = 10 unit_3;
  input_noggin = 0 unit_3;
  k_sat_SOCS3 = 17.07936;
  n_STAT3 = 1.926303;
  ref_K_transport = 0.09741264;
  ref_STAT3_total = 0.9526927;
  ref_apap_hamprna_deg = 0.0996624;
  ref_apap_hamprna_delay = 0.04805705;
  ref_apap_il6_basal = 0.1957581;
  ref_apap_receptor_pro = 0.09398208;
  ref_apap_socs3_deg = 0.7152049;
  ref_apap_socs3_pro = 0.2848315;
  ref_apap_socs3rna_deg = 0.1159516;
  ref_apap_socs3rna_delay = 0.06570444;
  ref_apap_stat3_act = 0.02917703;
  ref_dcf_f_SOCS3_STAT3 = 0.6931603;
  ref_dcf_hamprna_deg = 100000000;
  ref_dcf_il6_basal = 0.8350967;
  ref_dcf_pstat3_imp = 0.3826198;
  ref_dcf_receptor_pro = 1.071202;
  ref_dcf_socs3_deg = 7.433738;
  ref_dcf_socs3_pro = 4.494719;
  ref_dcf_socs3rna_deg = 1.472489;
  ref_dcf_socs3rna_delay = 1.18203;
  ref_f_HAMP_STAT3 = 5.140149e-7;
  ref_f_SOCS3_STAT3 = 2.671614e-5;
  ref_hamprna_deg = 0.01618341;
  ref_hamprna_delay = 0.2773111;
  ref_il6_act = 0.02269857;
  ref_il6_basal = 0.009570671;
  ref_pstat3_imp = 0.4050796;
  ref_receptor_deg = 0.006429801;
  ref_receptor_deg_socs3 = 0.2713064;
  ref_receptor_pro = 1.37763;
  ref_socs3_deg = 0.1041761;
  ref_socs3_pro = 2.148714;
  ref_socs3_sat = 5.384585;
  ref_socs3rna_deg = 0.04799723;
  ref_socs3rna_delay = 0.2373165;
  ref_stat3_act = 0.00313556;
  ref_stat3_dea = 1.170168;

  // Assignment rules:
  cycloHex := 0 + (input_cyclo - 0)*piecewise(0, time - 0 < 0, 1);
  ActD := 0;
  IL6 := 0 + (input_il6 - 0)*piecewise(0, time - 0 < 0, 1);
  Noggin := (0 + (input_noggin - 0)*piecewise(0, time - (-60) < 0, 1))/500;
  DCF := 0.001*input_dcf*(0 + (1 - 0)*piecewise(0, time - 0 < 0, 1));
  APAP := input_apap*(0 + (1 - 0)*piecewise(0, time - 0 < 0, 1));
  SMAD6_mRNA_loss := 0;

  // Reactions:
  v1_Receptor_production: => JAK1_gp130; cyt*Function_for_Receptor_production(APAP, ActD, DCF, cycloHex, delta_apap_receptor_pro, delta_dcf_receptor_pro, delta_receptor_pro, ref_apap_receptor_pro, ref_dcf_receptor_pro, ref_receptor_pro);
  v2_Receptor_degradation: JAK1_gp130 => ; cyt*Function_for_Receptor_degradation(JAK1_gp130, delta_receptor_deg, ref_receptor_deg);
  v3_Phosphorylated_receptor_degradation: pJAK1_pgp130 => ; cyt*Function_for_Phosphorylated_receptor_degradation(delta_receptor_deg, pJAK1_pgp130, ref_receptor_deg);
  v4_Basal_receptor_phosphorylation: JAK1_gp130 => pJAK1_pgp130; cyt*Function_for_Basal_receptor_phosphorylation(APAP, DCF, JAK1_gp130, delta_apap_il6_basal, delta_dcf_il6_basal, delta_il6_act, delta_il6_basal, ref_apap_il6_basal, ref_dcf_il6_basal, ref_il6_act, ref_il6_basal);
  v5_Receptor_phosphorylation: JAK1_gp130 => pJAK1_pgp130; cyt*Function_for_Receptor_phosphorylation(IL6, JAK1_gp130, delta_il6_act, ref_il6_act);
  v6_SOCS3_Bound_receptor_degradation: pJAK1_pgp130 => ; cyt*Function_for_SOCS3_Bound_receptor_degradation(SOCS3, delta_receptor_deg_socs3, k_sat_SOCS3, pJAK1_pgp130, ref_receptor_deg_socs3);  // modifiers: SOCS3
  v7_Phosphorylation_STAT3: STAT3 => cpSTAT3; cyt*Function_for_Phosphorylation_STAT3(APAP, STAT3, delta_K_transport, delta_apap_stat3_act, delta_receptor_pro, delta_stat3_act, pJAK1_pgp130, ref_K_transport, ref_apap_stat3_act, ref_receptor_pro, ref_stat3_act);  // modifiers: pJAK1_pgp130
  v8_Import_phosphorylated_STAT3: cpSTAT3 => npSTAT3; Function_for_Import_phosphorylated_STAT3(DCF, cpSTAT3, cyt, delta_dcf_pstat3_imp, delta_pstat3_imp, ref_dcf_pstat3_imp, ref_pstat3_imp);
  v9_STAT3_dephosphorylation__cytoplasm_: npSTAT3 => STAT3; Function_for_STAT3_dephosphorylation__cytoplasm(delta_stat3_dea, npSTAT3, nuc, ref_stat3_dea); v9_STAT3_dephosphorylation__cytoplasm_ is "STAT3 dephosphorylation (cytoplasm)";
  v10_SOCS3_transcription: => nSOCS3RNA1; nuc*Function_for_SOCS3_transcription(ActD, DCF, delta_dcf_f_SOCS3_STAT3, delta_f_SOCS3_STAT3, n_STAT3, npSTAT3, ref_dcf_f_SOCS3_STAT3, ref_f_SOCS3_STAT3);  // modifiers: npSTAT3
  v11_SOCS3_transcriptional_delay: nSOCS3RNA1 => nSOCS3RNA2; nuc*Function_for_SOCS3_transcriptional_delay(APAP, ActD, DCF, delta_apap_socs3rna_delay, delta_dcf_socs3rna_delay, delta_socs3rna_delay, nSOCS3RNA1, ref_apap_socs3rna_delay, ref_dcf_socs3rna_delay, ref_socs3rna_delay);
  v12_SOCS3_transcriptional_delay: nSOCS3RNA2 => nSOCS3RNA3; nuc*Function_for_SOCS3_transcriptional_delay_2(APAP, ActD, DCF, delta_apap_socs3rna_delay, delta_dcf_socs3rna_delay, delta_socs3rna_delay, nSOCS3RNA2, ref_apap_socs3rna_delay, ref_dcf_socs3rna_delay, ref_socs3rna_delay); v12_SOCS3_transcriptional_delay is "SOCS3 transcriptional delay_2";
  v13_SOCS3_transcriptional_delay: nSOCS3RNA3 => nSOCS3RNA4; nuc*Function_for_SOCS3_transcriptional_delay_3(APAP, ActD, DCF, delta_apap_socs3rna_delay, delta_dcf_socs3rna_delay, delta_socs3rna_delay, nSOCS3RNA3, ref_apap_socs3rna_delay, ref_dcf_socs3rna_delay, ref_socs3rna_delay); v13_SOCS3_transcriptional_delay is "SOCS3 transcriptional delay_3";
  v14_SOCS3_transcriptional_delay: nSOCS3RNA4 => nSOCS3RNA5; nuc*Function_for_SOCS3_transcriptional_delay_4(APAP, ActD, DCF, delta_apap_socs3rna_delay, delta_dcf_socs3rna_delay, delta_socs3rna_delay, nSOCS3RNA4, ref_apap_socs3rna_delay, ref_dcf_socs3rna_delay, ref_socs3rna_delay); v14_SOCS3_transcriptional_delay is "SOCS3 transcriptional delay_4";
  v15_SOCS3_transcriptional_delay: nSOCS3RNA5 => SOCS3RNA; Function_for_SOCS3_transcriptional_delay_5(APAP, ActD, DCF, delta_apap_socs3rna_delay, delta_dcf_socs3rna_delay, delta_socs3rna_delay, nSOCS3RNA5, nuc, ref_apap_socs3rna_delay, ref_dcf_socs3rna_delay, ref_socs3rna_delay); v15_SOCS3_transcriptional_delay is "SOCS3 transcriptional delay_5";
  v16_SOCS3_mRNA_degradation: SOCS3RNA => ; cyt*Function_for_SOCS3_mRNA_degradation(APAP, DCF, SOCS3RNA, delta_apap_socs3rna_deg, delta_dcf_socs3rna_deg, delta_socs3rna_deg, ref_apap_socs3rna_deg, ref_dcf_socs3rna_deg, ref_socs3rna_deg);
  v17_SOCS3_translation: => SOCS3; cyt*Function_for_SOCS3_translation(APAP, DCF, SOCS3RNA, cycloHex, delta_apap_socs3_pro, delta_dcf_socs3_pro, delta_socs3_pro, delta_socs3_sat, ref_apap_socs3_pro, ref_dcf_socs3_pro, ref_socs3_pro, ref_socs3_sat);  // modifiers: SOCS3RNA
  v18_SOCS3_degradation: SOCS3 => ; cyt*Function_for_SOCS3_degradation(APAP, DCF, SOCS3, delta_apap_socs3_deg, delta_dcf_socs3_deg, delta_socs3_deg, ref_apap_socs3_deg, ref_dcf_socs3_deg, ref_socs3_deg);
  v19_HAMP_mRNA_transcription: => nHAMPRNA1; nuc*Function_for_HAMP_mRNA_transcription(ActD, delta_f_HAMP_STAT3, f_HAMP_basal, n_STAT3, npSTAT3, ref_f_HAMP_STAT3);  // modifiers: npSTAT3
  v20_HAMP_transcriptional_delay: nHAMPRNA1 => nHAMPRNA2; nuc*Function_for_HAMP_transcriptional_delay(APAP, ActD, delta_apap_hamprna_delay, delta_hamprna_delay, nHAMPRNA1, ref_apap_hamprna_delay, ref_hamprna_delay);
  v21_HAMP_transcriptional_delay: nHAMPRNA2 => nHAMPRNA3; nuc*Function_for_HAMP_transcriptional_delay_2(APAP, ActD, delta_apap_hamprna_delay, delta_hamprna_delay, nHAMPRNA2, ref_apap_hamprna_delay, ref_hamprna_delay); v21_HAMP_transcriptional_delay is "HAMP transcriptional delay_2";
  v22_HAMP_transcriptional_delay: nHAMPRNA3 => nHAMPRNA4; nuc*Function_for_HAMP_transcriptional_delay_3(APAP, ActD, delta_apap_hamprna_delay, delta_hamprna_delay, nHAMPRNA3, ref_apap_hamprna_delay, ref_hamprna_delay); v22_HAMP_transcriptional_delay is "HAMP transcriptional delay_3";
  v23_HAMP_transcriptional_delay: nHAMPRNA4 => nHAMPRNA5; nuc*Function_for_HAMP_transcriptional_delay_4(APAP, ActD, delta_apap_hamprna_delay, delta_hamprna_delay, nHAMPRNA4, ref_apap_hamprna_delay, ref_hamprna_delay); v23_HAMP_transcriptional_delay is "HAMP transcriptional delay_4";
  v24_HAMP_transcriptional_delay: nHAMPRNA5 => nHAMPRNA6; nuc*Function_for_HAMP_transcriptional_delay_5(APAP, ActD, delta_apap_hamprna_delay, delta_hamprna_delay, nHAMPRNA5, ref_apap_hamprna_delay, ref_hamprna_delay); v24_HAMP_transcriptional_delay is "HAMP transcriptional delay_5";
  v25_HAMP_transcriptional_delay: nHAMPRNA6 => nHAMPRNA7; nuc*Function_for_HAMP_transcriptional_delay_6(APAP, ActD, delta_apap_hamprna_delay, delta_hamprna_delay, nHAMPRNA6, ref_apap_hamprna_delay, ref_hamprna_delay); v25_HAMP_transcriptional_delay is "HAMP transcriptional delay_6";
  v26_HAMP_transcriptional_delay: nHAMPRNA7 => HAMPRNA; Function_for_HAMP_transcriptional_delay_7(APAP, ActD, delta_apap_hamprna_delay, delta_hamprna_delay, nHAMPRNA7, nuc, ref_apap_hamprna_delay, ref_hamprna_delay); v26_HAMP_transcriptional_delay is "HAMP transcriptional delay_7";
  v27_HAMP_mRNA_degradation: HAMPRNA => ; cyt*Function_for_HAMP_mRNA_degradation(APAP, DCF, HAMPRNA, delta_apap_hamprna_deg, delta_dcf_hamprna_deg, delta_hamprna_deg, ref_apap_hamprna_deg, ref_dcf_hamprna_deg, ref_hamprna_deg);

  // Unit definitions:
  unit time = 60 second;
  unit substance = 1e-9 mole;
  unit unit_0 = 1e-3 mole / litre; unit_0 is "mmol/l";
  unit unit_1 = 1e-6 mole / litre; unit_1 is "umol/l";
  unit unit_2 = 1e-9 gram / (1e-3 litre); unit_2 is "ng/ml";
  unit unit_3 = 1e-12 gram / litre; unit_3 is "pg/l";
end
