// SBML level 2 version 4
// dcterms:bibliographicCitation: urn:miriam:pubmed:12871372

model Model_1()
  // Adams2003 - Thrombin Inhibitors
  // Mathematical model of blood coagulation. Reused Hockin et al. 2002 model. Simulation of thrombin inhibitors: Hirudin, Hirulog, Argatroban, Melagatran and Efegatran.
  // isVersionOf GO:0007596
  // isDescribedBy pubmed:12871372

  // Compartments:
  compartment compartment_1 = 1;

  // Species:
  species TF in compartment_1 = 1e-11;  // uniprot:P13726
  species TF_VII in compartment_1 = 0;  // hasPart uniprot:P13726; hasPart uniprot:P08709
  species VII in compartment_1 = 1e-8;  // uniprot:P08709
  species TF_VIIa in compartment_1 = 0;  // hasPart uniprot:P08709; hasPart uniprot:P13726
  species VIIa in compartment_1 = 1e-10;  // isVersionOf uniprot:P08709
  species Xa in compartment_1 = 0;  // isVersionOf uniprot:P00742
  species IIa in compartment_1 = 0;  // isVersionOf uniprot:P00734
  species TF_VIIa_X in compartment_1 = 0;  // hasPart uniprot:P08709; hasPart uniprot:P13726; hasPart uniprot:P00742
  species X in compartment_1 = 1.6e-7;  // uniprot:P00742
  species TF_VIIa_Xa in compartment_1 = 0;  // hasPart uniprot:P08709; hasPart uniprot:P13726; hasPart uniprot:P00742
  species IX in compartment_1 = 9e-8;  // uniprot:P00740
  species TF_VIIa_IX in compartment_1 = 0;  // hasPart uniprot:P08709; hasPart uniprot:P00740; hasPart uniprot:P13726
  species IXa in compartment_1 = 0;  // isVersionOf uniprot:P00740
  species II in compartment_1 = 1.4e-6;  // uniprot:P00734
  species VIII in compartment_1 = 7e-10;  // uniprot:P00451
  species VIIIa in compartment_1 = 0;  // isVersionOf uniprot:P00451
  species IXa_VIIIa in compartment_1 = 0;  // hasPart uniprot:P00451; hasPart uniprot:P00740
  species IXa_VIIIa_X in compartment_1 = 0;  // hasPart uniprot:P00451; hasPart uniprot:P00740; hasPart uniprot:P00742
  species VIIIa1_L in compartment_1 = 0;  // isPartOf uniprot:P00451
  species VIIIa2 in compartment_1 = 0;  // isPartOf uniprot:P00451
  species V in compartment_1 = 2e-8;  // uniprot:P12259
  species Va in compartment_1 = 0;  // isVersionOf uniprot:P12259
  species Xa_Va in compartment_1 = 0;  // hasPart uniprot:P12259; hasPart uniprot:P00742
  species Xa_Va_II in compartment_1 = 0;  // hasPart uniprot:P12259; hasPart uniprot:P00734; hasPart uniprot:P00742
  species mIIa in compartment_1 = 0;  // isVersionOf uniprot:P00734
  species TFPI in compartment_1 = 2.5e-9;  // uniprot:P10646
  species Xa_TFPI in compartment_1 = 0;  // hasPart uniprot:P00742; hasPart uniprot:P10646
  species TF_VIIa_Xa_TFPI in compartment_1 = 0;  // hasPart uniprot:P00742; hasPart uniprot:P10646; hasPart uniprot:P08709; hasPart uniprot:P13726
  species ATIII in compartment_1 = 3.4e-6;  // uniprot:P01008
  species Xa_ATIII in compartment_1 = 0;  // hasPart uniprot:P00742; hasPart uniprot:P01008
  species mIIa_ATIII in compartment_1 = 0;  // hasPart uniprot:P01008; hasPart uniprot:P00734
  species IXa_ATIII in compartment_1 = 0;  // hasPart uniprot:P00740; hasPart uniprot:P01008
  species IIa_ATIII in compartment_1 = 0;  // hasPart uniprot:P00734; hasPart uniprot:P01008
  species TF_VIIa_ATIII in compartment_1 = 0;  // hasPart uniprot:P13726; hasPart uniprot:P08709; hasPart uniprot:P01008
  species Hirudin in compartment_1 = 0;
  species Hirulog in compartment_1 = 0;
  species Argatroban in compartment_1 = 0;
  species Melagatran in compartment_1 = 0;
  species Efegatran in compartment_1 = 0;
  species Hirudin_IIa in compartment_1 = 0; Hirudin_IIa is "Hirudin:IIa";
  species Hirulog_IIa in compartment_1 = 0; Hirulog_IIa is "Hirulog:IIa";
  species Argatroban_IIa in compartment_1 = 0; Argatroban_IIa is "Argatroban:IIa";
  species Melagatran_IIa in compartment_1 = 0; Melagatran_IIa is "Melagatran:IIa";
  species Efegatran_IIa in compartment_1 = 0; Efegatran_IIa is "Efegatran:IIa";
  species Hirudin_mIIa in compartment_1 = 0; Hirudin_mIIa is "Hirudin:mIIa";
  species Hirulog_mIIa in compartment_1 = 0; Hirulog_mIIa is "Hirulog:mIIa";
  species Argatroban_mIIa in compartment_1 = 0; Argatroban_mIIa is "Argatroban:mIIa";
  species Melagatran_mIIa in compartment_1 = 0; Melagatran_mIIa is "Melagatran:mIIa";
  species Efegatran_mIIa in compartment_1 = 0; Efegatran_mIIa is "Efegatran:mIIa";

  // Parameters:
  k1 = 0.0031;
  k2 = 3200000;
  k3 = 0.0031;
  k4 = 23000000;
  k5 = 440000;
  k6 = 13000000;
  k7 = 23000;
  k8 = 1.05;
  k9 = 25000000;
  k10 = 6;
  k11 = 19;
  k12 = 22000000;
  k13 = 2.4;
  k14 = 10000000;
  k15 = 1.8;
  k16 = 7500;
  k17 = 20000000;
  k18 = 0.005;
  k19 = 10000000;
  k20 = 0.001;
  k21 = 100000000;
  k22 = 8.2;
  k23 = 22000;
  k24 = 0.006;
  k25 = 0.001;
  k26 = 20000000;
  k27 = 0.2;
  k28 = 400000000;
  k29 = 103;
  k30 = 100000000;
  k31 = 63.5;
  k32 = 15000000;
  k33 = 0.00036;
  k34 = 900000;
  k35 = 0.00011;
  k36 = 320000000;
  k37 = 50000000;
  k38 = 1500;
  k39 = 7100;
  k40 = 490;
  k41 = 7100;
  k42 = 230;
  var IIa_plus_1_2mIIa; IIa_plus_1_2mIIa is "IIa+1.2mIIa";
  plot_curve_clot_time = 0;

  // Assignment rules:
  IIa_plus_1_2mIIa := IIa + 1.2*mIIa;

  // Reactions:
  R01: TF + VII -> TF_VII; compartment_1*(k2*TF*VII - k1*TF_VII);
  R02: TF + VIIa -> TF_VIIa; compartment_1*(k4*TF*VIIa - k3*TF_VIIa);
  R03: TF_VIIa + VII => TF_VIIa + VIIa; compartment_1*k5*TF_VIIa*VII;
  R04: Xa + VII => Xa + VIIa; compartment_1*k6*Xa*VII;
  R05: IIa + VII => IIa + VIIa; compartment_1*k7*IIa*VII;
  R06: TF_VIIa + X -> TF_VIIa_X; compartment_1*(k9*TF_VIIa*X - k8*TF_VIIa_X);
  R07: TF_VIIa + Xa -> TF_VIIa_Xa; compartment_1*(k12*TF_VIIa*Xa - k11*TF_VIIa_Xa);
  R08: TF_VIIa + IX -> TF_VIIa_IX; compartment_1*(k14*TF_VIIa*IX - k13*TF_VIIa_IX);
  R09: Xa + II => Xa + IIa; compartment_1*k16*Xa*II;
  R10: IIa + VIII => IIa + VIIIa; compartment_1*k17*IIa*VIII;
  R11: IXa + VIIIa -> IXa_VIIIa; compartment_1*(k19*IXa*VIIIa - k18*IXa_VIIIa);
  R12: IXa_VIIIa + X -> IXa_VIIIa_X; compartment_1*(k21*IXa_VIIIa*X - k20*IXa_VIIIa_X);
  R13: VIIIa -> VIIIa1_L + VIIIa2; compartment_1*(k24*VIIIa - k23*VIIIa1_L*VIIIa2);
  R14: IXa_VIIIa_X => VIIIa1_L + VIIIa2 + X + IXa; compartment_1*k25*IXa_VIIIa_X;
  R15: IXa_VIIIa => VIIIa1_L + VIIIa2 + IXa; compartment_1*k25*IXa_VIIIa;
  R16: IIa + V => IIa + Va; compartment_1*k26*IIa*V;
  R17: Xa + Va -> Xa_Va; compartment_1*(k28*Xa*Va - k27*Xa_Va);
  R18: Xa_Va + II -> Xa_Va_II; compartment_1*(k30*Xa_Va*II - k29*Xa_Va_II);
  R19: mIIa + Xa_Va => IIa + Xa_Va; compartment_1*k32*mIIa*Xa_Va;
  R20: Xa + TFPI -> Xa_TFPI; compartment_1*(k34*Xa*TFPI - k33*Xa_TFPI);
  R21: TF_VIIa_Xa + TFPI -> TF_VIIa_Xa_TFPI; compartment_1*(k36*TF_VIIa_Xa*TFPI - k35*TF_VIIa_Xa_TFPI);
  R22: TF_VIIa + Xa_TFPI => TF_VIIa_Xa_TFPI; compartment_1*k37*TF_VIIa*Xa_TFPI;
  R23: Xa + ATIII => Xa_ATIII; compartment_1*k38*Xa*ATIII;
  R24: mIIa + ATIII => mIIa_ATIII; compartment_1*k39*mIIa*ATIII;
  R25: IXa + ATIII => IXa_ATIII; compartment_1*k40*IXa*ATIII;
  R26: IIa + ATIII => IIa_ATIII; compartment_1*k41*IIa*ATIII;
  R27: TF_VIIa + ATIII => TF_VIIa_ATIII; compartment_1*k42*TF_VIIa*ATIII;
  R6b: TF_VIIa_X => TF_VIIa_Xa; compartment_1*k10*TF_VIIa_X; R6b is "R06b";
  R8b: TF_VIIa_IX => TF_VIIa + IXa; compartment_1*k15*TF_VIIa_IX; R8b is "R08b";
  R12b: IXa_VIIIa_X => IXa_VIIIa + Xa; compartment_1*k22*IXa_VIIIa_X;
  R18b: Xa_Va_II => Xa_Va + mIIa; compartment_1*k31*Xa_Va_II;
  Hirudin___IIa: Hirudin + IIa -> Hirudin_IIa; compartment_1*(Hirudin___IIa_k1*Hirudin*IIa - Hirudin___IIa_k2*Hirudin_IIa); Hirudin___IIa is "Hirudin - IIa";
    Hirudin___IIa_k1 = 290000000; Hirudin___IIa_k2 = 1.7e-5;
  Hirulog___IIa: Hirulog + IIa -> Hirulog_IIa; compartment_1*(Hirulog___IIa_k1*Hirulog*IIa - Hirulog___IIa_k2*Hirulog_IIa); Hirulog___IIa is "Hirulog - IIa";
    Hirulog___IIa_k1 = 430000000; Hirulog___IIa_k2 = 0.82;
  Argatroban___IIa: Argatroban + IIa -> Argatroban_IIa; compartment_1*(Argatroban___IIa_k1*Argatroban*IIa - Argatroban___IIa_k2*Argatroban_IIa); Argatroban___IIa is "Argatroban - IIa";
    Argatroban___IIa_k1 = 33000000; Argatroban___IIa_k2 = 0.33;
  Melagatran___IIa: Melagatran + IIa -> Melagatran_IIa; compartment_1*(Melagatran___IIa_k1*Melagatran*IIa - Melagatran___IIa_k2*Melagatran_IIa); Melagatran___IIa is "Melagatran - IIa";
    Melagatran___IIa_k1 = 12000000; Melagatran___IIa_k2 = 0.036;
  Efegatran___IIa: Efegatran + IIa -> Efegatran_IIa; compartment_1*(Efegatran___IIa_k1*Efegatran*IIa - Efegatran___IIa_k2*Efegatran_IIa); Efegatran___IIa is "Efegatran - IIa";
    Efegatran___IIa_k1 = 850000; Efegatran___IIa_k2 = 0.0015;
  Hirudin___mIIa: Hirudin + mIIa -> Hirudin_mIIa; compartment_1*(Hirudin___mIIa_k1*Hirudin*mIIa - Hirudin___mIIa_k2*Hirudin_mIIa); Hirudin___mIIa is "Hirudin - mIIa";
    Hirudin___mIIa_k1 = 290000000; Hirudin___mIIa_k2 = 1.7e-5;
  Hirulog___mIIa: Hirulog + mIIa -> Hirulog_mIIa; compartment_1*(Hirulog___mIIa_k1*Hirulog*mIIa - Hirulog___mIIa_k2*Hirulog_mIIa); Hirulog___mIIa is "Hirulog - mIIa";
    Hirulog___mIIa_k1 = 430000000; Hirulog___mIIa_k2 = 0.82;
  Argatroban___mIIa: Argatroban + mIIa -> Argatroban_mIIa; compartment_1*(Argatroban___mIIa_k1*Argatroban*mIIa - Argatroban___mIIa_k2*Argatroban_mIIa); Argatroban___mIIa is "Argatroban - mIIa";
    Argatroban___mIIa_k1 = 33000000; Argatroban___mIIa_k2 = 0.33;
  Melagatran___mIIa: Melagatran + mIIa -> Melagatran_mIIa; compartment_1*(Melagatran___mIIa_k1*Melagatran*mIIa - Melagatran___mIIa_k2*Melagatran_mIIa); Melagatran___mIIa is "Melagatran - mIIa";
    Melagatran___mIIa_k1 = 12000000; Melagatran___mIIa_k2 = 0.036;
  Efegatran___mIIa: Efegatran + mIIa -> Efegatran_mIIa; compartment_1*(Efegatran___mIIa_k1*Efegatran*mIIa - Efegatran___mIIa_k2*Efegatran_mIIa); Efegatran___mIIa is "Efegatran - mIIa";
    Efegatran___mIIa_k1 = 850000; Efegatran___mIIa_k2 = 0.0015;

  // Events:
  Clot_time: at (IIa_plus_1_2mIIa > 1e-8): plot_curve_clot_time = time;
end
