// SBML level 2 version 4
// dcterms:bibliographicCitation: urn:miriam:doi:10.1007/BF02368242

model Baldwin1994___Nondimensionalized_Model_of_Thrombin_Production()
  // Baldwin1994 - Nondimensionalized Model of Thrombin Production
  // First mathematical model of thrombin production in flowing blood. Nondimensionalised ODE model has been curated.
  // isVersionOf GO:0007596
  // occursIn BTO:0000131
  // isDescribedBy doi:10.1007/BF02368242

  // Compartments:
  compartment Blood_Plasma = 1;  // isVersionOf BTO:0000131

  // Species:
  species $x1 in Blood_Plasma = 1;  // isVersionOf uniprot:P00451
  species $x2 in Blood_Plasma = 0;  // isVersionOf uniprot:P00451
  // Correction: The addition of the second term for this ODE as depicted in the publication has been changed so that the second term is subtracted instead.
  species $x3 in Blood_Plasma = 1;  // isVersionOf uniprot:P00742
  species $x4 in Blood_Plasma = 0;  // isVersionOf uniprot:P00742
  species $x5 in Blood_Plasma = 1;  // isVersionOf uniprot:P12259
  species $x6 in Blood_Plasma = 0;  // isVersionOf uniprot:P12259
  species $x7 in Blood_Plasma = 1;  // isVersionOf uniprot:P00734
  species $x8 in Blood_Plasma = 0;  // isVersionOf uniprot:P00734

  // Parameters:
  k_L = 1e-6;
  tau_1 = 0.001;
  tau_2 = 1e-8;
  gamma_1 = 13100;
  tau_3 = 0.001;
  tau_4 = 1e-8;
  gamma_2 = 3500;
  tau_5 = 5e-6;
  tau_6 = 2e-5;
  theta = 1;
  D = 1;

  // Assignment rules:
  xi := time;
  model_time := D*xi/(k_L*2);

  // Rate rules:
  x1' = k_L*(1 - x1) - tau_1*x1*x8;
  x2' = -k_L*x2 + tau_1*x1*x8;
  x3' = k_L*(1 - x3) - tau_2*x3*theta*(1 + gamma_1*x2*theta);
  x4' = -k_L*x4 + tau_2*x3*theta*(1 + gamma_1*x2*theta) - tau_5*x4;
  x5' = k_L*(1 - x5) - tau_3*x5*x8;
  x6' = -k_L*x6 + tau_3*x5*x8;
  x7' = k_L*(1 - x7) - tau_4*x7*x4*theta*(1 + gamma_2*x6*theta);
  x8' = -k_L*x8 + tau_4*x7*x4*theta*(1 + gamma_2*x6*theta) - tau_6*x8;

  // Unit definitions:
  unit volume = 1e-3 litre;
  unit substance = 1e-3 mole;
end
