// SBML level 2 version 4
// dcterms:bibliographicCitation: urn:miriam:doi:10.1080/17513750903261281

function Function_for_increase_in_target_cell(s, r, T, I, T_max)
  s + r*T*(1 - (T + I)/T_max);
end

function Function_for_increase_in_infectious_virus_concentration(eta_r, eta1, beta, I)
  (1 - (eta_r + eta1)/2)*beta*I;
end

function Function_for_decrease_in_target_cell(d1, T, c, eta1, alpha, V_I)
  d1*T + (1 - c*eta1)*alpha*V_I*T;
end

function Function_for_increase_in_the_infection_of_hepatocyte(c, eta1, alpha, V_I, T)
  (1 - c*eta1)*alpha*V_I*T;
end

function Function_for_decrease_in_infectious_virus_concentration(d3, V_I)
  d3*V_I;
end

function Function_for_decrease_in_non_infectious_virus_cocentration(d3, V_NI)
  d3*V_NI;
end

function Function_for_increase_in_non_infectious_virus_concentration(eta_r, eta1, beta, I)
  (eta_r + eta1)/2*beta*I;
end

function Function_for_decrease_in_infection_in_hepatocyte(d2, I)
  d2*I;
end

model New_Model()
  // Banerjee2018 - Influence of Intracellular Delay on the Dynamics ofHepatitis C Virus
  // Influence of Intracellular Delay on the Dynamics of Hepatitis C Virus
  // Sandip Banerjee 1· Ram Keval 2
  // Abstract
  // In this paper, we present a delay induced model for hepatitis C virus incorporat-ing the healthy and infected hepatocytes as well as infectious and noninfectious virions. Themodel is mathematically analyzed and characterized, both for the steady states and the dynam-ical behavior of the model. It is shown that time delay does not affect the local asymptoticstability of the uninfected steady state. However, it can destabilize the endemic equilibrium,leading to Hopf bifurcation to periodic solutions with realistic data sets. The model is alsovalidated using 12 patient data obtained from the study, conducted at the University of SaoPaulo Hospital das clinicas
  // hasTaxon taxonomy:9606
  // isDescribedBy doi:10.1080/17513750903261281
  // hasProperty mamo:MAMO_0000089

  // Compartments:
  compartment compartment = 1;

  // Species:
  species T in compartment = 10000000;
  species I in compartment = 10000000;
  species V_I in compartment = 10000000;
  species V_NI in compartment = 10000000;

  // Parameters:
  s = 1;
  r = 2;
  T_max = 36000000;
  alpha = 2.25e-7;
  beta = 2.9;
  d1 = 0.01;
  d2 = 1;
  d3 = 6;
  eta1 = 0.45;
  eta_r = 0.9;
  tau = 22;
  c = 0.81;

  // Reactions:
  Increase_in_target_cell: => T; compartment*Function_for_increase_in_target_cell(s, r, T, I, T_max);  // modifiers: I
  Decrease_in_target_cell: T => ; compartment*Function_for_decrease_in_target_cell(d1, T, c, eta1, alpha, V_I);  // modifiers: V_I
  Increase_in_infection_in_hepatocyte: => I; compartment*Function_for_increase_in_the_infection_of_hepatocyte(c, eta1, alpha, V_I, T);  // modifiers: V_I, T
  Decrease_in_infection_in_hepatocyte: I => ; compartment*Function_for_decrease_in_infection_in_hepatocyte(d2, I);
  increase_in_infectious_virus_concentration: => V_I; compartment*Function_for_increase_in_infectious_virus_concentration(eta_r, eta1, beta, I);  // modifiers: I
  Decrease_in_infectious_virus_concentration: V_I => ; compartment*Function_for_decrease_in_infectious_virus_concentration(d3, V_I);
  Increase_in_non_infectious_virus_concentration: => V_NI; compartment*Function_for_increase_in_non_infectious_virus_concentration(eta_r, eta1, beta, I);  // modifiers: I
  Decrease_in_non_infectious_virus_concentration: V_NI => ; compartment*Function_for_decrease_in_non_infectious_virus_cocentration(d3, V_NI);

  // Unit definitions:
  unit volume = 1e-3 litre;
  unit substance = 1e-3 mole;
end
