// SBML level 2 version 4
// dcterms:bibliographicCitation: urn:miriam:pubmed:9468488

model Baugh1998___Regulation_of_coagulation_factor_Xa_by_TFPI()
  // Baugh1998 - Regulation of coagulation factor Xa by TFPI
  // Basic mathematical model of the formation of coagulation factor Xa involving TF:VIIa and its inhibition by TFPI.
  // isVersionOf GO:0007596
  // isDescribedBy pubmed:9468488

  // Compartments:
  compartment compartment = 1;

  // Species:
  species S in compartment = 0.17;
  species E in compartment = 0.000128;
  species ES in compartment = 0;
  species P in compartment = 0;
  species I in compartment = 0.0024;
  species P_I in compartment = 0; P_I is "P:I";
  species EP_I in compartment = 0; EP_I is "EP:I";

  // Parameters:
  K_m = 0.428;
  k_cat = 7;
  k_INH_P = 1.2; k_INH_P is "k_INH,P";
  k__P = 36000; k__P is "k_,P";
  k_INH_E = 275; k_INH_E is "k_INH,E";
  k__E = 110000; k__E is "k_,E";
  k_m = 0.001; k_m is "k_m'";

  // Reactions:
  Binding_of_factor_X_and_VIIa_TF: S + E -> ES; compartment*(K_m*S*E - k_m*ES); Binding_of_factor_X_and_VIIa_TF is "Binding of factor X and VIIa:TF";
  factor_X_activation_by_Viia_TF: ES => E + P; compartment*k_cat*ES; factor_X_activation_by_Viia_TF is "factor X activation by Viia:TF";
  Xa_inhibition_by_TFPI: P + I -> P_I; compartment*(k_INH_P*P*I - k__P*P_I);
  Inactivated_quaternary_complex_formation: E + P_I -> EP_I; compartment*(k_INH_E*E*P_I - k__E*EP_I);

  // Unit definitions:
  unit volume = 1e-3 litre;
  unit substance = 1e-6 mole;
end
