// SBML level 2 version 4
// dcterms:bibliographicCitation: urn:miriam:pubmed:32726315

function F2(b1, Xa, k3, IIa, k4, k5, II)
  (b1*Xa + k3*IIa + k4*IIa^2 + k5*IIa^3)*II;
end

function F1(a1, TF, VIIa, X, Xa, a2, IIa, a3, O)
  a1*TF*VIIa*(X - Xa) + a2*IIa*(X - Xa) + a3*O*IIa*(X - Xa);
end

function F3(k, S, M)
  k*S*M;
end

model Bouchnita2020___Model_for_blood_coagulation_under_Venous_flow_condition()
  // Bouchnita2020 - Model for blood coagulation under venous flow condition
  // A numerical simulation model to reproduce in vitro experiments of blood coagulation in microfluidic capillaries. A reduced one-equation model of thrombin distribution from the previous model under simplifying hypotheses and used to determine the conditions of clotting initiation on the platelet count, the shear rate, and the plasma composition.
  // isDescribedBy pubmed:32726315
  // hasProperty mamo:MAMO_0000046

  // Compartments:
  compartment Cell = 1;

  // Species:
  species Xa in Cell = 0;
  species II in Cell = 950;
  species IIa in Cell = 0;
  species ATIII in Cell = 3000;
  species TF in Cell = 0.0005;
  species VIIa in Cell = 10;

  // Parameters:
  b1 = 0.03 unit_0;
  k3 = 1.5e-5 unit_0;
  k4 = 8e-6 unit_1;
  k5 = 1e-10 unit_1;
  a4 = 8e-6 unit_0;
  b2 = 10.04 unit_2;
  a1 = 1e-5 unit_3;
  a2 = 1e-10 unit_0;
  a3 = 0.0134 unit_4;
  X0 = 80;
  O = 0 unit_5;

  // Reactions:
  Factor_X_activation: => Xa; Cell*F1(a1, TF, VIIa, X0, Xa, a2, IIa, a3, O);  // modifiers: TF, VIIa, IIa
  Prothrombin_activation: II => IIa; Cell*F2(b1, Xa, k3, IIa, k4, k5, II);  // modifiers: Xa
  Prothrombin_inactivation_by_ATIII: IIa => ; Cell*F3(b2, IIa, ATIII);  // modifiers: ATIII
  ATIII_utilization_in_Xa_inactivation: ATIII => ; Cell*F3(a4, ATIII, Xa);  // modifiers: Xa
  ATIII_utilization_in_IIa_inactivation: ATIII => ; Cell*F3(b2, ATIII, IIa);  // modifiers: IIa
  Factor_X_inactivation: Xa => ; Cell*F3(a4, Xa, ATIII);  // modifiers: ATIII

  // Unit definitions:
  unit length = metre;
  unit area = metre^2;
  unit volume = litre;
  unit time = second;
  unit substance = 1e-9 mole;
  unit unit_0 = 1 / (1e-9 mole * second); unit_0 is "1/(nmol*s)";
  unit unit_1 = 1 / ((1e-9 mole)^3 * second); unit_1 is "1/(nmol^3*s)";
  unit unit_2 = 1 / ((1e-9 mole)^6 * second); unit_2 is "1/(nmol^6*s)";
  unit unit_3 = 1 / ((1e-9 mole)^2 * second); unit_3 is "1/(nmol^2*s)";
  unit unit_4 = 1 / (1e-9 mole * litre * second); unit_4 is "1/(nmol*l*s)";
  unit unit_5 = 1 / litre; unit_5 is "1/l";
end
