// SBML level 2 version 4
// dcterms:bibliographicCitation: urn:miriam:pubmed:21526168

function Rad23_0(k10on, Xa, Phospholipid, Kd10, Xa_lipid)
  k10on*Xa*Phospholipid - Kd10*k10on*Xa_lipid;
end

function Rad24_0(k5on, V, Phospholipid, Kd5, V_lipid)
  k5on*V*Phospholipid - Kd5*k5on*V_lipid;
end

function Rad25_0(k5on, Va, Phospholipid, Kd5, Va_lipid)
  k5on*Va*Phospholipid - Kd5*k5on*Va_lipid;
end

function Rad26_0(k8on, VIII, Phospholipid, Kd8, VIII_lipid)
  k8on*VIII*Phospholipid - Kd8*k8on*VIII_lipid;
end

function Rad27_0(k8on, VIIIa, Phospholipid, Kd8, VIIIa_lipid)
  k8on*VIIIa*Phospholipid - Kd8*k8on*VIIIa_lipid;
end

function Rad28_0(k2on, II, Phospholipid, Kd2, II_lipid)
  k2on*II*Phospholipid - Kd2*k2on*II_lipid;
end

function APCa1AT_0(Meer1, APC, alpha1AT)
  Meer1*APC*alpha1AT;
end

function APCa2AP_0(Heeb2, APC, alpha2AP)
  Heeb2*APC*alpha2AP;
end

function APCa2MG_0(Heeb1, APC, a2MG)
  Heeb1*APC*a2MG;
end

function APCPCI_0(Herm4, APC, PCI, Herm4i, APC_PCI)
  Herm4*APC*PCI - Herm4*Herm4i*APC_PCI;
end

function APCPNI_0(Herm2, APC, PNI, Herm2i, APC_PNI)
  Herm2*APC*PNI - Herm2*Herm2i*APC_PNI;
end

function mTmAT_0(mIIaFactor1, Bourin1, mIIa_Tm, ATIII)
  mIIaFactor1*Bourin1*mIIa_Tm*ATIII;
end

function mTmPCI_0(Elisen1, mIIa_Tm, PCI, mIIaFactor1)
  Elisen1*mIIa_Tm*PCI*mIIaFactor1;
end

function R1_0(k2, TF, VII, k1, TF_VII)
  k2*TF*VII - k1*TF_VII;
end

function R10_0(k17, IIa, k17b, mIIa, k17c, Xa_lipid, Xa, VIII_lipid)
  (k17*IIa + k17b*mIIa + k17c*(Xa_lipid + Xa))*VIII_lipid;
end

function R10d_0(k17, IIa, k17b, mIIa, k17c, Xa_lipid, Xa, VIII)
  (k17*IIa + k17b*mIIa + k17c*(Xa_lipid + Xa))*VIII;
end

function R10vWF_0(k17vWF, IIa, mIIa, VIII_vWF)
  k17vWF*(IIa + mIIa)*VIII_vWF;
end

function R11_0(k19, VIIIa_lipid, IXa_lipid, k18, IXa_VIIIa_lipid)
  k19*VIIIa_lipid*IXa_lipid - k18*IXa_VIIIa_lipid;
end

function R12_0(k21, IXa_VIIIa_lipid, X_lipid, k20, IXa_VIIIa_X_lipid)
  k21*IXa_VIIIa_lipid*X_lipid - k20*IXa_VIIIa_X_lipid;
end

function R12a_0(k22, IXa_VIIIa_X_lipid)
  k22*IXa_VIIIa_X_lipid;
end

function R13_0(k24, VIIIa_lipid, k23, VIIIa1_L, VIIIa2)
  k24*VIIIa_lipid - k23*VIIIa1_L*VIIIa2;
end

function R14_0(k25, IXa_VIIIa_X_lipid)
  k25*IXa_VIIIa_X_lipid;
end

function R15_0(k25, IXa_VIIIa_lipid)
  k25*IXa_VIIIa_lipid;
end

function R16_0(k26, IIa, k26b, mIIa, k26c, Xa, Xa_lipid, V_lipid)
  (k26*IIa + k26b*mIIa + k26c*(Xa_lipid + Xa))*V_lipid;
end

function R16d_0(k26, IIa, k26b, mIIa, k26c, Xa, Xa_lipid, V)
  (k26*IIa + k26b*mIIa + k26c*(Xa + Xa_lipid))*V;
end

function R17d_0(k28, Xa, Va_lipid, k27, Xa_Va_lipid)
  k28*Xa*Va_lipid - k27*Xa_Va_lipid;
end

function R18_0(k30, Xa_Va_lipid, II_lipid)
  k30*Xa_Va_lipid*II_lipid;
end

function R18a_0(k31, Xa_Va_II_lipid)
  k31*Xa_Va_II_lipid;
end

function R18d_0(k30, Xa_Va_lipid, II, k29, Xa_Va_II_lipid)
  k30*Xa_Va_lipid*II - k29*Xa_Va_II_lipid;
end

function R19_0(k32, mIIa, Xa_Va_lipid)
  k32*mIIa*Xa_Va_lipid;
end

function R2_0(k4, TF, VIIa, k3, TF_VIIa)
  k4*TF*VIIa - k3*TF_VIIa;
end

function R20_0(k34, Xa, TFPI, k33, Xa_TFPI)
  k34*Xa*TFPI - k33*Xa_TFPI;
end

function R21_0(k36, TF_VIIa_Xa, TFPI, k35, TF_VIIa_Xa_TFPI)
  k36*TF_VIIa_Xa*TFPI - k35*TF_VIIa_Xa_TFPI;
end

function R22_0(k37, TF_VIIa, Xa_TFPI)
  k37*TF_VIIa*Xa_TFPI;
end

function RBu32b_0(kbu48, APC_PS_Va)
  kbu48*APC_PS_Va;
end

function R23_0(k38, Xa, ATIII)
  k38*Xa*ATIII;
end

function R23a2MG_0(Ellis1, Xa, a2MG)
  Ellis1*Xa*a2MG;
end

function R23APC_0(Herm5, APC, ATIII)
  Herm5*APC*ATIII;
end

function R23PCI_0(Suzu1, Xa, PCI, Suzu1i, Xa_PCI)
  Suzu1*Xa*PCI - Suzu1*Suzu1i*Xa_PCI;
end

function R24_0(k39, mIIa, ATIII)
  k39*mIIa*ATIII;
end

function R24a2MG_0(Down1, mIIa, a2MG)
  Down1*mIIa*a2MG;
end

function R24alpha1AT_0(Down2, mIIa, alpha1AT)
  Down2*mIIa*alpha1AT;
end

function R24HCII_0(Veer1, mIIa, HCII)
  Veer1*mIIa*HCII;
end

function R24PCI_0(Herm3, mIIa, PCI, Herm3i, mIIa_PCI)
  Herm3*mIIa*PCI - Herm3*Herm3i*mIIa_PCI;
end

function R24PNI_0(Herm1, mIIa, PNI, Herm1i, mIIa_PNI)
  Herm1*mIIa*PNI - Herm1*Herm1i*mIIa_PNI;
end

function R25_0(k40, IXa, ATIII)
  k40*IXa*ATIII;
end

function R26_0(k41, IIa, ATIII)
  k41*IIa*ATIII;
end

function R26a2MG_0(Down1, IIa, a2MG)
  Down1*IIa*a2MG;
end

function R26alpha1AT_0(Down2, IIa, alpha1AT)
  Down2*IIa*alpha1AT;
end

function R26HCII_0(Veer1, IIa, HCII)
  Veer1*IIa*HCII;
end

function R26PCI_0(Herm3, IIa, PCI, Herm3i, IIa_PCI)
  Herm3*IIa*PCI - Herm3*Herm3i*IIa_PCI;
end

function R26PNI_0(Herm1, IIa, PNI, Herm1i, IIa_PNI)
  Herm1*IIa*PNI - Herm1*Herm1i*IIa_PNI;
end

function R27_0(k42, TF_VIIa, ATIII)
  k42*TF_VIIa*ATIII;
end

function R3_0(k5, TF_VIIa, VII)
  k5*TF_VIIa*VII;
end

function R4_0(k6, Xa, Xa_lipid, VII)
  k6*(Xa + Xa_lipid)*VII;
end

function R5_0(k7, IIa, VII)
  k7*IIa*VII;
end

function R6_0(k9, TF_VIIa, X, k8, TF_VIIa_X)
  k9*TF_VIIa*X - k8*TF_VIIa_X;
end

function R6a_0(k10, TF_VIIa_X)
  k10*TF_VIIa_X;
end

function R6s_0(k9, TF_VIIa, X_lipid, k8, TF_VIIa_X)
  k9*TF_VIIa*X_lipid - k8*TF_VIIa_X;
end

function R7_0(k12, TF_VIIa, Xa, k11, TF_VIIa_Xa)
  k12*TF_VIIa*Xa - k11*TF_VIIa_Xa;
end

function R7s_0(k12, TF_VIIa, Xa_lipid, k11, TF_VIIa_Xa)
  k12*TF_VIIa*Xa_lipid - k11*TF_VIIa_Xa;
end

function R8_0(k14, TF_VIIa, IX, k13, TF_VIIa_IX)
  k14*TF_VIIa*IX - k13*TF_VIIa_IX;
end

function R8a_0(k15, TF_VIIa_IX)
  k15*TF_VIIa_IX;
end

function R8as_0(k15, TF_VIIa_IX_lipid)
  k15*TF_VIIa_IX_lipid;
end

function R8s_0(k14, TF_VIIa, IX_lipid, k13, TF_VIIa_IX_lipid)
  k14*TF_VIIa*IX_lipid - k13*TF_VIIa_IX_lipid;
end

function R9_0(k16, Xa_lipid, Xa, II)
  k16*(Xa_lipid + Xa)*II;
end

function R9s_0(k16, Xa_lipid, Xa, II_lipid)
  k16*(Xa_lipid + Xa)*II_lipid;
end

function Rad19_0(k9on, IX, Phospholipid, Kd9, IX_lipid)
  k9on*IX*Phospholipid - Kd9*k9on*IX_lipid;
end

function Rad20_0(k9on, IXa, Phospholipid, Kd9, IXa_lipid)
  k9on*IXa*Phospholipid - Kd9*k9on*IXa_lipid;
end

function Rad22_0(k10on, X, Phospholipid, Kd10, X_lipid)
  k10on*X*Phospholipid - Kd10*k10on*X_lipid;
end

function Rad31_0(k11aon, XIa, Phospholipid, Kd11a, XIa_lipid)
  k11aon*XIa*Phospholipid - Kd11a*k11aon*XIa_lipid;
end

function Rad32_0(k10on, Bay59_7939_Xa, Phospholipid, Kd10, Bay59_7939_Xa_lipid)
  k10on*Bay59_7939_Xa*Phospholipid - Kd10*k10on*Bay59_7939_Xa_lipid;
end

function Rad33_0(k10on, Phospholipid, Kd10, Dx9065a_Xa, Dx9065a_Xa_lipid)
  k10on*Dx9065a_Xa*Phospholipid - Kd10*k10on*Dx9065a_Xa_lipid;
end

function Rad34_0(Phospholipid, k11on, XI, Kd11, XI_lipid)
  k11on*XI*Phospholipid - Kd11*k11on*XI_lipid;
end

function RBay1_0(Bay59_7939, Xa, KBay1, Bay59_7939_Xa, kBay1, kBay_Ki_Xa)
  Bay59_7939*Xa*KBay1 - Bay59_7939_Xa*kBay1*kBay_Ki_Xa;
end

function RBay1s_0(Bag59_7959, Xa_lipid, Bay59_7939_Xa_lipid, kBay1, Kbay_Ki_Xa)
  Bag59_7959*Xa_lipid - Bay59_7939_Xa_lipid*kBay1*Kbay_Ki_Xa;
end

function RBay2_0(Bay59_7939, Xa_Va_lipid, kBay3, Bay59_7939_Xa_Va_lipid, kBay_Ki_XaVa)
  Bay59_7939*Xa_Va_lipid*kBay3 - Bay59_7939_Xa_Va_lipid*kBay3*kBay_Ki_XaVa;
end

function RBay3_0(kBay_fu_on, kBay_fu, Bay59_7939_Bound, Albumin_Factor, Bay59_7939)
  kBay_fu_on*kBay_fu*Bay59_7939_Bound - kBay_fu_on*Albumin_Factor*Bay59_7939;
end

function RBay4_0(kBay5, Bay59_7939_Xa, ATIII)
  kBay5*Bay59_7939_Xa*ATIII;
end

function RBay5_0(kBay6, Bay59_7939, Xa_ATIII, kBay_Ki_XaATIII, Bay59_7939_Xa_ATIII)
  kBay6*Bay59_7939*Xa_ATIII - kBay6*kBay_Ki_XaATIII*Bay59_7939_Xa_ATIII;
end

function RBu28_0(kbu43, IIa_Tm, PC, kbu52, IIa_Tm_PC)
  kbu43*IIa_Tm*PC - kbu52*IIa_Tm_PC;
end

function RBu280_0(kbu50, IIa, Tm, kbu51, IIa_Tm)
  kbu50*IIa*Tm - kbu51*IIa_Tm;
end

function RBu280m_0(kbu50m, mIIa, Tm, kbu51, mIIa_Tm)
  kbu50m*mIIa*Tm - kbu51*mIIa_Tm;
end

function RBu28m_0(kbu43, mIIa_Tm, PC, kbu52, mIIa_Tm_PC)
  kbu43*mIIa_Tm*PC - kbu52*mIIa_Tm_PC;
end

function RBu29_0(kbu44, APC, PS, kbu45, APC_PS)
  kbu44*APC*PS - kbu45*APC_PS;
end

function RBu290_0(kbu53, IIa_Tm_PC)
  kbu53*IIa_Tm_PC;
end

function RBu290m_0(mIIaFactor2, kbu53, mIIa_Tm_PC)
  mIIaFactor2*kbu53*mIIa_Tm_PC;
end

function RBu30_0(kbu46, APC_PS, VIIIa_lipid, kbu54, APC_PS_VIIIa_lipid)
  kbu46*APC_PS*VIIIa_lipid - kbu54*APC_PS_VIIIa_lipid;
end

function RBu30b_0(kbu46b, APC_PS, VIIIa, kbu54, APC_PS_VIIIa)
  kbu46b*APC_PS*VIIIa - kbu54*APC_PS_VIIIa;
end

function RBu31_0(kbu47, APC_PS, Va_lipid, kbu55, APC_PS_Va_lipid)
  kbu47*APC_PS*Va_lipid - kbu55*APC_PS_Va_lipid;
end

function RBu31b_0(kbu47b, APC_PS, Va, kbu55, APC_PS_Va)
  kbu47b*APC_PS*Va - kbu55*APC_PS_Va;
end

function RBu32_0(kbu48, APC_PS_Va_lipid)
  kbu48*APC_PS_Va_lipid;
end

function RBu33_0(kbu49, APC_PS_VIIIa_lipid)
  kbu49*APC_PS_VIIIa_lipid;
end

function RBu33b_0(kbu49, APC_PS_VIIIa)
  kbu49*APC_PS_VIIIa;
end

function RDx1_0(kDx1, Dx9065a, Xa, kDx2, Dx9065a_Xa)
  kDx1*Dx9065a*Xa - kDx2*Dx9065a_Xa;
end

function RDx1s_0(kDx1, Dx9065a, Xa_lipid, kDx2, Dx9065a_Xa_lipid)
  kDx1*Dx9065a*Xa_lipid - kDx2*Dx9065a_Xa_lipid;
end

function RDx2_0(kDx3, Dx9065a, Xa_Va_lipid, kDx4, Dx9065a_Xa_Va_lipid)
  kDx3*Dx9065a*Xa_Va_lipid - kDx4*Dx9065a_Xa_Va_lipid;
end

function RDx3_0(kDx5, Dx9065a_Xa, ATIII)
  kDx5*Dx9065a_Xa*ATIII;
end

function RDx4_0(kDx_fu_on, Albumin_Factor, Dx9065a, kDx_fu, Dx9065a_Bound)
  kDx_fu_on*Albumin_Factor*Dx9065a - kDx_fu_on*kDx_fu*Dx9065a_Bound;
end

function RDx5_0(kDx6, Dx9065a, Xa_ATIII, kDx7, Dx9065a_Xa_ATIII)
  kDx6*Dx9065a*Xa_ATIII - kDx7*Dx9065a_Xa_ATIII;
end

function RE27_0(Ellis2, alpha1AT, Xa)
  Ellis2*alpha1AT*Xa;
end

function RHep1_0(kHep_fu_on, Albumin_Factor, Hep, kHep_fu, Hep_Bound)
  kHep_fu_on*Albumin_Factor*Hep - kHep_fu_on*kHep_fu*Hep_Bound;
end

function RHep10_0(kHep_XIa_ATIIIa, XIa, ATIIIa)
  kHep_XIa_ATIIIa*XIa*ATIIIa;
end

function RHep11_0(kHep_XIa_ATIIIa, XIa_lipid, ATIIIa)
  kHep_XIa_ATIIIa*XIa_lipid*ATIIIa;
end

function RHep2_0(kHep_ATIII_on, ATIII, Hep, kHep_Ki_ATIII, ATIIIa)
  kHep_ATIII_on*ATIII*Hep - kHep_ATIII_on*kHep_Ki_ATIII*ATIIIa;
end

function RHep3_0(kHep_Xa_ATIIIa, Xa, ATIIIa)
  kHep_Xa_ATIIIa*Xa*ATIIIa;
end

function RHep4_0(kHep_Xa_ATIIIa, Xa_lipid, ATIIIa)
  kHep_Xa_ATIIIa*Xa_lipid*ATIIIa;
end

function RHep5_0(kHep_XaVa_ATIIIa, Xa_Va_lipid, ATIIIa)
  kHep_XaVa_ATIIIa*Xa_Va_lipid*ATIIIa;
end

function RHep6_0(kHep_IIa_ATIIIa, IIa, ATIIIa)
  kHep_IIa_ATIIIa*IIa*ATIIIa;
end

function RHep7_0(kHep_IIa_ATIIIa, mIIa, ATIIIa)
  kHep_IIa_ATIIIa*mIIa*ATIIIa;
end

function RHep8_0(kHep_IXa_ATIIIa, IXa, ATIIIa)
  kHep_IXa_ATIIIa*IXa*ATIIIa;
end

function RHep9_0(kHep_IXa_ATIIIa, IXa_lipid, ATIIIa)
  kHep_IXa_ATIIIa*IXa_lipid*ATIIIa;
end

function RI_0(kI, IIa, mIIa, I, KIm)
  kI*(IIa + 0.07*mIIa)*I/(KIm + I);
end

function RIXa_0(Kog8, XIa_lipid, IX_lipid, Kog8m)
  Kog8*XIa_lipid*IX_lipid/(Kog8m + IX_lipid);
end

function RIXad_0(Kog8, XIa, IX, Kog8m)
  Kog8*XIa*IX/(Kog8m + IX);
end

function RK26_0(Kog26, C1Inh, XIa)
  Kog26*C1Inh*XIa;
end

function RK27_0(Kog27, alpha1AT, XIa)
  Kog27*alpha1AT*XIa;
end

function RK28_0(Kog28, ATIII, XIa)
  Kog28*ATIII*XIa;
end

function RK29_0(Kog29, XIa, alpha2AP)
  Kog29*XIa*alpha2AP;
end

function RK30_0(Kog30, XIa, PAI1)
  Kog30*XIa*PAI1;
end

function RvWF1_0(vWF, VIII, kvWF1, VIII_vWF, kvWF2)
  vWF*VIII*kvWF1 - VIII_vWF*kvWF2;
end

function RvWF2_0(vWF, VIIIa, kvWF3, VIIIa_vWF, kvWF4)
  vWF*VIIIa*kvWF3 - VIIIa_vWF*kvWF4;
end

function RXa_0(Kog9, IXa_lipid, X_lipid, Kog9m)
  Kog9*IXa_lipid*X_lipid/(Kog9m + X_lipid);
end

function RXi1_0(kXim1, IIa, Xim, kXim2, IIa_Xim)
  kXim1*IIa*Xim - kXim2*IIa_Xim;
end

function RXi2_0(kXim3, mIIa, Xim, kXim4, mIIa_Xim)
  kXim3*mIIa*Xim - kXim4*mIIa_Xim;
end

function RXi3_0(kXim5, IIa_Tm, Xim, kXim6, IIa_Tm_Xim)
  kXim5*IIa_Tm*Xim - kXim6*IIa_Tm_Xim;
end

function RXi4_0(kXim_fu_on, Albumin_Factor, Xim, kXim_fu, Xim_Bound)
  kXim_fu_on*Albumin_Factor*Xim - kXim_fu_on*kXim_fu*Xim_Bound;
end

function RXIaII_0(Kog10, IIa, mIIa, XI, Kog10m)
  Kog10*(IIa + mIIa)*XI/(Kog10m + XI);
end

function RXIaIIs_0(Kog10, IIa, mIIa, XI_lipid, Kog10m)
  Kog10*(IIa + mIIa)*XI_lipid/(Kog10m + XI_lipid);
end

function RXIaXII_0(Kog6, XIIa, XI, Kog6m)
  Kog6*XIIa*XI/(Kog6m + XI);
end

function RXIaXIIs_0(Kog6, XIIa, XI_lipid, Kog6m)
  Kog6*XIIa*XI_lipid/(Kog6m + XI_lipid);
end

function TmAT_0(Bourin1, IIa_Tm, ATIII)
  Bourin1*IIa_Tm*ATIII;
end

function TmPCI_0(Elisen1, IIa_Tm, PCI)
  Elisen1*IIa_Tm*PCI;
end

model Burghaus2011___Simulating_Rivaroxaban_effects_on_blood_coagulation()
  // Burghaus2011 - Simulating Rivaroxaban effects on blood coagulation
  // Another mathematical model of blood coagulation.
  // hasPart kegg.drug:D07086
  // hasVersion PW:0002596
  // isVersionOf GO:0007596
  // isDescribedBy pubmed:21526168

  // Compartments:
  compartment compartment = 1;

  // Species:
  species APC in compartment = 0;  // isVersionOf uniprot:P04070; isVersionOf kegg.orthology:K01344
  species APC_alpha1AT in compartment = 0;  // hasPart uniprot:P04070; hasPart uniprot:P01009; GO:0043234
  species alpha1AT in compartment = 2.45e-5;  // isVersionOf kegg.orthology:K03984; isVersionOf uniprot:P01009
  species APC_a2AP in compartment = 9e-7;  // hasPart uniprot:P08697; hasPart uniprot:P04070; GO:0043234
  species alpha2AP in compartment = 0;  // isVersionOf uniprot:P08697; isVersionOf kegg.orthology:K03983
  species APC_a2MG in compartment = 0;  // hasPart uniprot:P01023; hasPart uniprot:P04070; GO:0043234
  species a2MG in compartment = 3.11e-6;  // isVersionOf kegg.orthology:K03910; isVersionOf uniprot:P01023
  species APC_PCI in compartment = 0;  // hasPart kegg.orthology:K03913; hasPart uniprot:P04070; GO:0043234
  species PCI in compartment = 8.8e-8;  // isVersionOf kegg.orthology:K03913
  species APC_PNI in compartment = 0;  // hasPart uniprot:P07093; hasPart uniprot:P04070; GO:0043234
  species PNI in compartment = 2e-11;  // isVersionOf uniprot:P07093; isVersionOf kegg.orthology:K16643
  species ATIII in compartment = 2.5e-6;  // isVersionOf kegg.orthology:K03911; isVersionOf uniprot:P01008
  species Tm in compartment = 3.3e-10;  // isVersionOf kegg.orthology:K03907; isVersionOf uniprot:P07204
  species mIIa_ATIII in compartment = 0;  // hasPart uniprot:P01008; hasPart mmdb:68004
  species mIIa_Tm in compartment = 0;  // hasPart mmdb:68004; hasPart uniprot:P07204
  species mIIa_PCI in compartment = 0;  // hasPart mmdb:68004; hasPart kegg.orthology:K03913
  species TF in compartment = 4e-9;  // isVersionOf kegg.orthology:K03901; isVersionOf uniprot:P13726
  species TF_VII in compartment = 0;  // hasPart uniprot:P13726; hasPart uniprot:P08709
  species VII in compartment = 1e-8;  // isVersionOf kegg.orthology:K01320; isVersionOf uniprot:P08709
  species VIII_lipid in compartment = 0;  // hasPart CHEBI:18059; hasPart uniprot:P00451
  species VIIIa_lipid in compartment = 0;  // hasPart CHEBI:18059; hasPart uniprot:P00451
  species VIII in compartment = 7e-10;  // isVersionOf uniprot:P00451
  species VIIIa in compartment = 0;  // isVersionOf uniprot:P00451
  species VIII_vWF in compartment = 0;  // hasPart uniprot:P04275; hasPart uniprot:P00451
  species VIIIa_vWF in compartment = 0;  // hasPart uniprot:P00451; hasPart uniprot:P04275
  species IXa_VIIIa_lipid in compartment = 0;  // hasPart uniprot:P00740; hasPart CHEBI:18059; hasPart uniprot:P00451
  species IXa_lipid in compartment = 0;  // hasPart uniprot:P00740; hasPart CHEBI:18059
  species Phospholipid in compartment = 0;  // isVersionOf CHEBI:16247
  species IXa_VIIIa_X_lipid in compartment = 0;  // hasPart uniprot:P00451; hasPart CHEBI:18059; hasPart uniprot:P00740; hasPart uniprot:P00742
  species Xa_lipid in compartment = 0;  // hasPart uniprot:P00742; hasPart CHEBI:18059
  species VIIIa1_L in compartment = 0;  // isVersionOf uniprot:P00451
  species VIIIa2 in compartment = 0;  // isVersionOf uniprot:P00451
  species X_lipid in compartment = 0;  // hasPart CHEBI:18059; hasPart uniprot:P00742
  species V_lipid in compartment = 0;  // hasPart CHEBI:18059; hasPart uniprot:P12259
  species Va_lipid in compartment = 0;  // hasPart uniprot:P12259; hasPart CHEBI:18059
  species V in compartment = 2e-8;  // isVersionOf kegg.orthology:K03902; isVersionOf uniprot:P12259
  species Va in compartment = 0;  // isVersionOf uniprot:P12259
  species Xa in compartment = 1.6e-14;  // isVersionOf kegg.orthology:K01314; isVersionOf uniprot:P00742
  species Xa_Va_lipid in compartment = 0;  // hasPart CHEBI:18059; hasPart uniprot:P12259; hasPart uniprot:P00742
  species II_lipid in compartment = 0;  // hasPart CHEBI:18059; hasPart uniprot:P00734
  species Xa_Va_II_lipid in compartment = 0;  // hasPart CHEBI:18059; hasPart uniprot:P00742; hasPart uniprot:P12259; hasPart uniprot:P00734
  species mIIa in compartment = 0;  // isVersionOf mmdb:68004; isVersionOf pdb:3E6P
  species II in compartment = 1.4e-6;  // isVersionOf uniprot:P00734; isVersionOf kegg.orthology:K01313
  species IIa in compartment = 0;  // isVersionOf kegg.compound:C00752
  species TF_VIIa in compartment = 0;  // hasPart uniprot:P08709; hasPart uniprot:P13726
  species VIIa in compartment = 1e-10;  // isVersionOf uniprot:P08709
  species TFPI in compartment = 2.5e-9;  // isVersionOf kegg.orthology:K03909; isVersionOf uniprot:P10646
  species Xa_TFPI in compartment = 0;  // hasPart uniprot:P00742; hasPart uniprot:P10646
  species TF_VIIa_Xa in compartment = 0;  // hasPart uniprot:P13726; hasPart uniprot:P08709; hasPart uniprot:P00742
  species TF_VIIa_Xa_TFPI in compartment = 0;  // hasPart kegg.orthology:K03909; hasPart uniprot:P08709; hasPart uniprot:P13726; hasPart uniprot:P00742
  species Xa_ATIII in compartment = 0;  // hasPart uniprot:P00742; hasPart uniprot:P01008
  species Xa_a2MG in compartment = 0;  // hasPart uniprot:P01023; hasPart uniprot:P00742
  species APC_ATIII in compartment = 0;  // hasPart uniprot:P01008; hasPart uniprot:P04070; GO:0043234
  species Xa_PCI in compartment = 0;  // hasPart kegg.orthology:K03913; hasPart uniprot:P00742
  species mIIa_a2MG in compartment = 0;  // hasPart mmdb:68004; hasPart uniprot:P01023
  species mIIa_alpha1AT in compartment = 0;  // hasPart uniprot:P01009; hasPart mmdb:68004
  species HCII in compartment = 1.2e-6;  // isVersionOf uniprot:P05546; isVersionOf kegg.orthology:K03912
  species mIIa_HCII in compartment = 0;  // hasPart mmdb:68004; hasPart uniprot:P05546
  species mIIa_PNI in compartment = 0;  // hasPart mmdb:68004; hasPart uniprot:P07093
  species IXa in compartment = 0;  // isVersionOf uniprot:P00740
  species IXa_ATIII in compartment = 0;  // hasPart uniprot:P01008; hasPart uniprot:P00740
  species IIa_ATIII in compartment = 0;  // hasPart kegg.compound:C00752; hasPart uniprot:P01008
  species IIa_a2MG in compartment = 0;  // hasPart uniprot:P01023; hasPart kegg.compound:C00752
  species IIa_alpha1AT in compartment = 0;  // hasPart kegg.compound:C00752; hasPart uniprot:P01009
  species IIa_HCII in compartment = 0;  // hasPart kegg.compound:C00752; hasPart uniprot:P05546
  species IIa_PNI in compartment = 0;  // hasPart kegg.compound:C00752; hasPart uniprot:P07093
  species IIa_PCI in compartment = 0;  // hasPart kegg.orthology:K03913; hasPart kegg.compound:C00752
  species TF_VIIa_ATIII in compartment = 0;  // hasPart uniprot:P08709; hasPart uniprot:P01008; hasPart uniprot:P13726
  species TF_VIIa_X in compartment = 0;  // hasPart uniprot:P00742; hasPart uniprot:P13726; hasPart uniprot:P08709
  species X in compartment = 1.6e-7;  // isVersionOf kegg.orthology:K01314; isVersionOf uniprot:P00742
  species IX in compartment = 9e-8;  // isVersionOf uniprot:P00740; isVersionOf kegg.orthology:K01321
  species TF_VIIa_IX in compartment = 0;  // hasPart uniprot:P13726; hasPart uniprot:P08709; hasPart uniprot:P00740
  species TF_VIIa_IX_lipid in compartment = 0;  // hasPart uniprot:P00740; hasPart uniprot:P13726; hasPart uniprot:P08709; hasPart chebi:P00740
  species IX_lipid in compartment = 0;  // hasPart CHEBI:18059; hasPart uniprot:P00740
  species XIa in compartment = 0;  // isVersionOf kegg.orthology:K01323; isVersionOf uniprot:P03951
  species XIa_lipid in compartment = 0;  // hasPart CHEBI:18059; hasPart uniprot:P03951
  species Dx9065a_Xa in compartment = 0;  // hasPart pubchem.compound:122128; hasPart uniprot:P00742
  species Dx9065a_Xa_lipid in compartment = 0;  // hasPart CHEBI:18059; hasPart pubchem.compound:122128; hasPart uniprot:P00742
  species XI in compartment = 2.5e-8;  // isVersionOf uniprot:P03951; isVersionOf kegg.orthology:K01323
  species XI_lipid in compartment = 0;  // hasPart CHEBI:18059; hasPart uniprot:P03951
  species IIa_Tm_PC in compartment = 0;  // hasPart kegg.compound:C00752; hasPart uniprot:P04070; hasPart uniprot:P07204
  species PC in compartment = 6e-8;  // isVersionOf uniprot:P04070
  species IIa_Tm in compartment = 0;  // hasPart uniprot:P07204; hasPart kegg.compound:C00752
  species mIIa_Tm_PC in compartment = 0;  // hasPart uniprot:P04070; hasPart mmdb:68004; hasPart uniprot:P07204
  species APC_PS in compartment = 0;  // hasPart uniprot:P07225; hasPart uniprot:P04070; GO:0043234
  species PS in compartment = 1.4e-7;  // isVersionOf uniprot:P07225
  species Bay59_7939_Xa in compartment = 0;  // hasPart uniprot:P00742; hasPart CHEBI:68579
  species Bay59_7939 in compartment = 0;  // isVersionOf kegg.drug:D07086; isVersionOf CHEBI:68579
  species Bay59_7939_Xa_lipid in compartment = 0;  // hasPart CHEBI:68579; hasPart uniprot:P00742; hasPart CHEBI:18059
  species Bay59__7939_Xa_Va_lipid in compartment = 0; Bay59__7939_Xa_Va_lipid is "Bay59_­7939_Xa_Va_lipid";  // hasPart uniprot:P12259; hasPart uniprot:P00742; hasPart CHEBI:18059; hasPart CHEBI:68579
  species Bay59_7939_Bound in compartment = 0;  // isVersionOf CHEBI:68579
  species Bay59_7939_Xa_ATIII in compartment = 0;  // hasPart CHEBI:68579; hasPart uniprot:P01008; hasPart uniprot:P00742
  species APC_PS_VIIIa_lipid in compartment = 0;  // hasPart uniprot:P00451; hasPart CHEBI:18059; hasPart uniprot:P07225; hasPart uniprot:P04070
  species APC_PS_VIIIa in compartment = 0;  // hasPart uniprot:P07225; hasPart uniprot:P04070; hasPart uniprot:P00451; GO:0043234
  species APC_PS_Va_lipid in compartment = 0;  // hasPart uniprot:P12259; hasPart CHEBI:18059; hasPart uniprot:P04070; hasPart uniprot:P07225
  species APC_PS_Va in compartment = 0;  // hasPart uniprot:P12259; hasPart uniprot:P04070; hasPart uniprot:P07225; GO:0043234
  species Va_Inhib in compartment = 0;  // isVersionOf uniprot:P12259
  species VIIIa_Inhib in compartment = 0;  // isVersionOf uniprot:P00451
  species Dx9065a in compartment = 0;  // isVersionOf pubchem.compound:122128
  species Dx9065a_Xa_Va_lipid in compartment = 0;  // hasPart CHEBI:18059; hasPart pubchem.compound:122128; hasPart uniprot:P00742; hasPart uniprot:P12259
  species Dx9065a_Xa_ATIII in compartment = 0;  // hasPart uniprot:P00742; hasPart uniprot:P01008; hasPart pubchem.compound:122128
  species Dx9065a_Bound in compartment = 0;  // isVersionOf pubchem.compound:122128
  species Xa_alpha1AT in compartment = 0;  // hasPart uniprot:P01009; hasPart uniprot:P00742
  species Hep in compartment = 0;  // isVersionOf CHEBI:28304; isVersionOf kegg.compound:C00374
  species Hep_Bound in compartment = 0;  // isVersionOf CHEBI:28304
  species ATIIIa in compartment = 0;  // isVersionOf kegg.orthology:K03911; isVersionOf uniprot:P01008
  species XIa_ATIII in compartment = 0;  // hasPart uniprot:P01008; hasPart uniprot:P03951
  species I in compartment = 7e-6;  // isVersionOf kegg.orthology:K03903; isVersionOf uniprot:P02671
  species Ia in compartment = 0;  // isVersionOf kegg.compound:C00290
  species C1Inh in compartment = 1.7e-6;  // isVersionOf uniprot:P05155
  species XIa_C1Inh in compartment = 0;  // hasPart uniprot:P03951; hasPart uniprot:P05155
  species XIa_alpha1AT in compartment = 0;  // hasPart uniprot:P01009; hasPart uniprot:P03951
  species XIa_alpha2AP in compartment = 0;  // hasPart uniprot:P03951; hasPart uniprot:P08697
  species PAI1 in compartment = 4.6e-10;  // isVersionOf kegg.orthology:K03982; isVersionOf uniprot:P05121
  species XIa_PAI1 in compartment = 0;  // hasPart uniprot:P05121; hasPart uniprot:P03951
  species vWF in compartment = 3.5e-8;  // isVersionOf uniprot:P04275; isVersionOf kegg.orthology:K03900
  species IIa_Xim in compartment = 0;  // hasPart CHEBI:65172; hasPart kegg.compound:C00752
  species Xim in compartment = 0;  // isVersionOf kegg.drug:D01981; isVersionOf CHEBI:65172
  species mIIa_Xim in compartment = 0;  // hasPart CHEBI:65172; hasPart mmdb:68004
  species IIa_Tm_Xim in compartment = 0;  // hasPart CHEBI:65172; hasPart kegg.compound:C00752; hasPart uniprot:P07204
  species Xim_Bound in compartment = 0;  // isVersionOf CHEBI:65172
  species XIIa in compartment = 0;  // isVersionOf kegg.orthology:K01328; isVersionOf uniprot:P00748

  // Parameters:
  Albumin_Factor = 1;
  Bourin1 = 31950;
  Dilution_Factor = 0.33333;
  Down1 = 488.333;
  Down2 = 108.5;
  Elisen1 = 2.5212396e4;
  Ellis1 = 718;
  Ellis2 = 226.667;
  Heeb1 = 86;
  Heeb2 = 100;
  Hep_Activity_Factor = 1;
  Herm1 = 1480000;
  Herm1_i = 2.7e-12;
  Herm2 = 5200;
  Herm2_i = 8e-10;
  Herm3 = 33100;
  Herm3_i = 1.1e-9;
  Herm4 = 800;
  Herm4_i = 1.19e-8;
  Herm5 = 0.148;
  k1 = 0.0031;
  k10 = 6;
  k10_on = 10000000;
  k11 = 19;
  k11a_on = 10000000;
  k11_on = 10000000;
  k12 = 22000000;
  k13 = 2.4;
  k14 = 10000000;
  k15 = 0.3;
  k16 = 6.2683558e4;
  k17 = 6500000;
  k17b = 6500000;
  k17c = 1100000;
  k17_vWF = 36000;
  k18 = 0.005;
  k19 = 59000000;
  k2 = 160000;
  k20 = 0.001;
  k21 = 1140000000;
  k22 = 99.56;
  k23 = 22000;
  k24 = 0.006;
  k25 = 0.001;
  k26 = 2790000;
  k26b = 5020000;
  k26c = 4.6000009e4;
  k27 = 0.2;
  k28 = 2.51e9;
  k29 = 103;
  k2_on = 10000000;
  k3 = 0.0031;
  k30 = 100000000;
  k31 = 99.04;
  k32 = 53000000;
  k33 = 0.00036;
  k34 = 900000;
  k35 = 0.00727;
  k36 = 272000000;
  k37 = 50000000;
  k38 = 1500;
  k39 = 1.3995167e4;
  k4 = 23000000;
  k40 = 490;
  k41 = 280;
  k42 = 230;
  k5 = 440000;
  k5_on = 1500000;
  k6 = 13000000;
  k7 = 23000;
  k8 = 1.05;
  k8_on = 50000000;
  k9 = 25000000;
  k9_on = 50000000;
  kBay_fu = 0.054;
  kBay_fu_on = 0.175;
  kBay_Ki_Xa = 4e-10;
  kBay_Ki_XaATIII = 4e-10;
  kBay_Ki_XaVa = 4e-10;
  kBay1 = 54000000;
  kBay3 = 1500000;
  kBay5 = 0;
  kBay6 = 0;
  kbu_Factor1 = 0.00344;
  kbu43 = 1000000;
  kbu44 = 1000000;
  kbu45 = 0.005;
  kbu46 = 10000000;
  kbu46b = 3.4354671e4;
  kbu47 = 157000000;
  kbu47b = 5.37739141e5;
  kbu48 = 0.8;
  kbu49 = 0.8;
  kbu50 = 2.36643283e5;
  kbu50m = 2.36643283e5;
  kbu51 = 0.0025;
  kbu52 = 0.064;
  kbu53 = 3.6;
  kbu54 = 0.16;
  kbu55 = 0.16;
  Kd10 = 2.3e-7;
  Kd11 = 1e-8;
  Kd11a = 1.7e-9;
  Kd2 = 2.3e-7;
  Kd5 = 1e-9;
  Kd8 = 2.5e-9;
  Kd9 = 2.5e-9;
  kDx_fu = 0.538;
  kDx_fu_on = 0.53;
  kDx1 = 5000000;
  kDx2 = 0.205;
  kDx3 = 5000000;
  kDx4 = 0.205;
  kDx5 = 1500;
  kDx6 = 5000000;
  kDx7 = 0.205;
  kHep_ATIII_on = 59400000;
  kHep_fu = 19;
  kHep_fu_on = 0.53;
  kHep_IIa_ATIIIa = 550000;
  kHep_IXa_ATIIIa = 10000;
  kHep_Ki_ATIII = 7.7e-6;
  kHep_Xa_ATIIIa = 1910000;
  kHep_XaVa_ATIIIa = 570000;
  kHep_XIa_ATIIIa = 150;
  kl = 528.42;
  Klm = 3.16e-6;
  Kog1 = 0.033;
  Kog10 = 0.017;
  Kog10m = 4.66e-10;
  Kog1m = 1.1e-5;
  Kog2 = 3.6;
  Kog26 = 16.667;
  Kog27 = 66.6;
  Kog28 = 166.6;
  Kog29 = 500;
  Kog2m = 9.1e-8;
  Kog3 = 40;
  Kog30 = 210000;
  Kog3m = 3.7e-5;
  Kog4 = 5.7;
  Kog4m = 5.1e-7;
  Kog5 = 0.00567;
  Kog5m = 5e-7;
  Kog6 = 0.11;
  Kog6m = 2e-6;
  Kog7 = 0.567;
  Kog7m = 5e-7;
  Kog8 = 0.238;
  Kog8m = 3.5e-7;
  Kog9 = 0.000333;
  Kog9m = 2e-6;
  k_vWF1 = 640000;
  k_vWF2 = 0.00023;
  k_vWF3 = 59000;
  k_vWF4 = 0.038;
  k_Xim_fu = 9;
  k_Xim_fu_on = 0.53;
  k_Xim1 = 12000000;
  k_Xim2 = 0.036;
  k_Xim3 = 27100000;
  k_Xim4 = 0.036;
  k_Xim5 = 27100000;
  k_Xim6 = 0.036;
  Meer1 = 10.033;
  Suzu1 = 9833.333;
  Suzu1_i = 3.1e-7;
  Veer1 = 2000;
  __mIIa_Factor1_mTmAT_ = 1; __mIIa_Factor1_mTmAT_ is "?_mIIa_Factor1_mTmAT_?";
  __mIIa_Factor2_RBu290m_ = 1; __mIIa_Factor2_RBu290m_ is "?_mIIa_Factor2_RBu290m_?";

  // Assignment rules:
  Thrombin_mole_conversion := IIa*1000000000;
  Fibrin_mole_conversion := Ia*1000000000;

  // Reactions:
  APCa1AT: APC + alpha1AT => APC_alpha1AT; compartment*APCa1AT_0(Meer1, APC, alpha1AT);
  APCa2AP: APC + alpha2AP => APC_a2AP; compartment*APCa2AP_0(Heeb2, APC, alpha2AP);
  APCa2MG: APC + a2MG => APC_a2MG; compartment*APCa2MG_0(Heeb1, APC, a2MG);
  APCPCI: APC + PCI -> APC_PCI; compartment*APCPCI_0(Herm4, APC, PCI, Herm4_i, APC_PCI);
  APCPNI: APC + PNI -> APC_PNI; compartment*APCPNI_0(Herm2, APC, PNI, Herm2_i, APC_PNI);
  mTmAT: mIIa_Tm + ATIII => mIIa_ATIII + Tm; compartment*mTmAT_0(__mIIa_Factor1_mTmAT_, Bourin1, mIIa_Tm, ATIII);
  mTmPCI: mIIa_Tm + PCI => mIIa_PCI + Tm; compartment*mTmPCI_0(Elisen1, mIIa_Tm, PCI, __mIIa_Factor1_mTmAT_);
  R1: TF + VII -> TF_VII; compartment*R1_0(k2, TF, VII, k1, TF_VII);
  R10: VIII_lipid => VIIIa_lipid; compartment*R10_0(k17, IIa, k17b, mIIa, k17c, Xa_lipid, Xa, VIII_lipid);  // modifiers: IIa, mIIa, Xa_lipid, Xa
  R10d: VIII => VIIIa; compartment*R10d_0(k17, IIa, k17b, mIIa, k17c, Xa_lipid, Xa, VIII);  // modifiers: IIa, mIIa, Xa_lipid, Xa
  R10vWF: VIII_vWF => VIIIa_vWF; compartment*R10vWF_0(k17_vWF, IIa, mIIa, VIII_vWF);  // modifiers: IIa, mIIa
  R11: VIIIa_lipid + IXa_lipid -> IXa_VIIIa_lipid + Phospholipid; compartment*R11_0(k19, VIIIa_lipid, IXa_lipid, k18, IXa_VIIIa_lipid);
  R12: IXa_VIIIa_X_lipid + Phospholipid -> IXa_VIIIa_lipid + Xa_lipid; compartment*R12_0(k21, IXa_VIIIa_X_lipid, Phospholipid, k20, IXa_VIIIa_lipid);
  R12a: IXa_VIIIa_X_lipid + Phospholipid => IXa_VIIIa_lipid + Xa_lipid; compartment*R12a_0(k22, IXa_VIIIa_X_lipid);
  R13: VIIIa_lipid -> VIIIa1_L + VIIIa2 + Phospholipid; compartment*R13_0(k24, VIIIa_lipid, k23, VIIIa1_L, VIIIa2);
  R14: IXa_VIIIa_X_lipid + Phospholipid => VIIIa1_L + VIIIa2 + X_lipid + IXa_lipid; compartment*R14_0(k25, IXa_VIIIa_X_lipid);
  R15: IXa_VIIIa_lipid => VIIIa1_L + VIIIa2 + IXa_lipid; compartment*R15_0(k25, IXa_VIIIa_lipid);
  R16: V_lipid => Va_lipid; compartment*R16_0(k26, IIa, k26b, mIIa, k26c, Xa, Xa_lipid, V_lipid);  // modifiers: IIa, mIIa, Xa, Xa_lipid
  R16d: V => Va; compartment*R16d_0(k26, IIa, k26b, mIIa, k26c, Xa, Xa_lipid, V);  // modifiers: IIa, mIIa, Xa, Xa_lipid
  R17d: Xa + Va_lipid -> Xa_Va_lipid; compartment*R17d_0(k28, Xa, Va_lipid, k27, Xa_Va_lipid);
  R18: Xa_Va_lipid + II_lipid => Xa_Va_II_lipid + Phospholipid; compartment*R18_0(k30, Xa_Va_lipid, II_lipid);
  R18a: Xa_Va_II_lipid => Xa_Va_lipid + mIIa; compartment*R18a_0(k31, Xa_Va_II_lipid);
  R18d: Xa_Va_lipid + II -> Xa_Va_II_lipid; compartment*R18d_0(k30, Xa_Va_lipid, II, k29, Xa_Va_II_lipid);
  R19: mIIa => IIa; compartment*R19_0(k32, mIIa, Xa_Va_lipid);  // modifiers: Xa_Va_lipid
  R2: TF + VIIa -> TF_VIIa; compartment*R2_0(k4, TF, VIIa, k3, TF_VIIa);
  R20: Xa + TFPI -> Xa_TFPI; compartment*R20_0(k34, Xa, TFPI, k33, Xa_TFPI);
  R21: TF_VIIa_Xa + TFPI -> TF_VIIa_Xa_TFPI; compartment*R21_0(k36, TF_VIIa_Xa, TFPI, k35, TF_VIIa_Xa_TFPI);
  R22: TF_VIIa + Xa_TFPI => TF_VIIa_Xa_TFPI; compartment*R22_0(k37, TF_VIIa, Xa_TFPI);
  R23: Xa + ATIII => Xa_ATIII; compartment*R23_0(k38, Xa, ATIII);
  R23a2MG: Xa + a2MG => Xa_a2MG; compartment*R23a2MG_0(Ellis1, Xa, a2MG);
  R23APC: APC + ATIII => APC_ATIII; compartment*R23APC_0(Herm5, APC, ATIII);
  R23PCI: Xa + PCI -> Xa_PCI; compartment*R23PCI_0(Suzu1, Xa, PCI, Suzu1_i, Xa_PCI);
  R24: mIIa + ATIII => mIIa_ATIII; compartment*R24_0(k39, mIIa, ATIII);
  R24a2MG: mIIa + a2MG => mIIa_a2MG; compartment*R24a2MG_0(Down1, mIIa, a2MG);
  R24alpha1AT: mIIa + alpha1AT => mIIa_alpha1AT; compartment*R24alpha1AT_0(Down2, mIIa, alpha1AT);
  R24HCII: mIIa + HCII => mIIa_HCII; compartment*R24HCII_0(Veer1, mIIa, HCII);
  R24PCI: mIIa + PCI => mIIa_PCI; compartment*R24PCI_0(Herm3, mIIa, PCI, Herm3_i, mIIa_PCI);
  R24PNI: mIIa + PNI => mIIa_PNI; compartment*R24PNI_0(Herm1, mIIa, PNI, Herm1_i, mIIa_PNI);
  R25: IXa + ATIII => IXa_ATIII; compartment*R25_0(k40, IXa, ATIII);
  R26: IIa + ATIII => IIa_ATIII; compartment*R26_0(k41, IIa, ATIII);
  R26a2MG: IIa + a2MG => IIa_a2MG; compartment*R26a2MG_0(Down1, IIa, a2MG);
  R26alpha1AT: IIa + alpha1AT => IIa_alpha1AT; compartment*R26alpha1AT_0(Down2, IIa, alpha1AT);
  R26HCII: IIa + HCII => IIa_HCII; compartment*R26HCII_0(Veer1, IIa, HCII);
  R26PCI: IIa + PCI -> IIa_PCI; compartment*R26PCI_0(Herm3, IIa, PCI, Herm3_i, IIa_PCI);
  R26PNI: IIa + PNI -> IIa_PNI; compartment*R26PNI_0(Herm1, IIa, PNI, Herm1_i, IIa_PNI);
  R27: TF_VIIa + ATIII => TF_VIIa_ATIII; compartment*R27_0(k42, TF_VIIa, ATIII);
  R3: TF_VIIa + VII => TF_VIIa + VIIa; compartment*R3_0(k5, TF_VIIa, VII);
  R4: VII => VIIa; compartment*R4_0(k6, Xa, Xa_lipid, VII);  // modifiers: Xa, Xa_lipid
  R5: VII => VIIa; compartment*R5_0(k7, IIa, VII);  // modifiers: IIa
  R6: TF_VIIa + X -> TF_VIIa_X; compartment*R6_0(k9, TF_VIIa, X, k8, TF_VIIa_X);
  R6a: TF_VIIa_X => TF_VIIa_Xa; compartment*R6a_0(k10, TF_VIIa_X);
  R6s: TF_VIIa + X_lipid -> TF_VIIa_X + Phospholipid; compartment*R6s_0(k9, TF_VIIa, X_lipid, k8, TF_VIIa_X);
  R7: TF_VIIa + Xa -> TF_VIIa_Xa; compartment*R7_0(k12, TF_VIIa, Xa, k11, TF_VIIa_Xa);
  R7s: TF_VIIa + Xa_lipid -> TF_VIIa_Xa + Phospholipid; compartment*R7s_0(k12, TF_VIIa, Xa_lipid, k11, TF_VIIa_Xa);
  R8: TF_VIIa + IX -> TF_VIIa_IX; compartment*R8_0(k14, TF_VIIa, IX, k13, TF_VIIa_IX);
  R8a: TF_VIIa_IX => TF_VIIa + IXa; compartment*R8a_0(k15, TF_VIIa_IX);
  R8as: TF_VIIa_IX_lipid => TF_VIIa + IXa_lipid; compartment*R8as_0(k15, TF_VIIa_IX_lipid);
  R8s: TF_VIIa + IX_lipid -> TF_VIIa_IX_lipid; compartment*R8s_0(k14, TF_VIIa, IX_lipid, k13, TF_VIIa_IX_lipid);
  R9: II => IIa; compartment*R9_0(k16, Xa_lipid, Xa, II);  // modifiers: Xa_lipid, Xa
  R9s: II_lipid => IIa + Phospholipid; compartment*R9s_0(k16, Xa_lipid, Xa, II_lipid);  // modifiers: Xa_lipid, Xa
  Rad19: IX + Phospholipid -> IX_lipid; compartment*Rad19_0(k9_on, IX, Phospholipid, Kd9, IX_lipid);
  Rad20: IXa + Phospholipid -> IXa_lipid; compartment*Rad20_0(k9_on, IXa, Phospholipid, Kd9, IXa_lipid);
  Rad22: X + Phospholipid -> X_lipid; compartment*Rad22_0(k10_on, X, Phospholipid, Kd10, X_lipid);
  Rad23: Xa + Phospholipid -> Xa_lipid; compartment*Rad23_0(k10_on, Xa, Phospholipid, Kd10, Xa_lipid);
  Rad24: V + Phospholipid -> V_lipid; compartment*Rad24_0(k5_on, V, Phospholipid, Kd5, V_lipid);
  Rad25: Va + Phospholipid -> Va_lipid; compartment*Rad25_0(k5_on, Va, Phospholipid, Kd5, Va_lipid);
  Rad26: VIII + Phospholipid -> VIII_lipid; compartment*Rad26_0(k8_on, VIII, Phospholipid, Kd8, VIII_lipid);
  Rad27: VIIIa + Phospholipid -> VIIIa_lipid; compartment*Rad27_0(k8_on, VIIIa, Phospholipid, Kd8, VIIIa_lipid);
  Rad28: II + Phospholipid -> II_lipid; compartment*Rad28_0(k2_on, II, Phospholipid, Kd2, II_lipid);
  Rad31: XIa + Phospholipid -> XIa_lipid; compartment*Rad31_0(k11a_on, XIa, Phospholipid, Kd11a, XIa_lipid);
  Rad32: Bay59_7939_Xa + Phospholipid -> Bay59_7939_Xa_lipid; compartment*Rad32_0(k10_on, Bay59_7939_Xa, Phospholipid, Kd10, Bay59_7939_Xa_lipid);
  Rad33: Dx9065a_Xa + Phospholipid -> Dx9065a_Xa_lipid; compartment*Rad33_0(k10_on, Dx9065a_Xa, Kd10, Phospholipid, Dx9065a_Xa_lipid);
  Rad34: XI + Phospholipid -> XI_lipid; compartment*Rad34_0(Phospholipid, k11_on, XI, Kd11, XI_lipid);
  RBay1: Bay59_7939 + Xa -> Bay59_7939_Xa; compartment*RBay1_0(Bay59_7939, Xa, kBay1, Bay59_7939_Xa, kBay1, kBay_Ki_Xa);
  RBay1s: Bay59_7939 + Xa_lipid -> Bay59_7939_Xa_lipid; compartment*RBay1s_0(Bay59_7939, Xa_lipid, Bay59_7939_Xa_lipid, kBay1, kBay_Ki_Xa);
  RBay2: Bay59_7939 + Xa_Va_lipid -> Bay59__7939_Xa_Va_lipid; compartment*RBay2_0(Bay59_7939, Xa_Va_lipid, kBay3, Bay59__7939_Xa_Va_lipid, kBay_Ki_XaVa);
  RBay3: Bay59_7939_Bound -> Bay59_7939; compartment*RBay3_0(kBay_fu_on, kBay_fu, Bay59_7939_Bound, Albumin_Factor, Bay59_7939);
  RBay4: Bay59_7939_Xa + ATIII => Bay59_7939_Xa_ATIII; compartment*RBay4_0(kBay5, Bay59_7939_Xa, ATIII);
  RBay5: Bay59_7939 + Xa_ATIII -> Bay59_7939_Xa_ATIII; compartment*RBay5_0(kBay6, Bay59_7939, Xa_ATIII, kBay_Ki_XaATIII, Bay59_7939_Xa_ATIII);
  RBu28: IIa_Tm + PC -> IIa_Tm_PC; compartment*RBu28_0(kbu43, IIa_Tm, PC, kbu52, IIa_Tm_PC);
  RBu280: IIa + Tm -> IIa_Tm; compartment*RBu280_0(kbu50, IIa, Tm, kbu51, IIa_Tm);
  RBu280m: mIIa + Tm -> mIIa_Tm; compartment*RBu280m_0(kbu50m, mIIa, Tm, kbu51, mIIa_Tm);
  RBu28m: mIIa_Tm + PC => mIIa_Tm_PC; compartment*RBu28m_0(kbu43, mIIa_Tm, PC, kbu52, mIIa_Tm_PC);
  RBu29: APC + PS -> APC_PS; compartment*RBu29_0(kbu44, APC, PS, kbu45, APC_PS);
  RBu290: IIa_Tm_PC => IIa_Tm + APC; compartment*RBu290_0(kbu53, IIa_Tm_PC);
  RBu290m: mIIa_Tm_PC => APC + mIIa_Tm; compartment*RBu290m_0(__mIIa_Factor2_RBu290m_, kbu53, mIIa_Tm_PC);
  RBu30: APC_PS + VIIIa_lipid -> APC_PS_VIIIa_lipid; compartment*RBu30_0(kbu46, APC_PS, VIIIa_lipid, kbu54, APC_PS_VIIIa_lipid);
  RBu30b: APC_PS + VIIIa -> APC_PS_VIIIa; compartment*RBu30b_0(kbu46b, APC_PS, VIIIa, kbu54, APC_PS_VIIIa);
  RBu31: APC_PS + Va_lipid -> APC_PS_Va_lipid; compartment*RBu31_0(kbu47, APC_PS, Va_lipid, kbu55, APC_PS_Va_lipid);
  RBu31b: APC_PS + Va -> APC_PS_Va; compartment*RBu31b_0(kbu47b, APC_PS, Va, kbu55, APC_PS_Va);
  RBu32: APC_PS_Va_lipid => APC_PS + Va_Inhib + Phospholipid; compartment*RBu32_0(kbu48, APC_PS_Va_lipid);
  RBu32b: APC_PS_Va => Va_Inhib + APC_PS; compartment*RBu32b_0(kbu48, APC_PS_Va);
  RBu33: APC_PS_VIIIa_lipid => APC_PS + VIIIa_Inhib + Phospholipid; compartment*RBu33_0(kbu49, APC_PS_VIIIa_lipid);
  RBu33b: APC_PS_VIIIa => VIIIa_Inhib + APC_PS; compartment*RBu33b_0(kbu49, APC_PS_VIIIa);
  RDx1: Dx9065a + Xa -> Dx9065a_Xa; compartment*RDx1_0(kDx1, Dx9065a, Xa, kDx2, Dx9065a_Xa);
  RDx1s: Dx9065a + Xa_lipid -> Dx9065a_Xa_lipid; compartment*RDx1s_0(kDx1, Dx9065a, Xa_lipid, kDx2, Dx9065a_Xa_lipid);
  RDx2: Dx9065a + Xa_Va_lipid -> Dx9065a_Xa_Va_lipid; compartment*RDx2_0(kDx3, Dx9065a, Xa_Va_lipid, kDx4, Dx9065a_Xa_Va_lipid);
  RDx3: Dx9065a_Xa + ATIII => Dx9065a_Xa_ATIII; compartment*RDx3_0(kDx5, Dx9065a_Xa, ATIII);
  RDx4: Dx9065a -> Dx9065a_Bound; compartment*RDx4_0(kDx_fu_on, Albumin_Factor, Dx9065a, kDx_fu, Dx9065a_Bound);
  RDx5: Dx9065a + Xa_ATIII -> Dx9065a_Xa_ATIII; compartment*RDx5_0(kDx6, Dx9065a, Xa_ATIII, kDx7, Dx9065a_Xa_ATIII);
  RE27: Xa + alpha1AT => Xa_alpha1AT; compartment*RE27_0(Ellis2, alpha1AT, Xa);
  RHep1: Hep -> Hep_Bound; compartment*RHep1_0(kHep_fu_on, Albumin_Factor, Hep, kHep_fu, Hep_Bound);
  RHep10: XIa + ATIIIa => XIa_ATIII + Hep; compartment*RHep10_0(kHep_XIa_ATIIIa, XIa, ATIIIa);
  RHep11: XIa_lipid + ATIIIa => XIa_ATIII + Phospholipid + Hep; compartment*RHep11_0(kHep_XIa_ATIIIa, XIa_lipid, ATIIIa);
  RHep2: ATIII + Hep -> ATIIIa; compartment*RHep2_0(kHep_ATIII_on, ATIII, Hep, kHep_Ki_ATIII, ATIIIa);
  RHep3: Xa + ATIIIa => Xa_ATIII + Hep; compartment*RHep3_0(kHep_Xa_ATIIIa, Xa, ATIIIa);
  RHep4: Xa_lipid + ATIIIa => Xa_ATIII + Phospholipid + Hep; compartment*RHep4_0(kHep_Xa_ATIIIa, Xa_lipid, ATIIIa);
  RHep5: Xa_Va_lipid + ATIIIa => Xa_ATIII + Hep + Va_lipid; compartment*RHep5_0(kHep_XaVa_ATIIIa, Xa_Va_lipid, ATIIIa);
  RHep6: IIa + ATIIIa => IIa_ATIII + Hep; compartment*RHep6_0(kHep_IIa_ATIIIa, IIa, ATIIIa);
  RHep7: mIIa + ATIIIa => mIIa_ATIII + Hep; compartment*RHep7_0(kHep_IIa_ATIIIa, mIIa, ATIIIa);
  RHep8: ATIIIa + IXa => IXa_ATIII + Hep; compartment*RHep8_0(kHep_IXa_ATIIIa, IXa, ATIIIa);
  RHep9: ATIIIa + IXa_lipid => IXa_ATIII + Phospholipid + Hep; compartment*RHep9_0(kHep_IXa_ATIIIa, IXa_lipid, ATIIIa);
  RI: I => Ia; compartment*RI_0(kl, IIa, mIIa, I, Klm);  // modifiers: IIa, mIIa
  RIXa: IX_lipid => IXa_lipid; compartment*RIXa_0(Kog8, XIa_lipid, IX_lipid, Kog8m);  // modifiers: XIa_lipid
  RIXad: IX => IXa; compartment*RIXad_0(Kog8, XIa, IX, Kog8m);  // modifiers: XIa
  RK26: XIa + C1Inh => XIa_C1Inh; compartment*RK26_0(Kog26, C1Inh, XIa);
  RK27: XIa + alpha1AT => XIa_alpha1AT; compartment*RK27_0(Kog27, alpha1AT, XIa);
  RK28: XIa + ATIII => XIa_ATIII; compartment*RK28_0(Kog28, ATIII, XIa);
  RK29: XIa + alpha2AP => XIa_alpha2AP; compartment*RK29_0(Kog29, XIa, alpha2AP);
  RK30: XIa + PAI1 => XIa_PAI1; compartment*RK30_0(Kog30, XIa, PAI1);
  RvWF1: vWF + VIII -> VIII_vWF; compartment*RvWF1_0(vWF, VIII, k_vWF1, VIII_vWF, k_vWF2);
  RvWF2: vWF + VIIIa -> VIIIa_vWF; compartment*RvWF2_0(vWF, VIIIa, k_vWF3, VIIIa_vWF, k_vWF4);
  RXa: X_lipid => Xa_lipid; compartment*RXa_0(Kog9, IXa_lipid, X_lipid, Kog9m);  // modifiers: IXa_lipid
  RXi1: Xim + IIa -> IIa_Xim; compartment*RXi1_0(k_Xim1, IIa, Xim, k_Xim2, IIa_Xim);
  RXi2: Xim + mIIa -> mIIa_Xim; compartment*RXi2_0(k_Xim3, mIIa, Xim, k_Xim4, mIIa_Xim);
  RXi3: Xim + IIa_Tm -> IIa_Tm_Xim; compartment*RXi3_0(k_Xim5, IIa_Tm, Xim, k_Xim6, IIa_Tm_Xim);
  RXi4: Xim -> Xim_Bound; compartment*RXi4_0(k_Xim_fu_on, Albumin_Factor, Xim, k_Xim_fu, Xim_Bound);
  RXIaII: XI => XIa; compartment*RXIaII_0(Kog10, IIa, mIIa, XI, Kog10m);  // modifiers: IIa, mIIa
  RXIaIIs: XI_lipid => XIa_lipid; compartment*RXIaIIs_0(Kog10, IIa, mIIa, XI_lipid, Kog10m);  // modifiers: IIa, mIIa
  RXIaXII: XI => XIa; compartment*RXIaXII_0(Kog6, XIIa, XI, Kog6m);  // modifiers: XIIa
  RXIaXIIs: XI_lipid => XIa_lipid; compartment*RXIaXIIs_0(Kog6, XIIa, XI_lipid, Kog6m);  // modifiers: XIIa
  TmAT: IIa_Tm + ATIII => Tm + IIa_ATIII; compartment*TmAT_0(Bourin1, IIa_Tm, ATIII);
  TmPCI: IIa_Tm + PCI => Tm + IIa_PCI; compartment*TmPCI_0(Elisen1, IIa_Tm, PCI);

  // Unit definitions:
  unit volume = 1e-3 litre;
  unit substance = 1e-3 mole;
end
