// SBML level 2 version 4
// dcterms:bibliographicCitation: urn:miriam:pubmed:25426077

function function_for_decay(species, t_half_life)
  species*ln(2)/t_half_life;
end

function function_for_formation(t_half_life, formation_rate, k_factor)
  k_factor*(ln(2)/t_half_life)/(formation_rate + 1);
end

model Burghaus2014___Simulating_blood_coagulation_factor_Xa_inhibitors()
  // Burghaus2014 - Simulating blood coagulation factor Xa inhibitors
  // Mathematical model of blood coagulation factors II, VII, IX and X as well as protein C and protein S and the effect of warfarin on kinetic rates.
  // hasPart kegg.drug:D07086
  // hasPart kegg.compound:C01541
  // isVersionOf GO:0007596
  // isDescribedBy pubmed:25426077

  // Compartments:
  compartment compartment = 1;

  // Species:
  species fII in compartment = 1.4e-6;
  species fIX in compartment = 9e-8;
  species fVII in compartment = 1e-8;
  species $R_warfarin in compartment = 0.4; R_warfarin is "R-warfarin";
  species $S_warfarin in compartment = 0.4; S_warfarin is "S-warfarin";
  species fX in compartment = 1.6e-7;
  species Protein_C in compartment = 6e-8; Protein_C is "Protein-C";
  species Protein_S in compartment = 1.4e-7; Protein_S is "Protein-S";

  // Parameters:
  fII_half_life = 57;
  fIX_half_life = 25.5;
  fVII_half_life = 5;
  fX_half_life = 37.5;
  Protein_C_half_life = 9;
  Protein_S_half_life = 60;
  R_warfarin_half_life = 45;
  S_warfarin_half_life = 29;
  k_fII = 0.1;
  k_fIX = 0.1;
  k_fVII = 0.1;
  k_fX = 0.1;
  k_Protein_C = 0.1; k_Protein_C is "k_Protein-C";
  k_Protein_S = 0.1; k_Protein_S is "k_Protein-S";

  // Assignment rules:
  formation_rate := ((R_warfarin + 3.25*S_warfarin)^2 + 1)^(-1);
  curve_relative_II := fII/0.08;
  curve_relative_VII := fVII/0.08;
  curve_relative_IX := fIX/0.08;
  curve_relative_X := fX/0.08;
  curve_relative_C := Protein_C/0.08;
  curve_relative_s := Protein_S/0.08;

  // Reactions:
  R01_fII_decay: fII => ; compartment*function_for_decay(fII, fII_half_life);
  R02_fII_formation: => fII; compartment*function_for_formation(fII_half_life, formation_rate, k_fII);
  R03_fIX_decay: fIX => ; compartment*function_for_decay(fIX, fIX_half_life);
  R04_fIX_formation: => fIX; compartment*function_for_formation(fIX_half_life, formation_rate, k_fIX);
  R05_fVII_decay: fVII => ; compartment*function_for_decay(fVII, fVII_half_life);
  R06_fVII_formation: => fVII; compartment*function_for_formation(fVII_half_life, formation_rate, k_fVII);
  R07_R_warfarin_decay: $R_warfarin => ; compartment*function_for_decay(R_warfarin, R_warfarin_half_life);
  R08_S_warfarin_decay: $S_warfarin => ; compartment*function_for_decay(S_warfarin, S_warfarin_half_life);
  R09_fX_decay: fX => ; compartment*function_for_decay(fX, fX_half_life);
  R10_fX_formation: => fX; compartment*function_for_formation(fX_half_life, formation_rate, k_fX);
  R11_Protein_C_decay: Protein_C => ; compartment*function_for_decay(Protein_C, Protein_C_half_life);
  R12_Protein_C_formation: => Protein_C; compartment*function_for_formation(Protein_C_half_life, formation_rate, k_Protein_C);
  R13_Protein_S_decay: Protein_S => ; compartment*function_for_decay(Protein_S, Protein_S_half_life);
  R14_Protein_S_formation: => Protein_S; compartment*function_for_formation(Protein_S_half_life, formation_rate, k_Protein_S);

  // Events:
  event: at (time >= 760): R_warfarin = 0, S_warfarin = 0;

  // Unit definitions:
  unit volume = 1e-3 litre;
  unit substance = 1e-3 mole;
end
