// SBML level 2 version 3

model MODEL1608250001()
  // Cardiomyocyte Telomere Damage by ROS without Cell Division

  // Compartments:
  compartment tissue = 1;

  // Species:
  substanceOnly species intact in tissue = 75;
  substanceOnly species one_taf in tissue = 25;
  substanceOnly species two_taf in tissue = 0;
  substanceOnly species three_taf in tissue = 0;
  substanceOnly species four_taf in tissue = 0;
  substanceOnly species ROS in tissue = 100;
  substanceOnly species $Source in tissue = 1;
  substanceOnly species $Sink in tissue = 0;
  substanceOnly species div_marker in tissue = 0;

  // Parameters:
  kdam = 1e-10;
  kdeathintact = 0;
  kdeath1taf = 0;
  kdeath2taf = 0;
  kdeath3taf = 0;
  kdeath4taf = 0;
  kdivintact = 0;
  kdiv1taf = 0;
  kdiv2taf = 0;
  kdiv3taf = 0;
  kdiv4taf = 0;
  kprodROS = 1e-6;
  kremROS = 1e-10;

  // Reactions:
  first_hit: intact + ROS => one_taf + ROS; kdam*intact*ROS;
  second_hit: one_taf + ROS => two_taf + ROS; kdam*one_taf*ROS;
  third_hit: two_taf + ROS => three_taf + ROS; kdam*two_taf*ROS;
  fourth_hit: three_taf + ROS => four_taf + ROS; kdam*three_taf*ROS;
  ROS_production: $Source => ROS; kprodROS*Source;
  ROS_removal: ROS => $Sink; kremROS*ROS;
  Intact_cell_division: intact => 2 intact; kdivintact*intact;
  One_taf_cell_division: one_taf => 2 one_taf; kdiv1taf*one_taf;
  Two_taf_cell_division: two_taf => 2 two_taf; kdiv2taf*two_taf;
  Three_taf_cell_division: three_taf => 2 three_taf; kdiv3taf*three_taf;
  Four_taf_cell_division: four_taf => 2 four_taf; kdiv4taf*four_taf;
  Intact_cell_death: intact => $Sink; kdeathintact*intact;
  one_taf_cell_death: one_taf => $Sink; kdeath1taf*one_taf;
  two_taf_cell_death: two_taf => $Sink; kdeath2taf*two_taf;
  three_taf_cell_death: three_taf => $Sink; kdeath3taf*three_taf;
  four_taf_cell_death: four_taf => $Sink; kdeath4taf*four_taf;

  // Unit definitions:
  unit substance = item;
end
