// SBML level 2 version 3

model MODEL1608250000()
  // Cardiomyocyte Telomere Damage

  // Compartments:
  compartment tissue = 1;

  // Species:
  substanceOnly species intact in tissue = 75;
  substanceOnly species intact_div in tissue = 0;
  substanceOnly species one_taf in tissue = 25;
  substanceOnly species one_taf_div in tissue = 0;
  substanceOnly species two_taf in tissue = 0;
  substanceOnly species two_taf_div in tissue = 0;
  substanceOnly species three_taf_div in tissue = 0;
  substanceOnly species three_taf in tissue = 0;
  substanceOnly species four_taf in tissue = 0;
  substanceOnly species ROS in tissue = 100;
  substanceOnly species $Source in tissue = 1;
  substanceOnly species $Sink in tissue = 0;
  substanceOnly species div_marker in tissue = 0;

  // Parameters:
  kmaxdam = 1;
  kdeathintact = -4.217;
  kdeath1taf = -4.217;
  kdeath2taf = 4.783e-9;
  kdeath3taf = 4.783e-9;
  kdeath4taf = 4.783e-9;
  khalfdam = 100;
  kSintact = 4.783e-9;
  kS1taf = 4.783e-9;
  kS2taf = 4.783e-9;
  kS3taf = 4.783e-9;
  kprodROS = 1e-6;
  kremROS = 1e-10;

  // Assignment rules:
  kdiv := 1 - kdamdiv;
  kdamdiv := kmaxdam*ROS^3/(khalfdam^3 + ROS^3);

  // Reactions:
  ROS_production: $Source => ROS; kprodROS*Source;
  ROS_removal: ROS => $Sink; kremROS*ROS;
  Intact_cell_Sphase: intact => intact_div; kSintact*intact;
  One_taf_cell_Sphase: one_taf => one_taf_div; kS1taf*one_taf;
  Two_taf_cell_Sphase: two_taf => two_taf_div; kS2taf*two_taf;
  Three_taf_cell_Sphase: three_taf => three_taf_div; kS3taf*three_taf;
  Intact_cell_normal_division: intact_div => 2 intact; kdiv*intact_div;
  One_taf_normal_division: one_taf_div => 2 one_taf; kdiv*one_taf_div;
  Two_taf_normal_division: two_taf_div => 2 two_taf; kdiv*two_taf_div;
  Three_taf_normal_division: three_taf_div => 2 three_taf; kdiv*three_taf_div;
  Intact_cell_damage_division: intact_div => 2 one_taf; kdamdiv*intact_div;
  One_taf_cell_damage_division: one_taf_div => 2 two_taf; kdamdiv*one_taf_div;
  Two_taf_cell_damage_division: two_taf_div => 2 three_taf; kdamdiv*two_taf_div;
  Three_taf_cell_damage_division: three_taf_div => 2 four_taf; kdamdiv*three_taf_div;
  Intact_cell_death: intact => $Sink; kdeathintact*intact;
  one_taf_cell_death: one_taf => $Sink; kdeath1taf*one_taf;
  two_taf_cell_death: two_taf => $Sink; kdeath2taf*two_taf;
  three_taf_cell_death: three_taf => $Sink; kdeath3taf*three_taf;
  four_taf_cell_death: four_taf => $Sink; kdeath4taf*four_taf;

  // Unit definitions:
  unit substance = item;
end
