// SBML level 2 version 4
// dcterms:bibliographicCitation: urn:miriam:doi:10.1155/2014/863298

function rateOf(a)
  NaN;
end

model Cazzaniga2014___Blood_Coagulation_with_Platelet_Activation()
  // Cazzaniga2014 - Blood Coagulation with Platelet Activation
  // Mathematical model of blood coagulation with platelet activation. Model includes factor XII, factor VIIIa fragments, meizothrombin, kallikrein, C1-inhibitor, alpha1-Antitrypsin, alpha2-Antiplasmin, fibrinogen and fibrillin.
  // hasPart GO:0030168
  // isVersionOf GO:0007596
  // isDescribedBy doi:10.1155/2014/863298

  // Compartments:
  compartment compartment = 1;

  // Species:
  species TF in compartment = 5e-12;
  species TF_VII in compartment = 0; TF_VII is "TF:VII";
  species VII in compartment = 1e-8;
  species TF_VIIa in compartment = 0; TF_VIIa is "TF:VIIa";
  species VIIa in compartment = 1e-10;
  species Xa in compartment = 0;
  species IIa in compartment = 0;
  species TF_VIIa_X in compartment = 0; TF_VIIa_X is "TF:VIIa:X";
  species X in compartment = 1.6e-7;
  species TF_VIIa_Xa in compartment = 0; TF_VIIa_Xa is "TF:VIIa:Xa";
  species IX in compartment = 9e-8;
  species TF_VIIa_IX in compartment = 0; TF_VIIa_IX is "TF:VIIa:IX";
  species IXa in compartment = 0;
  species II in compartment = 1.4e-6;
  species VIII in compartment = 7e-10;
  species VIIIa in compartment = 0;
  species IXa_VIIIa in compartment = 0; IXa_VIIIa is "IXa:VIIIa";
  species IXa_VIIIa_X in compartment = 0; IXa_VIIIa_X is "IXa:VIIIa:X";
  species VIIIa1_L in compartment = 0; VIIIa1_L is "VIIIa1-L";
  species VIIIa2 in compartment = 0;
  species V in compartment = 2e-8;
  species Va in compartment = 0;
  species Xa_Va in compartment = 0; Xa_Va is "Xa:Va";
  species Xa_Va_II in compartment = 0; Xa_Va_II is "Xa:Va:II";
  species mIIa in compartment = 0;
  species TFPI in compartment = 2.5e-9;
  species Xa_TFPI in compartment = 0; Xa_TFPI is "Xa:TFPI";
  species TF_VIIa_Xa_TFPI in compartment = 0; TF_VIIa_Xa_TFPI is "TF:VIIa:Xa:TFPI";
  species ATIII in compartment = 3.4e-6;
  species Xa_ATIII in compartment = 0; Xa_ATIII is "Xa:ATIII";
  species mIIa_ATIII in compartment = 0; mIIa_ATIII is "mIIa:ATIII";
  species IXa_ATIII in compartment = 0; IXa_ATIII is "IXa:ATIII";
  species IIa_ATIII in compartment = 0; IIa_ATIII is "IIa:ATIII";
  species TF_VIIa_ATIII in compartment = 0; TF_VIIa_ATIII is "TF:VIIa:ATIII";
  species XII in compartment = 3.4e-7;
  species XIIa in compartment = 0;
  species XIIa_XII in compartment = 0; XIIa_XII is "XIIa:XII";
  species PKal in compartment = 4.5e-7;
  species XIIa_PKal in compartment = 0; XIIa_PKal is "XIIa:PKal";
  species Kal in compartment = 0;
  species XII_Kal in compartment = 0; XII_Kal is "XII:Kal";
  species Kal_i in compartment = 0;
  species C1inh in compartment = 2.5e-6;
  species XIIa_C1inh in compartment = 0; XIIa_C1inh is "XIIa:C1inh";
  species XIIa_ATIII in compartment = 0; XIIa_ATIII is "XIIa:ATIII";
  species XI in compartment = 3.1e-8;
  species XI_IIa in compartment = 0; XI_IIa is "XI:IIa";
  species XIa in compartment = 0;
  species XIIa_XI in compartment = 0; XIIa_XI is "XIIa:XI";
  species XIa_ATIII in compartment = 0; XIa_ATIII is "XIa:ATIII";
  species XIa_C1inh in compartment = 0; XIa_C1inh is "XIa:C1inh";
  species A1AT in compartment = 4.5e-5;
  species XIa_A1AT in compartment = 0; XIa_A1AT is "XIa:A1AT";
  species A2AP in compartment = 1e-6;
  species XIa_A2AP in compartment = 0; XIa_A2AP is "XIa:A2AP";
  species XIa_IX in compartment = 0; XIa_IX is "XIa:IX";
  species IXa_X in compartment = 0; IXa_X is "IXa:X";
  species Xa_VIII in compartment = 0; Xa_VIII is "Xa:VIII";
  species VIIa_IX in compartment = 0; VIIa_IX is "VIIa:IX";
  species VIIa_X in compartment = 0; VIIa_X is "VIIa:X";
  species Fbg in compartment = 9e-6;
  species Fbg_IIa in compartment = 0; Fbg_IIa is "Fbg:IIa";
  species FPA in compartment = 0;
  species Fbn1 in compartment = 0;
  species Fbn1_IIa in compartment = 0; Fbn1_IIa is "Fbn1:IIa";
  species FPB in compartment = 0;
  species Fbn2 in compartment = 0;
  species Fbn1_2 in compartment = 0;
  species Fbn1_2_IIa in compartment = 0; Fbn1_2_IIa is "Fbn1_2:IIa";
  species Fbn2_IIa in compartment = 0; Fbn2_IIa is "Fbn2:IIa";

  // Parameters:
  k01 = 3200000;
  k02 = 0.031;
  k03 = 23000000;
  k04 = 3.1e-5;
  k05 = 440000;
  k06 = 13000000;
  k07 = 23000;
  k08 = 25000000;
  k09 = 0.0105;
  k10 = 6;
  k11 = 19;
  k12 = 22000000;
  k13 = 10000000;
  k14 = 2.4;
  k15 = 1.8;
  k16 = 7500;
  k17 = 20000000;
  k18 = 10000000;
  k19 = 0.0001;
  k20 = 100000000;
  k21 = 1e-5;
  k22 = 8.2;
  k23 = 6e-5;
  k24 = 22000;
  k25 = 0.001;
  k26 = 0.001;
  k27 = 20000000;
  k28 = 400000000;
  k29 = 0.2;
  k30 = 100000000;
  k31 = 103;
  k32 = 63.5;
  k33 = 15000000;
  k34 = 900000;
  k35 = 0.00036;
  k36 = 320000000;
  k37 = 0.011;
  k38 = 50000000;
  k39 = 1500;
  k40 = 7100;
  k41 = 490;
  k42 = 7100;
  k43 = 230;
  k44 = 0.0005;
  k45 = 100000000;
  k46 = 750;
  k47 = 0.033;
  k48 = 100000000;
  k49 = 3600;
  k50 = 40;
  k51 = 100000000;
  k52 = 45.3;
  k53 = 5.7;
  k54 = 27000;
  k55 = 0.011;
  k56 = 3600;
  k57 = 21.6;
  k58 = 100000000;
  k59 = 5;
  k60 = 0.00013;
  k61 = 100000000;
  k62 = 200;
  k63 = 0.00057;
  k64 = 3190000;
  k65 = 320;
  k66 = 1800;
  k67 = 100;
  k68 = 4300;
  k69 = 100000000;
  k70 = 41;
  k71 = 7.7;
  k72 = 100000000;
  k73 = 0.64;
  k74 = 0.0007;
  k75 = 100000000;
  k76 = 2.1;
  k77 = 0.023;
  k78 = 100000000;
  k79 = 0.9;
  k80 = 3.6e-5;
  k81 = 100000000;
  k82 = 210;
  k83 = 1.6e-6;
  k84 = 100000000;
  k85 = 636;
  k86 = 84;
  k87 = 100000000;
  k88 = 742;
  k89 = 7.4;
  k90 = 1000000;
  k91 = 0.064;
  k92 = 100000000;
  k93 = 701;
  k94 = 49;
  k95 = 100000000;
  k96 = 1000;
  dummy_variable_max_IIa = 0;
  epsilon_max0 = 0.01;
  var k19_0; k19_0 is "k19*";
  var k21_0; k21_0 is "k21*";
  var k23_0; k23_0 is "k23*";
  var k29_0; k29_0 is "k29*";
  var k31_0; k31_0 is "k31*";
  var k35_0; k35_0 is "k35*";
  var k46_0; k46_0 is "k46*";
  var k49_0; k49_0 is "k49*";
  var k52_0; k52_0 is "k52*";
  var k62_0; k62_0 is "k62*";
  var k70_0; k70_0 is "k70*";
  var k73_0; k73_0 is "k73*";
  var k76_0; k76_0 is "k76*";
  var k82_0; k82_0 is "k82*";
  Clotting_time = 0;
  Initial_for_Fbg = Fbg;

  // Assignment rules:
  Hill_function := dummy_variable_max_IIa^1.6124/(dummy_variable_max_IIa^1.6123 + 2.4279e-9^1.6123);
  epsilon_max := epsilon_max0 + (1 - epsilon_max0)*Hill_function;
  k73_0 := k73/epsilon_max;
  k76_0 := k76/epsilon_max;
  k82_0 := k82/epsilon_max;
  k19_0 := k19/epsilon_max;
  k21_0 := k21/epsilon_max;
  k23_0 := k23/epsilon_max;
  k29_0 := k29/epsilon_max;
  k31_0 := k31/epsilon_max;
  k35_0 := k35/epsilon_max;
  k46_0 := k46/epsilon_max;
  k49_0 := k49/epsilon_max;
  k52_0 := k52/epsilon_max;
  k62_0 := k62/epsilon_max;
  k70_0 := k70/epsilon_max;

  // Rate rules:
  dummy_variable_max_IIa' = piecewise(k16*II*Xa + k33*Xa_Va*mIIa - k42*IIa*ATIII - k58*XI*IIa + k59*XI_IIa + k60*XI_IIa - k84*Fbg*IIa + k85*Fbg_IIa + k86*Fbg_IIa - k87*Fbn1*IIa + k88*Fbn1_IIa + k89*Fbn1_IIa - k92*Fbn1_2*IIa + k93*Fbn1_2_IIa + k94*Fbn1_2_IIa - k95*Fbn2*IIa + k96*Fbn2_IIa, rateOf(IIa) > 0, 0);

  // Reactions:
  R01: TF + VII => TF_VII; compartment*k01*TF*VII;
  R02: TF_VII => TF + VII; compartment*k02*TF_VII;
  R03: TF + VIIa => TF_VIIa; compartment*k03*TF*VIIa;
  R04: TF_VIIa => TF + VIIa; compartment*k04*TF_VIIa;
  R05: TF_VIIa + VII => TF_VIIa + VIIa; compartment*k05*TF_VIIa*VII;
  R06: Xa + VII => Xa + VIIa; compartment*k06*Xa*VII;
  R07: IIa + VII => IIa + VIIa; compartment*k07*IIa*VII;
  R08: TF_VIIa + X => TF_VIIa_X; compartment*k08*TF_VIIa*X;
  R09: TF_VIIa_X => TF_VIIa + X; compartment*k09*TF_VIIa_X;
  R10: TF_VIIa_X => TF_VIIa_Xa; compartment*k10*TF_VIIa_X;
  R11: TF_VIIa_Xa => TF_VIIa + Xa; compartment*k11*TF_VIIa_Xa;
  R12: TF_VIIa + Xa => TF_VIIa_Xa; compartment*k12*TF_VIIa*Xa;
  R13: TF_VIIa + IX => TF_VIIa_IX; compartment*k13*TF_VIIa*IX;
  R14: TF_VIIa_IX => TF_VIIa + IX; compartment*k14*TF_VIIa_IX;
  R15: TF_VIIa_IX => TF_VIIa + IXa; compartment*k15*TF_VIIa_IX;
  R16: II + Xa => IIa + Xa; compartment*k16*II*Xa;
  R17: IIa + VIII => IIa + VIIIa; compartment*k17*IIa*VIII;
  R18: VIIIa + IXa => IXa_VIIIa; compartment*k18*VIIIa*IXa;
  R19: IXa_VIIIa => VIIIa + IXa; compartment*k19_0*IXa_VIIIa;
  R20: IXa_VIIIa + X => IXa_VIIIa_X; compartment*k20*IXa_VIIIa*X;
  R21: IXa_VIIIa_X => IXa_VIIIa + X; compartment*k21_0*IXa_VIIIa_X;
  R22: IXa_VIIIa_X => IXa_VIIIa + Xa; compartment*k22*IXa_VIIIa_X;
  R23: VIIIa => VIIIa1_L + VIIIa2; compartment*k23_0*VIIIa;
  R24: VIIIa1_L + VIIIa2 => VIIIa; compartment*k24*VIIIa1_L*VIIIa2;
  R25: IXa_VIIIa_X => VIIIa1_L + VIIIa2 + X + IXa; compartment*k25*IXa_VIIIa_X;
  R26: IXa_VIIIa => VIIIa1_L + VIIIa2 + IXa; compartment*k26*IXa_VIIIa;
  R27: IIa + V => IIa + Va; compartment*k27*IIa*V;
  R28: Xa + Va => Xa_Va; compartment*k28*Xa*Va;
  R29: Xa_Va => Xa + Va; compartment*k29_0*Xa_Va;
  R30: Xa_Va + II => Xa_Va_II; compartment*k30*Xa_Va*II;
  R31: Xa_Va_II => Xa_Va + II; compartment*k31_0*Xa_Va_II;
  R32: Xa_Va_II => Xa_Va + mIIa; compartment*k32*Xa_Va_II;
  R33: Xa_Va + mIIa => Xa_Va + IIa; compartment*k33*Xa_Va*mIIa;
  R34: Xa + TFPI => Xa_TFPI; compartment*k34*Xa*TFPI;
  R35: Xa_TFPI => Xa + TFPI; compartment*k35_0*Xa_TFPI;
  R36: TF_VIIa_Xa + TFPI => TF_VIIa_Xa_TFPI; compartment*k36*TF_VIIa_Xa*TFPI;
  R37: TF_VIIa_Xa_TFPI => TF_VIIa_Xa + TFPI; compartment*k37*TF_VIIa_Xa_TFPI;
  R38: TF_VIIa + Xa_TFPI => TF_VIIa_Xa_TFPI; compartment*k38*TF_VIIa*Xa_TFPI;
  R39: Xa + ATIII => Xa_ATIII; compartment*k39*Xa*ATIII;
  R40: mIIa + ATIII => mIIa_ATIII; compartment*k40*mIIa*ATIII;
  R41: IXa + ATIII => IXa_ATIII; compartment*k41*IXa*ATIII;
  R42: IIa + ATIII => IIa_ATIII; compartment*k42*IIa*ATIII;
  R43: TF_VIIa + ATIII => TF_VIIa_ATIII; compartment*k43*TF_VIIa*ATIII;
  R44: XII => XIIa; compartment*k44*XII;
  R45: XIIa + XII => XIIa_XII; compartment*k45*XIIa*XII;
  R46: XIIa_XII => XIIa + XII; compartment*k46_0*XIIa_XII;
  R47: XIIa_XII => 2 XIIa; compartment*k47*XIIa_XII;
  R48: XIIa + PKal => XIIa_PKal; compartment*k48*XIIa*PKal;
  R49: XIIa_PKal => XIIa + PKal; compartment*k49_0*XIIa_PKal;
  R50: XIIa_PKal => XIIa + Kal; compartment*k50*XIIa_PKal;
  R51: XII + Kal => XII_Kal; compartment*k51*XII*Kal;
  R52: XII_Kal => XII + Kal; compartment*k52_0*XII_Kal;
  R53: XII_Kal => XIIa + Kal; compartment*k53*XII_Kal;
  R54: PKal + Kal => 2 Kal; compartment*k54*PKal*Kal;
  R55: Kal => Kal_i; compartment*k55*Kal;
  R56: XIIa + C1inh => XIIa_C1inh; compartment*k56*XIIa*C1inh;
  R57: XIIa + ATIII => XIIa_ATIII; compartment*k57*XIIa*ATIII;
  R58: XI + IIa => XI_IIa; compartment*k58*XI*IIa;
  R59: XI_IIa => XI + IIa; compartment*k59*XI_IIa;
  R60: XI_IIa => XIa + IIa; compartment*k60*XI_IIa;
  R61: XIIa + XI => XIIa_XI; compartment*k61*XIIa*XI;
  R62: XIIa_XI => XIIa + XI; compartment*k62_0*XIIa_XI;
  R63: XIIa_XI => XIIa + XIa; compartment*k63*XIIa_XI;
  R64: XIa + XI => 2 XIa; compartment*k64*XIa*XI;
  R65: XIa + ATIII => XIa_ATIII; compartment*k65*XIa*ATIII;
  R66: XIa + C1inh => XIa_C1inh; compartment*k66*XIa*C1inh;
  R67: XIa + A1AT => XIa_A1AT; compartment*k67*XIa*A1AT;
  R68: XIa + A2AP => XIa_A2AP; compartment*k68*XIa*A2AP;
  R69: XIa + IX => XIa_IX; compartment*k69*XIa*IX;
  R70: XIa_IX => XIa + IX; compartment*k70_0*XIa_IX;
  R71: XIa_IX => XIa + IXa; compartment*k71*XIa_IX;
  R72: IXa + X => IXa_X; compartment*k72*IXa*X;
  R73: IXa_X => IXa + X; compartment*k73_0*IXa_X;
  R74: IXa_X => IXa + Xa; compartment*k74*IXa_X;
  R75: Xa + VIII => Xa_VIII; compartment*k75*Xa*VIII;
  R76: Xa_VIII => Xa + VIII; compartment*k76_0*Xa_VIII;
  R77: Xa_VIII => Xa + VIIIa; compartment*k77*Xa_VIII;
  R78: VIIa + IX => VIIa_IX; compartment*k78*VIIa*IX;
  R79: VIIa_IX => VIIa + IX; compartment*k79*VIIa_IX;
  R80: VIIa_IX => VIIa + IXa; compartment*k80*VIIa_IX;
  R81: VIIa + X => VIIa_X; compartment*k81*VIIa*X;
  R82: VIIa_X => VIIa + X; compartment*k82_0*VIIa_X;
  R83: VIIa_X => VIIa + Xa; compartment*k83*VIIa_X;
  R84: Fbg + IIa => Fbg_IIa; compartment*k84*Fbg*IIa;
  R85: Fbg_IIa => Fbg + IIa; compartment*k85*Fbg_IIa;
  R86: Fbg_IIa => Fbn1 + IIa + FPA; compartment*k86*Fbg_IIa;
  R87: Fbn1 + IIa => Fbn1_IIa; compartment*k87*Fbn1*IIa;
  R88: Fbn1_IIa => Fbn1 + IIa; compartment*k88*Fbn1_IIa;
  R89: Fbn1_IIa => Fbn2 + IIa + FPB; compartment*k89*Fbn1_IIa;
  R90: 2 Fbn1 => Fbn1_2; compartment*k90*Fbn1^2;
  R91: Fbn1_2 => 2 Fbn1; compartment*k91*Fbn1_2;
  R92: Fbn1_2 + IIa => Fbn1_2_IIa; compartment*k92*Fbn1_2*IIa;
  R93: Fbn1_2_IIa => Fbn1_2 + IIa; compartment*k93*Fbn1_2_IIa;
  R94: Fbn1_2_IIa => Fbn1_2 + IIa + FPB; compartment*k94*Fbn1_2_IIa;
  R95: Fbn2 + IIa => Fbn2_IIa; compartment*k95*Fbn2*IIa;
  R96: Fbn2_IIa => Fbn2 + IIa; compartment*k96*Fbn2_IIa;

  // Events:
  Clotting_Time: at (Fbg < 0.3*Initial_for_Fbg): Clotting_time = time;

  // Unit definitions:
  unit volume = 1e-3 litre;
end
