// SBML level 3 version 1

model Purified_HFSC_Equilibrium__environment(time_)

  // Parameters:
  time_ = ;
end

model Purified_HFSC_Equilibrium__flux(time_)

  // Parameters:
  N_SC = 14880;
  N_P = 8740;
  N_apSC = 0;
  N_apP = 0;
  p_SC = 0.04;
  p_P = 0.03;
  apSC = 0.003;
  apP = 0.003;
  K = 220000;
  deg = 0.0833;
  t_SC_P = 0.006;
  t_P_SC = 0.003;
  time_ = ;

  // Rate rules:
  N_SC' = p_SC*((K - (N_SC + N_P + N_apSC + N_apP))/K)*N_SC + t_P_SC*N_P - t_SC_P*N_SC - apSC*N_SC;
  N_P' = p_P*((K - (N_SC + N_P + N_apSC + N_apP))/K)*N_P + t_SC_P*N_SC - t_P_SC*N_P - apP*N_P;
  N_apSC' = apSC*N_SC - deg*N_apSC;
  N_apP' = apP*N_P - deg*N_apP;
end

model Purified_HFSC_Equilibrium____main()

  // Sub-modules:
  environment: Purified_HFSC_Equilibrium__environment();
  flux: Purified_HFSC_Equilibrium__flux();

  // Parameters:
  time_ = ; environment.time_ is time_; flux.time_ is time_;
end
