// SBML level 2 version 4

function bi_non_competitive_inhi(E, kcat, A, B, Kma, Kmb, I, ki)
  E*kcat/(1 + I/ki)*A*B/(Kma*Kmb + A*Kmb + B*Kma + A*B);
end

function non_comp_inhibition(substrate, Km, Inhibitor, Ki, E, kcat)
  E*kcat*substrate/((Km + substrate)*(1 + Inhibitor/Ki));
end

function FabI_equation(substrate, Km, Ki, E, kcat, inhibitor, kip, inhibitor1)
  E*kcat*substrate/((Km + substrate)*(1 + inhibitor1/Ki)*(1 + inhibitor/kip));
end

function michaelis_menten_rever(substrate, Kms, product, Kmp, E, kcatf, kcatr)
  (E*kcatf*substrate/Kms - E*kcatr*product/Kmp)/(1 + substrate/Kms + product/Kmp);
end

function HMM(kcat, E, substrate, Km)
  kcat*E*substrate/(Km + substrate);
end

function bi_irre__HMM(E, kcat, A, B, Kma, Kmb)
  E*kcat*A*B/(Kma*Kmb + A*Kmb + B*Kma + A*B);
end
bi_irre__HMM is "bi_irre (HMM)";

function bi_non_comp_inh__KdtA(E, kcat, I, ki, A, B, Kma, Kmb)
  E*kcat/(1 + I/ki)*A*B/(Kma*Kmb + A*Kmb + B*Kma + A*B);
end
bi_non_comp_inh__KdtA is "bi_non-comp inh (KdtA)";

model MODEL1601080000()
  // Emiola2016 - Crosstalk between the lipopolysaccharide and phospholipid pathways during outer membrane biosynthesis,
  // biomodels.db:MODEL1601080000

  // Compartments:
  compartment compartment = 6.7e-16;

  // Species:
  species LpxA in compartment = 0.001645668;
  // P1 is LpxA product, UDP-3-O-(beta-hydroxymyristoyl)-Nac
  species P1 in compartment = 0;
  species $UDP_GlcNac in compartment = 4.956832; UDP_GlcNac is "UDP-GlcNac";
  species LpxC in compartment = 0.0009541902;
  species promoter_LpxC in compartment = 2.478416e-6; promoter_LpxC is "promoter-LpxC";
  // P2 is LpxC product, UDP-3-O-(beta-hydroxymyristoyl)-D-glucosamine
  species P2 in compartment = 0;
  species Beta_hydroxymyristoylACP in compartment = 0; Beta_hydroxymyristoylACP is "Beta-hydroxymyristoylACP";
  species $ACP in compartment = 0.002537898;
  species LpxD in compartment = 0.001122722;
  // P3 is LpxD product, UDP-2,3-bis(beta-hydroxymyristoyl)-D-glucosamine
  species P3 in compartment = 0;
  species LpxH in compartment = 0.0004386796;
  // P4 is LpxH product, Lipid X
  species P4 in compartment = 0;
  species lipidAdisaccharide in compartment = 0;
  species LpxB in compartment = 0.0009517118;
  species LpxK in compartment = 0.001070676;
  // P6 is LpxK product, lipid IV(A)
  species P6 in compartment = 0;
  // KdtA is also called WaaA
  species KdtA in compartment = 0.0003791977;
  species promoter_KdtA in compartment = 2.478416e-6; promoter_KdtA is "promoter-KdtA";
  // P7 is KdtA product, KDO2-lipid IV(A)
  species P7 in compartment = 0;
  species LpxL in compartment = 0.00229997;
  // P8 is LpxL product, lauroyl-KDO2-lipid IV(A)
  species P8 in compartment = 0;
  species LpxM in compartment = 0.009219708;
  species lipidA in compartment = 0;
  species MsbA in compartment = 0.0005105537;
  species lipidA_OM in compartment = 0;
  species FtsH in compartment = 0.001435003;
  species FtsH_act_lpxc in compartment = 0;
  species FtsH_act_kdta in compartment = 0;
  species $CMP_KDO in compartment = 4.956832; CMP_KDO is "CMP-KDO";
  species lipidA_un in compartment = 0;
  species b_oh_10 in compartment = 0; b_oh_10 is "b-oh-10";
  species trans_10 in compartment = 0; trans_10 is "trans-10";
  species FabA in compartment = 0.05799494;
  species FabZ in compartment = 0.008253126;
  species C10_1 in compartment = 0; C10_1 is "C10:1";
  species C10 in compartment = 0;
  species FabI in compartment = 0.0309802;
  species FabB in compartment = 0.03544135;
  species ketoacyl_12 in compartment = 0; ketoacyl_12 is "ketoacyl-12";
  species FabF in compartment = 0.003172373;
  species B_OH_12 in compartment = 0; B_OH_12 is "B-OH-12";
  species FabG in compartment = 0.03420214;
  species trans_12 in compartment = 0; trans_12 is "trans-12";
  species C12 in compartment = 0;
  species ketoacyl_12_1 in compartment = 0; ketoacyl_12_1 is "ketoacyl-12:1";
  species B_OH_12_1 in compartment = 0; B_OH_12_1 is "B-OH-12:1";
  species trans_12_1 in compartment = 0; trans_12_1 is "trans-12:1";
  species C12_1 in compartment = 0; C12_1 is "C12:1";
  species ketoacyl_14 in compartment = 0; ketoacyl_14 is "ketoacyl-14";
  species trans_14 in compartment = 0; trans_14 is "trans-14";
  species C14 in compartment = 0;
  species ketoacyl_14_1 in compartment = 0; ketoacyl_14_1 is "ketoacyl-14:1";
  species B_OH_14_1 in compartment = 0; B_OH_14_1 is "B-OH-14:1";
  species trans_14_1 in compartment = 0; trans_14_1 is "trans-14:1";
  species C14_1 in compartment = 0; C14_1 is "C14:1";
  species ketoacyl_16 in compartment = 0; ketoacyl_16 is "ketoacyl-16";
  species B_OH_16 in compartment = 0; B_OH_16 is "B-OH-16";
  species trans_16 in compartment = 0; trans_16 is "trans-16";
  species C16 in compartment = 0;
  species ketoacyl_16_1 in compartment = 0; ketoacyl_16_1 is "ketoacyl-16:1";
  species B_OH_16_1 in compartment = 0; B_OH_16_1 is "B-OH-16:1";
  species trans_16_1 in compartment = 0; trans_16_1 is "trans-16:1";
  species C16_1 in compartment = 0; C16_1 is "C16:1";
  species ketoacyl_18_1 in compartment = 0; ketoacyl_18_1 is "ketoacyl-18:1";
  species B_OH_18_1 in compartment = 0; B_OH_18_1 is "B-OH-18:1";
  species trans_18_1 in compartment = 0; trans_18_1 is "trans-18:1";
  species C18_1 in compartment = 0; C18_1 is "C18:1";
  species PlsB in compartment = 0.003469783;
  species $G3P in compartment = 2.478416;
  species PlsC in compartment = 0.01040935;
  species palmitic in compartment = 0;
  species vaccenic in compartment = 0;
  species palmitoleic in compartment = 0;
  species LpxK_act in compartment = 0;
  species $proA_unreg in compartment = 2.478416e-6;
  species FadR in compartment = 0; FadR is "FadR*";
  species proA in compartment = 2.478416e-6;
  species FabR in compartment = 0; FabR is "FabR*";
  species FabR_0 in compartment = 0.0007311327;
  species FadR_proA in compartment = 0; FadR_proA is "FadR/proA";
  species inact_proA1 in compartment = 0;
  species inact_proA2 in compartment = 0;
  species FabH in compartment = 0.003271509;
  species $acetyl_CoA in compartment = 4.956832; acetyl_CoA is "acetyl-CoA";
  species FadR_0 in compartment = 0.0007311327;
  species $proB_unreg in compartment = 2.478416e-6;
  species FadR_proB in compartment = 0; FadR_proB is "FadR/proB";
  species proB in compartment = 2.478416e-6;
  species inact_proB1 in compartment = 0;
  species inact_proB2 in compartment = 0;

  // Parameters:
  var FabR_activation;
  var FabR_1; FabR_1 is "FabR*";
  var FabR_deactivation;
  quantity_to_number_factor = 6.02214179e20;

  // Assignment rules:
  FabR_activation := vaccenic + palmitoleic;
  FabR_1 := FabR*quantity_to_number_factor*compartment;
  FadR_active := FadR*quantity_to_number_factor*compartment*0.0014;
  FabR_deactivation := palmitic;
  LpxK_activation := 0.0064*(1 + (vaccenic + palmitoleic)/0.0094);
  LpxK_inactivation := palmitic*0.0034;
  FadR_active_FabB := FadR*quantity_to_number_factor*compartment*0.001;

  // Rate rules:
  UDP_GlcNac' = 0;
  ACP' = 0;
  CMP_KDO' = 0;
  G3P' = 0;

  // Reactions:
  LpxA_forward: $UDP_GlcNac + Beta_hydroxymyristoylACP => P1 + $ACP; compartment*bi_irre__HMM(LpxA, LpxA_forward_kcat, UDP_GlcNac, Beta_hydroxymyristoylACP, LpxA_forward_Kma, LpxA_forward_Kmb);  // modifiers: LpxA
    LpxA_forward_kcat = 7.17; LpxA_forward_Kma = 0.82; LpxA_forward_Kmb = 0.0016;
  LpxA_reverse: P1 + $ACP => $UDP_GlcNac + Beta_hydroxymyristoylACP; compartment*bi_irre__HMM(LpxA, LpxA_reverse_kcat, P1, ACP, LpxA_reverse_Kma, LpxA_reverse_Kmb);  // modifiers: LpxA
    LpxA_reverse_kcat = 717; LpxA_reverse_Kma = 0.82; LpxA_reverse_Kmb = 0.0016;
  LpxC_0: P1 => P2; compartment*HMM(LpxC_0_kcat, LpxC, P1, LpxC_0_Km);  // modifiers: LpxC
    LpxC_0_kcat = 3.3; LpxC_0_Km = 0.00019;
  LpxC_translate: promoter_LpxC => promoter_LpxC + LpxC; compartment*LpxC_translate_k1*promoter_LpxC;
    LpxC_translate_k1 = 0.148;
  LpxC_degrade: LpxC => ; compartment*LpxC_degrade_k1*LpxC;
    LpxC_degrade_k1 = 9.62e-5;
  LpxH_0: P3 => P4; compartment*non_comp_inhibition(P3, LpxH_0_Km, P4, LpxH_0_Ki, LpxH, LpxH_0_kcat);  // modifiers: LpxH
    LpxH_0_Km = 0.0617; LpxH_0_Ki = 0.015; LpxH_0_kcat = 47;
  LpxB_0: P3 + P4 => lipidAdisaccharide; compartment*bi_irre__HMM(LpxB, LpxB_0_kcat, P3, P4, LpxB_0_Kma, LpxB_0_Kmb);  // modifiers: LpxB
    LpxB_0_kcat = 129; LpxB_0_Kma = 0.287; LpxB_0_Kmb = 0.381;
  LpxK_0: lipidAdisaccharide => P6; compartment*HMM(LpxK_0_kcat, LpxK_act, lipidAdisaccharide, LpxK_0_Km);  // modifiers: LpxK_act
    LpxK_0_kcat = 2.1; LpxK_0_Km = 0.04;
  KdtA_translate: promoter_KdtA => promoter_KdtA + KdtA; compartment*KdtA_translate_k1*promoter_KdtA;
    KdtA_translate_k1 = 0.176;
  KdtA_degrade: KdtA => ; compartment*KdtA_degrade_k1*KdtA;
    KdtA_degrade_k1 = 0.00018;
  KdtA_0: $CMP_KDO + P6 => P7; compartment*bi_non_comp_inh__KdtA(KdtA, KdtA_0_kcat, lipidA, KdtA_0_ki, CMP_KDO, P6, KdtA_0_Kma, KdtA_0_Kmb);  // modifiers: KdtA, lipidA
    KdtA_0_kcat = 16.7; KdtA_0_ki = 0.315; KdtA_0_Kma = 0.088; KdtA_0_Kmb = 0.052;
  LpxL_0: P7 => P8 + $ACP; compartment*HMM(LpxL_0_kcat, LpxL, P7, LpxL_0_Km);  // modifiers: LpxL
    LpxL_0_kcat = 131; LpxL_0_Km = 0.015;
  LpxM_0: P8 => lipidA + $ACP; compartment*HMM(LpxM_0_kcat, LpxM, P8, LpxM_0_Km);  // modifiers: LpxM
    LpxM_0_kcat = 0.6; LpxM_0_Km = 0.00275;
  MsbA_0: lipidA => lipidA_OM; compartment*HMM(MsbA_0_kcat, MsbA, lipidA, MsbA_0_Km);  // modifiers: MsbA
    MsbA_0_kcat = 166; MsbA_0_Km = 0.021;
  LpxC_proteolysis: LpxC + FtsH_act_lpxc => FtsH_act_lpxc; compartment*LpxC_proteolysis_k1*LpxC*FtsH_act_lpxc;
    LpxC_proteolysis_k1 = 2.015;
  FtsH_activate_LpxC: FtsH + lipidAdisaccharide => FtsH_act_lpxc + lipidAdisaccharide; compartment*FtsH_activate_LpxC_k1*FtsH*lipidAdisaccharide;
    FtsH_activate_LpxC_k1 = 0.14;
  FtsH_activate_KdtA: FtsH + lipidA => FtsH_act_kdta + lipidA; compartment*FtsH_activate_KdtA_k1*FtsH*lipidA;
    FtsH_activate_KdtA_k1 = 32.3;
  KdtA_proteolysis: KdtA + FtsH_act_kdta => FtsH_act_kdta; compartment*KdtA_proteolysis_k1*KdtA*FtsH_act_kdta;
    KdtA_proteolysis_k1 = 6.8;
  LpxD_0: P2 + Beta_hydroxymyristoylACP => P3 + $ACP; compartment*bi_non_competitive_inhi(LpxD, LpxD_0_kcat, P2, Beta_hydroxymyristoylACP, LpxD_0_Kma, LpxD_0_Kmb, P3, LpxD_0_ki);  // modifiers: LpxD
    LpxD_0_kcat = 23; LpxD_0_Kma = 0.0025; LpxD_0_Kmb = 0.0032; LpxD_0_ki = 0.0094;
  KdtA_alternate: $CMP_KDO + lipidA => lipidA_un; compartment*bi_irre__HMM(KdtA, KdtA_alternate_kcat, CMP_KDO, lipidA, KdtA_alternate_Kma, KdtA_alternate_Kmb);  // modifiers: KdtA
    KdtA_alternate_kcat = 1.9; KdtA_alternate_Kma = 0.088; KdtA_alternate_Kmb = 0.052;
  FtsH_inactive_LpxC: FtsH_act_lpxc => FtsH; compartment*FtsH_inactive_LpxC_k1*FtsH_act_lpxc;
    FtsH_inactive_LpxC_k1 = 0.1;
  FtsH_inactive_KdtA: FtsH_act_kdta => FtsH; compartment*FtsH_inactive_KdtA_k1*FtsH_act_kdta;
    FtsH_inactive_KdtA_k1 = 0.1;
  FabA_C10: b_oh_10 -> trans_10; compartment*michaelis_menten_rever(b_oh_10, FabA_C10_Kms, trans_10, FabA_C10_Kmp, FabA, FabA_C10_kcatf, FabA_C10_kcatr);  // modifiers: FabA
    FabA_C10_Kms = 1.7; FabA_C10_Kmp = 1.7; FabA_C10_kcatf = 5.4; FabA_C10_kcatr = 18.6;
  FabZ_C10: b_oh_10 -> trans_10; compartment*michaelis_menten_rever(b_oh_10, FabZ_C10_Kms, trans_10, FabZ_C10_Kmp, FabZ, FabZ_C10_kcatf, FabZ_C10_kcatr);  // modifiers: FabZ
    FabZ_C10_Kms = 5.5e-5; FabZ_C10_Kmp = 5.5e-5; FabZ_C10_kcatf = 2.65; FabZ_C10_kcatr = 9.14;
  FabA_isomerase: trans_10 -> C10_1; compartment*michaelis_menten_rever(trans_10, FabA_isomerase_Kms, C10_1, FabA_isomerase_Kmp, FabA, FabA_isomerase_kcatf, FabA_isomerase_kcatr);  // modifiers: FabA
    FabA_isomerase_Kms = 0.0001; FabA_isomerase_Kmp = 0.5; FabA_isomerase_kcatf = 1.65; FabA_isomerase_kcatr = 11.75;
  FabI_C10: trans_10 => C10; compartment*non_comp_inhibition(trans_10, FabI_C10_Km, C16, FabI_C10_Ki, FabI, FabI_C10_kcat);  // modifiers: C16, FabI
    FabI_C10_Km = 0.01; FabI_C10_Ki = 0.035; FabI_C10_kcat = 20.6;
  FabI_C14: trans_14 => C14; compartment*non_comp_inhibition(trans_14, FabI_C14_Km, C16, FabI_C14_Ki, FabI, FabI_C14_kcat);  // modifiers: C16, FabI
    FabI_C14_Km = 0.0033; FabI_C14_Ki = 0.035; FabI_C14_kcat = 15;
  FabB_C12_1: C12_1 -> ketoacyl_14_1; compartment*michaelis_menten_rever(C12_1, FabB_C12_1_Kms, ketoacyl_14_1, FabB_C12_1_Kmp, FabB, FabB_C12_1_kcatf, FabB_C12_1_kcatr); FabB_C12_1 is "FabB_C12:1";  // modifiers: FabB
    FabB_C12_1_Kms = 0.028; FabB_C12_1_Kmp = 0.028; FabB_C12_1_kcatf = 3.9; FabB_C12_1_kcatr = 0.43;
  FabG_C14_1: ketoacyl_14_1 -> B_OH_14_1; compartment*michaelis_menten_rever(ketoacyl_14_1, FabG_C14_1_Kms, B_OH_14_1, FabG_C14_1_Kmp, FabG, FabG_C14_1_kcatf, FabG_C14_1_kcatr); FabG_C14_1 is "FabG_C14:1";  // modifiers: FabG
    FabG_C14_1_Kms = 0.01; FabG_C14_1_Kmp = 0.01; FabG_C14_1_kcatf = 1232; FabG_C14_1_kcatr = 536;
  FabZ_C14_1: B_OH_14_1 -> trans_14_1; compartment*michaelis_menten_rever(B_OH_14_1, FabZ_C14_1_Kms, trans_14_1, FabZ_C14_1_Kmp, FabZ, FabZ_C14_1_kcatf, FabZ_C14_1_kcatr); FabZ_C14_1 is "FabZ_C14:1";  // modifiers: FabZ
    FabZ_C14_1_Kms = 5.5e-5; FabZ_C14_1_Kmp = 5.5e-5; FabZ_C14_1_kcatf = 1.59; FabZ_C14_1_kcatr = 1.59;
  FabI_C14_1: trans_14_1 => C14_1; compartment*non_comp_inhibition(trans_14_1, FabI_C14_1_Km, C16, FabI_C14_1_Ki, FabI, FabI_C14_1_kcat); FabI_C14_1 is "FabI_C14:1";  // modifiers: C16, FabI
    FabI_C14_1_Km = 0.0033; FabI_C14_1_Ki = 0.035; FabI_C14_1_kcat = 15;
  FabB_C10: C10 -> ketoacyl_12; compartment*michaelis_menten_rever(C10, FabB_C10_Kms, ketoacyl_12, FabB_C10_Kmp, FabB, FabB_C10_kcatf, FabB_C10_kcatr);  // modifiers: FabB
    FabB_C10_Kms = 0.022; FabB_C10_Kmp = 0.022; FabB_C10_kcatf = 3.4; FabB_C10_kcatr = 0.38;
  FabF_C10: C10 -> ketoacyl_12; compartment*michaelis_menten_rever(C10, FabF_C10_Kms, ketoacyl_12, FabF_C10_Kmp, FabF, FabF_C10_kcatf, FabF_C10_kcatr);  // modifiers: FabF
    FabF_C10_Kms = 0.068; FabF_C10_Kmp = 0.068; FabF_C10_kcatf = 3; FabF_C10_kcatr = 1.6;
  FabG_C12: ketoacyl_12 -> B_OH_12; compartment*michaelis_menten_rever(ketoacyl_12, FabG_C12_Kms, B_OH_12, FabG_C12_Kmp, FabG, FabG_C12_kcatf, FabG_C12_kcatr);  // modifiers: FabG
    FabG_C12_Kms = 0.01; FabG_C12_Kmp = 0.01; FabG_C12_kcatf = 1232; FabG_C12_kcatr = 536;
  FabA_C12: B_OH_12 -> trans_12; compartment*michaelis_menten_rever(B_OH_12, FabA_C12_Kms, trans_12, FabA_C12_Kmp, FabA, FabA_C12_kcatf, FabA_C12_kcatr);  // modifiers: FabA
    FabA_C12_Kms = 1.7; FabA_C12_Kmp = 1.7; FabA_C12_kcatf = 4; FabA_C12_kcatr = 4;
  FabZ_C12: B_OH_12 -> trans_12; compartment*michaelis_menten_rever(B_OH_12, FabZ_C12_Kms, trans_12, FabZ_C12_Kmp, FabZ, FabZ_C12_kcatf, FabZ_C12_kcatr);  // modifiers: FabZ
    FabZ_C12_Kms = 5.5e-5; FabZ_C12_Kmp = 5.5e-5; FabZ_C12_kcatf = 1.59; FabZ_C12_kcatr = 1.59;
  FabI_C12: trans_12 => C12; compartment*non_comp_inhibition(trans_12, FabI_C12_Km, C16, FabI_C12_Ki, FabI, FabI_C12_kcat);  // modifiers: C16, FabI
    FabI_C12_Km = 0.0033; FabI_C12_Ki = 0.035; FabI_C12_kcat = 15;
  FabB_C10_1: C10_1 -> ketoacyl_12_1; compartment*michaelis_menten_rever(C10_1, FabB_C10_1_Kms, ketoacyl_12_1, FabB_C10_1_Kmp, FabB, FabB_C10_1_kcatf, FabB_C10_1_kcatr); FabB_C10_1 is "FabB_C10:1";  // modifiers: FabB
    FabB_C10_1_Kms = 0.012; FabB_C10_1_Kmp = 0.012; FabB_C10_1_kcatf = 0.31; FabB_C10_1_kcatr = 1.6;
  FabG_C12_1: ketoacyl_12_1 -> B_OH_12_1; compartment*michaelis_menten_rever(ketoacyl_12_1, FabG_C12_1_Kms, B_OH_12_1, FabG_C12_1_Kmp, FabG, FabG_C12_1_kcatf, FabG_C12_1_kcatr); FabG_C12_1 is "FabG_C12:1";  // modifiers: FabG
    FabG_C12_1_Kms = 0.01; FabG_C12_1_Kmp = 0.01; FabG_C12_1_kcatf = 1232; FabG_C12_1_kcatr = 536;
  FabZ_C12_1: B_OH_12_1 -> trans_12_1; compartment*michaelis_menten_rever(B_OH_12_1, FabZ_C12_1_Kms, trans_12_1, FabZ_C12_1_Kmp, FabZ, FabZ_C12_1_kcatf, FabZ_C12_1_kcatr); FabZ_C12_1 is "FabZ_C12:1";  // modifiers: FabZ
    FabZ_C12_1_Kms = 5.5e-5; FabZ_C12_1_Kmp = 5.5e-5; FabZ_C12_1_kcatf = 1.59; FabZ_C12_1_kcatr = 1.59;
  FabI_C12_1: trans_12_1 => C12_1; compartment*non_comp_inhibition(trans_12_1, FabI_C12_1_Km, C16, FabI_C12_1_Ki, FabI, FabI_C12_1_kcat); FabI_C12_1 is "FabI_C12:1";  // modifiers: C16, FabI
    FabI_C12_1_Km = 0.0033; FabI_C12_1_Ki = 0.035; FabI_C12_1_kcat = 15;
  FabB_C12: C12 -> ketoacyl_14; compartment*michaelis_menten_rever(C12, FabB_C12_Kms, ketoacyl_14, FabB_C12_Kmp, FabB, FabB_C12_kcatf, FabB_C12_kcatr);  // modifiers: FabB
    FabB_C12_Kms = 0.022; FabB_C12_Kmp = 0.022; FabB_C12_kcatf = 3.4; FabB_C12_kcatr = 0.38;
  FabF_C12: C12 -> ketoacyl_14; compartment*michaelis_menten_rever(C12, FabF_C12_Kms, ketoacyl_14, FabF_C12_Kmp, FabF, FabF_C12_kcatf, FabF_C12_kcatr);  // modifiers: FabF
    FabF_C12_Kms = 0.068; FabF_C12_Kmp = 0.068; FabF_C12_kcatf = 2.7; FabF_C12_kcatr = 1.45;
  FabG_C14: ketoacyl_14 -> Beta_hydroxymyristoylACP; compartment*michaelis_menten_rever(ketoacyl_14, FabG_C14_Kms, Beta_hydroxymyristoylACP, FabG_C14_Kmp, FabG, FabG_C14_kcatf, FabG_C14_kcatr);  // modifiers: FabG
    FabG_C14_Kms = 0.01; FabG_C14_Kmp = 0.01; FabG_C14_kcatf = 1232; FabG_C14_kcatr = 536;
  FabA_C14: Beta_hydroxymyristoylACP -> trans_14; compartment*michaelis_menten_rever(Beta_hydroxymyristoylACP, FabA_C14_Kms, trans_14, FabA_C14_Kmp, FabA, FabA_C14_kcatf, FabA_C14_kcatr);  // modifiers: FabA
    FabA_C14_Kms = 1.7; FabA_C14_Kmp = 1.7; FabA_C14_kcatf = 0.53; FabA_C14_kcatr = 0.53;
  FabZ_C14: Beta_hydroxymyristoylACP -> trans_14; compartment*michaelis_menten_rever(Beta_hydroxymyristoylACP, FabZ_C14_Kms, trans_14, FabZ_C14_Kmp, FabZ, FabZ_C14_kcatf, FabZ_C14_kcatr);  // modifiers: FabZ
    FabZ_C14_Kms = 5.5e-5; FabZ_C14_Kmp = 5.5e-5; FabZ_C14_kcatf = 0.53; FabZ_C14_kcatr = 0.53;
  FabB_C14: C14 -> ketoacyl_16; compartment*michaelis_menten_rever(C14, FabB_C14_Kms, ketoacyl_16, FabB_C14_Kmp, FabB, FabB_C14_kcatf, FabB_C14_kcatr);  // modifiers: FabB
    FabB_C14_Kms = 0.071; FabB_C14_Kmp = 0.071; FabB_C14_kcatf = 2.1; FabB_C14_kcatr = 0.23;
  FabA_C16: B_OH_16 -> trans_16; compartment*michaelis_menten_rever(B_OH_16, FabA_C16_Kms, trans_16, FabA_C16_Kmp, FabA, FabA_C16_kcatf, FabA_C16_kcatr);  // modifiers: FabA
    FabA_C16_Kms = 1.7; FabA_C16_Kmp = 1.7; FabA_C16_kcatf = 0.53; FabA_C16_kcatr = 0.53;
  FabZ_C16: B_OH_16 -> trans_16; compartment*michaelis_menten_rever(B_OH_16, FabZ_C16_Kms, trans_16, FabZ_C16_Kmp, FabZ, FabZ_C16_kcatf, FabZ_C16_kcatr);  // modifiers: FabZ
    FabZ_C16_Kms = 5.5e-5; FabZ_C16_Kmp = 5.5e-5; FabZ_C16_kcatf = 1.06; FabZ_C16_kcatr = 1.06;
  FabI_C16: trans_16 => C16; compartment*non_comp_inhibition(trans_16, FabI_C16_Km, C16, FabI_C16_Ki, FabI, FabI_C16_kcat);  // modifiers: FabI
    FabI_C16_Km = 0.0033; FabI_C16_Ki = 0.035; FabI_C16_kcat = 15;
  FabB_C14_1: C14_1 -> ketoacyl_16_1; compartment*michaelis_menten_rever(C14_1, FabB_C14_1_Kms, ketoacyl_16_1, FabB_C14_1_Kmp, FabB, FabB_C14_1_kcatf, FabB_C14_1_kcatr); FabB_C14_1 is "FabB_C14:1";  // modifiers: FabB
    FabB_C14_1_Kms = 0.027; FabB_C14_1_Kmp = 0.027; FabB_C14_1_kcatf = 4.14; FabB_C14_1_kcatr = 0.46;
  FabF_C14_1: C14_1 -> ketoacyl_16_1; compartment*michaelis_menten_rever(C14_1, FabF_C14_1_Kms, ketoacyl_16_1, FabF_C14_1_Kmp, FabF, FabF_C14_1_kcatf, FabF_C14_1_kcatr); FabF_C14_1 is "FabF_C14:1";  // modifiers: FabF
    FabF_C14_1_Kms = 0.06; FabF_C14_1_Kmp = 0.06; FabF_C14_1_kcatf = 2.49; FabF_C14_1_kcatr = 1.34;
  FabG_C16_1: ketoacyl_16_1 -> B_OH_16_1; compartment*michaelis_menten_rever(ketoacyl_16_1, FabG_C16_1_Kms, B_OH_16_1, FabG_C16_1_Kmp, FabG, FabG_C16_1_kcatf, FabG_C16_1_kcatr); FabG_C16_1 is "FabG_C16:1";  // modifiers: FabG
    FabG_C16_1_Kms = 0.01; FabG_C16_1_Kmp = 0.01; FabG_C16_1_kcatf = 1232; FabG_C16_1_kcatr = 536;
  FabZ_C16_1: B_OH_16_1 -> trans_16_1; compartment*michaelis_menten_rever(B_OH_16_1, FabZ_C16_1_Kms, trans_16_1, FabZ_C16_1_Kmp, FabZ, FabZ_C16_1_kcatf, FabZ_C16_1_kcatr); FabZ_C16_1 is "FabZ_C16:1";  // modifiers: FabZ
    FabZ_C16_1_Kms = 5.5e-5; FabZ_C16_1_Kmp = 5.5e-5; FabZ_C16_1_kcatf = 3.18; FabZ_C16_1_kcatr = 3.18;
  FabI_C16_1: trans_16_1 => C16_1; compartment*non_comp_inhibition(trans_16_1, FabI_C16_1_Km, C16, FabI_C16_1_Ki, FabI, FabI_C16_1_kcat); FabI_C16_1 is "FabI_C16:1";  // modifiers: C16, FabI
    FabI_C16_1_Km = 0.0033; FabI_C16_1_Ki = 0.035; FabI_C16_1_kcat = 15;
  FabF_C14: C14 -> ketoacyl_16; compartment*michaelis_menten_rever(C14, FabF_C14_Kms, ketoacyl_16, FabF_C14_Kmp, FabF, FabF_C14_kcatf, FabF_C14_kcatr);  // modifiers: FabF
    FabF_C14_Kms = 0.068; FabF_C14_Kmp = 0.068; FabF_C14_kcatf = 0.83; FabF_C14_kcatr = 0.45;
  FabG_C16: ketoacyl_16 -> B_OH_16; compartment*michaelis_menten_rever(ketoacyl_16, FabG_C16_Kms, B_OH_16, FabG_C16_Kmp, FabG, FabG_C16_kcatf, FabG_C16_kcatr);  // modifiers: FabG
    FabG_C16_Kms = 0.01; FabG_C16_Kmp = 0.01; FabG_C16_kcatf = 1232; FabG_C16_kcatr = 536;
  FabF_C16_1: C16_1 -> ketoacyl_18_1; compartment*michaelis_menten_rever(C16_1, FabF_C16_1_Kms, ketoacyl_18_1, FabF_C16_1_Kmp, FabF, FabF_C16_1_kcatf, FabF_C16_1_kcatr); FabF_C16_1 is "FabF_C16:1";  // modifiers: FabF
    FabF_C16_1_Kms = 0.017; FabF_C16_1_Kmp = 0.017; FabF_C16_1_kcatf = 6.74; FabF_C16_1_kcatr = 3.6;
  FabG_C18_1: ketoacyl_18_1 -> B_OH_18_1; compartment*michaelis_menten_rever(ketoacyl_18_1, FabG_C18_1_Kms, B_OH_18_1, FabG_C18_1_Kmp, FabG, FabG_C18_1_kcatf, FabG_C18_1_kcatr); FabG_C18_1 is "FabG_C18:1";  // modifiers: FabG
    FabG_C18_1_Kms = 0.01; FabG_C18_1_Kmp = 0.01; FabG_C18_1_kcatf = 1232; FabG_C18_1_kcatr = 536;
  FabZ_C18_1: B_OH_18_1 -> trans_18_1; compartment*michaelis_menten_rever(B_OH_18_1, FabZ_C18_1_Kms, trans_18_1, FabZ_C18_1_Kmp, FabZ, FabZ_C18_1_kcatf, FabZ_C18_1_kcatr); FabZ_C18_1 is "FabZ_C18:1";  // modifiers: FabZ
    FabZ_C18_1_Kms = 5.5e-5; FabZ_C18_1_Kmp = 5.5e-5; FabZ_C18_1_kcatf = 3.18; FabZ_C18_1_kcatr = 3.18;
  FabI_C18_1: trans_18_1 => C18_1; compartment*non_comp_inhibition(trans_18_1, FabI_C18_1_Km, C16, FabI_C18_1_Ki, FabI, FabI_C18_1_kcat); FabI_C18_1 is "FabI_C18:1";  // modifiers: C16, FabI
    FabI_C18_1_Km = 0.0033; FabI_C18_1_Ki = 0.035; FabI_C18_1_kcat = 15;
  PlsB_C16: C16 + $G3P => palmitic; compartment*bi_irre__HMM(PlsB, PlsB_C16_kcat, C16, G3P, PlsB_C16_Kma, PlsB_C16_Kmb);  // modifiers: PlsB
    PlsB_C16_kcat = 13.2; PlsB_C16_Kma = 0.015; PlsB_C16_Kmb = 0.14;
  PlsB_C18_1: C18_1 + $G3P => vaccenic; compartment*bi_irre__HMM(PlsB, PlsB_C18_1_kcat, C18_1, G3P, PlsB_C18_1_Kma, PlsB_C18_1_Kmb); PlsB_C18_1 is "PlsB_C18:1";  // modifiers: PlsB
    PlsB_C18_1_kcat = 11.76; PlsB_C18_1_Kma = 0.025; PlsB_C18_1_Kmb = 0.14;
  PlsC_C16_1: C16_1 + $G3P => palmitoleic; compartment*bi_irre__HMM(PlsC, PlsC_C16_1_kcat, C16_1, G3P, PlsC_C16_1_Kma, PlsC_C16_1_Kmb); PlsC_C16_1 is "PlsC_C16:1";  // modifiers: PlsC
    PlsC_C16_1_kcat = 4.4; PlsC_C16_1_Kma = 0.012; PlsC_C16_1_Kmb = 0.7;
  PlsC_C18_1: C18_1 + $G3P => vaccenic; compartment*bi_irre__HMM(PlsC, PlsC_C18_1_kcat, C18_1, G3P, PlsC_C18_1_Kma, PlsC_C18_1_Kmb); PlsC_C18_1 is "PlsC_C18:1";  // modifiers: PlsC
    PlsC_C18_1_kcat = 7.6; PlsC_C18_1_Kma = 0.025; PlsC_C18_1_Kmb = 0.7;
  ACTIVATION_LpxK: LpxK -> LpxK_act; compartment*(LpxK_activation*LpxK - LpxK_inactivation*LpxK_act);
  FabA_constitutive_expression: $proA_unreg => $proA_unreg + FabA; compartment*FabA_constitutive_expression_k1*proA_unreg;
    FabA_constitutive_expression_k1 = 5.2;
  FabA_regulated_expression: FadR_proA => FabA + FadR_proA; compartment*FabA_regulated_expression_k1*FadR_proA;
    FabA_regulated_expression_k1 = 31.2;
  FabA_repression_by_FabR_1: proA -> inact_proA1; compartment*(FabR_1*proA - FabA_repression_by_FabR_1_k2*inact_proA1);
    FabA_repression_by_FabR_1_k2 = 90;
  FabA_degradation: FabA => ; compartment*FabA_degradation_k1*FabA;
    FabA_degradation_k1 = 0.0005555;
  FabR_activation_0: FabR_0 -> FabR; compartment*(FabR_activation*FabR_0 - FabR_deactivation*FabR);
  FabA_promoter_activation: proA -> FadR_proA; compartment*(FadR_active*proA - FabA_promoter_activation_k2*FadR_proA);
    FabA_promoter_activation_k2 = 0.1;
  FabA_repression_by_FabR_2: FadR_proA -> inact_proA2; compartment*(FabR_1*FadR_proA - FabA_repression_by_FabR_2_k2*inact_proA2);
    FabA_repression_by_FabR_2_k2 = 90;
  FabH_0: $acetyl_CoA => b_oh_10; compartment*FabI_equation(acetyl_CoA, FabH_0_Km, FabH_0_Ki, FabH, FabH_0_kcat, C16, kip, C18_1);  // modifiers: FabH, C16, C18_1
    FabH_0_Km = 0.04; FabH_0_Ki = 0.067; FabH_0_kcat = 12; kip = 0.1;
  FadR_activation: FadR_0 -> FadR; compartment*(FadR_activation_k1*FadR_0 - FadR_activation_k2*FadR);
    FadR_activation_k1 = 0.054; FadR_activation_k2 = 0.1;
  FabB_constitutive_expression: $proB_unreg => $proB_unreg + FabB; compartment*FabB_constitutive_expression_k1*proB_unreg;
    FabB_constitutive_expression_k1 = 7.945;
  FabB_degradation: FabB => ; compartment*FabB_degradation_k1*FabB;
    FabB_degradation_k1 = 0.0005556;
  FabB_promoter_activation: proB -> FadR_proB; compartment*(FadR_active_FabB*proB - FabB_promoter_activation_k2*FadR_proB);
    FabB_promoter_activation_k2 = 0.1;
  FabB_regulated_expression: FadR_proB => FabB + FadR_proB; compartment*FabB_regulated_expression_k1*FadR_proB;
    FabB_regulated_expression_k1 = 11.12;
  FabB_repression_by_FabR1: proB -> inact_proB1; compartment*(FabR_1*proB - FabB_repression_by_FabR1_k2*inact_proB1);
    FabB_repression_by_FabR1_k2 = 2;
  FabB_repression_by_FabR_2: FadR_proB -> inact_proB2; compartment*(FabR_1*FadR_proB - FabB_repression_by_FabR_2_k2*inact_proB2);
    FabB_repression_by_FabR_2_k2 = 2;

  // Unit definitions:
  unit substance = 1e-3 mole;
end
