// SBML level 2 version 4
// dcterms:bibliographicCitation: urn:miriam:pubmed:27647667

function Constant_flux__irreversible(v)
  v;
end
Constant_flux__irreversible is "Constant flux (irreversible)";

function Hyperbolic_rate_law_1(IIa, VIII, k, v)
  v*VIII*IIa/(k + IIa);
end

function Hyperbolic_rate_law_2(APC_PS, VIIIa, k, v)
  v*VIIIa*APC_PS/(k + APC_PS);
end

function Hyperbolic_rate_law_3(IX, XIa, k, v)
  v*IX*XIa/(k + XIa);
end

function Hyperbolic_rate_law_4(XI, XIIa, k, v)
  v*XI*XIIa/(k + XIIa);
end

function Hyperbolic_rate_law_5(IIa, XI, k, v)
  v*XI*IIa/(k + IIa);
end

function Hyperbolic_rate_law_6(IIa, VII, k, v)
  v*VII*IIa/(k + IIa);
end

function Hyperbolic_rate_law_7(IXa, X, k, v)
  v*X*IXa/(k + IXa);
end

function Hyperbolic_rate_law_8(IXa_VIIIa, X, k, v)
  v*X*IXa_VIIIa/(k + IXa_VIIIa);
end

function Hyperbolic_rate_law_9(VIIa, X, k, v)
  v*X*VIIa/(k + VIIa);
end

function Hyperbolic_rate_law_10(IIa, V, k, v)
  v*V*IIa/(k + IIa);
end

function Hyperbolic_rate_law_11(APC_PS, Va, k, v)
  v*Va*APC_PS/(k + APC_PS);
end

function Hyperbolic_rate_law_12(II, Va_Xa, k, v)
  v*II*Va_Xa/(k + Va_Xa);
end

function Hyperbolic_rate_law_13(II, Xa, k, v)
  v*II*Xa/(k + Xa);
end

function Hyperbolic_rate_law_14(Fg, IIa, k, v)
  v*Fg*IIa/(k + IIa);
end

function Hyperbolic_rate_law_15(Fg, P, k, v)
  v*Fg*P/(k + P);
end

function Hyperbolic_rate_law_16(F, XIIIa, k, v)
  v*F*XIIIa/(k + XIIIa);
end

function Hyperbolic_rate_law_17(F, P, k, v)
  v*F*P/(k + P);
end

function Hyperbolic_rate_law_18(P, XF, k, v)
  v*XF*P/(k + P);
end

function Hyperbolic_rate_law_19(APC_PS, XF, k, v)
  v*XF*APC_PS/(k + APC_PS);
end

function Hyperbolic_rate_law_20(IIa, XIII, k, v)
  v*XIII*IIa/(k + IIa);
end

function Hyperbolic_rate_law_21(IIa, Pg, k, v)
  v*Pg*IIa/(k + IIa);
end

function Hyperbolic_rate_law_22(F, Pg, k, v)
  v*Pg*F/(k + F);
end

function Hyperbolic_rate_law_23(APC_PS, Pg, k, v)
  v*Pg*APC_PS/(k + APC_PS);
end

function Hyperbolic_rate_law_24(IIa_Tmod, PC, k, v)
  v*PC*IIa_Tmod/(k + IIa_Tmod);
end

function Hyperbolic_rate_law_25(APC_PS, Va_Xa, k, v)
  v*Va_Xa*APC_PS/(k + APC_PS);
end

function Irreversible_association_1(IXa, VIIIa, c)
  IXa*VIIIa/c;
end

function Irreversible_association_3(IIa, Tmod, c)
  IIa*Tmod/c;
end

function Irreversible_association_4(TF, VIIa, c)
  VIIa*TF/c;
end

function Irreversible_association_5(TF, VII, c)
  VII*TF/c;
end

function Irreversible_association_6(VIIa_TF, Xa_TFPI, c)
  VIIa_TF*Xa_TFPI/c;
end

function Hyperbolic_rate_law_26(VII_TF, Xa, k, v)
  v*VII_TF*Xa/(k + Xa);
end

function Hyperbolic_rate_law_27(VIIa_TF, X, k, v)
  v*X*VIIa_TF/(k + VIIa_TF);
end

function Hyperbolic_rate_law_28(IX, VIIa_TF, k, v)
  v*IX*VIIa_TF/(k + VIIa_TF);
end

function Hyperbolic_rate_law_29(TF, VII_TF, k, v)
  v*VII_TF*TF/(k + TF);
end

function Irreversible_association_8(APC, PS, c)
  APC*PS/c;
end

function Hyperbolic_rate_law_30(VII, Xa, k, v)
  v*VII*Xa/(k + Xa);
end

function Hyperbolic_rate_law_31(VII, VIIa_TF, k, v)
  v*VII*VIIa_TF/(k + VIIa_TF);
end

function Hyperbolic_rate_law_32(IXa, VII, k, v)
  v*VII*IXa/(k + IXa);
end

function Hyperbolic_rate_law_33(CA, XII, k, v)
  v*XII*CA/(k + CA);
end

function Hyperbolic_rate_law_34(K, XII, k, v)
  v*XII*K/(k + K);
end

function Hyperbolic_rate_law_35(Pk, XIIa, k, v)
  v*Pk*XIIa/(k + XIIa);
end

function Irreversible_association_9(ATIII_Heparin, IIa, c44)
  IIa*ATIII_Heparin/c44;
end

function Irreversible_association_10(ATIII_Heparin, Xa, c45)
  Xa*ATIII_Heparin/c45;
end

function Irreversible_association_11(ATIII_Heparin, IXa, c46)
  IXa*ATIII_Heparin/c46;
end

function Warfarin_inhibited_first_order_kinetics_1(C_warf, IC50, I_max, VK, d_VK2)
  d_VK2*VK*(1 - I_max*C_warf/(IC50 + C_warf));
end

function Warfarin_inhibited_first_order_kinetics_2(C_warf, IC50, I_max, VKO, d_VKO)
  d_VKO*VKO*(1 - I_max*C_warf/(IC50 + C_warf));
end

function VKH2_mediated_factor_production_1(II0, VKH2, VKH20, d_II)
  d_II*II0*VKH2/VKH20;
end
VKH2_mediated_factor_production_1 is "VKH2-mediated factor production_1";

function VKH2_mediated_factor_production_2(VII0, VKH2, VKH20, d_VII)
  d_VII*VII0*VKH2/VKH20;
end
VKH2_mediated_factor_production_2 is "VKH2-mediated factor production_2";

function VKH2_mediated_factor_production_3(IX0, VKH2, VKH20, d_IX)
  d_IX*IX0*VKH2/VKH20;
end
VKH2_mediated_factor_production_3 is "VKH2-mediated factor production_3";

function VKH2_mediated_factor_production_4(VKH2, VKH20, X_0, d_X)
  d_X*X_0*VKH2/VKH20;
end
VKH2_mediated_factor_production_4 is "VKH2-mediated factor production_4";

function VKH2_mediated_factor_production_5(PC0, VKH2, VKH20, d_PC)
  d_PC*PC0*VKH2/VKH20;
end
VKH2_mediated_factor_production_5 is "VKH2-mediated factor production_5";

function VKH2_mediated_factor_production_6(PS0, VKH2, VKH20, d_PS)
  d_PS*PS0*VKH2/VKH20;
end
VKH2_mediated_factor_production_6 is "VKH2-mediated factor production_6";

function Factor_production_1(XII0, d_XII)
  XII0*d_XII;
end

function Factor_production_2(VIII0, d_VIII)
  VIII0*d_VIII;
end

function Factor_production_3(XI0, d_XI)
  XI0*d_XI;
end

function Factor_production_4(V_0, d_V)
  V_0*d_V;
end

function Factor_production_5(Fg0, d_Fg)
  Fg0*d_Fg;
end

function Factor_production_6(XIII0, d_XIII)
  XIII0*d_XIII;
end

function Factor_production_7(Pg0, d_Pg)
  Pg0*d_Pg;
end

function Factor_production_8(Tmod0, d_Tmod)
  Tmod0*d_Tmod;
end

function Factor_production_9(TFPI0, d_TFPI)
  TFPI0*d_TFPI;
end

function Factor_production_10(Pk0, d_Pk)
  Pk0*d_Pk;
end

function Factor_production_11(VK0, d_VK)
  VK0*d_VK;
end

function Modification_for_r27(Va, Xa, c, Imax_riva, C, IC50_riva)
  Va*Xa/c*(1 - Imax_riva*C/(IC50_riva + C));
end

function Modification_for_r32(Xa, TFPI, c, Imax_riva, C, IC50_riva)
  Xa*TFPI/c*(1 - Imax_riva*C/(IC50_riva + C));
end

model Hartmann2016___Blood_coagulation_model_for_simulating_anticoagulants()
  // Hartmann2016 - Blood coagulation model for simulating anticoagulants
  // Mathematical model of blood coagulation. Reused Wajima2009 model with modifications to reactions 27 (formation of Va:Xa complex), 32 (Xa inhibition by TFPI) and 45 (Xa inhibition by TFPI-Heparin complex) as described in publication equations 2,3 and 4. Publication lists parameter sets to simulate Rivaroxaban, VKA and Enoxaparin (supplementary files).
  // hasPart biomodels.db:BIOMD0000000340
  // isVersionOf GO:0007596
  // hasProperty GO:0030193
  // hasTaxon taxonomy:9606
  // isDescribedBy pubmed:27647667
  // hasTaxon taxonomy:9606

  // Compartments:
  compartment compartment_1 = 1;

  // Species:
  species IIa in compartment_1 = 0;  // isVersionOf uniprot:P00734
  species VIII in compartment_1 = VIII0;  // uniprot:P00451
  species VIIIa in compartment_1 = 0;  // isVersionOf uniprot:P00451
  species APC_PS in compartment_1 = 0;  // hasPart uniprot:P04070; hasPart uniprot:P07225
  species IX in compartment_1 = IX0;  // uniprot:P00740
  species IXa in compartment_1 = 0;  // isVersionOf uniprot:P00740
  species XIa in compartment_1 = 0;  // isVersionOf uniprot:P03951
  species XI in compartment_1 = XI0;  // uniprot:P03951
  species XIIa in compartment_1 = 0;  // isVersionOf uniprot:P00748
  species VII in compartment_1 = VII0;  // uniprot:P08709
  species VIIa in compartment_1 = 0;  // isVersionOf uniprot:P08709
  species X in compartment_1 = X_0;  // uniprot:P00742
  species Xa in compartment_1 = 0;  // isVersionOf uniprot:P00742
  species IXa_VIIIa in compartment_1 = 0;  // hasPart uniprot:P00451; hasPart uniprot:P00740
  species V in compartment_1 = V_0;  // uniprot:P12259
  species Va in compartment_1 = 0;  // isVersionOf uniprot:P12259
  species II in compartment_1 = II0;  // uniprot:P00734
  species F in compartment_1 = 0;  // hasPart uniprot:P02671; hasPart uniprot:P02675; hasPart uniprot:P02679
  species Fg in compartment_1 = Fg0;  // hasPart uniprot:P02679; hasPart uniprot:P02671; hasPart uniprot:P02675
  species $DP in compartment_1;
  species P in compartment_1 = 0;  // isVersionOf uniprot:P00747
  species XF in compartment_1 = 0;  // hasPart uniprot:P02675; hasPart uniprot:P02679; hasPart uniprot:P02671
  species XIII in compartment_1 = XIII0;  // hasPart uniprot:P05160; hasPart uniprot:P00488
  species Pg in compartment_1 = Pg0;  // uniprot:P00747
  species APC in compartment_1 = 0;  // isVersionOf uniprot:P04070
  species IIa_Tmod in compartment_1 = 0;  // hasPart uniprot:P07204; hasPart uniprot:P00734
  species PC in compartment_1 = PC0;  // uniprot:P04070
  species Tmod in compartment_1 = Tmod0;  // uniprot:P07204
  species TF in compartment_1 = 0;  // uniprot:P13726
  species VIIa_TF in compartment_1 = 0;  // hasPart uniprot:P13726; hasPart uniprot:P08709
  species VII_TF in compartment_1 = 0;  // hasPart uniprot:P08709; hasPart uniprot:P13726
  species Xa_TFPI in compartment_1 = 0;  // hasPart uniprot:P00742; hasPart uniprot:P10646
  species TFPI in compartment_1 = TFPI0;  // uniprot:P10646
  species PS in compartment_1 = PS0;  // uniprot:P07225
  species VKH2 in compartment_1 = VKH20;  // isVersionOf CHEBI:28384
  species Va_Xa in compartment_1 = 0;  // hasPart uniprot:P12259; hasPart uniprot:P00742
  species CA in compartment_1 = 0;
  species XII in compartment_1 = XII0;  // uniprot:P00748
  species K in compartment_1 = 0;  // isVersionOf uniprot:P03952
  species ATIII_Heparin in compartment_1 = heparin_bolus;  // hasPart CHEBI:28304; hasPart uniprot:P01008
  species Xa_ATIII_Heparin in compartment_1 = 0;  // hasPart CHEBI:28304; hasPart uniprot:P00742; hasPart uniprot:P01008
  species VK in compartment_1 = VK0;  // CHEBI:28384
  species $C_warf in compartment_1 = 0;  // CHEBI:10033
  species VKO in compartment_1 = VKO0;  // isVersionOf CHEBI:28384
  species Pk in compartment_1 = Pk0;  // uniprot:P03952
  species FDP in compartment_1 = 0;  // hasPart uniprot:P02671; hasPart uniprot:P02675; hasPart uniprot:P02679
  species D in compartment_1 = 0;
  species TAT in compartment_1 = 0;  // hasPart uniprot:P00734; hasPart uniprot:P01008
  species VIIa_TF_Xa_TFPI in compartment_1 = 0;  // hasPart uniprot:P08709; hasPart uniprot:P13726; hasPart uniprot:P00742; hasPart uniprot:P10646
  species XIIIa in compartment_1 = 0;  // hasVersion uniprot:P00488
  species IIa_ATIII_Heparin in compartment_1 = 0;  // hasPart uniprot:P00734; hasPart uniprot:P01008; hasPart CHEBI:28304
  species IXa_ATIII_Heparin in compartment_1 = 0;  // hasPart uniprot:P00740; hasPart CHEBI:28304; hasPart uniprot:P01008
  species $A_warf in compartment_1 = 0;  // CHEBI:10033
  species VK_p in compartment_1 = VK0*vitaminK_k12/vitaminK_k21_Vc;  // CHEBI:28384
  species $A_riva in compartment_1 = 1;
  species $C_riva in compartment_1 = 0;

  // Parameters:
  I_max = 1;
  IC50 = 0.34;
  II0 = 1394.4; II0 is "II(0)";
  VII0 = 10; VII0 is "VII(0)";
  IX0 = 89.6; IX0 is "IX(0)";
  X_0 = 174.3; X_0 is "X(0)";
  PC0 = 60; PC0 is "PC(0)";
  PS0 = 300; PS0 is "PS(0)";
  VKH20 = 0.1; VKH20 is "VKH2(0)";
  d_II = 0.01;
  d_VII = 0.12;
  d_IX = 0.029;
  d_X = 0.018;
  d_PC = 0.05;
  d_PS = 0.0165;
  vitaminK_Vc = 24;
  d_VK2 = 0.0228;
  d_VKH2 = d_VK2*VK0/VKH20;
  d_VKO = d_VK2*VK0/VKO0;
  VK0 = 1; VK0 is "VK(0)";
  VKO0 = 0.1; VKO0 is "VKO(0)";
  vitaminK_k21_Vc = 0.0122/vitaminK_Vc; vitaminK_k21_Vc is "vitaminK_k21/Vc";
  vitaminK_k12 = 0.0587;
  heparin_ke = 0.693;
  warfarin_ka = 1;
  warfarin_Vd = 10;
  warfarin_CL = 0.2;
  warfarin_ke = warfarin_CL/warfarin_Vd;
  d_XII = 0.012;
  d_VIII = 0.058;
  d_XI = 0.1;
  d_V = 0.043;
  d_Fg = 0.032;
  d_XIII = 0.0036;
  d_Pg = 0.05;
  d_Tmod = 0.05;
  d_TFPI = 20;
  d_Pk = 0.05;
  XII0 = 375; XII0 is "XII(0)";
  VIII0 = 0.7; VIII0 is "VIII(0)";
  XI0 = 30.6; XI0 is "XI(0)";
  V_0 = 26.7; V_0 is "V(0)";
  Fg0 = 8945.5; Fg0 is "Fg(0)";
  XIII0 = 70.3; XIII0 is "XIII(0)";
  Pg0 = 2154.3; Pg0 is "Pg(0)";
  Tmod0 = 50; Tmod0 is "Tmod(0)";
  TFPI0 = 2.5; TFPI0 is "TFPI(0)";
  Pk0 = 450; Pk0 is "Pk(0)";
  R1 = 0.1408451;
  R2 = 1;
  c44 = c45*R1;
  c45 = 0.85;
  c46 = c45*R2;
  d_VK = 0.2052;
  warfarin_daily_dose = 4;
  heparin_infusion = 0;
  heparin_bolus = 0;
  heparin_infusion_duration_hr = 24; heparin_infusion_duration_hr is "heparin_infusion_duration [hr]";
  ka_riva = 1;
  ke_riva = 0.02;
  riva_VD = 10;
  Riva_daily_dose = 20;
  IC50_Xa = 75;
  Imax_complex = 200;
  Imax_Xa = 1;
  var __Protein_C; __Protein_C is "%_Protein_C";
  var __Protein_S; __Protein_S is "%_Protein_S";
  Initial_for_PC = PC;
  Initial_for_PS = PS;

  // Assignment rules:
  DP := FDP + D;
  __Protein_C := 100*PC/Initial_for_PC;
  __Protein_S := 100*PS/Initial_for_PS;

  // Rate rules:
  C_warf' = warfarin_ka*A_warf/warfarin_Vd - warfarin_ke*C_warf;
  A_warf' = -warfarin_ka*A_warf;
  A_riva' = -ka_riva*A_riva;
  C_riva' = ka_riva*A_riva/riva_VD - ke_riva*C_riva;

  // Reactions:
  r1_: VIII => VIIIa; compartment_1*Hyperbolic_rate_law_1(IIa, VIII, r1__k, r1__v);  // modifiers: IIa
    r1__k = 1e-6; r1__v = 50000;
  r2_: VIIIa => ; compartment_1*Hyperbolic_rate_law_2(APC_PS, VIIIa, r2__k, r2__v);  // modifiers: APC_PS
    r2__k = 1; r2__v = 50;
  r3_: IX => IXa; compartment_1*Hyperbolic_rate_law_3(IX, XIa, r3__k, r3__v);  // modifiers: XIa
    r3__k = 10; r3__v = 7;
  r4_: XI => XIa; compartment_1*Hyperbolic_rate_law_4(XI, XIIa, r4__k, r4__v);  // modifiers: XIIa
    r4__k = 1; r4__v = 7;
  r5_: XI => XIa; compartment_1*Hyperbolic_rate_law_5(IIa, XI, r5__k, r5__v);  // modifiers: IIa
    r5__k = 10; r5__v = 10;
  r6_: VII => VIIa; compartment_1*Hyperbolic_rate_law_6(IIa, VII, r6__k, r6__v);  // modifiers: IIa
    r6__k = 10; r6__v = 0.1;
  r7_: X => Xa; compartment_1*Hyperbolic_rate_law_7(IXa, X, r7__k, r7__v);  // modifiers: IXa
    r7__k = 10; r7__v = 0.02;
  r8_: X => Xa; compartment_1*Hyperbolic_rate_law_8(IXa_VIIIa, X, r8__k, r8__v);  // modifiers: IXa_VIIIa
    r8__k = 0.1; r8__v = 2;
  r9_: X => Xa; compartment_1*Hyperbolic_rate_law_9(VIIa, X, r9__k, r9__v);  // modifiers: VIIa
    r9__k = 10; r9__v = 1e-9;
  r10: V => Va; compartment_1*Hyperbolic_rate_law_10(IIa, V, r10_k, r10_v);  // modifiers: IIa
    r10_k = 10; r10_v = 50000;
  r11: Va => ; compartment_1*Hyperbolic_rate_law_11(APC_PS, Va, r11_k, r11_v);  // modifiers: APC_PS
    r11_k = 1; r11_v = 50;
  r12: II => IIa; compartment_1*Hyperbolic_rate_law_12(II, Va_Xa, r12_k, r12_v);  // modifiers: Va_Xa
    r12_k = 10; r12_v = 100;
  r13: II => IIa; compartment_1*Hyperbolic_rate_law_13(II, Xa, r13_k, r13_v);  // modifiers: Xa
    r13_k = 500; r13_v = 9;
  r14: Fg => F; compartment_1*Hyperbolic_rate_law_14(Fg, IIa, r14_k, r14_v);  // modifiers: IIa
    r14_k = 0.5; r14_v = 20000;
  r15: Fg => FDP; compartment_1*Hyperbolic_rate_law_15(Fg, P, r15_k, r15_v);  // modifiers: P
    r15_k = 500; r15_v = 500;
  r16: F => XF; compartment_1*Hyperbolic_rate_law_16(F, XIIIa, r16_k, r16_v);  // modifiers: XIIIa
    r16_k = 10; r16_v = 7;
  r17: F => FDP; compartment_1*Hyperbolic_rate_law_17(F, P, r17_k, r17_v);  // modifiers: P
    r17_k = 10; r17_v = 7;
  r18: XF => D; compartment_1*Hyperbolic_rate_law_18(P, XF, r18_k, r18_v);  // modifiers: P
    r18_k = 100; r18_v = 7;
  r19: XF => D; compartment_1*Hyperbolic_rate_law_19(APC_PS, XF, r19_k, r19_v);  // modifiers: APC_PS
    r19_k = 1; r19_v = 1;
  r20: XIII => XIIIa; compartment_1*Hyperbolic_rate_law_20(IIa, XIII, r20_k, r20_v);  // modifiers: IIa
    r20_k = 1; r20_v = 7;
  r21: Pg => P; compartment_1*Hyperbolic_rate_law_21(IIa, Pg, r21_k, r21_v);  // modifiers: IIa
    r21_k = 5000; r21_v = 7;
  r22: Pg => P; compartment_1*Hyperbolic_rate_law_22(F, Pg, r22_k, r22_v);  // modifiers: F
    r22_k = 10000; r22_v = 5;
  r23: Pg => P; compartment_1*Hyperbolic_rate_law_23(APC_PS, Pg, r23_k, r23_v);  // modifiers: APC_PS
    r23_k = 1; r23_v = 2;
  r24: PC => APC; compartment_1*Hyperbolic_rate_law_24(IIa_Tmod, PC, r24_k, r24_v);  // modifiers: IIa_Tmod
    r24_k = 1; r24_v = 7;
  r25: Va_Xa => ; compartment_1*Hyperbolic_rate_law_25(APC_PS, Va_Xa, r25_k, r25_v);  // modifiers: APC_PS
    r25_k = 1; r25_v = 2;
  r26: IXa + VIIIa => IXa_VIIIa; compartment_1*Irreversible_association_1(IXa, VIIIa, r26_c);
    r26_c = 0.01;
  r27: Va + Xa => Va_Xa; compartment_1*Modification_for_r27(Va, Xa, r27_c, r27_Imax_riva, C_riva, r27_IC50_riva);  // modifiers: C_riva
    r27_c = 0.5; r27_Imax_riva = 200; r27_IC50_riva = 2.1;
  r28: IIa + Tmod => IIa_Tmod; compartment_1*Irreversible_association_3(IIa, Tmod, r28_c);
    r28_c = 0.5;
  r29: VIIa + TF => VIIa_TF; compartment_1*Irreversible_association_4(TF, VIIa, r29_c);
    r29_c = 0.5;
  r30: VII + TF => VII_TF; compartment_1*Irreversible_association_5(TF, VII, r30_c);
    r30_c = 0.1;
  r31: VIIa_TF + Xa_TFPI => VIIa_TF_Xa_TFPI; compartment_1*Irreversible_association_6(VIIa_TF, Xa_TFPI, r31_c);
    r31_c = 0.5;
  r32: Xa + TFPI => Xa_TFPI; compartment_1*Modification_for_r32(Xa, TFPI, r32_c, r32_Imax_riva, C_riva, r32_IC50_riva);  // modifiers: C_riva
    r32_c = 0.5; r32_Imax_riva = 1; r32_IC50_riva = 0.4;
  r33: VII_TF => VIIa_TF; compartment_1*Hyperbolic_rate_law_26(VII_TF, Xa, r33_k, r33_v);  // modifiers: Xa
    r33_k = 1; r33_v = 70;
  r34: X => Xa; compartment_1*Hyperbolic_rate_law_27(VIIa_TF, X, r34_k, r34_v);  // modifiers: VIIa_TF
    r34_k = 200; r34_v = 900;
  r35: IX => IXa; compartment_1*Hyperbolic_rate_law_28(IX, VIIa_TF, r35_k, r35_v);  // modifiers: VIIa_TF
    r35_k = 1; r35_v = 70;
  r36: VII_TF => VIIa_TF; compartment_1*Hyperbolic_rate_law_29(TF, VII_TF, r36_k, r36_v);  // modifiers: TF
    r36_k = 1; r36_v = 1000;
  r37: APC + PS => APC_PS; compartment_1*Irreversible_association_8(APC, PS, r37_c);
    r37_c = 0.5;
  r38: VII => VIIa; compartment_1*Hyperbolic_rate_law_30(VII, Xa, r38_k, r38_v);  // modifiers: Xa
    r38_k = 10; r38_v = 1;
  r39: VII => VIIa; compartment_1*Hyperbolic_rate_law_31(VII, VIIa_TF, r39_k, r39_v);  // modifiers: VIIa_TF
    r39_k = 10; r39_v = 1;
  r40: VII => VIIa; compartment_1*Hyperbolic_rate_law_32(IXa, VII, r40_k, r40_v);  // modifiers: IXa
    r40_k = 10; r40_v = 0.2;
  r41: XII => XIIa; compartment_1*Hyperbolic_rate_law_33(CA, XII, r41_k, r41_v);  // modifiers: CA
    r41_k = 1; r41_v = 7;
  r42: XII => XIIa; compartment_1*Hyperbolic_rate_law_34(K, XII, r42_k, r42_v);  // modifiers: K
    r42_k = 1; r42_v = 70;
  r43: Pk => K; compartment_1*Hyperbolic_rate_law_35(Pk, XIIa, r43_k, r43_v);  // modifiers: XIIa
    r43_k = 1; r43_v = 7;
  r44: IIa + ATIII_Heparin => IIa_ATIII_Heparin; compartment_1*Irreversible_association_9(ATIII_Heparin, IIa, c44);
  r45: Xa + ATIII_Heparin => Xa_ATIII_Heparin; compartment_1*Irreversible_association_10(ATIII_Heparin, Xa, c45);
  r46: IXa + ATIII_Heparin => IXa_ATIII_Heparin; compartment_1*Irreversible_association_11(ATIII_Heparin, IXa, c46);
  r47: VK => VKH2; compartment_1*Warfarin_inhibited_first_order_kinetics_1(C_warf, IC50, I_max, VK, d_VK2);  // modifiers: C_warf
  r48: VKO => VK; compartment_1*Warfarin_inhibited_first_order_kinetics_2(C_warf, IC50, I_max, VKO, d_VKO);  // modifiers: C_warf
  pII_VKH2: => II; compartment_1*VKH2_mediated_factor_production_1(II0, VKH2, VKH20, d_II);  // modifiers: VKH2
  pVII_VKH2: => VII; compartment_1*VKH2_mediated_factor_production_2(VII0, VKH2, VKH20, d_VII);  // modifiers: VKH2
  pIX_VKH2: => IX; compartment_1*VKH2_mediated_factor_production_3(IX0, VKH2, VKH20, d_IX);  // modifiers: VKH2
  pX_VKH2: => X; compartment_1*VKH2_mediated_factor_production_4(VKH2, VKH20, X_0, d_X);  // modifiers: VKH2
  pPC_VKH2: => PC; compartment_1*VKH2_mediated_factor_production_5(PC0, VKH2, VKH20, d_PC);  // modifiers: VKH2
  pPS_VKH2: => PS; compartment_1*VKH2_mediated_factor_production_6(PS0, VKH2, VKH20, d_PS);  // modifiers: VKH2
  dFg: Fg => FDP; compartment_1*d_Fg*Fg;
  dF: F => FDP; compartment_1*dF_k1*F;
    dF_k1 = 0.05;
  dXF: XF => D; compartment_1*dXF_k1*XF;
    dXF_k1 = 0.05;
  dII: II => ; compartment_1*d_II*II;
  dIIa: IIa => TAT; compartment_1*dIIa_k1*IIa;
    dIIa_k1 = 67.4;
  dTF: TF => ; compartment_1*dTF_k1*TF;
    dTF_k1 = 0.05;
  dV: V => ; compartment_1*d_V*V;
  dVa: Va => ; compartment_1*dVa_k1*Va;
    dVa_k1 = 20;
  dVII: VII => ; compartment_1*d_VII*VII;
  dVIIa: VIIa => ; compartment_1*dVIIa_k1*VIIa;
    dVIIa_k1 = 20;
  dVIII: VIII => ; compartment_1*d_VIII*VIII;
  dVIIIa: VIIIa => ; compartment_1*dVIIIa_k1*VIIIa;
    dVIIIa_k1 = 20;
  dX: X => ; compartment_1*d_X*X;
  dXa: Xa => ; compartment_1*dXa_k1*Xa;
    dXa_k1 = 20;
  dIX: IX => ; compartment_1*d_IX*IX;
  dIXa: IXa => ; compartment_1*dIXa_k1*IXa;
    dIXa_k1 = 20;
  dXII: XII => ; compartment_1*d_XII*XII;
  dXIIa: XIIa => ; compartment_1*dXIIa_k1*XIIa;
    dXIIa_k1 = 20;
  dXIII: XIII => ; compartment_1*d_XIII*XIII;
  dXIIIa: XIIIa => ; compartment_1*dXIIIa_k1*XIIIa;
    dXIIIa_k1 = 0.69;
  dPk: Pk => ; compartment_1*d_Pk*Pk;
  dK: K => ; compartment_1*dK_k1*K;
    dK_k1 = 20;
  dPg: Pg => ; compartment_1*d_Pg*Pg;
  dP: P => ; compartment_1*dP_k1*P;
    dP_k1 = 20;
  dPC: PC => ; compartment_1*d_PC*PC;
  dAPC: APC => ; compartment_1*dAPC_k1*APC;
    dAPC_k1 = 20.4;
  dPS: PS => ; compartment_1*d_PS*PS;
  dFDP: FDP => ; compartment_1*dFDP_k1*FDP;
    dFDP_k1 = 3.5;
  dD: D => ; compartment_1*dD_k1*D;
    dD_k1 = 0.1;
  dTFPI: TFPI => ; compartment_1*d_TFPI*TFPI;
  dVIIa_TF: VIIa_TF => ; compartment_1*dVIIa_TF_k1*VIIa_TF;
    dVIIa_TF_k1 = 20;
  dVII_TF: VII_TF => ; compartment_1*dVII_TF_k1*VII_TF;
    dVII_TF_k1 = 0.7;
  dAPC_PS: APC_PS => ; compartment_1*dAPC_PS_k1*APC_PS;
    dAPC_PS_k1 = 20;
  dVa_Xa: Va_Xa => ; compartment_1*dVa_Xa_k1*Va_Xa;
    dVa_Xa_k1 = 20;
  dIXa_VIIIa: IXa_VIIIa => ; compartment_1*dIXa_VIIIa_k1*IXa_VIIIa;
    dIXa_VIIIa_k1 = 20;
  dTmod: Tmod => ; compartment_1*d_Tmod*Tmod;
  dIIa_Tmod: IIa_Tmod => ; compartment_1*dIIa_Tmod_k1*IIa_Tmod;
    dIIa_Tmod_k1 = 20;
  dXa_TFPI: Xa_TFPI => ; compartment_1*dXa_TFPI_k1*Xa_TFPI;
    dXa_TFPI_k1 = 20;
  dVIIa_TF_Xa_TFPI: VIIa_TF_Xa_TFPI => ; compartment_1*dVIIa_TF_Xa_TFPI_k1*VIIa_TF_Xa_TFPI;
    dVIIa_TF_Xa_TFPI_k1 = 20;
  dTAT: TAT => ; compartment_1*dTAT_k1*TAT;
    dTAT_k1 = 0.2;
  dCA: CA => ; compartment_1*dCA_k1*CA;
    dCA_k1 = 0.05;
  dXIa: XIa => ; compartment_1*dXIa_k1*XIa;
    dXIa_k1 = 20;
  dVKH2: VKH2 => VKO; compartment_1*d_VKH2*VKH2;
  VK_transport: VK -> VK_p; compartment_1*(vitaminK_k12*VK - vitaminK_k21_Vc*VK_p);
  eHeparin: ATIII_Heparin => ; compartment_1*heparin_ke*ATIII_Heparin;
  eHeparinXa: Xa_ATIII_Heparin => ; compartment_1*heparin_ke*Xa_ATIII_Heparin;
  eHeparinIXa: IXa_ATIII_Heparin => ; compartment_1*heparin_ke*IXa_ATIII_Heparin;
  eHeparinIIa: IIa_ATIII_Heparin => ; compartment_1*heparin_ke*IIa_ATIII_Heparin;
  dXI: XI => ; compartment_1*dXI_k1*XI;
    dXI_k1 = 0.1;
  pXII: => XII; compartment_1*Factor_production_1(XII0, d_XII);
  pVIII: => VIII; compartment_1*Factor_production_2(VIII0, d_VIII);
  pXI: => XI; compartment_1*Factor_production_3(XI0, d_XI);
  pV: => V; compartment_1*Factor_production_4(V_0, d_V);
  pFg: => Fg; compartment_1*Factor_production_5(Fg0, d_Fg);
  pXIII: => XIII; compartment_1*Factor_production_6(XIII0, d_XIII);
  pPg: => Pg; compartment_1*Factor_production_7(Pg0, d_Pg);
  pTmod: => Tmod; compartment_1*Factor_production_8(Tmod0, d_Tmod);
  pTFPI: => TFPI; compartment_1*Factor_production_9(TFPI0, d_TFPI);
  pPk: => Pk; compartment_1*Factor_production_10(Pk0, d_Pk);
  pVK: => VK; compartment_1*Factor_production_11(VK0, d_VK);
  dVK: VK => ; compartment_1*d_VK*VK;
  pHeparin: => ATIII_Heparin; compartment_1*Constant_flux__irreversible(heparin_infusion);

  // Events:
  warfarin_administration: at ((time - 24*floor(time/24) == 0.1) && (time < 1500)): A_warf = A_warf + warfarin_daily_dose;
  riva_administration: at ((time - 24*floor(time/24) == 0.1) && (time > 1500)): A_riva = A_riva + Riva_daily_dose;

  // Unit definitions:
  unit time = 3600 second;
  unit substance = 1e-9 mole;
end
