// SBML level 3 version 1
// dcterms:bibliographicCitation: urn:miriam:pubmed:18823127
// dcterms:bibliographicCitation: Keq used to calculate turnover for reverse reaction urn:miriam:pubmed:16118205
// dcterms:bibliographicCitation: Km, turnover forward reaction urn:miriam:pubmed:17402747
// dcterms:bibliographicCitation: urn:miriam:pubmed:
// dcterms:bibliographicCitation: urn:miriam:pubmed:4340699
// dcterms:bibliographicCitation: Km urn:miriam:pubmed:26385918
// dcterms:bibliographicCitation: urn:miriam:doi:10.1016/S0163-7258(00)00097-8
// dcterms:bibliographicCitation: original work calf Km and kcat calculated with MW of 92kDa urn:miriam:pubmed:9030766
// dcterms:bibliographicCitation: Km from recombinant human enzyme, similar to mouse Km urn:miriam:pubmed:8182091
// dcterms:bibliographicCitation: turnover calculated from enzyme 1300 fold purified from porcine liver, Km=0.83 urn:miriam:pubmed:2963591
// dcterms:bibliographicCitation: urn:miriam:doi:10.1021/bi049592e
// dcterms:bibliographicCitation: urn:miriam:doi:
// dcterms:bibliographicCitation: urn:miriam:pubmed:22229411
// dcterms:bibliographicCitation: Vmax of purified anzyme and Km for NR urn:miriam:pubmed:19027704
// dcterms:bibliographicCitation: urn:miriam:isbn:
// dcterms:bibliographicCitation: used values urn:miriam:pubmed:22229411

function Two_substrate_product_inhibiton_scaling(ET, scaling, Kcat, I, Ki, Kma, Kmb, B, A)
  ET*scaling*Kcat*A*B/(Kma*(Kmb + B)*(1 + I/Ki) + A*Kmb + A*B);
end

function Product_inhibition_two_susbtrates_s2_const_scaling(ET, scaling, Kcat, S1, S2, Km, I, Ki)
  ET*scaling*Kcat*S1*S2/((Km + S1)*(1 + I/Ki));
end

function Competitie_inhibition_two_substrates_s2_const_scaling(E_T, scaling, kcat_A, A, Km_A, kcat_PA, PA, Km_PA, B, Km_B, PB, Km_PB)
  E_T*scaling*(kcat_A*A/Km_A - kcat_PA*PA/Km_PA)/(1 + A/Km_A + B/Km_B + PA/Km_PA + PB/Km_PB);
end

function Constant_flux__irreversible(v)
  v;
end
Constant_flux__irreversible is "Constant flux (irreversible)";

function MM_with_ET_and_scaling(ET, scaling, kcat, S, Km)
  ET*scaling*kcat*S/(Km + S);
end

function Product_inhibition_scaling(ET, scaling, Kcat, S, Km, I, Ki)
  ET*scaling*Kcat*S/(Km + S + Km*I/Ki);
end

function Competitive_inhibition_scaling(ET, scaling, Kcat, S, Km, I, Ki)
  ET*scaling*Kcat*S/(Km + S + Km*I/Ki);
end

function TwosubstratesMMs2constant(E_T, turnover, s1, s2, scaling, Km)
  E_T*turnover*s1*s2*scaling/(Km + s1);
end

model NAD_two_compartment_competition_model_NADA_vs_NamPT()
  // Heiland2019 - Two compartment model of NAD biosynthesis and consumption
  // The model is based on MODEL1905220001 but has two compartments that have different composition of the biosynthetic enzymes NADA and NamPT. One compartment contains in addition NNMT, the other one does not. Both compartments are competing for a common Nam source.
  // model units - substance: substance, time: time, volume: volume, area: area, length: length, extent: substance

  // Compartments:
  compartment Cytosol = 1 volume;
  compartment NamPT_compartment = 0.001 volume;
  compartment NADA_compartment = 0.001 volume;

  // Species:
  species $Gln_NamPT_compartment in NamPT_compartment = 1;
  species $DNA_damage_NamPT_compartment in NamPT_compartment = 1;
  species $DNA_ADPR_NamPT_compartment in NamPT_compartment = 1;
  species NADbound_NamPT_compartment in NamPT_compartment = 1;
  species $H3_ac_NamPT_compartment in NamPT_compartment = 1;
  species $H3_deac_NamPT_compartment in NamPT_compartment = 1;
  species $Glu_NamPT_compartment in NamPT_compartment = 1;
  species NR_NamPT_compartment in NamPT_compartment = 1;
  species $Pi_NamPT_compartment in NamPT_compartment = 1;
  species NaAD_NamPT_compartment in NamPT_compartment = 0;
  species $_1_methyl_NAM_NamPT_compartment in NamPT_compartment = 0; _1_methyl_NAM_NamPT_compartment is "1-methyl-NAM";
  species $H2O_NamPT_compartment in NamPT_compartment = 1;
  species $PPi_NamPT_compartment in NamPT_compartment = 0.012;
  species $AMP_NamPT_compartment in NamPT_compartment = 1;
  species NMN_NamPT_compartment in NamPT_compartment = 0;
  species NA_NamPT_compartment in NamPT_compartment = 0;
  species NaMN_NamPT_compartment in NamPT_compartment = 0;
  species $ADP_NamPT_compartment in NamPT_compartment = 1;
  species $SAM_NamPT_compartment in NamPT_compartment = 0.08;
  species $SAH_NamPT_compartment in NamPT_compartment = 1;
  species NAM_NamPT_compartment in NamPT_compartment = 0;
  species NAD_NamPT_compartment in NamPT_compartment = 0;
  species NAR_NamPT_compartment in NamPT_compartment = 0;
  species $PRPP_NamPT_compartment in NamPT_compartment = 1;
  species $ATP_NamPT_compartment in NamPT_compartment = 1;
  species $Gln_NADA_compartment in NADA_compartment = 1;
  species $DNA_damage_NADA_compartment in NADA_compartment = 1;
  species $DNA_ADPR_NADA_compartment in NADA_compartment = 1;
  species NADbound_NADA_compartment in NADA_compartment = 1;
  species $H3_ac_NADA_compartment in NADA_compartment = 1;
  species $H3_deac_NADA_compartment in NADA_compartment = 1;
  species $Glu_NADA_compartment in NADA_compartment = 1;
  species NR_NADA_compartment in NADA_compartment = 1;
  species $Pi_NADA_compartment in NADA_compartment = 1;
  species NaAD_NADA_compartment in NADA_compartment = 0;
  species $H2O_NADA_compartment in NADA_compartment = 1;
  species $PPi_NADA_compartment in NADA_compartment = 0.012;
  species $AMP_NADA_compartment in NADA_compartment = 1;
  species NMN_NADA_compartment in NADA_compartment = 0;
  species NA_NADA_compartment in NADA_compartment = 0;
  species NaMN_NADA_compartment in NADA_compartment = 0;
  species $ADP_NADA_compartment in NADA_compartment = 1;
  species NAM_NADA_compartment in NADA_compartment = 0;
  species NAD_NADA_compartment in NADA_compartment = 0;
  species NAR_NADA_compartment in NADA_compartment = 0;
  species $PRPP_NADA_compartment in NADA_compartment = 1;
  species $ATP_NADA_compartment in NADA_compartment = 1;
  species Nam_ex in Cytosol = 1;

  // Parameters:
  var cell_division_rate; cell_division_rate is "celldivision_rate_NamPT_compartment";
  var celldivision_pathogen; celldivision_pathogen is "celldivision_rate_NADA_compartment";
  Nam_transporter = 100;
  Km_NamPRT = 5e-6;
  Kcat_NamPRT = 0.0077;
  cell_devision_all = 2.8e-5;
  E_T_NMNAT = 10;
  Initial_for_cell_devision_all = cell_devision_all;

  // Assignment rules:
  cell_division_rate := Initial_for_cell_devision_all;
  celldivision_pathogen := Initial_for_cell_devision_all;

  // Reactions:
  NMN_efflux_0: NMN_NamPT_compartment => ; NamPT_compartment*cell_division_rate*NMN_NamPT_compartment; NMN_efflux_0 is "NMN-efflux[0]";
  NAPRT_0: NA_NamPT_compartment + $ATP_NamPT_compartment + $PRPP_NamPT_compartment => NaMN_NamPT_compartment + $ADP_NamPT_compartment + $PPi_NamPT_compartment; NamPT_compartment*TwosubstratesMMs2constant(NAPRT_0_E_T, NAPRT_0_turnover, NA_NamPT_compartment, ATP_NamPT_compartment, NAPRT_0_scaling, NAPRT_0_Km); NAPRT_0 is "NAPRT[0]";  // ec-code:2.4.2.11; isDescribedBy pubmed:18823127
    NAPRT_0_E_T = 10; NAPRT_0_turnover = 3.3; NAPRT_0_scaling = 0.001; NAPRT_0_Km = 0.00015;
  NMNAT1_NMN_0: NMN_NamPT_compartment + $ATP_NamPT_compartment -> NAD_NamPT_compartment + $PPi_NamPT_compartment; NamPT_compartment*Competitie_inhibition_two_substrates_s2_const_scaling(E_T_NMNAT, NMNAT1_NMN_0_scaling, NMNAT1_NMN_0_kcat_A, NMN_NamPT_compartment, NMNAT1_NMN_0_Km_A, NMNAT1_NMN_0_kcat_PA, NAD_NamPT_compartment, NMNAT1_NMN_0_Km_PA, NaMN_NamPT_compartment, NMNAT1_NMN_0_Km_B, NaAD_NamPT_compartment, NMNAT1_NMN_0_Km_PB); NMNAT1_NMN_0 is "NMNAT1-NMN[0]";  // modifiers: NaMN_NamPT_compartment, NaAD_NamPT_compartment; ec-code:2.7.7.18; isDescribedBy pubmed:17402747; isDescribedBy pubmed:16118205
    NMNAT1_NMN_0_scaling = 0.001; NMNAT1_NMN_0_kcat_A = 53.8; NMNAT1_NMN_0_Km_A = 0.0223; NMNAT1_NMN_0_kcat_PA = 129.1; NMNAT1_NMN_0_Km_PA = 0.059; NMNAT1_NMN_0_Km_B = 0.0677; NMNAT1_NMN_0_Km_PB = 0.502;
  NMNAT1_NaMN_0: NaMN_NamPT_compartment -> NaAD_NamPT_compartment; NamPT_compartment*Competitie_inhibition_two_substrates_s2_const_scaling(E_T_NMNAT, NMNAT1_NaMN_0_scaling, NMNAT1_NaMN_0_kcat_A, NaMN_NamPT_compartment, NMNAT1_NaMN_0_Km_A, NMNAT1_NaMN_0_kcat_PA, NaAD_NamPT_compartment, NMNAT1_NaMN_0_Km_PA, NMN_NamPT_compartment, NMNAT1_NaMN_0_Km_B, NAD_NamPT_compartment, NMNAT1_NaMN_0_Km_PB); NMNAT1_NaMN_0 is "NMNAT1-NaMN[0]";  // modifiers: NMN_NamPT_compartment, NAD_NamPT_compartment; ec-code:2.7.7.1; ec-code:2.7.7.18; isDescribedBy pubmed:16118205; isDescribedBy pubmed:17402747
    NMNAT1_NaMN_0_scaling = 0.001; NMNAT1_NaMN_0_kcat_A = 42.9; NMNAT1_NaMN_0_Km_A = 0.0677; NMNAT1_NaMN_0_kcat_PA = 103.8; NMNAT1_NaMN_0_Km_PA = 0.502; NMNAT1_NaMN_0_Km_B = 22.3; NMNAT1_NaMN_0_Km_PB = 0.059;
  NADS_0: NaAD_NamPT_compartment + $ATP_NamPT_compartment + $Gln_NamPT_compartment + $H2O_NamPT_compartment => $Glu_NamPT_compartment + NAD_NamPT_compartment + $PPi_NamPT_compartment + $AMP_NamPT_compartment; NamPT_compartment*TwosubstratesMMs2constant(NADS_0_E_T, NADS_0_turnover, NaAD_NamPT_compartment, ATP_NamPT_compartment, NADS_0_scaling, NADS_0_Km); NADS_0 is "NADS[0]";  // ec-code:6.3.5.1; isDescribedBy pubmed:4340699
    NADS_0_E_T = 10; NADS_0_turnover = 21; NADS_0_scaling = 0.001; NADS_0_Km = 0.19;
  // KM and Kcat for CN-III
  NT5_NMN_0: NMN_NamPT_compartment + $H2O_NamPT_compartment => NR_NamPT_compartment; NamPT_compartment*MM_with_ET_and_scaling(NT5_NMN_0_ET, NT5_NMN_0_scaling, NT5_NMN_0_kcat, NMN_NamPT_compartment, NT5_NMN_0_Km); NT5_NMN_0 is "NT5-NMN[0]";  // ec-code:3.1.3.5; isDescribedBy pubmed:26385918
    NT5_NMN_0_ET = 10; NT5_NMN_0_scaling = 0.001; NT5_NMN_0_kcat = 0.5; NT5_NMN_0_Km = 5;
  PNP_NR_0: NR_NamPT_compartment + $Pi_NamPT_compartment => NAM_NamPT_compartment; NamPT_compartment*TwosubstratesMMs2constant(PNP_NR_0_E_T, PNP_NR_0_turnover, NR_NamPT_compartment, Pi_NamPT_compartment, PNP_NR_0_scaling, PNP_NR_0_Km); PNP_NR_0 is "PNP-NR[0]";  // modifiers: NAR_NamPT_compartment; isDescribedBy pubmed:9030766; isDescribedBy doi:10.1016/S0163-7258(00)00097-8
    PNP_NR_0_E_T = 10; PNP_NR_0_turnover = 40; PNP_NR_0_scaling = 0.001; PNP_NR_0_Km = 1.48;
  NNMT_0: NAM_NamPT_compartment + $SAM_NamPT_compartment => $_1_methyl_NAM_NamPT_compartment + $SAH_NamPT_compartment; NamPT_compartment*Two_substrate_product_inhibiton_scaling(NNMT_0_ET, NNMT_0_scaling, NNMT_0_Kcat, _1_methyl_NAM_NamPT_compartment, NNMT_0_Ki, Kma, Kmb, NAM_NamPT_compartment, SAM_NamPT_compartment); NNMT_0 is "NNMT[0]";  // ec-code:2.1.1.1; brenda:441255; isDescribedBy pubmed:8182091; isDescribedBy pubmed:2963591
    NNMT_0_ET = 10; NNMT_0_scaling = 0.001; NNMT_0_Kcat = 8.1; NNMT_0_Ki = 0.06; Kma = 0.0018; Kmb = 0.4;
  Nam_efflux_0: NAM_NamPT_compartment => ; NamPT_compartment*cell_division_rate*NAM_NamPT_compartment; Nam_efflux_0 is "Nam-efflux[0]";
  // Km and Kcat from CN-II
  NT5_NaMN_0: NaMN_NamPT_compartment + $H2O_NamPT_compartment => NAR_NamPT_compartment; NamPT_compartment*MM_with_ET_and_scaling(NT5_NaMN_0_ET, NT5_NaMN_0_scaling, NT5_NaMN_0_kcat, NaMN_NamPT_compartment, NT5_NaMN_0_Km); NT5_NaMN_0 is "NT5-NaMN[0]";  // isDescribedBy pubmed:26385918
    NT5_NaMN_0_ET = 10; NT5_NaMN_0_scaling = 0.001; NT5_NaMN_0_kcat = 2.8; NT5_NaMN_0_Km = 3.5;
  SIRT_0: NAD_NamPT_compartment + $H3_ac_NamPT_compartment => NAM_NamPT_compartment + $H3_deac_NamPT_compartment; NamPT_compartment*Product_inhibition_two_susbtrates_s2_const_scaling(SIRT_0_ET, SIRT_0_scaling, SIRT_0_Kcat, NAD_NamPT_compartment, H3_ac_NamPT_compartment, SIRT_0_Km, NAM_NamPT_compartment, SIRT_0_Ki); SIRT_0 is "SIRT[0]";  // ec-code:3.5.1.-; isDescribedBy doi:10.1021/bi049592e
    SIRT_0_ET = 10; SIRT_0_scaling = 0.001; SIRT_0_Kcat = 0.67; SIRT_0_Km = 0.029; SIRT_0_Ki = 0.06;
  NAD_consumption_without_Nam_inhibition_0: NAD_NamPT_compartment => NAM_NamPT_compartment; NamPT_compartment*MM_with_ET_and_scaling(NAD_consumption_without_Nam_inhibition_0_ET, NAD_consumption_without_Nam_inhibition_0_scaling, NAD_consumption_without_Nam_inhibition_0_kcat, NAD_NamPT_compartment, NAD_consumption_without_Nam_inhibition_0_Km); NAD_consumption_without_Nam_inhibition_0 is "NAD-consumption without Nam inhibition[0]";
    NAD_consumption_without_Nam_inhibition_0_ET = 10; NAD_consumption_without_Nam_inhibition_0_scaling = 0.001; NAD_consumption_without_Nam_inhibition_0_kcat = 1; NAD_consumption_without_Nam_inhibition_0_Km = 1;
  NADA_0: NAM_NamPT_compartment + $H2O_NamPT_compartment => NA_NamPT_compartment; NamPT_compartment*Product_inhibition_scaling(NADA_0_ET, NADA_0_scaling, NADA_0_Kcat, NAM_NamPT_compartment, NADA_0_Km, NA_NamPT_compartment, NADA_0_Ki); NADA_0 is "NADA[0]";  // isPartOf ec-code:3.5.1.19; isDescribedBy pubmed:22229411
    NADA_0_ET = 0; NADA_0_scaling = 0.001; NADA_0_Kcat = 0.69; NADA_0_Km = 0.009; NADA_0_Ki = 0.1;
  // cell size HeLa 3e-12 l
  // fibro blast 1e-12l
  // maximal E. coli uptake NA http://www.jbc.org/content/248/14/5144.full.pdf 630 molceules per cell and s
  // thus approx. 1 miktoM/ls
  // HeLa (epithelial; 8.2 ± 0.3 fmol/10 min),
  // NIH-3T3 cells : The apparent Km of NAD transport was ∼190 μM while the Vmax was 429 pmol/well/10 min.
  // http://www.jbc.org/content/283/10/6367.full
  // (1.2e6 cells per well according to thermo fisher cell culture specifications)
  // thus approx. 0.2 mikroM/s
  // 15mg uptake per 60kg body = 2.5e-8 mmol/ls
  NAM_import_0: Nam_ex -> NAM_NamPT_compartment; NamPT_compartment*(Nam_transporter*Nam_ex - Nam_transporter*NAM_NamPT_compartment); NAM_import_0 is "NAM import[0]";
  NAMPT_0: NAM_NamPT_compartment + $PRPP_NamPT_compartment => NMN_NamPT_compartment + $Pi_NamPT_compartment; NamPT_compartment*Competitive_inhibition_scaling(NAMPT_0_ET, NAMPT_0_scaling, Kcat_NamPRT, NAM_NamPT_compartment, Km_NamPRT, NAD_NamPT_compartment, NAMPT_0_Ki); NAMPT_0 is "NAMPT[0]";  // modifiers: NAD_NamPT_compartment; ec-code:2.4.2.12; isDescribedBy pubmed:18823127
    NAMPT_0_ET = 400; NAMPT_0_scaling = 0.001; NAMPT_0_Ki = 0.0021;
  NAR_efflux_0: NAR_NamPT_compartment => ; NamPT_compartment*cell_division_rate*NAR_NamPT_compartment; NAR_efflux_0 is "NAR-efflux[0]";
  NA_efflux_0: NA_NamPT_compartment => ; NamPT_compartment*cell_division_rate*NA_NamPT_compartment; NA_efflux_0 is "NA-efflux[0]";
  NAD_binding_0: NAD_NamPT_compartment -> NADbound_NamPT_compartment; NamPT_compartment*(NAD_binding_0_k1*NAD_NamPT_compartment - NAD_binding_0_k2*NADbound_NamPT_compartment); NAD_binding_0 is "NAD-binding[0]";
    NAD_binding_0_k1 = 100; NAD_binding_0_k2 = 10;
  // Kcat calculated from vmax of purified enzyme (600nmol/min*mg) using an MW of 23193 g/mol for NMN
  NRK1_NaMN_0: NAR_NamPT_compartment => NaMN_NamPT_compartment; NamPT_compartment*MM_with_ET_and_scaling(NRK1_NaMN_0_ET, NRK1_NaMN_0_scaling, NRK1_NaMN_0_kcat, NAR_NamPT_compartment, NRK1_NaMN_0_Km); NRK1_NaMN_0 is "NRK1-NaMN[0]";  // modifiers: NR_NamPT_compartment; ec-code:2.7.1.173; isDescribedBy pubmed:19027704
    NRK1_NaMN_0_ET = 10; NRK1_NaMN_0_scaling = 0.001; NRK1_NaMN_0_kcat = 0.23; NRK1_NaMN_0_Km = 0.0034;
  // Parameter have to be adjusted for NAR...currently NR affinities are used
  PNP_NAR_0: NAR_NamPT_compartment + $Pi_NamPT_compartment => NA_NamPT_compartment; NamPT_compartment*TwosubstratesMMs2constant(PNP_NAR_0_E_T, PNP_NAR_0_turnover, NAR_NamPT_compartment, Pi_NamPT_compartment, PNP_NAR_0_scaling, PNP_NAR_0_Km); PNP_NAR_0 is "PNP-NAR[0]";  // modifiers: NR_NamPT_compartment; ec-code:2.4.2.1; isDescribedBy pubmed:9030766
    PNP_NAR_0_E_T = 10; PNP_NAR_0_turnover = 40; PNP_NAR_0_scaling = 0.001; PNP_NAR_0_Km = 1.48;
  NR_efflux_0: NR_NamPT_compartment => ; NamPT_compartment*cell_division_rate*NR_NamPT_compartment; NR_efflux_0 is "NR-efflux[0]";
  // Kcat calculated from vmax of purified enzyme (600nmol/min*mg) using an MW of 23193 g/mol
  NRK1_NMN_0: NR_NamPT_compartment => NMN_NamPT_compartment; NamPT_compartment*MM_with_ET_and_scaling(NRK1_NMN_0_ET, NRK1_NMN_0_scaling, NRK1_NMN_0_kcat, NR_NamPT_compartment, NRK1_NMN_0_Km); NRK1_NMN_0 is "NRK1-NMN[0]";  // modifiers: NAR_NamPT_compartment; isDescribedBy pubmed:19027704
    NRK1_NMN_0_ET = 10; NRK1_NMN_0_scaling = 0.001; NRK1_NMN_0_kcat = 0.23; NRK1_NMN_0_Km = 0.0034;
  NMN_efflux_1: NMN_NADA_compartment => ; NADA_compartment*celldivision_pathogen*NMN_NADA_compartment; NMN_efflux_1 is "NMN-efflux[1]";
  NAPRT_1: NA_NADA_compartment + $ATP_NADA_compartment + $PRPP_NADA_compartment => NaMN_NADA_compartment + $ADP_NADA_compartment + $PPi_NADA_compartment; NADA_compartment*TwosubstratesMMs2constant(NAPRT_1_E_T, NAPRT_1_turnover, NA_NADA_compartment, ATP_NADA_compartment, NAPRT_1_scaling, NAPRT_1_Km); NAPRT_1 is "NAPRT[1]";  // ec-code:2.4.2.11; isDescribedBy pubmed:18823127
    NAPRT_1_E_T = 10; NAPRT_1_turnover = 3.3; NAPRT_1_scaling = 0.001; NAPRT_1_Km = 0.00015;
  NMNAT1_NMN_1: NMN_NADA_compartment + $ATP_NADA_compartment -> NAD_NADA_compartment + $PPi_NADA_compartment; NADA_compartment*Competitie_inhibition_two_substrates_s2_const_scaling(E_T_NMNAT, NMNAT1_NMN_1_scaling, NMNAT1_NMN_1_kcat_A, NMN_NADA_compartment, NMNAT1_NMN_1_Km_A, NMNAT1_NMN_1_kcat_PA, NAD_NADA_compartment, NMNAT1_NMN_1_Km_PA, NaMN_NADA_compartment, NMNAT1_NMN_1_Km_B, NaAD_NADA_compartment, NMNAT1_NMN_1_Km_PB); NMNAT1_NMN_1 is "NMNAT1-NMN[1]";  // modifiers: NaMN_NADA_compartment, NaAD_NADA_compartment; ec-code:2.7.7.18; isDescribedBy pubmed:16118205; isDescribedBy pubmed:17402747
    NMNAT1_NMN_1_scaling = 0.001; NMNAT1_NMN_1_kcat_A = 53.8; NMNAT1_NMN_1_Km_A = 0.0223; NMNAT1_NMN_1_kcat_PA = 129.1; NMNAT1_NMN_1_Km_PA = 0.059; NMNAT1_NMN_1_Km_B = 0.0677; NMNAT1_NMN_1_Km_PB = 0.502;
  NMNAT1_NaMN_1: NaMN_NADA_compartment -> NaAD_NADA_compartment; NADA_compartment*Competitie_inhibition_two_substrates_s2_const_scaling(E_T_NMNAT, NMNAT1_NaMN_1_scaling, NMNAT1_NaMN_1_kcat_A, NaMN_NADA_compartment, NMNAT1_NaMN_1_Km_A, NMNAT1_NaMN_1_kcat_PA, NaAD_NADA_compartment, NMNAT1_NaMN_1_Km_PA, NMN_NADA_compartment, NMNAT1_NaMN_1_Km_B, NAD_NADA_compartment, NMNAT1_NaMN_1_Km_PB); NMNAT1_NaMN_1 is "NMNAT1-NaMN[1]";  // modifiers: NMN_NADA_compartment, NAD_NADA_compartment; ec-code:2.7.7.1; ec-code:2.7.7.18; isDescribedBy pubmed:16118205; isDescribedBy pubmed:17402747
    NMNAT1_NaMN_1_scaling = 0.001; NMNAT1_NaMN_1_kcat_A = 42.9; NMNAT1_NaMN_1_Km_A = 0.0677; NMNAT1_NaMN_1_kcat_PA = 103.8; NMNAT1_NaMN_1_Km_PA = 0.502; NMNAT1_NaMN_1_Km_B = 22.3; NMNAT1_NaMN_1_Km_PB = 0.059;
  NADS_1: NaAD_NADA_compartment + $ATP_NADA_compartment + $Gln_NADA_compartment + $H2O_NADA_compartment => $Glu_NADA_compartment + NAD_NADA_compartment + $PPi_NADA_compartment + $AMP_NADA_compartment; NADA_compartment*TwosubstratesMMs2constant(NADS_1_E_T, NADS_1_turnover, NaAD_NADA_compartment, ATP_NADA_compartment, NADS_1_scaling, NADS_1_Km); NADS_1 is "NADS[1]";  // ec-code:6.3.5.1; isDescribedBy pubmed:4340699
    NADS_1_E_T = 10; NADS_1_turnover = 21; NADS_1_scaling = 0.001; NADS_1_Km = 0.19;
  // KM and Kcat for CN-III
  NT5_NMN_1: NMN_NADA_compartment + $H2O_NADA_compartment => NR_NADA_compartment; NADA_compartment*MM_with_ET_and_scaling(NT5_NMN_1_ET, NT5_NMN_1_scaling, NT5_NMN_1_kcat, NMN_NADA_compartment, NT5_NMN_1_Km); NT5_NMN_1 is "NT5-NMN[1]";  // ec-code:3.1.3.5; isDescribedBy pubmed:26385918
    NT5_NMN_1_ET = 10; NT5_NMN_1_scaling = 0.001; NT5_NMN_1_kcat = 0.5; NT5_NMN_1_Km = 5;
  PNP_NR_1: NR_NADA_compartment + $Pi_NADA_compartment => NAM_NADA_compartment; NADA_compartment*TwosubstratesMMs2constant(PNP_NR_1_E_T, PNP_NR_1_turnover, NR_NADA_compartment, Pi_NADA_compartment, PNP_NR_1_scaling, PNP_NR_1_Km); PNP_NR_1 is "PNP-NR[1]";  // modifiers: NAR_NADA_compartment; isDescribedBy doi:10.1016/S0163-7258(00)00097-8; isDescribedBy pubmed:9030766
    PNP_NR_1_E_T = 10; PNP_NR_1_turnover = 40; PNP_NR_1_scaling = 0.001; PNP_NR_1_Km = 1.48;
  Nam_efflux_1: NAM_NADA_compartment => ; NADA_compartment*celldivision_pathogen*NAM_NADA_compartment; Nam_efflux_1 is "Nam-efflux[1]";
  // Km and Kcat from CN-II
  NT5_NaMN_1: NaMN_NADA_compartment + $H2O_NADA_compartment => NAR_NADA_compartment; NADA_compartment*MM_with_ET_and_scaling(NT5_NaMN_1_ET, NT5_NaMN_1_scaling, NT5_NaMN_1_kcat, NaMN_NADA_compartment, NT5_NaMN_1_Km); NT5_NaMN_1 is "NT5-NaMN[1]";  // isDescribedBy pubmed:26385918
    NT5_NaMN_1_ET = 10; NT5_NaMN_1_scaling = 0.001; NT5_NaMN_1_kcat = 2.8; NT5_NaMN_1_Km = 3.5;
  SIRT_1: NAD_NADA_compartment + $H3_ac_NADA_compartment => NAM_NADA_compartment + $H3_deac_NADA_compartment; NADA_compartment*Product_inhibition_two_susbtrates_s2_const_scaling(SIRT_1_ET, SIRT_1_scaling, SIRT_1_Kcat, NAD_NADA_compartment, H3_ac_NADA_compartment, SIRT_1_Km, NAM_NADA_compartment, SIRT_1_Ki); SIRT_1 is "SIRT[1]";  // ec-code:3.5.1.-; isDescribedBy doi:10.1021/bi049592e
    SIRT_1_ET = 10; SIRT_1_scaling = 0.001; SIRT_1_Kcat = 0.67; SIRT_1_Km = 0.029; SIRT_1_Ki = 0.06;
  NAD_consumption_without_Nam_inhibition_1: NAD_NADA_compartment => NAM_NADA_compartment; NADA_compartment*MM_with_ET_and_scaling(NAD_consumption_without_Nam_inhibition_1_ET, NAD_consumption_without_Nam_inhibition_1_scaling, NAD_consumption_without_Nam_inhibition_1_kcat, NAD_NADA_compartment, NAD_consumption_without_Nam_inhibition_1_Km); NAD_consumption_without_Nam_inhibition_1 is "NAD-consumption without Nam inhibition[1]";
    NAD_consumption_without_Nam_inhibition_1_ET = 10; NAD_consumption_without_Nam_inhibition_1_scaling = 0.001; NAD_consumption_without_Nam_inhibition_1_kcat = 1; NAD_consumption_without_Nam_inhibition_1_Km = 1;
  NADA_1: NAM_NADA_compartment + $H2O_NADA_compartment => NA_NADA_compartment; NADA_compartment*Product_inhibition_scaling(NADA_1_ET, NADA_1_scaling, NADA_1_Kcat, NAM_NADA_compartment, NADA_1_Km, NA_NADA_compartment, NADA_1_Ki); NADA_1 is "NADA[1]";  // isPartOf ec-code:3.5.1.19; isDescribedBy pubmed:22229411
    NADA_1_ET = 400; NADA_1_scaling = 0.001; NADA_1_Kcat = 0.69; NADA_1_Km = 0.009; NADA_1_Ki = 0.1;
  // cell size HeLa 3e-12 l
  // fibro blast 1e-12l
  // maximal E. coli uptake NA http://www.jbc.org/content/248/14/5144.full.pdf 630 molceules per cell and s
  // thus approx. 1 miktoM/ls
  // HeLa (epithelial; 8.2 ± 0.3 fmol/10 min),
  // NIH-3T3 cells : The apparent Km of NAD transport was ∼190 μM while the Vmax was 429 pmol/well/10 min.
  // http://www.jbc.org/content/283/10/6367.full
  // (1.2e6 cells per well according to thermo fisher cell culture specifications)
  // thus approx. 0.2 mikroM/s
  // 15mg uptake per 60kg body = 2.5e-8 mmol/ls
  NAM_import_1: Nam_ex -> NAM_NADA_compartment; NADA_compartment*(Nam_transporter*Nam_ex - Nam_transporter*NAM_NADA_compartment); NAM_import_1 is "NAM import[1]";
  NAMPT_1: NAM_NADA_compartment + $PRPP_NADA_compartment => NMN_NADA_compartment + $Pi_NADA_compartment; NADA_compartment*Competitive_inhibition_scaling(NAMPT_1_ET, NAMPT_1_scaling, Kcat_NamPRT, NAM_NADA_compartment, Km_NamPRT, NAD_NADA_compartment, NAMPT_1_Ki); NAMPT_1 is "NAMPT[1]";  // modifiers: NAD_NADA_compartment; ec-code:2.4.2.12; isDescribedBy pubmed:18823127
    NAMPT_1_ET = 0; NAMPT_1_scaling = 0.001; NAMPT_1_Ki = 0.0021;
  NAR_efflux_1: NAR_NADA_compartment => ; NADA_compartment*celldivision_pathogen*NAR_NADA_compartment; NAR_efflux_1 is "NAR-efflux[1]";
  NA_efflux_1: NA_NADA_compartment => ; NADA_compartment*celldivision_pathogen*NA_NADA_compartment; NA_efflux_1 is "NA-efflux[1]";
  NAD_binding_1: NAD_NADA_compartment -> NADbound_NADA_compartment; NADA_compartment*(NAD_binding_1_k1*NAD_NADA_compartment - NAD_binding_1_k2*NADbound_NADA_compartment); NAD_binding_1 is "NAD-binding[1]";
    NAD_binding_1_k1 = 100; NAD_binding_1_k2 = 10;
  // Kcat calculated from vmax of purified enzyme (600nmol/min*mg) using an MW of 23193 g/mol for NMN
  NRK1_NaMN_1: NAR_NADA_compartment => NaMN_NADA_compartment; NADA_compartment*MM_with_ET_and_scaling(NRK1_NaMN_1_ET, NRK1_NaMN_1_scaling, NRK1_NaMN_1_kcat, NAR_NADA_compartment, NRK1_NaMN_1_Km); NRK1_NaMN_1 is "NRK1-NaMN[1]";  // modifiers: NR_NADA_compartment; ec-code:2.7.1.173; isDescribedBy pubmed:19027704
    NRK1_NaMN_1_ET = 10; NRK1_NaMN_1_scaling = 0.001; NRK1_NaMN_1_kcat = 0.23; NRK1_NaMN_1_Km = 0.0034;
  // Parameter have to be adjusted for NAR...currently NR affinities are used
  PNP_NAR_1: NAR_NADA_compartment + $Pi_NADA_compartment => NA_NADA_compartment; NADA_compartment*TwosubstratesMMs2constant(PNP_NAR_1_E_T, PNP_NAR_1_turnover, NAR_NADA_compartment, Pi_NADA_compartment, PNP_NAR_1_scaling, PNP_NAR_1_Km); PNP_NAR_1 is "PNP-NAR[1]";  // modifiers: NR_NADA_compartment; ec-code:2.4.2.1; isDescribedBy pubmed:9030766
    PNP_NAR_1_E_T = 10; PNP_NAR_1_turnover = 40; PNP_NAR_1_scaling = 0.001; PNP_NAR_1_Km = 1.48;
  NR_efflux_1: NR_NADA_compartment => ; NADA_compartment*celldivision_pathogen*NR_NADA_compartment; NR_efflux_1 is "NR-efflux[1]";
  // Kcat calculated from vmax of purified enzyme (600nmol/min*mg) using an MW of 23193 g/mol
  NRK1_NMN_1: NR_NADA_compartment => NMN_NADA_compartment; NADA_compartment*MM_with_ET_and_scaling(NRK1_NMN_1_ET, NRK1_NMN_1_scaling, NRK1_NMN_1_kcat, NR_NADA_compartment, NRK1_NMN_1_Km); NRK1_NMN_1 is "NRK1-NMN[1]";  // modifiers: NAR_NADA_compartment; isDescribedBy pubmed:19027704
    NRK1_NMN_1_ET = 10; NRK1_NMN_1_scaling = 0.001; NRK1_NMN_1_kcat = 0.23; NRK1_NMN_1_Km = 0.0034;
  NAD_efflux_0: NAD_NamPT_compartment => ; NamPT_compartment*cell_division_rate*NAD_NamPT_compartment; NAD_efflux_0 is "NAD-efflux[0]";
  NAD_efflux_1: NAD_NADA_compartment => ; NADA_compartment*celldivision_pathogen*NAD_NADA_compartment; NAD_efflux_1 is "NAD-efflux[1]";
  // cell size HeLa 3e-12 l
  // fibro blast 1e-12l
  // maximal E. coli uptake NA http://www.jbc.org/content/248/14/5144.full.pdf 630 molceules per cell and s
  // thus approx. 1 miktoM/ls
  // HeLa (epithelial; 8.2 ± 0.3 fmol/10 min),
  // NIH-3T3 cells : The apparent Km of NAD transport was ∼190 μM while the Vmax was 429 pmol/well/10 min.
  // http://www.jbc.org/content/283/10/6367.full
  // (1.2e6 cells per well according to thermo fisher cell culture specifications)
  // thus approx. 0.2 mikroM/s
  // 15mg uptake per 60kg body = 2.5e-8 mmol/ls
  Nam_uptake: => Nam_ex; NADA_compartment*Constant_flux__irreversible(v);
    v = 1e-5;

  // Unit definitions:
  unit length = metre;
  unit area = metre^2;
  unit volume = litre;
  unit time = second;
  unit substance = 1e-3 mole;
end
