// SBML level 2 version 1

model Immunological_Model_of_sphingolipids_with_IL_6_IL_17_IL_23_in_L_major_infection()
  // Immunological Model of sphingolipids with IL-6/IL-17/IL-23 in L. major infection
  // In diseased state, we demonstrated that increase in production of sphingosine-1-phosphate and overexpression of IL-6,lL-17 and IL-23 with SATB1 leads to disease progression.
  // hasProperty mamo:MAMO_0000003

  // Compartments:
  compartment Infected_Cell = 1;
  compartment CD4_to_Th_17 = 1; CD4_to_Th_17 is "CD4+ to Th 17";
  compartment MACROPHAGE = 1;
  compartment NUCLEUS in MACROPHAGE = 1;
  compartment ENDOPLASMIC_RETICULUM in MACROPHAGE = 1;
  compartment GOLGI_COMPLEX in MACROPHAGE = 1;

  // Species:
  substanceOnly species $LPG_Infected_Cell in Infected_Cell = 5000;  // substance in MWBUILTINUNIT_molecule
  substanceOnly species $TLR4_6_Infected_Cell in Infected_Cell = 5000; TLR4_6_Infected_Cell is "TLR4/6";  // substance in MWBUILTINUNIT_molecule
  substanceOnly species TLR_complex in Infected_Cell = 5000;  // substance in MWBUILTINUNIT_molecule
  substanceOnly species MyD88_Infected_Cell in Infected_Cell = 15000;  // substance in MWBUILTINUNIT_molecule
  substanceOnly species IRAK1_4_Infected_Cell in Infected_Cell = 9960; IRAK1_4_Infected_Cell is "IRAK1/4";  // substance in MWBUILTINUNIT_molecule
  substanceOnly species TRAF6_Infected_Cell in Infected_Cell = 9960;  // substance in MWBUILTINUNIT_molecule
  substanceOnly species TAK1_Infected_Cell in Infected_Cell = 9999;  // substance in MWBUILTINUNIT_molecule
  substanceOnly species NEMO_complex_Infected_Cell in Infected_Cell = 9999;  // substance in MWBUILTINUNIT_molecule
  substanceOnly species NF_KB_Infected_Cell in Infected_Cell = 10000; NF_KB_Infected_Cell is "NF-KB";  // substance in MWBUILTINUNIT_molecule
  substanceOnly species $IL_6_Infected_Cell in Infected_Cell = 15000; IL_6_Infected_Cell is "IL-6";  // substance in MWBUILTINUNIT_molecule
  substanceOnly species $IL_1B in Infected_Cell = 15000; IL_1B is "IL-1B";  // substance in MWBUILTINUNIT_molecule
  substanceOnly species $IL_23 in Infected_Cell = 15000; IL_23 is "IL-23";  // substance in MWBUILTINUNIT_molecule
  substanceOnly species Inflammatory_Cytokine_Genes in Infected_Cell = 15000;  // substance in MWBUILTINUNIT_molecule
  substanceOnly species $IL_1R in Infected_Cell = 15000; IL_1R is "IL-1R";  // substance in MWBUILTINUNIT_molecule
  substanceOnly species IL_1complex in Infected_Cell = 15000; IL_1complex is "IL-1complex";  // substance in MWBUILTINUNIT_molecule
  substanceOnly species $IL23R_IL12RB1 in CD4_to_Th_17 = 15000; IL23R_IL12RB1 is "IL23R-IL12RB1";  // substance in MWBUILTINUNIT_molecule
  substanceOnly species $IL6R_GP130_CD4_to_Th_17 in CD4_to_Th_17 = 15000; IL6R_GP130_CD4_to_Th_17 is "IL6R-GP130";  // substance in MWBUILTINUNIT_molecule
  substanceOnly species IL23_complex in CD4_to_Th_17 = 15000;  // substance in MWBUILTINUNIT_molecule
  substanceOnly species IL_6_COMPLEX in CD4_to_Th_17 = 15000; IL_6_COMPLEX is "IL-6 COMPLEX";  // substance in MWBUILTINUNIT_molecule
  substanceOnly species JAK2_TYK2_CD4_to_Th_17 in CD4_to_Th_17 = 14983; JAK2_TYK2_CD4_to_Th_17 is "JAK2/TYK2";  // substance in MWBUILTINUNIT_molecule
  substanceOnly species JAK1_2_CD4_to_Th_17 in CD4_to_Th_17 = 15000; JAK1_2_CD4_to_Th_17 is "JAK1/2";  // substance in MWBUILTINUNIT_molecule
  substanceOnly species STAT3_CD4_to_Th_17 in CD4_to_Th_17 = 30000;  // substance in MWBUILTINUNIT_molecule
  substanceOnly species RORgt in CD4_to_Th_17 = 30000;  // substance in MWBUILTINUNIT_molecule
  species IL17_gene in CD4_to_Th_17 = 30000/CD4_to_Th_17;
  substanceOnly species $IL_17A_F in CD4_to_Th_17 = 30000; IL_17A_F is "IL-17A/F";  // substance in MWBUILTINUNIT_molecule
  substanceOnly species SATB1_CD4_to_Th_17 in CD4_to_Th_17 = 14984;  // substance in MWBUILTINUNIT_molecule
  substanceOnly species BHLEHE40_CD4_to_Th_17 in CD4_to_Th_17 = 15000;  // substance in MWBUILTINUNIT_molecule
  substanceOnly species GMCSF_CD4_to_Th_17 in CD4_to_Th_17 = 14900;  // substance in MWBUILTINUNIT_molecule
  substanceOnly species PD1 in CD4_to_Th_17 = 0;  // substance in MWBUILTINUNIT_molecule
  substanceOnly species Abnormal_immune_function in CD4_to_Th_17 = 0;  // substance in MWBUILTINUNIT_molecule
  substanceOnly species rorgt_Gene in CD4_to_Th_17 = 30000;  // substance in MWBUILTINUNIT_molecule
  substanceOnly species $IL6R_GP130_MACROPHAGE in MACROPHAGE = 15000; IL6R_GP130_MACROPHAGE is "IL6R/GP130";  // substance in MWBUILTINUNIT_molecule
  substanceOnly species IL6_COMPLEX in MACROPHAGE = 15000;  // substance in MWBUILTINUNIT_molecule
  substanceOnly species JAK1_2_MACROPHAGE in MACROPHAGE = 15000; JAK1_2_MACROPHAGE is "JAK1/2";  // substance in MWBUILTINUNIT_molecule
  substanceOnly species $IL_17RA_C in MACROPHAGE = 30000; IL_17RA_C is "IL-17RA/C";  // substance in MWBUILTINUNIT_molecule
  substanceOnly species IL_17_complex in MACROPHAGE = 29900; IL_17_complex is "IL-17 complex";  // substance in MWBUILTINUNIT_molecule
  substanceOnly species ACT1 in MACROPHAGE = 30000;  // substance in MWBUILTINUNIT_molecule
  substanceOnly species TRAF6_MACROPHAGE in MACROPHAGE = 29800;  // substance in MWBUILTINUNIT_molecule
  substanceOnly species LPG_TLR_complex in MACROPHAGE = 5000; LPG_TLR_complex is "LPG-TLR complex";  // substance in MWBUILTINUNIT_molecule
  substanceOnly species $TLR4_6_MACROPHAGE in MACROPHAGE = 5000; TLR4_6_MACROPHAGE is "TLR4/6";  // substance in MWBUILTINUNIT_molecule
  substanceOnly species STAT3_MACROPHAGE in MACROPHAGE = 15000;  // substance in MWBUILTINUNIT_molecule
  substanceOnly species $LPG_MACROPHAGE in MACROPHAGE = 5000;  // substance in MWBUILTINUNIT_molecule
  substanceOnly species MyD88_MACROPHAGE in MACROPHAGE = 5000;  // substance in MWBUILTINUNIT_molecule
  substanceOnly species IRAK1_4_MACROPHAGE in MACROPHAGE = 5000; IRAK1_4_MACROPHAGE is "IRAK1/4";  // substance in MWBUILTINUNIT_molecule
  substanceOnly species TAK1_MACROPHAGE in MACROPHAGE = 29700;  // substance in MWBUILTINUNIT_molecule
  substanceOnly species NEMO_complex_MACROPHAGE in MACROPHAGE = 29700;  // substance in MWBUILTINUNIT_molecule
  substanceOnly species MAPKK3 in MACROPHAGE = 29700;  // substance in MWBUILTINUNIT_molecule
  substanceOnly species MEK1_2 in MACROPHAGE = 29770; MEK1_2 is "MEK1/2";  // substance in MWBUILTINUNIT_molecule
  substanceOnly species ERK in MACROPHAGE = 29700;  // substance in MWBUILTINUNIT_molecule
  substanceOnly species $IL_23R_IL_12RB1 in MACROPHAGE = 15000; IL_23R_IL_12RB1 is "IL-23R/IL-12RB1";  // substance in MWBUILTINUNIT_molecule
  substanceOnly species IL_23_complex in MACROPHAGE = 15000; IL_23_complex is "IL-23 complex";  // substance in MWBUILTINUNIT_molecule
  substanceOnly species JAK2_TYK2_MACROPHAGE in MACROPHAGE = 15000; JAK2_TYK2_MACROPHAGE is "JAK2/TYK2";  // substance in MWBUILTINUNIT_molecule
  substanceOnly species SATB1_MACROPHAGE in MACROPHAGE = 15000;  // substance in MWBUILTINUNIT_molecule
  substanceOnly species Sphingosine_1_phosphate in MACROPHAGE = 19000; Sphingosine_1_phosphate is "Sphingosine-1-phosphate";  // substance in MWBUILTINUNIT_molecule
  substanceOnly species SPHK in MACROPHAGE = 29700;  // substance in MWBUILTINUNIT_molecule
  substanceOnly species Sphingosine_MACROPHAGE in MACROPHAGE = 19000;  // substance in MWBUILTINUNIT_molecule
  substanceOnly species IL_6_MACROPHAGE in MACROPHAGE = 60000; IL_6_MACROPHAGE is "IL-6";  // substance in MWBUILTINUNIT_molecule
  substanceOnly species CXCL in MACROPHAGE = 60000;  // substance in MWBUILTINUNIT_molecule
  substanceOnly species IL_1b in MACROPHAGE = 60000; IL_1b is "IL-1b";  // substance in MWBUILTINUNIT_molecule
  substanceOnly species GMCSF_MACROPHAGE in MACROPHAGE = 79000;  // substance in MWBUILTINUNIT_molecule
  substanceOnly species S1PRs in MACROPHAGE = 15000;  // substance in MWBUILTINUNIT_molecule
  substanceOnly species SOCS3 in MACROPHAGE = 800;  // substance in MWBUILTINUNIT_molecule
  substanceOnly species SATB1_NUCLEUS in NUCLEUS = 15000;  // substance in MWBUILTINUNIT_molecule
  substanceOnly species BHLEHE40_NUCLEUS in NUCLEUS = 20000;  // substance in MWBUILTINUNIT_molecule
  substanceOnly species NF_KB_NUCLEUS in NUCLEUS = 29450; NF_KB_NUCLEUS is "NF-KB";  // substance in MWBUILTINUNIT_molecule
  substanceOnly species SPHK_Genes in NUCLEUS = 29700;  // substance in MWBUILTINUNIT_molecule
  substanceOnly species AP1 in NUCLEUS = 29700;  // substance in MWBUILTINUNIT_molecule
  substanceOnly species STAT3_NUCLEUS in NUCLEUS = 15000;  // substance in MWBUILTINUNIT_molecule
  substanceOnly species C_EBP_BETA in NUCLEUS = 29000; C_EBP_BETA is "C/EBP BETA";  // substance in MWBUILTINUNIT_molecule
  substanceOnly species Inflammatory_cytokine_genes in NUCLEUS = 60000;  // substance in MWBUILTINUNIT_molecule
  substanceOnly species S1PR_Gene in NUCLEUS = 15000;  // substance in MWBUILTINUNIT_molecule
  substanceOnly species SOCS3_Gene in NUCLEUS = 800;  // substance in MWBUILTINUNIT_molecule
  substanceOnly species Serine_Palmitoyl_Co_A in ENDOPLASMIC_RETICULUM = 6000; Serine_Palmitoyl_Co_A is "Serine+Palmitoyl-Co-A";  // substance in MWBUILTINUNIT_molecule
  substanceOnly species SPT in ENDOPLASMIC_RETICULUM = 6000;  // substance in MWBUILTINUNIT_molecule
  substanceOnly species _3_Ketospinganine in ENDOPLASMIC_RETICULUM = 6000; _3_Ketospinganine is "3-Ketospinganine";  // substance in MWBUILTINUNIT_molecule
  substanceOnly species KDSR in ENDOPLASMIC_RETICULUM = 7000;  // substance in MWBUILTINUNIT_molecule
  substanceOnly species Sphinganine in ENDOPLASMIC_RETICULUM = 11000;  // substance in MWBUILTINUNIT_molecule
  substanceOnly species Dihydroceremide in ENDOPLASMIC_RETICULUM = 15000;  // substance in MWBUILTINUNIT_molecule
  species CS in ENDOPLASMIC_RETICULUM = 11000/ENDOPLASMIC_RETICULUM;
  substanceOnly species Ceremide_ENDOPLASMIC_RETICULUM in ENDOPLASMIC_RETICULUM = 15000;  // substance in MWBUILTINUNIT_molecule
  substanceOnly species DEGS in ENDOPLASMIC_RETICULUM = 15000;  // substance in MWBUILTINUNIT_molecule
  substanceOnly species Ceremide_GOLGI_COMPLEX in GOLGI_COMPLEX = 15000;  // substance in MWBUILTINUNIT_molecule
  substanceOnly species nCDase in GOLGI_COMPLEX = 15000;  // substance in MWBUILTINUNIT_molecule
  substanceOnly species Sphingosine_GOLGI_COMPLEX in GOLGI_COMPLEX = 19000;  // substance in MWBUILTINUNIT_molecule

  // Reactions:
  reaction_1: $LPG_Infected_Cell + $TLR4_6_Infected_Cell => TLR_complex; reaction_1_kForward*LPG_Infected_Cell*TLR4_6_Infected_Cell;
    reaction_1_kForward = 2e-6 MWDERIVEDUNIT_1__molecule_second;
  reaction_2: TLR_complex => MyD88_Infected_Cell; reaction_2_Vm*TLR_complex/(reaction_2_Km + TLR_complex);
    reaction_2_Vm = 50.2 MWDERIVEDUNIT_molecule__second; reaction_2_Km = 25.1 MWBUILTINUNIT_molecule;
  reaction_3: MyD88_Infected_Cell => IRAK1_4_Infected_Cell; reaction_3_Vm*MyD88_Infected_Cell/(reaction_3_Km + MyD88_Infected_Cell);
    reaction_3_Vm = 160 MWDERIVEDUNIT_molecule__second; reaction_3_Km = 80 MWBUILTINUNIT_molecule;
  reaction_5: TRAF6_Infected_Cell => TAK1_Infected_Cell; reaction_5_Vm1*TRAF6_Infected_Cell/(reaction_5_Km1 + TRAF6_Infected_Cell);
    reaction_5_Vm1 = 100.5 MWDERIVEDUNIT_molecule__second; reaction_5_Km1 = 50.1 MWBUILTINUNIT_molecule;
  reaction_6: TAK1_Infected_Cell => NEMO_complex_Infected_Cell; reaction_6_Vm1*TAK1_Infected_Cell/(reaction_6_Km1 + TAK1_Infected_Cell);
    reaction_6_Vm1 = 100.5 MWDERIVEDUNIT_molecule__second; reaction_6_Km1 = 50.1 MWBUILTINUNIT_molecule;
  reaction_8: Inflammatory_Cytokine_Genes + NF_KB_Infected_Cell => $IL_1B + $IL_23 + $IL_6_Infected_Cell + NF_KB_Infected_Cell; reaction_8_Vm*Inflammatory_Cytokine_Genes^reaction_8_n/(reaction_8_Km + Inflammatory_Cytokine_Genes^reaction_8_n);
    reaction_8_Vm = 160 MWDERIVEDUNIT_molecule__second; reaction_8_Km = 80 MWBUILTINUNIT_molecule; reaction_8_n = 1;
  reaction_9: $IL_1R + $IL_1B => IL_1complex; reaction_9_kForward1*IL_1R*IL_1B;
    reaction_9_kForward1 = 6.67e-7 MWDERIVEDUNIT_1__molecule_second;
  reaction_10: IL_1complex => MyD88_Infected_Cell; reaction_10_kForward1*IL_1complex;
    reaction_10_kForward1 = 0.038 MWDERIVEDUNIT_1__second;
  reaction_11: $IL_6_Infected_Cell + $IL6R_GP130_CD4_to_Th_17 => IL_6_COMPLEX; reaction_11_kForward1*IL_6_Infected_Cell*IL6R_GP130_CD4_to_Th_17;
    reaction_11_kForward1 = 6.68e-7 MWDERIVEDUNIT_1__molecule_second;
  reaction_12: $IL_6_Infected_Cell + $IL6R_GP130_MACROPHAGE => IL6_COMPLEX; reaction_12_kForward1*IL_6_Infected_Cell*IL6R_GP130_MACROPHAGE;
    reaction_12_kForward1 = 6.68e-7 MWDERIVEDUNIT_1__molecule_second;
  reaction_13: $IL_23 + $IL23R_IL12RB1 => IL23_complex; reaction_13_kForward1*IL_23*IL23R_IL12RB1;
    reaction_13_kForward1 = 6.68e-7 MWDERIVEDUNIT_1__molecule_second;
  reaction_14: IL23_complex => JAK2_TYK2_CD4_to_Th_17; reaction_14_Vm1*IL23_complex/(reaction_14_Km1 + IL23_complex);
    reaction_14_Vm1 = 150.5 MWDERIVEDUNIT_molecule__second; reaction_14_Km1 = 75.2 MWBUILTINUNIT_molecule;
  reaction_15: IL6_COMPLEX => JAK1_2_MACROPHAGE; reaction_15_Vm1*IL6_COMPLEX/(reaction_15_Km1 + IL6_COMPLEX);
    reaction_15_Vm1 = 151 MWDERIVEDUNIT_molecule__second; reaction_15_Km1 = 76 MWBUILTINUNIT_molecule;
  reaction_16: IL_6_COMPLEX => JAK1_2_CD4_to_Th_17; reaction_16_Vm1*IL_6_COMPLEX/(reaction_16_Km1 + IL_6_COMPLEX);
    reaction_16_kForward1 = 1 MWDERIVEDUNIT_molecule__second; reaction_16_Vm1 = 152 MWDERIVEDUNIT_molecule__second; reaction_16_Km1 = 76.3 MWBUILTINUNIT_molecule;
  reaction_17: JAK1_2_CD4_to_Th_17 => STAT3_CD4_to_Th_17; reaction_17_Vm1*JAK1_2_CD4_to_Th_17/(reaction_17_Km1 + JAK1_2_CD4_to_Th_17);
    reaction_17_Vm1 = 151.2 MWDERIVEDUNIT_molecule__second; reaction_17_Km1 = 76 MWBUILTINUNIT_molecule;
  reaction_18: JAK2_TYK2_CD4_to_Th_17 => STAT3_CD4_to_Th_17; reaction_18_Vm1*JAK2_TYK2_CD4_to_Th_17/(reaction_18_Km1 + JAK2_TYK2_CD4_to_Th_17);
    reaction_18_Vm1 = 150 MWDERIVEDUNIT_molecule__second; reaction_18_Km1 = 75 MWBUILTINUNIT_molecule;
  reaction_20: RORgt + IL17_gene => $IL_17A_F + IL17_gene + RORgt; reaction_20_Vm1*IL17_gene^reaction_20_n1/(reaction_20_Kp1 + IL17_gene^reaction_20_n1);
    reaction_20_Vm1 = 700 MWDERIVEDUNIT_molecule__second; reaction_20_n1 = 1; reaction_20_Kp1 = 350 MWBUILTINUNIT_molecule;
  reaction_22: IL_17_complex => ACT1; reaction_22_Vm1*IL_17_complex/(reaction_22_Km1 + IL_17_complex);
    reaction_22_Vm1 = 300 MWDERIVEDUNIT_molecule__second; reaction_22_Km1 = 150 MWBUILTINUNIT_molecule;
  reaction_23: ACT1 => TRAF6_MACROPHAGE; reaction_23_Vm1*ACT1/(reaction_23_Km1 + ACT1);
    reaction_23_Vm1 = 300 MWDERIVEDUNIT_molecule__second; reaction_23_Km1 = 150 MWBUILTINUNIT_molecule;
  reaction_24: JAK1_2_MACROPHAGE => STAT3_MACROPHAGE; reaction_24_Vm1*JAK1_2_MACROPHAGE/(reaction_24_Km1 + JAK1_2_MACROPHAGE);
    reaction_24_Vm1 = 151 MWDERIVEDUNIT_molecule__second; reaction_24_Km1 = 75 MWBUILTINUNIT_molecule;
  reaction_25: $LPG_MACROPHAGE + $TLR4_6_MACROPHAGE => LPG_TLR_complex; reaction_25_kForward1*LPG_MACROPHAGE*TLR4_6_MACROPHAGE;
    reaction_25_kForward1 = 2e-6 MWDERIVEDUNIT_1__molecule_second;
  reaction_26: LPG_TLR_complex => MyD88_MACROPHAGE; reaction_26_Vm1*LPG_TLR_complex/(reaction_26_Km1 + LPG_TLR_complex);
    reaction_26_Vm1 = 50.3 MWDERIVEDUNIT_molecule__second; reaction_26_Km1 = 25 MWBUILTINUNIT_molecule;
  reaction_27: MyD88_MACROPHAGE => IRAK1_4_MACROPHAGE; reaction_27_Vm1*MyD88_MACROPHAGE/(reaction_27_Km1 + MyD88_MACROPHAGE);
    reaction_27_Vm1 = 50.3 MWDERIVEDUNIT_molecule__second; reaction_27_Km1 = 25 MWBUILTINUNIT_molecule;
  reaction_4: IRAK1_4_Infected_Cell => TRAF6_Infected_Cell; reaction_4_Vm1*IRAK1_4_Infected_Cell/(reaction_4_Km1 + IRAK1_4_Infected_Cell);
    reaction_4_Vm1 = 100 MWDERIVEDUNIT_molecule__second; reaction_4_Km1 = 50 MWBUILTINUNIT_molecule;
  reaction_21: $IL_17RA_C + $IL_17A_F => IL_17_complex; reaction_21_kForward1*IL_17RA_C*IL_17A_F;
    reaction_21_kForward1 = 3.326e-7 MWDERIVEDUNIT_1__molecule_second;
  reaction_28: IRAK1_4_MACROPHAGE => TRAF6_MACROPHAGE; reaction_28_Vm1*IRAK1_4_MACROPHAGE/(reaction_28_Km1 + IRAK1_4_MACROPHAGE);
    reaction_28_Vm1 = 50 MWDERIVEDUNIT_molecule__second; reaction_28_Km1 = 25 MWBUILTINUNIT_molecule;
  reaction_29: TRAF6_MACROPHAGE => TAK1_MACROPHAGE; reaction_29_Vm1*TRAF6_MACROPHAGE/(reaction_29_Km1 + TRAF6_MACROPHAGE);
    reaction_29_Vm1 = 300 MWDERIVEDUNIT_molecule__second; reaction_29_Km1 = 150 MWBUILTINUNIT_molecule;
  reaction_30: TAK1_MACROPHAGE => NEMO_complex_MACROPHAGE; reaction_30_Vm1*TAK1_MACROPHAGE/(reaction_30_Km1 + TAK1_MACROPHAGE);
    reaction_30_Vm1 = 300 MWDERIVEDUNIT_molecule__second; reaction_30_Km1 = 150 MWBUILTINUNIT_molecule;
  reaction_32: TRAF6_MACROPHAGE => MAPKK3; reaction_32_Vm1*TRAF6_MACROPHAGE/(reaction_32_Km1 + TRAF6_MACROPHAGE);
    reaction_32_Vm1 = 300 MWDERIVEDUNIT_molecule__second; reaction_32_Km1 = 150 MWBUILTINUNIT_molecule;
  reaction_33: MAPKK3 => MEK1_2; reaction_33_Vm1*MAPKK3/(reaction_33_Km1 + MAPKK3);
    reaction_33_Vm1 = 300 MWDERIVEDUNIT_molecule__second; reaction_33_Km1 = 150 MWBUILTINUNIT_molecule;
  reaction_34: MEK1_2 => ERK; reaction_34_Vm1*MEK1_2/(reaction_34_Km1 + MEK1_2);
    reaction_34_Vm1 = 300.2 MWDERIVEDUNIT_molecule__second; reaction_34_Km1 = 150.1 MWBUILTINUNIT_molecule;
  reaction_35: IL_23_complex => JAK2_TYK2_MACROPHAGE; reaction_35_Vm1*IL_23_complex/(reaction_35_Km1 + IL_23_complex);
    reaction_35_Vm1 = 151 MWDERIVEDUNIT_molecule__second; reaction_35_Km1 = 75.5 MWBUILTINUNIT_molecule;
  reaction_37: JAK2_TYK2_MACROPHAGE => SATB1_MACROPHAGE; reaction_37_Vm1*JAK2_TYK2_MACROPHAGE/(reaction_37_Km1 + JAK2_TYK2_MACROPHAGE);
    reaction_37_Vm1 = 151 MWDERIVEDUNIT_molecule__second; reaction_37_Km1 = 75.5 MWBUILTINUNIT_molecule;
  reaction_38: SATB1_MACROPHAGE => SATB1_NUCLEUS; reaction_38_kForward1*SATB1_MACROPHAGE;
    reaction_38_kForward1 = 0.01 MWDERIVEDUNIT_1__second;
  reaction_41: NF_KB_NUCLEUS + SPHK_Genes => SPHK + NF_KB_NUCLEUS; reaction_41_Vm1*SPHK_Genes^reaction_41_n1/(reaction_41_Kp1 + SPHK_Genes^reaction_41_n1);
    reaction_41_Vm1 = 360 MWDERIVEDUNIT_molecule__second; reaction_41_n1 = 1; reaction_41_Kp1 = 180 MWBUILTINUNIT_molecule;
  reaction_43: Serine_Palmitoyl_Co_A + SPT => _3_Ketospinganine + SPT; reaction_43_Vm1*Serine_Palmitoyl_Co_A/(reaction_43_Km1 + Serine_Palmitoyl_Co_A);
    reaction_43_Vm1 = 70 MWDERIVEDUNIT_molecule__second; reaction_43_Km1 = 35 MWBUILTINUNIT_molecule;
  reaction_42: _3_Ketospinganine + KDSR => Sphinganine + KDSR; reaction_42_Vm1*_3_Ketospinganine/(reaction_42_Km1 + _3_Ketospinganine);
    reaction_42_Vm1 = 120 MWDERIVEDUNIT_molecule__second; reaction_42_Km1 = 60 MWBUILTINUNIT_molecule;
  reaction_44: Sphinganine + CS => Dihydroceremide + CS; reaction_44_Vm1*Sphinganine/(reaction_44_Km1 + Sphinganine);
    reaction_44_Vm1 = 150.5 MWDERIVEDUNIT_molecule__second; reaction_44_Km1 = 75 MWBUILTINUNIT_molecule;
  reaction_45: Dihydroceremide + DEGS => Ceremide_ENDOPLASMIC_RETICULUM + DEGS; reaction_45_Vm1*Dihydroceremide/(reaction_45_Km1 + Dihydroceremide);
    reaction_45_Vm1 = 150 MWDERIVEDUNIT_molecule__second; reaction_45_Km1 = 75 MWBUILTINUNIT_molecule;
  reaction_46: Ceremide_ENDOPLASMIC_RETICULUM => Ceremide_GOLGI_COMPLEX; reaction_46_kForward1*Ceremide_ENDOPLASMIC_RETICULUM;
    reaction_46_kForward1 = 0.01 MWDERIVEDUNIT_1__second;
  reaction_47: Ceremide_GOLGI_COMPLEX + nCDase => Sphingosine_GOLGI_COMPLEX + nCDase; reaction_47_Vm1*Ceremide_GOLGI_COMPLEX/(reaction_47_Km1 + Ceremide_GOLGI_COMPLEX);
    reaction_47_Vm1 = 200 MWDERIVEDUNIT_molecule__second; reaction_47_Km1 = 100 MWBUILTINUNIT_molecule;
  reaction_48: Sphingosine_GOLGI_COMPLEX => Sphingosine_MACROPHAGE; reaction_48_kForward1*Sphingosine_GOLGI_COMPLEX;
    reaction_48_kForward1 = 0.01 MWDERIVEDUNIT_1__second;
  reaction_49: Sphingosine_MACROPHAGE + SPHK => Sphingosine_1_phosphate + SPHK; reaction_49_Vm1*Sphingosine_MACROPHAGE/(reaction_49_Km1 + Sphingosine_MACROPHAGE);
    reaction_49_Vm1 = 500.5 MWDERIVEDUNIT_molecule__second; reaction_49_Km1 = 250.5 MWBUILTINUNIT_molecule;
  reaction_50: ERK => AP1; reaction_50_Vm1*ERK/(reaction_50_Km1 + ERK);
    reaction_50_Vm1 = 300 MWDERIVEDUNIT_molecule__second; reaction_50_Km1 = 150 MWBUILTINUNIT_molecule;
  reaction_53: JAK2_TYK2_CD4_to_Th_17 => SATB1_CD4_to_Th_17; reaction_53_Vm1*JAK2_TYK2_CD4_to_Th_17/(reaction_53_Km1 + JAK2_TYK2_CD4_to_Th_17);
    reaction_53_Vm1 = 150.6 MWDERIVEDUNIT_molecule__second; reaction_53_Km1 = 75.2 MWBUILTINUNIT_molecule;
  reaction_56: STAT3_MACROPHAGE => STAT3_NUCLEUS; reaction_56_kForward1*STAT3_MACROPHAGE;
    reaction_56_kForward1 = 0.01 MWDERIVEDUNIT_1__second;
  reaction_51: SATB1_CD4_to_Th_17 + BHLEHE40_CD4_to_Th_17 => GMCSF_CD4_to_Th_17 + SATB1_CD4_to_Th_17; reaction_51_Vm1*BHLEHE40_CD4_to_Th_17^reaction_51_n1/(reaction_51_Kp1 + BHLEHE40_CD4_to_Th_17^reaction_51_n1);
    reaction_51_Vm1 = 152.8 MWDERIVEDUNIT_molecule__second; reaction_51_n1 = 1; reaction_51_Kp1 = 75 MWBUILTINUNIT_molecule;
  reaction_54: TAK1_MACROPHAGE => C_EBP_BETA; reaction_54_Vm1*TAK1_MACROPHAGE/(reaction_54_Km1 + TAK1_MACROPHAGE);
    reaction_54_Vm1 = 300 MWDERIVEDUNIT_molecule__second; reaction_54_Km1 = 150 MWBUILTINUNIT_molecule;
  reaction_55: NF_KB_NUCLEUS + AP1 + C_EBP_BETA + Inflammatory_cytokine_genes => CXCL + IL_6_MACROPHAGE + IL_1b + GMCSF_MACROPHAGE + NF_KB_NUCLEUS + AP1 + C_EBP_BETA; reaction_55_Vm1*Inflammatory_cytokine_genes^reaction_55_n1/(reaction_55_Kp1 + Inflammatory_cytokine_genes^reaction_55_n1);
    reaction_55_Vm1 = 700 MWDERIVEDUNIT_molecule__second; reaction_55_n1 = 1; reaction_55_Kp1 = 350 MWBUILTINUNIT_molecule;
  reaction_39: SATB1_NUCLEUS + BHLEHE40_NUCLEUS => GMCSF_MACROPHAGE + SATB1_NUCLEUS; reaction_39_Vm1*BHLEHE40_NUCLEUS^reaction_39_n1/(reaction_39_Kp1 + BHLEHE40_NUCLEUS^reaction_39_n1);
    reaction_39_Vm1 = 220 MWDERIVEDUNIT_molecule__second; reaction_39_n1 = 1; reaction_39_Kp1 = 110 MWBUILTINUNIT_molecule;
  reaction_40: STAT3_NUCLEUS + S1PR_Gene => S1PRs + STAT3_NUCLEUS; reaction_40_Vm1*S1PR_Gene^reaction_40_n1/(reaction_40_Kp1 + S1PR_Gene^reaction_40_n1);
    reaction_40_Vm1 = 151 MWDERIVEDUNIT_molecule__second; reaction_40_n1 = 1; reaction_40_Kp1 = 75 MWBUILTINUNIT_molecule;
  reaction_52: PD1 + SATB1_CD4_to_Th_17 => Abnormal_immune_function + SATB1_CD4_to_Th_17; reaction_52_Vm*PD1/((reaction_52_Km + PD1)*(1 + SATB1_CD4_to_Th_17/Ki));
    reaction_52_Vm = 1600 MWDERIVEDUNIT_molecule__second; reaction_52_Km = 2000 MWBUILTINUNIT_molecule; Ki = 1800 MWBUILTINUNIT_molecule;
  reaction_57: SOCS3_Gene + STAT3_NUCLEUS => SOCS3 + STAT3_NUCLEUS; reaction_57_Vm*SOCS3_Gene^reaction_57_n/(reaction_57_Km + SOCS3_Gene^reaction_57_n);
    reaction_57_Vm = 9 MWDERIVEDUNIT_molecule__second; reaction_57_n = 1; reaction_57_Km = 4.5 MWBUILTINUNIT_molecule;
  reaction_7: NEMO_complex_Infected_Cell => NF_KB_Infected_Cell; reaction_7_Vm*NEMO_complex_Infected_Cell/(reaction_7_Km + NEMO_complex_Infected_Cell);
    reaction_7_Vm = 100.5 MWDERIVEDUNIT_molecule__second; reaction_7_Km = 50.25 MWBUILTINUNIT_molecule;
  reaction_31: NEMO_complex_MACROPHAGE => NF_KB_NUCLEUS; reaction_31_Vm*NEMO_complex_MACROPHAGE/(reaction_31_Km + NEMO_complex_MACROPHAGE);
    reaction_31_Vm = 296 MWDERIVEDUNIT_molecule__second; reaction_31_Km = 148 MWBUILTINUNIT_molecule;
  reaction_19: rorgt_Gene + STAT3_CD4_to_Th_17 => RORgt + STAT3_CD4_to_Th_17; reaction_19_Vm*rorgt_Gene^reaction_19_n/(reaction_19_Km + rorgt_Gene^reaction_19_n);
    reaction_19_Vm = 315 MWDERIVEDUNIT_molecule__second; reaction_19_n = 1; reaction_19_Km = 157.5 MWBUILTINUNIT_molecule;
  reaction_36: $IL_23 + $IL_23R_IL_12RB1 => IL_23_complex; reaction_36_kForward*IL_23*IL_23R_IL_12RB1;
    reaction_36_kForward = 6.68e-7 MWDERIVEDUNIT_1__molecule_second;

  // Unit definitions:
  unit MWBUILTINUNIT_molecule = 1.660539e-24 mole;
  unit MWDERIVEDUNIT_1__molecule_second = 6.022142e23 dimensionless / (mole * second); MWDERIVEDUNIT_1__molecule_second is "1/(molecule*second)";
  unit MWDERIVEDUNIT_molecule__second = mole * 1.660539e-24 dimensionless / second; MWDERIVEDUNIT_molecule__second is "molecule/second";
  unit MWDERIVEDUNIT_1__second = dimensionless / second; MWDERIVEDUNIT_1__second is "1/second";
end
