// SBML level 2 version 4
// dcterms:bibliographicCitation: urn:miriam:pubmed:9645916

function Modifier_Function(kcat, modifier, substrate, Km)
  kcat*modifier*substrate/(Km + substrate);
end

function Modifier_function_2(kcat, mod, sub1, sub2)
  kcat*mod*sub1*sub2;
end

model Khanin1998___Mathematical_Model_of_Blood_Coagulation_Prothrombin_Time_Test()
  // Khanin1998 - Mathematical Model of Blood Coagulation Prothrombin Time Test
  // Blood coagulation model for prothrombin time test.
  // isVersionOf GO:0007596
  // isPropertyOf ncit:C62656
  // hasTaxon taxonomy:9606
  // isDescribedBy pubmed:9645916

  // Compartments:
  compartment compartment = 1;

  // Species:
  species VII_TF in compartment = 0.001; VII_TF is "VII:TF";
  species VIIa_TF in compartment = 0; VIIa_TF is "VIIa:TF";
  species Xa in compartment = 0;
  species X in compartment = 1;
  species II in compartment = 1;
  species IIa in compartment = 0;
  species Xa_Va_PL in compartment = 0; Xa_Va_PL is "Xa:Va:PL";
  species I in compartment = 1;
  species Ia in compartment = 0;
  species V in compartment = 1;
  species Va in compartment = 0;
  species VIII in compartment = 1;
  species VIIIa in compartment = 0;
  species IX in compartment = 1;
  species IXa in compartment = 0;
  species IXa_VIIIa_PL in compartment = 1e-6; IXa_VIIIa_PL is "IXa:VIIIa:PL";
  species PL in compartment = 0;
  species Va_Xa in compartment = 0; Va_Xa is "Va:Xa";
  species VIIIa_IXa in compartment = 0; VIIIa_IXa is "VIIIa:IXa";
  species TF in compartment = 1;
  species VII in compartment = 1;
  species ATIII in compartment = 0;
  species VIIa_TF_ATIII in compartment = 0; VIIa_TF_ATIII is "VIIa:TF:ATIII";
  species Xa_ATIII in compartment = 0; Xa_ATIII is "Xa:ATIII";
  species IIa_ATIII in compartment = 0; IIa_ATIII is "IIa:ATIII";
  species TFPI in compartment = 0;
  species VIIa_TF_Xa_TFPI in compartment = 0; VIIa_TF_Xa_TFPI is "VIIa:TF:Xa:TFPI";
  species Xa_TFPI in compartment = 0; Xa_TFPI is "Xa:TFPI";

  // Parameters:
  R01_Kcat = 39.6;
  R01_Km = 0.0093;
  R02_Kcat = 103;
  R02_Km = 0.38;
  R03_Kcat = 2.25;
  R03_Km = 0.058;
  R04_Kcat = 1700;
  R04_Km = 1;
  R05_Kcat = 5040;
  R05_Km = 7.2;
  R06_Kcat = 27;
  R06_Km = 0.141;
  R07_Kcat = 60;
  R07_Km = 0.02;
  R08_Kcat = 34;
  R08_Km = 0.133;
  R09_Kcat = 1740;
  R09_Km = 0.19;
  R10_K = 100000;
  R11_K = 10000;
  R12_K = 2;
  R13_K = 2.7e-10;
  R14_K = 0.35;
  R15_K = 0.11;
  R16_K = 1000;
  R17_K = 640;

  // Reactions:
  R01: VII_TF => VIIa_TF; compartment*Modifier_Function(R01_Kcat, Xa, VII_TF, R01_Km);  // modifiers: Xa
  R02: X => Xa; compartment*Modifier_Function(R02_Kcat, VIIa_TF, X, R02_Km);  // modifiers: VIIa_TF
  R03: II => IIa; compartment*Modifier_Function(R03_Kcat, Xa, II, R03_Km);  // modifiers: Xa
  R04: II => IIa; compartment*Modifier_Function(R04_Kcat, Xa_Va_PL, II, R04_Km);  // modifiers: Xa_Va_PL
  R05: I => Ia; compartment*Modifier_Function(R05_Kcat, IIa, I, R05_Km);  // modifiers: IIa
  R06: V => Va; compartment*Modifier_Function(R06_Kcat, IIa, V, R06_Km);  // modifiers: IIa
  R07: VIII => VIIIa; compartment*Modifier_Function(R07_Kcat, IIa, VIII, R07_Km);  // modifiers: IIa
  R08: IX => IXa; compartment*Modifier_Function(R08_Kcat, VII_TF, IX, R08_Km);  // modifiers: VII_TF
  R09: X => Xa; compartment*Modifier_Function(R09_Kcat, IXa_VIIIa_PL, X, R09_Km);  // modifiers: IXa_VIIIa_PL
  R10: Va + Xa => Va_Xa; compartment*Modifier_function_2(R10_K, PL, Va, Xa);  // modifiers: PL
  R11: VIIIa + IXa => VIIIa_IXa; compartment*Modifier_function_2(R11_K, PL, VIIIa, IXa);  // modifiers: PL
  R12: VII + TF => VII_TF; compartment*R12_K*VII*TF;
  R13: VIIa_TF + ATIII => VIIa_TF_ATIII; compartment*R13_K*VIIa_TF*ATIII;
  R14: IIa + ATIII => IIa_ATIII; compartment*R14_K*IIa*ATIII;
  R15: Xa + ATIII => Xa_ATIII; compartment*R15_K*Xa*ATIII;
  R16: Xa + TFPI => TFPI; compartment*R16_K*Xa*TFPI;
  R17: VIIa_TF + Xa_TFPI => VIIa_TF_Xa_TFPI; compartment*R17_K*VIIa_TF*Xa_TFPI;

  // Unit definitions:
  unit volume = 1e-3 litre;
  unit time = 60 second;
  unit substance = 1e-6 mole;
end
