// SBML level 2 version 4
// dcterms:bibliographicCitation: urn:miriam:pubmed:25421744

model Kremers2015___Thrombin_Inhibitor_Kinetics()
  // Kremers2015 - Thrombin Inhibitor Kinetics
  // Mathematical model of thrombin inhibition by ATIII, alpha-2-macroglobulin and miscellaneous serpins (a1-antitrypsin, a1-proteinase inhibitor, a1-antichymotrypsin, protease nexin-1, C1inhibitor and others).
  // isPartOf GO:0007596
  // isDescribedBy pubmed:25421744

  // Compartments:
  compartment compartment = 1;

  // Species:
  species T_AT in compartment = 0; T_AT is "T:AT";
  species T_a2M in compartment = 0; T_a2M is "T:a2M";
  species T_MS in compartment = 0; T_MS is "T:MS";
  species T in compartment = 5e-7;
  species a2M in compartment = 3.03e-6;
  species AT in compartment = 1.94e-6;
  species MS in compartment = 7.47e-9;

  // Parameters:
  k_AT = 23409;
  k_a2M = 736;
  k_MS = 0.000758;

  // Assignment rules:
  time_minutes := time/60;

  // Reactions:
  Thrombin_Inhibition_by_Antithrombin: T + AT => T_AT; compartment*k_AT*T*AT;
  Thrombin_Inhibition_by_alpha2_Macroglobulin: T + a2M => T_a2M; compartment*k_a2M*T*a2M; Thrombin_Inhibition_by_alpha2_Macroglobulin is "Thrombin Inhibition by alpha2-Macroglobulin";
  Thrombin_inhibition_by_miscellaneous_serpins: T + MS => T_MS; compartment*k_MS*T*MS;

  // Unit definitions:
  unit volume = 1e-3 litre;
end
