// SBML level 2 version 4
// dcterms:bibliographicCitation: urn:miriam:pubmed:27666750

function Constant_flux__irreversible(v)
  v;
end
Constant_flux__irreversible is "Constant flux (irreversible)";

model Lee2016___Blood_Coagulation_Model()
  // Lee2016 - Blood Coagulation Model
  // Blood coagulation model derived from Nayak2015.
  // isVersionOf GO:0007596
  // isDescribedBy pubmed:27666750

  // Compartments:
  compartment compartment = 1;

  // Species:
  species FVII in compartment = 9.91;
  // t(0) = 1.32e-07
  species TF in compartment = 1.32e-7;
  species TF_FVII in compartment = 8.87e-10; TF_FVII is "TF-FVII";
  species FVIIa in compartment = piecewise(0.1, Baseline == 0, 0.0951);
  species TF_FVIIa in compartment = piecewise(0, Baseline == 0, 4.21e-7); TF_FVIIa is "TF-FVIIa";
  species FIX in compartment = 92.6;
  species TF_FVIIa_FIX in compartment = piecewise(0, Baseline == 0, 2.38e-6); TF_FVIIa_FIX is "TF-FVIIa-FIX";
  species TF_FVIIa_FXa in compartment = piecewise(0, Baseline == 0, 1.31e-8); TF_FVIIa_FXa is "TF-FVIIa-FXa";
  species FX in compartment = 165.8;
  species TF_FVIIa_FX in compartment = piecewise(0, Baseline == 0, 9.91e-7); TF_FVIIa_FX is "TF-FVIIa-FX";
  species FVIIa_FX in compartment = piecewise(0, Baseline == 0, 0.0137); FVIIa_FX is "FVIIa-FX";
  species FXa in compartment = piecewise(0, Baseline == 0, 0.00147);
  species FVIII in compartment = 0.74;
  species FXa_FVIII in compartment = piecewise(0, Baseline == 0, 9.95e-7); FXa_FVIII is "FXa-FVIII";
  species FVIIIa in compartment = piecewise(0, Baseline == 0, 0.028);
  species F12 in compartment = 0.13;
  species FII in compartment = 1412;
  species FIIa in compartment = piecewise(0, Baseline == 0, 0.00121);
  species FIXa in compartment = piecewise(0, Baseline == 0, 0.00726);
  species FIXa_FVIIIa in compartment = piecewise(0, Baseline == 0, 1.03e-7); FIXa_FVIIIa is "FIXa-FVIIIa";
  species FIXa_FVIIIa_FX in compartment = piecewise(0, Baseline == 0, 4.99e-8); FIXa_FVIIIa_FX is "FIXa-FVIIIa-FX";
  species FVIIIa1_L in compartment = piecewise(0, Baseline == 0, 2.18); FVIIIa1_L is "FVIIIa1*L";
  species FVIIIa2 in compartment = piecewise(0, Baseline == 0, 2.18);
  species FV in compartment = 21.68;
  species FVa in compartment = piecewise(0, Baseline == 0, 0.012);
  species FXa_FVa in compartment = piecewise(0, Baseline == 0, 0.000192); FXa_FVa is "FXa-FVa";
  species FXa_FVa_FII in compartment = piecewise(0, Baseline == 0, 7.43e-6); FXa_FVa_FII is "FXa-FVa-FII";
  species mIIa in compartment = 0;
  species FXa_FVa_mIIa in compartment = 0; FXa_FVa_mIIa is "FXa-FVa-mIIa";
  species FXa_TFPI in compartment = piecewise(0, Baseline == 0, 4.29e-5); FXa_TFPI is "FXa-TFPI";
  species TFPI in compartment = 2.5;
  species TF_FVIIa_FXa_TFPI in compartment = piecewise(0, Baseline == 0, 2.26e-9); TF_FVIIa_FXa_TFPI is "TF-FVIIa-FXa-TFPI";
  species CA in compartment = 0;
  species FXII in compartment = 499;
  species FXIIa in compartment = piecewise(0, Baseline == 0, 8.29e-23);
  species FXIIa_PK in compartment = piecewise(0, Baseline == 0, 5.53e-29); FXIIa_PK is "FXIIa-PK";
  species PK in compartment = 450;
  species K in compartment = 2.04e-23;
  species FXII_K in compartment = 1.52e-27; FXII_K is "FXII-K";
  species FXI in compartment = 31;
  species FXIIa_FXI in compartment = piecewise(0, Baseline == 0, 5.61e-26); FXIIa_FXI is "FXIIa-FXI";
  species FXIa in compartment = piecewise(0, Baseline == 0, 6.92e-26);
  species FXIa_FIX in compartment = piecewise(0, Baseline == 0, 1.03e-29); FXIa_FIX is "FXIa-FIX";
  species FIXa_FX in compartment = piecewise(0, Baseline == 0, 3.87e-6); FIXa_FX is "FIXa-FX";
  species FVIIa_CA in compartment = 0; FVIIa_CA is "FVIIa-CA";
  species ATIII in compartment = 3430;
  species TF_FVIIa_ATIII in compartment = piecewise(0, Baseline == 0, 0.0445); TF_FVIIa_ATIII is "TF-FVIIa-ATIII";
  species FVIIa_ATIII in compartment = piecewise(0, Baseline == 0, 0.05); FVIIa_ATIII is "FVIIa-ATIII";
  species FIXa_ATIII in compartment = piecewise(0, Baseline == 0, 1684); FIXa_ATIII is "FIXa-ATIII";
  species FXa_ATIII in compartment = piecewise(0, Baseline == 0, 247); FXa_ATIII is "FXa-ATIII";
  species FIIa_ATIII in compartment = piecewise(0, Baseline == 0, 0.02); FIIa_ATIII is "FIIa-ATIII";
  species mIIa_ATIII in compartment = 0; mIIa_ATIII is "mIIa-ATIII";
  species FXIIa_ATIII in compartment = 0; FXIIa_ATIII is "FXIIa-ATIII";
  species FXIa_ATIII in compartment = 0; FXIa_ATIII is "FXIa-ATIII";
  species FIIa_Tmod in compartment = piecewise(0, Baseline == 0, 0.1); FIIa_Tmod is "FIIa-Tmod";
  species Tmod in compartment = 50;
  species FIIa_Tmod_PC in compartment = piecewise(0, Baseline == 0, 9.63e-6); FIIa_Tmod_PC is "FIIa-Tmod-PC";
  species PC in compartment = 66;
  species APC in compartment = 0.00882;
  species APC_FVa in compartment = piecewise(0, Baseline == 0, 6.77e-6); APC_FVa is "APC-FVa";
  species APC_FVIIIa in compartment = piecewise(0, Baseline == 0, 8.54e-7); APC_FVIIIa is "APC-FVIIIa";
  species APC_FIXa_FVIIIa in compartment = piecewise(0, Baseline == 0, 2.69e-11); APC_FIXa_FVIIIa is "APC-FIXa-FVIIIa";
  species APC_FIXa_FVIIIa_FX in compartment = piecewise(0, Baseline == 0, 1.34e-11); APC_FIXa_FVIIIa_FX is "APC-FIXa-FVIIIa-FX";
  species FIIa_Fg in compartment = piecewise(0, Baseline == 0, 0.00115); FIIa_Fg is "FIIa-Fg";
  species Fg in compartment = 9117;
  species F in compartment = 11;
  species FIIa_FXIIIa in compartment = piecewise(0, Baseline == 0, 1.6e-7); FIIa_FXIIIa is "FIIa-FXIIIa";
  species FXIII in compartment = 67.5;
  species FXIIIa in compartment = piecewise(0, Baseline == 0, 0.000267);
  species FXIIIa_F in compartment = piecewise(0, Baseline == 0, 8.19e-7); FXIIIa_F is "FXIIIa-F";
  species XF in compartment = 0.00664;
  species Pg in compartment = 1591;
  species t_PA in compartment = 0.1449; t_PA is "t-PA";
  species t_PA_Pg in compartment = 4.3; t_PA_Pg is "t-PA-Pg";
  species P in compartment = 17;
  species P_FXIIIa in compartment = piecewise(0, Baseline == 0, 2.2e-6); P_FXIIIa is "P-FXIIIa";
  species P_Fg in compartment = 75; P_Fg is "P-Fg";
  species FDP in compartment = 1150000;
  species P_F in compartment = 0.09; P_F is "P-F";
  species P_XF in compartment = 5.48e-5; P_XF is "P-XF";
  species DP in compartment = 0.76;

  // Parameters:
  k001_on = 0.00965;
  k002_on = 0.103;
  k003_on = 0.00158;
  k004_on = 0.0144;
  k005_on = 0.213;
  k006_on = 0.0446;
  k007_on = 0.0137;
  k008_on = 0.00298;
  k009_on = 0.159;
  k010_on = 3.2e-5;
  k011_on = 0.000122;
  k012_on = 0.249;
  k013_on = 0.101;
  k014_on = 0.242;
  k015_on = 0.0284;
  k016_on = 0.000371;
  k017_on = 0.00464;
  k018_on = 0.00024;
  k019_on = 0.292;
  k020_on = 0.1;
  k021_on = 0.0833;
  k022_on = 0.88;
  k023_on = 0.000383;
  k024_on = 0.0537;
  k025_on = 0.0102;
  k026_on = 8.52e-6;
  k027_on = 0.303;
  k028_on = 0.18;
  k029_on = 0.0398;
  k030_on = 0.000126;
  k031_on = 0.404;
  k032_on = 0.0693;
  k033_on = 6.5e-6;
  k034_on = 0.156;
  k035_on = 0.0875;
  k036_on = 7.83e-5;
  k037_on = 3.57e-7;
  k038_on = 1.4e-8;
  k039_on = 7.84e-7;
  k040_on = 5.82e-7;
  k041_on = 4.86e-6;
  k042_on = 3.18e-6;
  k043_on = 7.7e-8;
  k044_on = 6.86e-7;
  k045_on = 0.5;
  k046_on = 0.303;
  k047_on = 0.37;
  k048_on = 0.0193;
  k049_on = 0.0609;
  k050_on = 0.0355;
  k051_on = 0.106;
  k052_on = 0.1;
  k053_on = 0.1;
  k054_on = 0.1;
  k055_on = 0.1;
  k056_on = 0.1;
  k057_on = 0.1;
  k058_on = 0.1;
  k059_on = 6.9e-10;
  k061_on = 35.1;
  k062_on = 0.00405;
  k064_on = 0.00018;
  k066_on = 0.000645;
  k069_on = 1.05e-5;
  k071_on = 0.000594;
  k073_on = 0.00077;
  k076_on = 0.000115;
  k079_on = 0.0016;
  k082_on = 5.52e-5;
  k084_on = 0.000481;
  k086_on = 0.0092;
  k089_on = 0.000481;
  k091_on = 0.0016;
  k094_on = 0.000451;
  k097_on = 0.0145;
  k0100_on = 0.000696;
  k001_off = 0.0106;
  k002_off = 0.00106;
  k004_off = 277;
  k005_off = 0.797;
  k006_off = 68.4;
  k007_off = 10.77;
  k009_off = 1.75;
  k013_off = 0.00396;
  k014_off = 0.00129;
  k015_off = 0.000168;
  k019_off = 0.00669;
  k020_off = 79.3;
  k021_off = 325;
  k022_off = 639;
  k023_off = 0.000329;
  k024_off = 7.78e-5;
  k027_off = 20400;
  k028_off = 121;
  k029_off = 18.3;
  k032_off = 418;
  k034_off = 486;
  k035_off = 4.76;
  k045_off = 0.227;
  k046_off = 57.7;
  k047_off = 4.84;
  k048_off = 5.3;
  k049_off = 2.05;
  k050_off = 1.15;
  k051_off = 976;
  k052_off = 50800;
  k053_off = 588;
  k054_off = 5.3;
  k055_off = 210;
  k056_off = 210;
  k057_off = 210;
  k058_off = 210;
  k060_off = 5.2e-5;
  k063_off = 2.86e-6;
  k065_off = 8.02e-6;
  k067_off = 6.42e-5;
  k068_off = 9.17e-5;
  k070_off = 1.38e-5;
  k072_off = 6.42e-6;
  k074_off = 4.53e-6;
  k075_off = 0.0105;
  k077_off = 3.7e-6;
  k078_off = 0.000116;
  k080_off = 3.21e-6;
  k081_off = 3.21e-6;
  k083_off = 8.02e-7;
  k085_off = 0.000193;
  k087_off = 2.67e-6;
  k088_off = 0.000963;
  k090_off = 9.63e-6;
  k092_off = 2.41e-5;
  k093_off = 0.00077;
  k095_off = 1e-6;
  k096_off = 0.0014;
  k098_off = 3.65e-6;
  k099_off = 0.000502;
  k101_off = 0.0048;
  k102_off = 3.06e-5;
  k103_off = 0.000149;
  k104_off = 4.81e-5;
  k105_off = 8.55e-5;
  kcat004 = 8.2;
  kcat005 = 14.2;
  kcat006 = 8.8e-6;
  kcat009 = 0.028;
  kcat014 = 82.9;
  kcat020 = 2.7;
  kcat021 = 47.9;
  kcat022 = 40.6;
  kcat027 = 517;
  kcat028 = 9.05;
  kcat029 = 0.00292;
  kcat032 = 78.4;
  kcat034 = 0.0085;
  kcat046 = 0.705;
  kcat047 = 0.93;
  kcat048 = 0.294;
  kcat049 = 0.0182;
  kcat050 = 0.0176;
  kcat051 = 36.4;
  kcat052 = 6.4;
  kcat053 = 31.2;
  kcat054 = 0.002;
  kcat055 = 0.467;
  kcat056 = 0.467;
  kcat057 = 0.467;
  kcat058 = 0.467;
  eta01 = 10;
  eta02 = 0.01;
  eta04 = 1;
  eta05 = 0.01;
  eta06 = 0.0043;
  eta07 = 1;
  eta08 = 0.06;
  eta09 = 1;
  eta10 = 0.001;
  eta12 = 0.001;
  eta13 = 500;
  eta14 = 1.5;
  eta15 = 0.01;
  eta19 = 0.04;
  eta20 = 0.49;
  eta23 = 1;
  eta24 = 100;
  eta27 = 100;
  eta28 = 100;
  eta29 = 1;
  eta32 = 1;
  eta34 = 0.1;
  eta46 = 4800;
  eta53 = 0.00355;
  var k001_off_0; k001_off_0 is "k001_off*";
  var k002_off_0; k002_off_0 is "k002_off*";
  var k004_off_0; k004_off_0 is "k004_off*";
  var k005_off_0; k005_off_0 is "k005_off*";
  var k006_off_0; k006_off_0 is "k006_off*";
  var k007_off_0; k007_off_0 is "k007_off*";
  var k008_on_0; k008_on_0 is "k008_on*";
  var k009_off_0; k009_off_0 is "k009_off*";
  var k010_on_0; k010_on_0 is "k010_on*";
  var k012_on_0; k012_on_0 is "k012_on*";
  var k013_off_0; k013_off_0 is "k013_off*";
  var k014_off_0; k014_off_0 is "k014_off*";
  var k015_off_0; k015_off_0 is "k015_off*";
  var k019_off_0; k019_off_0 is "k019_off*";
  var k020_off_0; k020_off_0 is "k020_off*";
  var k023_off_0; k023_off_0 is "k023_off*";
  var k024_off_0; k024_off_0 is "k024_off*";
  var k027_off_0; k027_off_0 is "k027_off*";
  var k028_off_0; k028_off_0 is "k028_off*";
  var k029_off_0; k029_off_0 is "k029_off*";
  var k032_off_0; k032_off_0 is "k032_off*";
  var k034_off_0; k034_off_0 is "k034_off*";
  var k046_off_0; k046_off_0 is "k046_off*";
  var k053_off_0; k053_off_0 is "k053_off*";
  Epsilon = 0.01;
  Baseline = 0;

  // Assignment rules:
  k001_off_0 := k001_off*(eta01/Epsilon);
  k002_off_0 := k002_off*(eta02/Epsilon);
  k004_off_0 := k004_off*(eta04/Epsilon);
  k005_off_0 := k005_off*(eta05/Epsilon);
  k006_off_0 := k006_off*(eta06/Epsilon);
  k007_off_0 := k007_off*(eta07/Epsilon);
  k008_on_0 := k008_on*(eta08/Epsilon);
  k009_off_0 := k009_off*(eta09/Epsilon);
  k010_on_0 := k010_on*(eta10/Epsilon);
  k012_on_0 := k012_on*(eta12/Epsilon);
  k013_off_0 := k013_off*(eta13/Epsilon);
  k014_off_0 := k014_off*(eta14/Epsilon);
  k015_off_0 := k015_off*(eta15/Epsilon);
  k019_off_0 := k019_off*(eta19/Epsilon);
  k020_off_0 := k020_off*(eta20/Epsilon);
  k023_off_0 := k023_off*(eta23/Epsilon);
  k024_off_0 := k024_off*(eta24/Epsilon);
  k027_off_0 := k027_off*(eta27/Epsilon);
  k028_off_0 := k028_off*(eta28/Epsilon);
  k029_off_0 := k029_off*(eta29/Epsilon);
  k032_off_0 := k032_off*(eta32/Epsilon);
  k034_off_0 := k034_off*(eta34/Epsilon);
  k046_off_0 := k046_off*(eta46/Epsilon);
  k053_off_0 := k053_off*(eta53/Epsilon);

  // Reactions:
  r001: TF + FVII -> TF_FVII; compartment*(k001_on*TF*FVII - k001_off_0*TF_FVII);
  r002: TF + FVIIa -> TF_FVIIa; compartment*(k002_on*TF*FVIIa - k002_off_0*TF_FVIIa);
  r003: TF_FVIIa + FVII => TF_FVIIa + FVIIa; compartment*k003_on*TF_FVIIa*FVII;
  r004_1: TF_FVIIa + FIX -> TF_FVIIa_FIX; compartment*(k004_on*TF_FVIIa*FIX - k004_off_0*TF_FVIIa_FIX);
  r004_2: TF_FVIIa_FIX => TF_FVIIa_FXa; compartment*kcat004*TF_FVIIa_FIX;
  r005_1: TF_FVIIa + FX -> TF_FVIIa_FX; compartment*(k005_on*TF_FVIIa*FX - k005_off_0*TF_FVIIa_FX);
  r005_2: TF_FVIIa_FX => TF_FVIIa_FXa; compartment*kcat005*TF_FVIIa_FX;
  r006_1: FVIIa + FX -> FVIIa_FX; compartment*(k006_on*FVIIa*FX - k006_off_0*FVIIa_FX);
  r006_2: FVIIa_FX => FVIIa + FXa; compartment*kcat006*FVIIa_FX;
  r007: TF_FVIIa + FXa -> TF_FVIIa_FXa; compartment*(k007_on*TF_FVIIa*FXa - k007_off_0*TF_FVIIa_FXa);
  r008: FXa + FVII => FXa + FVIIa; compartment*k008_on_0*FXa*FVII;
  r009_1: FXa + FVIII -> FXa_FVIII; compartment*(k009_on*FXa*FVIII - k009_off_0*FXa_FVIII);
  r009_2: FXa_FVIII => FXa + FVIIIa; compartment*kcat009*FXa_FVIII;
  r010: FXa + FII => FXa + FIIa + F12; compartment*k010_on_0*FXa*FII;
  r011: FIIa + FVII => FIIa + FVIIa; compartment*k011_on*FIIa*FVII;
  r012: FIIa + FVIII => FIIa + FVIIIa; compartment*k012_on_0*FIIa*FVIII;
  r013: FIXa + FVIIIa -> FIXa_FVIIIa; compartment*(k013_on*FIXa*FVIIIa - k013_off_0*FIXa_FVIIIa);
  r014_1: FIXa_FVIIIa + FX -> FIXa_FVIIIa_FX; compartment*(k014_on*FIXa_FVIIIa*FX - k014_off_0*FIXa_FVIIIa_FX);
  r014_2: FIXa_FVIIIa_FX => FIXa_FVIIIa + FXa; compartment*kcat014*FIXa_FVIIIa_FX;
  r015: FVIIIa -> FVIIIa1_L + FVIIIa2; compartment*(k015_on*FVIIIa - k015_off_0*FVIIIa1_L*FVIIIa2);
  r016: FIXa_FVIIIa_FX => FVIIIa1_L + FVIIIa2 + FX + FIXa; compartment*k016_on*FIXa_FVIIIa_FX;
  r017: FIXa_FVIIIa => FVIIIa1_L + FVIIIa2 + FIXa; compartment*k017_on*FIXa_FVIIIa;
  r018: FIIa + FV => FIIa + FVa; compartment*k018_on*FIIa*FV;
  r019: FXa + FVa -> FXa_FVa; compartment*(k019_on*FXa*FVa - k019_off_0*FXa_FVa);
  r020_1: FXa_FVa + FII -> FXa_FVa_FII; compartment*(k020_on*FXa_FVa*FII - k020_off_0*FXa_FVa_FII);
  r020_2: FXa_FVa_FII => FXa_FVa + FIIa + F12; compartment*kcat020*FXa_FVa_FII;
  r021_1: FXa_FVa + FII -> FXa_FVa_FII; compartment*(k021_on*FXa_FVa*FII - k021_off*FXa_FVa_FII);
  r021_2: FXa_FVa_FII => FXa_FVa + mIIa; compartment*kcat021*FXa_FVa_FII;
  r022_1: FXa_FVa + mIIa -> FXa_FVa_mIIa; compartment*(k022_on*FXa_FVa*mIIa - k022_off*FXa_FVa_mIIa);
  r022_2: FXa_FVa_mIIa => FXa_FVa + FIIa + F12; compartment*kcat022*FXa_FVa_mIIa;
  r023: FXa + TFPI -> FXa_TFPI; compartment*(k023_on*FXa*TFPI - k023_off_0*FXa_TFPI);
  r024: TF_FVIIa_FXa + TFPI -> TF_FVIIa_FXa_TFPI; compartment*(k024_on*TF_FVIIa_FXa*TFPI - k024_off_0*TF_FVIIa_FXa_TFPI);
  r025: TF_FVIIa + FXa_TFPI => TF_FVIIa_FXa_TFPI; compartment*k025_on*TF_FVIIa*FXa_TFPI;
  r026: CA + FXII => CA + FXIIa; compartment*k026_on*CA*FXII;
  r027_1: FXIIa + PK -> FXIIa_PK; compartment*(k027_on*FXIIa*PK - k027_off_0*FXIIa_PK);
  r027_2: FXIIa_PK => FXIIa + K; compartment*kcat027*FXIIa_PK;
  r028_1: FXII + K -> FXII_K; compartment*(k028_on*FXII*K - k028_off_0*FXII_K);
  r028_2: FXII_K => FXIIa + K; compartment*k028_off*FXII_K;
  r029_1: FXIIa + FXI -> FXIIa_FXI; compartment*(k029_on*FXIIa*FXI - k029_off_0*FXIIa_FXI);
  r029_2: FXIIa_FXI => FXIIa + FXIa; compartment*kcat029*FXIIa_FXI;
  r030: FXIa + FV => FXIa + FVa; compartment*k030_on*FXIa*FV;
  r031: FXIa + FVIII => FXIa + FVIIIa; compartment*k031_on*FXIa*FVIII;
  r032_1: FXIa + FIX -> FXIa_FIX; compartment*(k032_on*FXIa*FIX - k032_off_0*FXIa_FIX);
  r032_2: FXIa_FIX => FXIa + FIXa; compartment*kcat032*FXIa_FIX;
  r033: FXIa + FX => FXIa + FXa; compartment*k033_on*FXIa*FX;
  r034_1: FIXa + FX -> FIXa_FX; compartment*(k034_on*FIXa*FX - k034_off_0*FIXa_FX);
  r034_2: FIXa_FX => FIXa + FXa; compartment*kcat034*FIXa_FX;
  r035: FVIIa + CA => FVIIa_CA; compartment*k035_on*FVIIa*CA;
  r036: FVIIa_CA + FX => FVIIa_CA + FXa; compartment*k036_on*FVIIa_CA*FX;
  r037: TF_FVIIa + ATIII => TF_FVIIa_ATIII; compartment*k037_on*TF_FVIIa*ATIII;
  r038: FVIIa + ATIII => FVIIa_ATIII; compartment*k038_on*FVIIa*ATIII;
  r039: FIXa + ATIII => FIXa_ATIII; compartment*k039_on*FIXa*ATIII;
  r040: FXa + ATIII => FXa_ATIII; compartment*k040_on*FXa*ATIII;
  r041: FIIa + ATIII => FIIa_ATIII; compartment*k041_on*FIIa*ATIII;
  r042: mIIa + ATIII => mIIa_ATIII; compartment*k042_on*mIIa*ATIII;
  r043: FXIIa + ATIII => FXIIa_ATIII; compartment*k043_on*FXIIa*ATIII;
  r044: FXIa + ATIII => FXIa_ATIII; compartment*k044_on*FXIa*ATIII;
  r045: FIIa + Tmod -> FIIa_Tmod; compartment*(k045_on*FIIa*Tmod - k045_off*FIIa_Tmod);
  r046_1: FIIa_Tmod + PC -> FIIa_Tmod_PC; compartment*(k046_on*FIIa_Tmod*PC - k046_off_0*FIIa_Tmod_PC);
  r046_2: FIIa_Tmod_PC => FIIa_Tmod + APC; compartment*kcat046*FIIa_Tmod_PC;
  r047_1: APC + FVa -> APC_FVa; compartment*(k047_on*APC*FVa - k047_off*APC_FVa);
  r047_2: APC_FVa => APC; compartment*kcat047*APC_FVa;
  r048_1: APC + FVIIIa -> APC_FVIIIa; compartment*(k048_on*APC*FVIIIa - k048_off*APC_FVIIIa);
  r048_2: APC_FVIIIa => APC; compartment*kcat048*APC_FVIIIa;
  r049_1: APC + FIXa_FVIIIa -> APC_FIXa_FVIIIa; compartment*(k049_on*APC*FIXa_FVIIIa - k049_off*APC_FIXa_FVIIIa);
  r049_2: APC_FIXa_FVIIIa => APC + FIXa; compartment*kcat049*APC_FIXa_FVIIIa;
  r050_1: APC + FIXa_FVIIIa_FX -> APC_FIXa_FVIIIa_FX; compartment*(k050_on*APC*FIXa_FVIIIa_FX - k050_off*APC_FIXa_FVIIIa_FX);
  r050_2: APC_FIXa_FVIIIa_FX => APC + FIXa + FX; compartment*kcat050*APC_FIXa_FVIIIa_FX;
  r051_1: FIIa + Fg -> FIIa_Fg; compartment*(k051_on*FIIa*Fg - k051_off*FIIa_Fg);
  r051_2: FIIa_Fg => FIIa + F; compartment*kcat051*FIIa_Fg;
  r052_1: FIIa + FXIII -> FIIa_FXIIIa; compartment*(k052_on*FIIa*FXIII - k052_off*FIIa_FXIIIa);
  r052_2: FIIa_FXIIIa => FIIa + FXIIIa; compartment*kcat052*FIIa_FXIIIa;
  r053_1: FXIIIa + F -> FXIIIa_F; compartment*(k053_on*FXIIIa*F - k053_off_0*FXIIIa_F);
  r053_2: FXIIIa_F => FXIIIa + XF; compartment*kcat053*FXIIIa_F;
  r054_1: t_PA + Pg -> t_PA_Pg; compartment*(k054_on*t_PA*Pg - k054_off*t_PA_Pg);
  r054_2: t_PA_Pg => t_PA + P; compartment*kcat054*t_PA_Pg;
  r055_1: P + FXIIIa -> P_FXIIIa; compartment*(k055_on*P*FXIIIa - k055_off*P_FXIIIa);
  r055_2: P_FXIIIa => P; compartment*kcat055*P_FXIIIa;
  r056_1: P + Fg -> P_Fg; compartment*(k056_on*P*Fg - k056_off*P_Fg);
  r056_2: P_Fg => P + FDP; compartment*kcat056*P_Fg;
  r057_1: P + F -> P_F; compartment*(k057_on*P*F - k057_off*P_F);
  r057_2: P_F => P + FDP; compartment*kcat057*P_F;
  r058_1: P + XF -> P_XF; compartment*(k058_on*P*XF - k058_off*P_XF);
  r058_2: P_XF => P + DP; compartment*kcat058*P_XF;
  r059: => TF; compartment*Constant_flux__irreversible(k059_on);
  r060: TF => ; compartment*k060_off*TF;
  r061: => Fg; compartment*Constant_flux__irreversible(k061_on);
  r062: => FII; compartment*Constant_flux__irreversible(k062_on);
  r063: FII => ; compartment*k063_off*FII;
  r064: => FV; compartment*Constant_flux__irreversible(k064_on);
  r065: FV => ; compartment*k065_off*FV;
  r066: => FVII; compartment*Constant_flux__irreversible(k066_on);
  r067: FVII => ; compartment*k067_off*FVII;
  r068: FVIIa => ; compartment*k068_off*FVIIa;
  r069: => FVIII; compartment*Constant_flux__irreversible(k069_on);
  r070: FVIII => ; compartment*k070_off*FVIII;
  r071: => FIX; compartment*Constant_flux__irreversible(k071_on);
  r072: FIX => ; compartment*k072_off*FIX;
  r073: => FX; compartment*Constant_flux__irreversible(k073_on);
  r074: FX => ; compartment*k074_off*FX;
  r075: FXa => ; compartment*k075_off*FXa;
  r076: => FXI; compartment*Constant_flux__irreversible(k076_on);
  r077: FXI => ; compartment*k077_off*FXI;
  r078: FXIa => ; compartment*k078_off*FXIa;
  r079: => FXII; compartment*Constant_flux__irreversible(k079_on);
  r080: FXII => ; compartment*k080_off*FXII;
  r081: FXIIa => ; compartment*k081_off*FXIIa;
  r082: => FXIII; compartment*Constant_flux__irreversible(k082_on);
  r083: FXIII => ; compartment*k083_off*FXIII;
  r084: => TFPI; compartment*Constant_flux__irreversible(k084_on);
  r085: TFPI => ; compartment*k085_off*TFPI;
  r086: => ATIII; compartment*Constant_flux__irreversible(k086_on);
  r087: ATIII => ; compartment*k087_off*ATIII;
  r088: FIIa_ATIII => ; compartment*k088_off*FIIa_ATIII;
  r089: => Tmod; compartment*Constant_flux__irreversible(k089_on);
  r090: Tmod => ; compartment*k090_off*Tmod;
  r091: => PC; compartment*Constant_flux__irreversible(k091_on);
  r092: PC => ; compartment*k092_off*PC;
  r093: APC => ; compartment*k093_off*APC;
  r094: => PK; compartment*Constant_flux__irreversible(k094_on);
  r095: PK => ; compartment*k095_off*PK;
  r096: K => ; compartment*k096_off*K;
  r097: => Pg; compartment*Constant_flux__irreversible(k097_on);
  r098: Pg => ; compartment*k098_off*Pg;
  r099: P => ; compartment*k099_off*P;
  r100: => t_PA; compartment*Constant_flux__irreversible(k0100_on);
  r101: t_PA => ; compartment*k101_off*t_PA;
  r102: FDP => ; compartment*k102_off*FDP;
  r103: F12 => ; compartment*k103_off*F12;
  r104: DP => ; compartment*k104_off*DP;
  r105: FVIIa_ATIII => ; compartment*k105_off*FVIIa_ATIII;

  // Unit definitions:
  unit volume = 1e-3 litre;
  unit substance = 1e-9 mole;
end
