// SBML level 2 version 4
// dcterms:bibliographicCitation: Elucidating the interactions between the adhesive and transcriptional functions of beta-catenin in normal and cancerous cells. urn:miriam:pubmed:17382967

function function_for_Wnt_impact(d, W, substrate)
  d*W*substrate;
end

function function_for_mass_action(k, substrate)
  k*substrate;
end

function function_for_complex_assembly(S, substrate1, substrate2)
  S*substrate1*substrate2;
end

function function_for_constant_flux(S)
  S;
end

function function_for_bcatenin_Ser_Thr_phosphorylation(pu, D, C, CF, KD)
  pu*D*C/(CF + KD);
end
function_for_bcatenin_Ser_Thr_phosphorylation is "function for bcatenin Ser/Thr-phosphorylation";

function function_for_target_protein_de_novo_synthesis(Sy, CT, KT)
  Sy*CT/(CT + KT);
end

function function_for_bCatenin_Tyr_phosphoryltion__production_of_closed_form(pc, W, C0, KC)
  pc*W*C0/(C0 + KC);
end
function_for_bCatenin_Tyr_phosphoryltion__production_of_closed_form is "function for bCatenin Tyr-phosphoryltion (production of closed-form)";

model Leeuwen2007___Elucidating_the_interactions_between_the_adhesive_and_transcriptional_functions_of_beta_catenin_in_normal_and_cancerous_cells()
  // Leeuwen2007 - Elucidating the interactions between the adhesive and transcriptional functions of beta-catenin in normal and cancerous cells
  // Elucidating the interactions between the adhesive and transcriptional functions of beta-catenin in normal and cancerous cells.
  // van Leeuwen IM1, Byrne HM, Jensen OE, King JR.
  // Author information
  // 1
  // Centre for Mathematical Medicine and Biology, Division of Applied Mathematics, School of Mathematical Sciences, University of Nottingham, Nottingham, NG7 2RD, UK. pmzivl@exmail.nottingham.ac.uk
  // Abstract
  // Wnt signalling is involved in a wide range of physiological and pathological processes. The presence of an extracellular Wnt stimulus induces cytoplasmic stabilisation and nuclear translocation of beta-catenin, a protein that also plays an essential role in cadherin-mediated adhesion. Two main hypotheses have been proposed concerning the balance between beta-catenin's adhesive and transcriptional functions: either beta-catenin's fate is determined by competition between its binding partners, or Wnt induces folding of beta-catenin into a conformation allocated preferentially to transcription. The experimental data supporting each hypotheses remain inconclusive. In this paper we present a new mathematical model of the Wnt pathway that incorporates beta-catenin's dual function. We use this model to carry out a series of in silico experiments and compare the behaviour of systems governed by each hypothesis. Our analytical results and model simulations provide further insight into the current understanding of Wnt signalling and, in particular, reveal differences in the response of the two modes of interaction between adhesion and signalling in certain in silico settings. We also exploit our model to investigate the impact of the mutations most commonly observed in human colorectal cancer. Simulations show that the amount of functional APC required to maintain a normal phenotype increases with increasing strength of the Wnt signal, a result which illustrates that the environment can substantially influence both tumour initiation and phenotype.
  // isDescribedBy pubmed:17382967
  // isPropertyOf ncit:C17478
  // hasTaxon taxonomy:9606
  // hasProperty mamo:MAMO_0000046

  // Compartments:
  compartment compartment = 1;

  // Species:
  species D in compartment = 0.67;  // hasInstance GO:1904713
  species X in compartment = 0.067;  // isInstanceOf uniprot:O15169
  species C0 in compartment = 2.54;  // isInstanceOf uniprot:P35222
  species A in compartment = 10;  // hasInstance ncit:C16393
  species Cu in compartment = 0.45;  // isVersionOf GO:1904713
  species CA in compartment = 18.14;  // hasProperty GO:0098635
  species C0T in compartment = 2.54;  // isInstanceOf uniprot:P35222
  species T in compartment = 25;
  species Y in compartment = 0.48;  // isInstanceOf go:O15169
  species Cc in compartment = 0;  // isInstanceOf uniprot:P35222
  species CcT in compartment = 0;  // isVersionOf GO:0016342

  // Parameters:
  sA = 20;
  sCA = 250;
  sC = 25;
  sCT = 30;
  sD = 100;
  sT = 10;
  sX = 10;
  sY = 10;
  dA = 2;
  dCA = 350;
  dC = 1;
  dCT = 750;
  dD = 5;
  dDx = 5;
  dT = 0.4;
  du = 50;
  dX = 100;
  dY = 1;
  Kc = 200;
  KD = 5;
  KT = 50;
  pc = 0;
  pu = 100;
  nuD = 5;
  nuDx = 5;
  nuX = 200;
  W = 0;

  // Assignment rules:
  CF := Cc + C0;
  CT := CcT + C0T;

  // Reactions:
  assembly_of_active_destruction_complexes: X => D; compartment*function_for_mass_action(sD, X);  // isVersionOf GO:1904885
  APC_independent_degradation_of_open_form_bCatenin: C0 => ; compartment*function_for_mass_action(dC, C0); APC_independent_degradation_of_open_form_bCatenin is "APC-independent degradation of open-form bCatenin";  // isVersionOf GO:0031145
  Elimination_of_adhesion_molecules: A => ; compartment*function_for_mass_action(dA, A);  // hasVersion ncit:C17597
  Elimination_of_Ser_Thr_phosphorylated_bCatenin: Cu => ; compartment*function_for_mass_action(du, Cu); Elimination_of_Ser_Thr_phosphorylated_bCatenin is "Elimination of Ser/Thr-phosphorylated bCatenin";  // isVersionOf GO:0043539
  Dissociation_of_adhesion_complexes: CA => C0 + A; compartment*function_for_mass_action(dCA, CA); Dissociation_of_adhesion_complexes is "Dissociation of adhesion-complexes";  // GO:0009056
  Dissociation_of_C0T_complexes: C0T => C0 + T; compartment*dCT*C0T;  // isInstanceOf ncit:C61559
  Target_gene_elimination: Y => ; compartment*function_for_mass_action(dY, Y);  // isVersionOf GO:0031049
  APC_independent_degradation_of_closed_form_bCatenin: Cc => ; compartment*function_for_mass_action(dC, Cc); APC_independent_degradation_of_closed_form_bCatenin is "APC-independent degradation of closed-form bCatenin";  // isVersionOf GO:0031145
  Dissociation_of_CcT_complexes: CcT => Cc + T; compartment*function_for_mass_action(dCT, CcT);  // isInstanceOf ncit:C61559
  elimination_of_transcription_molecules: T => ; compartment*function_for_mass_action(dT, T);  // isVersionOf GO:0031049
  bcatenin_de_novo_synthesis: => C0; compartment*function_for_constant_flux(sC);  // isVersionOf ncit:C61408
  De_nove_synthesis_of_adhesion_molecules: => A; compartment*function_for_constant_flux(sA);  // isInstanceOf ncit:C61408
  De_novo_synthesis_of_transcription_molecules: => T; compartment*function_for_constant_flux(sT);  // isVersionOf ncit:C61408
  Axin_de_novo_synthesis: => X; compartment*function_for_constant_flux(sX);  // hasInstance ncit:C18177
  dissociation_of_active_destruction_complexes: D => X; compartment*function_for_Wnt_impact(dDx, W, D);  // isInstanceOf ncit:C61559
  Axin_elimination: X => ; compartment*function_for_Wnt_impact(dX, W, X);  // isVersionOf ncit:C18177
  inhibition_of_destruction_complex__without_axin_release: D => ; compartment*function_for_Wnt_impact(dD, W, D); inhibition_of_destruction_complex__without_axin_release is "inhibition of destruction complex (without axin release)";  // isVersionOf GO:0030877
  assembly_of_adhesion_complexes: C0 + A => CA; compartment*function_for_complex_assembly(sCA, C0, A); assembly_of_adhesion_complexes is "assembly of adhesion-complexes";  // isVersionOf ncit:C63548
  assembly_of_C0T_complexes: C0 + T => C0T; compartment*function_for_complex_assembly(sCT, C0, T);  // isInstanceOf ncit:C63548
  assembly_of_CcT_complexes: Cc + T => CcT; compartment*function_for_complex_assembly(sCT, Cc, T);  // isVersionOf ncit:C63548
  open_form_bcatenin_Ser_Thr_phosphorylation: C0 => Cu; compartment*function_for_bcatenin_Ser_Thr_phosphorylation(pu, D, C0, CF, KD); open_form_bcatenin_Ser_Thr_phosphorylation is "open-form bcatenin Ser/Thr-phosphorylation";  // modifiers: D; isVersionOf GO:0043539
  closed_form_bcatenin_Ser_Thr_phosphorylation: Cc => Cu; compartment*function_for_bcatenin_Ser_Thr_phosphorylation(pu, D, Cc, CF, KD); closed_form_bcatenin_Ser_Thr_phosphorylation is "closed-form bcatenin Ser/Thr-phosphorylation";  // modifiers: D; isVersionOf GO:0008013
  target_protein_de_novo_synthesis: => Y; compartment*function_for_target_protein_de_novo_synthesis(sY, CT, KT);  // hasProperty ncit:C28354
  bCatenin_Tyr_phosphoryltion__production_of_closed_form: C0 => Cc; compartment*function_for_bCatenin_Tyr_phosphoryltion__production_of_closed_form(pc, W, C0, Kc); bCatenin_Tyr_phosphoryltion__production_of_closed_form is "bCatenin Tyr-phosphoryltion (production of closed-form)";  // isVersionOf GO:0008013

  // Unit definitions:
  unit time = 3600 second;
  unit substance = 1e-9 mole;
end
