// SBML level 2 version 4
// dcterms:bibliographicCitation: urn:miriam:pubmed:16432310

model Lo2005___Stochastic_Modeling_of_Blood_Coagulation_Initiation()
  // Lo2005 - Stochastic Modeling of Blood Coagulation Initiation
  // Simulation results using a stochastic approach to Hockin et al. (2002) mathematical model of the blood coagulation cascade that had been previously simulated using a deterministic method.
  // isDerivedFrom kegg.pathway:hsa04610 reactome:R-HSA-109582 GO:0007596 BTO:0000131 mamo:MAMO_0000047 taxonomy:9606
  // isVersionOf kegg.pathway:hsa04610
  // isVersionOf reactome:R-HSA-109582
  // isVersionOf GO:0007596
  // occursIn BTO:0000131
  // hasProperty mamo:MAMO_0000047

  // Compartments:
  compartment compartment = Volume;

  // Species:
  substanceOnly species TF in compartment = 5;  // isVersionOf uniprot:P13726; isVersionOf kegg.orthology:K03901
  substanceOnly species TF_VII in compartment = 0; TF_VII is "TF-VII";  // hasPart uniprot:P13726; hasPart uniprot:P08709
  substanceOnly species VII in compartment = 1e-8/Fold_dilution*compartment;  // isVersionOf kegg.orthology:K01320; isVersionOf uniprot:P08709
  substanceOnly species TF_VIIa in compartment = 0; TF_VIIa is "TF-VIIa";  // hasPart uniprot:P08709; hasPart uniprot:P13726
  substanceOnly species VIIa in compartment = 1e-10/Fold_dilution*compartment;  // isVersionOf uniprot:P08709; isVersionOf kegg.orthology:K01320
  substanceOnly species Xa in compartment = 0;  // isVersionOf kegg.orthology:K01314; isVersionOf uniprot:P00742
  substanceOnly species IIa in compartment = 0;  // isVersionOf kegg.orthology:K01313; isVersionOf uniprot:P00734
  substanceOnly species TF_VIIa_X in compartment = 0; TF_VIIa_X is "TF-VIIa-X";  // hasPart uniprot:P00742; hasPart uniprot:P08709; hasPart uniprot:P13726
  substanceOnly species X in compartment = 1.6e-7/Fold_dilution*compartment;  // isVersionOf kegg.orthology:K01314; isVersionOf uniprot:P00742
  substanceOnly species TF_VIIa_Xa in compartment = 0; TF_VIIa_Xa is "TF-VIIa-Xa";  // hasPart uniprot:P00742; hasPart uniprot:P13726; hasPart uniprot:P08709
  substanceOnly species IX in compartment = 9e-8/Fold_dilution*compartment;  // isVersionOf uniprot:P00740; isVersionOf kegg.orthology:K01321
  substanceOnly species TF_VIIa_IX in compartment = 0; TF_VIIa_IX is "TF-VIIa-IX";  // hasPart uniprot:P00740; hasPart uniprot:P13726; hasPart uniprot:P08709
  substanceOnly species IXa in compartment = 0;  // isVersionOf uniprot:P00740; isVersionOf kegg.orthology:K01321
  substanceOnly species II in compartment = 1.4e-6/Fold_dilution*compartment;  // isVersionOf kegg.orthology:K01313; isVersionOf uniprot:P00734
  substanceOnly species VIII in compartment = 7e-10/Fold_dilution*compartment;  // isVersionOf kegg.orthology:K03899; isVersionOf uniprot:P00451
  substanceOnly species VIIIa in compartment = 0;  // isVersionOf uniprot:P00451; isVersionOf kegg.orthology:K03899
  substanceOnly species IXa_VIIIa in compartment = 0; IXa_VIIIa is "IXa-VIIIa";  // hasPart uniprot:P00451; hasPart uniprot:P00740
  substanceOnly species IXa_VIIIa_X in compartment = 0; IXa_VIIIa_X is "IXa-VIIIa-X";  // hasPart uniprot:P00451; hasPart uniprot:P00740; hasPart uniprot:P00742
  substanceOnly species VIIIa_1_L in compartment = 0; VIIIa_1_L is "VIIIa_1-L";  // isVersionOf uniprot:P00451
  substanceOnly species VIIIa_2 in compartment = 0;  // isVersionOf uniprot:P00451
  substanceOnly species V in compartment = 2e-8/Fold_dilution*compartment;  // isVersionOf kegg.orthology:K03902; isVersionOf uniprot:P12259
  substanceOnly species Va in compartment = 0;  // isVersionOf kegg.orthology:K03902; isVersionOf uniprot:P12259
  substanceOnly species Xa_Va in compartment = 0; Xa_Va is "Xa-Va";  // hasPart uniprot:P12259; hasPart uniprot:P00742
  substanceOnly species Xa_Va_II in compartment = 0; Xa_Va_II is "Xa-Va-II";  // hasPart uniprot:P12259; hasPart uniprot:P00734; hasPart uniprot:P00742
  substanceOnly species mIIa in compartment = 0;  // isVersionOf uniprot:P00734; isVersionOf pdb:3E6P; isVersionOf mmdb:68004
  substanceOnly species TFPI in compartment = 2.5e-9/Fold_dilution*compartment;  // isVersionOf kegg.orthology:K03909; isVersionOf uniprot:P10646
  substanceOnly species Xa_TFPI in compartment = 0; Xa_TFPI is "Xa-TFPI";  // hasPart uniprot:P10646; hasPart uniprot:P00742
  substanceOnly species TF_VIIa_Xa_TFPI in compartment = 0; TF_VIIa_Xa_TFPI is "TF-VIIa-Xa-TFPI";  // hasPart uniprot:P00742; hasPart uniprot:P13726; hasPart uniprot:P10646; hasPart uniprot:P08709
  substanceOnly species ATIII in compartment = 3.4e-6/Fold_dilution*compartment;  // isVersionOf uniprot:P01008; isVersionOf kegg.orthology:K03911
  substanceOnly species Xa_ATIII in compartment = 0; Xa_ATIII is "Xa-ATIII";  // hasPart uniprot:P00742; hasPart uniprot:P01008
  substanceOnly species mIIa_ATIII in compartment = 0; mIIa_ATIII is "mIIa-ATIII";  // hasPart uniprot:P00734; hasPart uniprot:P01008
  substanceOnly species IXa_ATIII in compartment = 0; IXa_ATIII is "IXa-ATIII";  // hasPart uniprot:P00740; hasPart uniprot:P01008
  substanceOnly species IIa_ATIII in compartment = 0; IIa_ATIII is "IIa-ATIII";  // hasPart uniprot:P01008; hasPart uniprot:P00734
  substanceOnly species TF_VIIa_ATIII in compartment = 0; TF_VIIa_ATIII is "TF-VIIa-ATIII";  // hasPart uniprot:P13726; hasPart uniprot:P01008; hasPart uniprot:P08709

  // Parameters:
  R01_k1 = 3200000;
  R01_k_1 = 0.0031;
  R02_k1 = 23000000;
  R02_k_1 = 0.0031;
  R03_k1 = 440000;
  R04_k1 = 13000000;
  R05_k1 = 23000;
  R06_k1 = 25000000;
  R06_k_1 = 1.05;
  R06_kcat = 6;
  R07_k1 = 22000000;
  R07_k_1 = 19;
  R08_k1 = 10000000;
  R08_k_1 = 2.4;
  R08_kcat = 1.8;
  R09_k1 = 7500;
  R10_k1 = 20000000;
  R11_k1 = 10000000;
  R11_k_1 = 0.005;
  R12_k1 = 100000000;
  R12_k_1 = 0.001;
  R12_kcat = 8.2;
  R13_k1 = 0.006;
  R13_k_1 = 22000;
  R14_k1 = 0.001;
  R15_k1 = 0.001;
  R16_k1 = 20000000;
  R17_k1 = 400000000;
  R17_k_1 = 0.2;
  R18_k1 = 100000000;
  R18_k_1 = 103;
  R18_kcat = 63.5;
  R19_k1 = 15000000;
  R20_k1 = 900000;
  R20_k_1 = 0.00036;
  R21_k1 = 320000000;
  R21_k_1 = 0.00011;
  R22_k1 = 50000000;
  R23_k1 = 1500;
  R24_k1 = 7100;
  R25_k1 = 490;
  R26_k1 = 7100;
  R27_k1 = 230;
  // Undiluted == 1; Diluted == 3
  Fold_dilution = 1;
  var IIa_1_2mIIa; IIa_1_2mIIa is "IIa+1.2mIIa";
  // For parameter scan to plot multiple simulation results
  Dummy_Variable = 0;
  // 1nl and 0.0166nl?
  Volume = 1;

  // Assignment rules:
  IIa_1_2mIIa := IIa/compartment + 1.2*(mIIa/compartment);

  // Reactions:
  R01_forward: TF + VII => TF_VII; R01_k1*TF*(VII/compartment);
  R02_forward: TF + VIIa => TF_VIIa; R02_k1*TF*(VIIa/compartment);
  R03: TF_VIIa + VII => TF_VIIa + VIIa; R03_k1*TF_VIIa*(VII/compartment);
  R04: Xa + VII => Xa + VIIa; R04_k1*Xa*(VII/compartment);
  R05: IIa + VII => Xa + VIIa; R05_k1*IIa*(VII/compartment);
  R06a_forward: TF_VIIa + X => TF_VIIa_X; R06_k1*TF_VIIa*(X/compartment);
  R06b: TF_VIIa_X => TF_VIIa_Xa; R06_kcat*TF_VIIa_X;
  R07_forward: TF_VIIa + Xa => TF_VIIa_Xa; R07_k1*TF_VIIa*(Xa/compartment);
  R08a_forward: TF_VIIa + IX => TF_VIIa_IX; R08_k1*TF_VIIa*(IX/compartment);
  R08b: TF_VIIa_IX => TF_VIIa + IXa; R08_kcat*TF_VIIa_IX;
  R09: II + Xa => IIa + Xa; R09_k1*II*(Xa/compartment);
  R10: IIa + VIII => IIa + VIIIa; R10_k1*IIa*(VIII/compartment);
  R11_forward: VIIIa + IXa => IXa_VIIIa; R11_k1*VIIIa*(IXa/compartment);
  R12a_forward: IXa_VIIIa + X => IXa_VIIIa_X; R12_k1*IXa_VIIIa*(X/compartment);
  R12b: IXa_VIIIa_X => IXa_VIIIa + Xa; R12_kcat*IXa_VIIIa_X;
  R13_forward: VIIIa => VIIIa_1_L + VIIIa_2; R13_k1*VIIIa;
  R14: IXa_VIIIa_X => VIIIa_1_L + VIIIa_2 + X + IXa; R14_k1*IXa_VIIIa_X;
  R15: IXa_VIIIa => VIIIa_1_L + VIIIa_2 + IXa; R15_k1*IXa_VIIIa;
  R16: IIa + V => IIa + Va; R16_k1*IIa*(V/compartment);
  R17_forward: Xa + Va => Xa_Va; R17_k1*Xa*(Va/compartment);
  R18a_forward: Xa_Va + II => Xa_Va_II; R18_k1*Xa_Va*(II/compartment);
  R18b: Xa_Va_II => Xa_Va + mIIa; R18_kcat*Xa_Va_II;
  R19: Xa_Va + mIIa => Xa_Va + IIa; R19_k1*Xa_Va*(mIIa/compartment);
  R20_forward: Xa + TFPI => Xa_TFPI; R20_k1*Xa*(TFPI/compartment);
  R21_forward: TF_VIIa_Xa + TFPI => TF_VIIa_Xa_TFPI; R21_k1*TF_VIIa_Xa*(TFPI/compartment);
  R22: TF_VIIa + Xa_TFPI => TF_VIIa_Xa_TFPI; R22_k1*TF_VIIa*(Xa_TFPI/compartment);
  R23: Xa + ATIII => Xa_ATIII; R23_k1*Xa*(ATIII/compartment);
  R24: mIIa + ATIII => mIIa_ATIII; R24_k1*mIIa*(ATIII/compartment);
  R25: IXa + ATIII => IXa_ATIII; R25_k1*IXa*(ATIII/compartment);
  R26: IIa + ATIII => IIa_ATIII; R26_k1*IIa*(ATIII/compartment);
  R27: TF_VIIa + ATIII => TF_VIIa_ATIII; R27_k1*TF_VIIa*(ATIII/compartment);
  R01_reverse: TF_VII => TF + VII; R01_k_1*TF_VII;
  R02_reverse: TF_VIIa => TF + VIIa; R02_k_1*TF_VIIa;
  R06a_reverse: TF_VIIa_X => TF_VIIa + X; R06_k_1*TF_VIIa_X;
  R07_reverse: TF_VIIa_Xa => TF_VIIa + Xa; R07_k_1*TF_VIIa_Xa;
  R08a_reverse: TF_VIIa_IX => TF_VIIa + IX; R08_k_1*TF_VIIa_IX;
  R11_reverse: IXa_VIIIa => VIIIa + IXa; R11_k_1*IXa_VIIIa;
  R12a_reverse: IXa_VIIIa_X => IXa_VIIIa + X; R12_k_1*IXa_VIIIa_X;
  R13_reverse: VIIIa_1_L + VIIIa_2 => VIIIa; R13_k_1*VIIIa_1_L*(VIIIa_2/compartment);
  R17_reverse: Xa_Va => Xa + Va; R17_k_1*Xa_Va;
  R18a_reverse: Xa_Va_II => Xa_Va + II; R18_k_1*Xa_Va_II;
  R20_reverse: Xa_TFPI => Xa + TFPI; R20_k_1*Xa_TFPI;
  R21_reverse: TF_VIIa_Xa_TFPI => TF_VIIa_Xa + TFPI; R21_k_1*TF_VIIa_Xa_TFPI;

  // Unit definitions:
  unit volume = 1e-9 litre;
  unit substance = 1e-12 mole;
end
