// SBML level 2 version 4
// dcterms:bibliographicCitation: urn:miriam:pubmed:17658944

model Luan2007___Blood_coagulation_model_combining_previous_models_and_platelet_activation()
  // Luan2007 - Blood coagulation model combining previous models and platelet activation
  // Mathematical model combining previous models (Jones1994, Leipoldt1995, Kuhursky2001, Hockin2002) into one model with platelet activation.
  // hasPart biomodels.db:BIOMD0000000335
  // hasPart biomodels.db:MODEL1109150002
  // hasPart biomodels.db:BIOMD0000000336
  // hasPart biomodels.db:MODEL1109150000
  // isVersionOf GO:0007596
  // occursIn BTO:0000131

  // Compartments:
  compartment compartment = 1;

  // Species:
  species TF in compartment = TF_0;
  species VII in compartment = VII_0;
  species VII_TF in compartment = 0; VII_TF is "VII-TF";
  species VIIa in compartment = VIIa_0;
  species VIIa_TF in compartment = TF_VIIa_0; VIIa_TF is "VIIa-TF";
  species Xa in compartment = 0;
  species Xa_VII_TF in compartment = 0; Xa_VII_TF is "Xa-VII-TF";
  species IIa in compartment = 0;
  species IIa_VII_TF in compartment = 0; IIa_VII_TF is "IIa-VII-TF";
  species X in compartment = X_0;
  species X_VIIa_TF in compartment = 0; X_VIIa_TF is "X-VIIa-TF";
  species X_VII_TF in compartment = 0; X_VII_TF is "X-VII-TF";
  species IX in compartment = IX_0;
  species IX_VIIa_TF in compartment = 0; IX_VIIa_TF is "IX-VIIa-TF";
  species IX_VII_TF in compartment = 0; IX_VII_TF is "IX-VII-TF";
  species IXa in compartment = 0;
  species VII_Xa in compartment = 0; VII_Xa is "VII-Xa";
  species VII_IIa in compartment = 0; VII_IIa is "VII-IIa";
  species V in compartment = V_0;
  species V_IIa in compartment = 0; V_IIa is "V-IIa";
  species VIII in compartment = VIII_0;
  species VIII_IIa in compartment = 0; VIII_IIa is "VIII-IIa";
  species VIIIa in compartment = 0;
  species Xa_IX in compartment = 0; Xa_IX is "Xa-IX";
  species Xa_V in compartment = 0; Xa_V is "Xa-V";
  species Va in compartment = 0;
  species Xa_VIII in compartment = 0; Xa_VIII is "Xa-VIII";
  species II in compartment = II_0;
  species Xa_II in compartment = 0; Xa_II is "Xa-II";
  species IX_P9s in compartment = 0; IX_P9s is "IX-P9s";
  species P9s in compartment = P9s_0_0;
  species IXa_P9s in compartment = 0; IXa_P9s is "IXa-P9s";
  species IXa_P9s_0 in compartment = 0; IXa_P9s_0 is "IXa-P9s*";
  species P9s_0 in compartment = P9s__0; P9s_0 is "P9s*";
  species P10s in compartment = P10s_0;
  species X_P10s in compartment = 0; X_P10s is "X-P10s";
  species Xa_P10s in compartment = 0; Xa_P10s is "Xa-P10s";
  species P5s in compartment = P5s_0;
  species V_P5s in compartment = 0; V_P5s is "V-P5s";
  species Va_P5s in compartment = 0; Va_P5s is "Va-P5s";
  species P8s in compartment = P8s_0;
  species VIII_P8s in compartment = 0; VIII_P8s is "VIII-P8s";
  species VIIIa_P8s in compartment = 0; VIIIa_P8s is "VIIIa-P8s";
  species II_P2s in compartment = 0; II_P2s is "II-P2s";
  species P2s in compartment = P2s_0;
  species IIa_P2s in compartment = 0; IIa_P2s is "IIa-P2s";
  species AP_Psub in compartment = 0; AP_Psub is "AP-Psub";
  species PL in compartment = PL_0;
  species Psub in compartment = Psub_0;
  species PL_Psub in compartment = 0; PL_Psub is "PL-Psub";
  species AP in compartment = 0;
  species PL_AP in compartment = 0; PL_AP is "PL-AP";
  species PL_AP_Psub in compartment = 0; PL_AP_Psub is "PL-AP-Psub";
  species PL_IIa in compartment = 0; PL_IIa is "PL-IIa";
  species PL_Psub_IIa in compartment = 0; PL_Psub_IIa is "PL-Psub-IIa";
  species V_P5s_Xa_P10s in compartment = 0; V_P5s_Xa_P10s is "V-P5s-Xa-P10s";
  species V_P5s_IIa_P2s in compartment = 0; V_P5s_IIa_P2s is "V-P5s-IIa-P2s";
  species IIa_P10s in compartment = 0; IIa_P10s is "IIa-P10s";
  species V_P5s_IIa_P10s in compartment = 0; V_P5s_IIa_P10s is "V-P5s-IIa-P10s";
  species X_P10s_VIIIa_P8s_IXa_P9s in compartment = 0; X_P10s_VIIIa_P8s_IXa_P9s is "X-P10s-VIIIa-P8s-IXa-P9s";
  species VIIIa_P8s_IXa_P9s in compartment = 0; VIIIa_P8s_IXa_P9s is "VIIIa-P8s-IXa-P9s";
  species VIIIa_P8s_IXa_P9s_0 in compartment = 0; VIIIa_P8s_IXa_P9s_0 is "VIIIa-P8s-IXa-P9s*";
  species X_P10s_VIIIa_P8s_IXa_P9s_0 in compartment = 0; X_P10s_VIIIa_P8s_IXa_P9s_0 is "X-P10s-VIIIa-P8s-IXa-P9s*";
  species VIII_P8s_Xa_P10s in compartment = 0; VIII_P8s_Xa_P10s is "VIII-P8s-Xa-P10s";
  species VIII_P8s_IIa_P2s in compartment = 0; VIII_P8s_IIa_P2s is "VIII-P8s-IIa-P2s";
  species VIII_P8s_IIa_P10s in compartment = 0; VIII_P8s_IIa_P10s is "VIII-P8s-IIa-P10s";
  species II_P2s_Va_P5s_Xa_P10s in compartment = 0; II_P2s_Va_P5s_Xa_P10s is "II-P2s-Va-P5s-Xa-P10s";
  species Va_P5s_Xa_P10s in compartment = 0; Va_P5s_Xa_P10s is "Va-P5s-Xa-P10s";
  species Xa_P10s_IX_P9s in compartment = 0; Xa_P10s_IX_P9s is "Xa-P10s-IX-P9s";
  species APC in compartment = 0;
  species APC_VIIIa_P8s in compartment = 0; APC_VIIIa_P8s is "APC-VIIIa-P8s";
  species VIIIa_P8s_i in compartment = 0; VIIIa_P8s_i is "VIIIa-P8s-i";
  species APC_Va_P8s in compartment = 0; APC_Va_P8s is "APC-Va-P8s";
  species Va_P8s in compartment = 0; Va_P8s is "Va-P8s";
  species Va_P8s_i in compartment = 0; Va_P8s_i is "Va-P8s-i";
  species APC_Va_P5s_Xa_P10s in compartment = 0; APC_Va_P5s_Xa_P10s is "APC-Va-P5s-Xa-P10s";
  species Va_P5s_Xa_P10s_i in compartment = 0; Va_P5s_Xa_P10s_i is "Va-P5s-Xa-P10s-i";
  species APC_VIIIa_P8s_IXa_P9s in compartment = 0; APC_VIIIa_P8s_IXa_P9s is "APC-VIIIa-P8s-IXa-P9s";
  species VIIIa_P8s_IXa_P9s_i in compartment = 0; VIIIa_P8s_IXa_P9s_i is "VIIIa-P8s-IXa-P9s-i";
  species APC_VIIIa_P8s_IXa_P9s_0 in compartment = 0; APC_VIIIa_P8s_IXa_P9s_0 is "APC-VIIIa-P8s-IXa-P9s*";
  species VIIIa_P8s_IXa_P9s__i in compartment = 0; VIIIa_P8s_IXa_P9s__i is "VIIIa-P8s-IXa-P9s*-i";
  species TFPI in compartment = TFPI_0;
  species TFPI_Xa in compartment = 0; TFPI_Xa is "TFPI-Xa";
  species TFPI_Xa_VIIa_TF in compartment = 0; TFPI_Xa_VIIa_TF is "TFPI-Xa-VIIa-TF";
  species Xa_VIIa_TF in compartment = 0; Xa_VIIa_TF is "Xa-VIIa-TF";
  species IIa_i in compartment = 0; IIa_i is "IIa-i";
  species ATIII in compartment = ATIII_0;
  species ATIII_IXa in compartment = 0; ATIII_IXa is "ATIII-IXa";
  species IXa_i in compartment = 0; IXa_i is "IXa-i";
  species ATIII_Xa in compartment = 0; ATIII_Xa is "ATIII-Xa";
  species Xa_i in compartment = 0; Xa_i is "Xa-i";
  species ATIII_IIa in compartment = 0; ATIII_IIa is "ATIII-IIa";
  species VIIa_TF_ATIII in compartment = 0; VIIa_TF_ATIII is "VIIa-TF-ATIII";
  species PC in compartment = PC_0;
  species PC_IIa in compartment = 0; PC_IIa is "PC-IIa";
  species IIa_TM in compartment = 0; IIa_TM is "IIa-TM";
  species TM in compartment = TM_0;
  species IIa_TM_PC in compartment = 0; IIa_TM_PC is "IIa-TM-PC";

  // Parameters:
  k01f = 0.05;
  k01r = 0.005;
  k02f = 0.05;
  k02r = 0.005;
  k03f = 0.005;
  k03r = 1;
  k04c = 0.005;
  k05f = 0.000392;
  k05r = 1;
  k06c = 0.000392;
  k07f = 0.1;
  k07r = 5.5;
  k08c = 1.4;
  k09f = 0.1;
  k09r = 2.2;
  k10c = 0.47;
  k11f = 0.1;
  k11r = 1;
  k12c = 0.5;
  k13f = 0.1;
  k13r = 10;
  k14c = 0.5;
  k15f = 0.1;
  k15r = 7.2;
  k16c = 0.26;
  k17f = 0.1;
  k17r = 15;
  k18c = 0.9;
  k19f = 0.1;
  k19r = 1.5;
  k20c = 0.023;
  k21f = 0.1;
  k21r = 1;
  k22c = 0.043;
  k23f = 0.1;
  k23r = 2.1;
  k24c = 0.023;
  k25f = 7.5e-6;
  k25r = 1e-9;
  k26c = 7.5e-6;
  k27f = 0.01;
  k27r = 0.025;
  k28f = 0.01;
  k28r = 0.025;
  k29f = 0.01;
  k29r = 0.025;
  k30f = 0.1;
  k30r = 0.025;
  k31f = 0.1;
  k31r = 0.025;
  k32f = 5.7;
  k32r = 0.17;
  k33f = 5.7;
  k33r = 0.17;
  k34f = 0.05;
  k34r = 0.17;
  k35f = 0.05;
  k35r = 0.17;
  k36f = 0.01;
  k36r = 5.9;
  k37f = 0.01;
  k37r = 2.042;
  k38c = 0.9;
  k39c = 20;
  k40c = 0.2;
  k41f = 5e-7;
  k41r = 1;
  k42c = 5e-7;
  k43f = 5e-7;
  k43r = 1;
  k44c = 5e-7;
  k45f = 3e-7;
  k45r = 1;
  k46c = 3e-7;
  k47f = 0.03;
  k47r = 0.01;
  k48c = 0.009;
  k49f = 0.1;
  k49r = 1;
  k50c = 4.6;
  k51f = 0.0173;
  k51r = 1;
  k52c = 4.6;
  k53f = 0.1;
  k53r = 0.01;
  k54c = 20;
  k55f = 0.1;
  k55r = 0.01;
  k56c = 20;
  k57f = 0.1;
  k57r = 2.1;
  k58c = 0.023;
  k59f = 0.1;
  k59r = 15;
  k60c = 0.9;
  k61f = 0.1;
  k61r = 0.05;
  k62c = 30;
  k63f = 0.1;
  k63r = 0.4;
  k64f = 0.1;
  k64r = 0.4;
  k65f = 1;
  k65r = 1;
  k66f = 0.001;
  k66r = 1.5;
  k67c = 0.023;
  k68f = 0.12;
  k68r = 1;
  k69c = 0.5;
  k70f = 0.12;
  k70r = 1;
  k71c = 0.5;
  k72f = 0.12;
  k72r = 1;
  k73c = 0.5;
  k74f = 0.12;
  k74r = 1;
  k75c = 0.5;
  k76f = 0.12;
  k76r = 1;
  k77c = 0.5;
  k78f = 0.0016;
  k78r = 0.00033;
  k79f = 0.001;
  k79r = 0.0011;
  k80f = 0.32;
  k80r = 0.00011;
  k81c = 0.000135;
  k82f = 4.9e-7;
  k82r = 1e-9;
  k83c = 4.9e-7;
  k84f = 0.0002;
  k84r = 1e-9;
  k85c = 1.5e-6;
  k86f = 1.5e-5;
  k86r = 1e-9;
  k87c = 4.75e-6;
  k88f = 2.5e-7;
  k88r = 1e-9;
  k89f = 1.003e-6;
  k89r = 1e-9;
  k90c = 0.000167;
  k91f = 0.03;
  k91r = 0.045;
  k92f = 0.00014;
  k92r = 0.5;
  k93c = 40;
  // Case E: 5, 10, 50, 500, 5000 pM
  var TF_VIIa_0; TF_VIIa_0 is "TF-VIIa_0";
  var P9s_0_0;
  var P9s__0; P9s__0 is "P9s*_0";
  // 0 (A), 1 (B), 2 (C and D), 3 (E), Anything else (F)
  Case = 4;

  // Assignment rules:
  time_minutes := time/60;
  II_0 := piecewise(1700, Case == 0, piecewise(1700, Case == 1, piecewise(1400, Case == 2, piecewise(1400, Case == 3, 1400))));
  VII_0 := piecewise(0, Case == 0, piecewise(0, Case == 1, piecewise(0, Case == 2, piecewise(0, Case == 3, 10))));
  VIIa_0 := piecewise(0, Case == 0, piecewise(0, Case == 1, piecewise(0, Case == 2, piecewise(0, Case == 3, 0.5))));
  TF_0 := piecewise(0, Case == 0, piecewise(0, Case == 1, piecewise(0, Case == 2, piecewise(0, Case == 3, 0.001))));
  TF_VIIa_0 := piecewise(0.00125, Case == 0, piecewise(0.00125, Case == 1, piecewise(0.00125, Case == 2, piecewise(0.005, Case == 3, 0))));
  V_0 := piecewise(20, Case == 0, piecewise(20, Case == 1, piecewise(20, Case == 2, piecewise(20, Case == 3, 20))));
  VIII_0 := piecewise(0.7, Case == 0, piecewise(0.7, Case == 1, piecewise(0.7, Case == 2, piecewise(0.7, Case == 3, 0.3))));
  IX_0 := piecewise(90, Case == 0, piecewise(90, Case == 1, piecewise(90, Case == 2, piecewise(90, Case == 3, 70))));
  X_0 := piecewise(170, Case == 0, piecewise(170, Case == 1, piecewise(170, Case == 2, piecewise(170, Case == 3, 135))));
  TFPI_0 := piecewise(0, Case == 0, piecewise(0, Case == 1, piecewise(2.5, Case == 2, piecewise(0, Case == 3, 3))));
  ATIII_0 := piecewise(0, Case == 0, piecewise(0, Case == 1, piecewise(0, Case == 2, piecewise(0, Case == 3, 3000))));
  PC_0 := piecewise(0, Case == 0, piecewise(0, Case == 1, piecewise(65, Case == 2, piecewise(0, Case == 3, 0))));
  TM_0 := piecewise(0, Case == 0, piecewise(0, Case == 1, piecewise(0, Case == 2, piecewise(0, Case == 3, 0))));
  PL_0 := piecewise(0.00015, Case == 0, piecewise(0.00015, Case == 1, piecewise(0.00015, Case == 2, piecewise(0.00015, Case == 3, 0.00015))));
  Psub_0 := piecewise(0.0001, Case == 0, piecewise(0.0001, Case == 1, piecewise(0.0001, Case == 2, piecewise(0.0001, Case == 3, 0.0001))));
  P2s_0 := piecewise(50, Case == 0, piecewise(50, Case == 1, piecewise(50, Case == 2, piecewise(20, Case == 3, 0.5))));
  P5s_0 := piecewise(0, Case == 50, piecewise(50, Case == 1, piecewise(50, Case == 2, piecewise(50, Case == 3, 50))));
  P8s_0 := piecewise(5e-10, Case == 0, piecewise(5e-10, Case == 1, piecewise(5e-10, Case == 2, piecewise(5e-10, Case == 3, 5e-6))));
  P9s_0_0 := piecewise(50, Case == 0, piecewise(50, Case == 1, piecewise(50, Case == 2, piecewise(20, Case == 3, 5e-8))));
  P9s__0 := piecewise(50, Case == 0, piecewise(50, Case == 1, piecewise(50, Case == 2, piecewise(20, Case == 3, 5e-8))));
  P10s_0 := piecewise(50, Case == 0, piecewise(50, Case == 1, piecewise(50, Case == 2, piecewise(20, Case == 3, 150))));

  // Reactions:
  R01: VII + TF -> VII_TF; compartment*(k01f*VII*TF - k01r*VII_TF);
  R02: VIIa + TF -> VIIa_TF; compartment*(k02f*VIIa*TF - k02r*VIIa_TF);
  R03: Xa + VII_TF -> Xa_VII_TF; compartment*(k03f*Xa*VII_TF - k03r*Xa_VII_TF);
  R04: Xa_VII_TF => VIIa_TF + Xa; compartment*k04c*Xa_VII_TF;
  R05: IIa + VII_TF -> IIa_VII_TF; compartment*(k05f*IIa*VII_TF - k05r*IIa_VII_TF);
  R06: IIa_VII_TF => VIIa_TF + IIa; compartment*k06c*IIa_VII_TF;
  R07: X + VII_TF -> X_VIIa_TF; compartment*(k07f*X*VII_TF - k07r*X_VIIa_TF);
  R08: X_VII_TF => VIIa_TF + Xa; compartment*k08c*X_VII_TF;
  R09: IX + VIIa_TF -> IX_VIIa_TF; compartment*(k09f*IX*VIIa_TF - k09r*IX_VIIa_TF);
  R10: IX_VII_TF => VIIa_TF + IXa; compartment*k10c*IX_VII_TF;
  R11: VII + Xa -> VII_Xa; compartment*(k11f*VII*Xa - k11r*VII_Xa);
  R12: VII_Xa => VIIa + Xa; compartment*k12c*VII_Xa;
  R13: VII + IIa -> VII_IIa; compartment*(k13f*VII*IIa - k13r*VII_IIa);
  R14: VII_IIa => VIIa + IIa; compartment*k14c*VII_IIa;
  R15: V + IIa -> V_IIa; compartment*(k15f*V*IIa - k15r*V_IIa);
  R16: V_IIa => V + IIa; compartment*k16c*V_IIa;
  R17: VIII + IIa -> VIII_IIa; compartment*(k17f*VIII*IIa - k17r*VIII_IIa);
  R18: VIII_IIa => VIIIa + IIa; compartment*k18c*VIII_IIa;
  R19: Xa + IX -> Xa_IX; compartment*(k19f*Xa*IX - k19r*Xa_IX);
  R20: Xa_IX => Xa + IXa; compartment*k20c*Xa_IX;
  R21: Xa + V -> Xa_V; compartment*(k21f*Xa*V - k21r*Xa_V);
  R22: Xa_V => Xa + Va; compartment*k22c*Xa_V;
  R23: Xa + VIII -> Xa_VIII; compartment*(k23f*Xa*VIII - k23r*Xa_VIII);
  R24: Xa_VIII => Xa + VIIIa; compartment*k24c*Xa_VIII;
  R25: Xa + II -> Xa_II; compartment*(k25f*Xa*II - k25r*Xa_II);
  R26: Xa_II => IIa + Xa; compartment*k26c*Xa_II;
  R27: IX + P9s -> IX_P9s; compartment*(k27f*IX*P9s - k27r*IX_P9s);
  R28: IXa + P9s -> IXa_P9s; compartment*(k28f*IXa*P9s - k28r*IXa_P9s);
  R29: IXa + P9s_0 -> IXa_P9s_0; compartment*(k29f*IXa*P9s_0 - k29r*IXa_P9s_0);
  R30: X + P10s -> X_P10s; compartment*(k30f*X*P10s - k30r*X_P10s);
  R31: Xa + P10s -> Xa_P10s; compartment*(k31f*Xa*P10s - k31r*Xa_P10s);
  R32: V + P5s -> V_P5s; compartment*(k32f*V*P5s - k32r*V_P5s);
  R33: Va + P5s -> Va_P5s; compartment*(k33f*Va*P5s - k33r*Va_P5s);
  R34: VIII + P8s -> VIII_P8s; compartment*(k34f*VIII*P8s - k34r*VIII_P8s);
  R35: VIIIa + P8s -> VIIIa_P8s; compartment*(k35f*VIIIa*P8s - k35r*VIIIa_P8s);
  R36: II + P2s -> II_P2s; compartment*(k36f*II*P2s - k36r*II_P2s);
  R37: IIa + P2s -> IIa_P2s; compartment*(k37f*IIa*P2s - k37r*IIa_P2s);
  R38: PL + Psub => AP_Psub; compartment*k38c*PL*Psub;
  R39: PL + Psub => PL_Psub; compartment*k39c*PL*Psub;
  R40: AP + Psub => AP_Psub; compartment*k40c*AP*Psub;
  R41: PL + AP -> PL_AP; compartment*(k41f*PL*AP - k41r*PL_AP);
  R42: PL_AP => 2 AP; compartment*k42c*PL_AP;
  R43: PL + AP_Psub -> PL_AP_Psub; compartment*(k43f*PL*AP_Psub - k43r*PL_AP_Psub);
  R44: PL_AP_Psub => AP + AP_Psub; compartment*k44c*PL_AP_Psub;
  R45: PL + IIa -> PL_IIa; compartment*(k45f*PL*IIa - k45r*PL_IIa);
  R46: PL_IIa => AP + IIa; compartment*k46c*PL_IIa;
  R47: PL_Psub + IIa -> PL_Psub_IIa; compartment*(k47f*PL_Psub*IIa - k47r*PL_Psub_IIa);
  R48: PL_Psub_IIa => AP_Psub + IIa; compartment*k48c*PL_Psub_IIa;
  R49: V_P5s + Xa_P10s -> V_P5s_Xa_P10s; compartment*(k49f*V_P5s*Xa_P10s - k49r*V_P5s_Xa_P10s);
  R50: V_P5s_Xa_P10s => Va_P5s + Xa_P10s; compartment*k50c*V_P5s_Xa_P10s;
  R51: V_P5s + IIa_P2s -> V_P5s_IIa_P2s; compartment*(k51f*V_P5s*IIa_P2s - k51r*V_P5s_IIa_P2s);
  R52: V_P5s_IIa_P10s => Va_P5s + IIa_P10s; compartment*k52c*V_P5s_IIa_P10s;
  R53: X_P10s + VIIIa_P8s_IXa_P9s -> X_P10s_VIIIa_P8s_IXa_P9s; compartment*(k53f*X_P10s*VIIIa_P8s_IXa_P9s - k53r*X_P10s_VIIIa_P8s_IXa_P9s);
  R54: X_P10s_VIIIa_P8s_IXa_P9s => Xa_P10s + VIIIa_P8s_IXa_P9s; compartment*k54c*X_P10s_VIIIa_P8s_IXa_P9s;
  R55: X_P10s + VIIIa_P8s_IXa_P9s_0 -> X_P10s_VIIIa_P8s_IXa_P9s_0; compartment*(k55f*X_P10s*VIIIa_P8s_IXa_P9s_0 - k55r*X_P10s_VIIIa_P8s_IXa_P9s_0);
  R56: X_P10s_VIIIa_P8s_IXa_P9s => Xa_P10s + VIIIa_P8s_IXa_P9s; compartment*k56c*X_P10s_VIIIa_P8s_IXa_P9s;
  R57: VIII_P8s + Xa_P10s -> VIII_P8s_Xa_P10s; compartment*(k57f*VIII_P8s*Xa_P10s - k57r*VIII_P8s_Xa_P10s);
  R58: VIII_P8s_Xa_P10s => VIIIa_P8s + Xa_P10s; compartment*k58c*VIII_P8s_Xa_P10s;
  R59: VIII_P8s + IIa_P2s -> VIII_P8s_IIa_P2s; compartment*(k59f*VIII_P8s*IIa_P2s - k59r*VIII_P8s_IIa_P2s);
  R60: VIII_P8s_IIa_P10s => VIIIa_P8s + IIa_P10s; compartment*k60c*VIII_P8s_IIa_P10s;
  R61: II_P2s + Va_P5s_Xa_P10s -> II_P2s_Va_P5s_Xa_P10s; compartment*(k61f*II_P2s*Va_P5s_Xa_P10s - k61f*II_P2s_Va_P5s_Xa_P10s);
  R62: II_P2s_Va_P5s_Xa_P10s => IIa_P2s + Va_P5s_Xa_P10s; compartment*k62c*II_P2s_Va_P5s_Xa_P10s;
  R63: VIIIa_P8s + IXa_P9s -> VIIIa_P8s_IXa_P9s; compartment*(k63f*VIIIa_P8s*IXa_P9s - k63r*VIIIa_P8s_IXa_P9s);
  R64: VIIIa_P8s + IXa_P9s_0 -> VIIIa_P8s_IXa_P9s_0; compartment*(k64f*VIIIa_P8s*IXa_P9s_0 - k64r*VIIIa_P8s_IXa_P9s_0);
  R65: Va_P5s + Xa_P10s -> Va_P5s_Xa_P10s; compartment*(k65f*Va_P5s*Xa_P10s - k65r*Va_P5s_Xa_P10s);
  R66: Xa_P10s + IX_P9s -> Xa_P10s_IX_P9s; compartment*(k66f*Xa_P10s*IX_P9s - k66r*Xa_P10s_IX_P9s);
  R67: Xa_P10s_IX_P9s => Xa_P10s + IX_P9s; compartment*k67c*Xa_P10s_IX_P9s;
  R68: APC + VIIIa_P8s -> APC_VIIIa_P8s; compartment*(k68f*APC*VIIIa_P8s - k68r*APC_VIIIa_P8s);
  R69: APC_VIIIa_P8s => APC + VIIIa_P8s_i; compartment*k69c*APC_VIIIa_P8s;
  R70: APC + Va_P8s -> APC_Va_P8s; compartment*(k70f*APC*Va_P8s - k70r*APC_Va_P8s);
  R71: APC_Va_P8s => APC + Va_P8s_i; compartment*k71c*APC_Va_P8s;
  R72: APC + Va_P5s_Xa_P10s -> APC_Va_P5s_Xa_P10s; compartment*(k72f*APC*Va_P5s_Xa_P10s - k72r*APC_Va_P5s_Xa_P10s);
  R73: APC_Va_P5s_Xa_P10s => APC + Va_P5s_Xa_P10s_i; compartment*k73c*APC_Va_P5s_Xa_P10s;
  R74: APC + VIIIa_P8s_IXa_P9s -> APC_VIIIa_P8s_IXa_P9s; compartment*(k74f*APC*VIIIa_P8s_IXa_P9s - k74r*APC_VIIIa_P8s_IXa_P9s);
  R75: APC_VIIIa_P8s_IXa_P9s => APC + VIIIa_P8s_IXa_P9s_i; compartment*k75c*APC_VIIIa_P8s_IXa_P9s;
  R76: APC + VIIIa_P8s_IXa_P9s_0 -> APC_VIIIa_P8s_IXa_P9s_0; compartment*(k76f*APC*VIIIa_P8s_IXa_P9s_0 - k76r*APC_VIIIa_P8s_IXa_P9s_0);
  R77: APC_VIIIa_P8s_IXa_P9s_0 => APC + VIIIa_P8s_IXa_P9s__i; compartment*k77c*APC_VIIIa_P8s_IXa_P9s_0;
  R78: TFPI + Xa -> TFPI_Xa; compartment*(k78f*TFPI*Xa - k78r*TFPI_Xa);
  R79: TFPI_Xa + VIIa_TF -> TFPI_Xa_VIIa_TF; compartment*(k79f*TFPI_Xa*VIIa_TF - k79r*TFPI_Xa_VIIa_TF);
  R80: TFPI + Xa_VIIa_TF -> TFPI_Xa_VIIa_TF; compartment*(k80f*TFPI*Xa_VIIa_TF - k80r*TFPI_Xa_VIIa_TF);
  R81: IIa => IIa_i; compartment*k81c*IIa;
  R82: ATIII + IXa -> ATIII_IXa; compartment*(k82f*ATIII*IXa - k82r*ATIII_IXa);
  R83: ATIII_IXa => ATIII + IXa_i; compartment*k83c*ATIII_IXa;
  R84: ATIII + Xa -> ATIII_Xa; compartment*(k84f*ATIII*Xa - k84r*ATIII_Xa);
  R85: ATIII_Xa => ATIII + Xa_i; compartment*k85c*ATIII_Xa;
  R86: ATIII + IIa -> ATIII_IIa; compartment*(k86f*ATIII*IIa - k86r*ATIII_IIa);
  R87: ATIII_IIa => ATIII + IIa_i; compartment*k87c*ATIII_IIa;
  R88: ATIII + VIIa_TF -> VIIa_TF_ATIII; compartment*(k88f*ATIII*VIIa_TF - k88r*VIIa_TF_ATIII);
  R89: PC + IIa -> PC_IIa; compartment*(k89f*PC*IIa - k89r*PC_IIa);
  R90: PC_IIa => APC + IIa; compartment*k90c*PC_IIa;
  R91: IIa + TM -> IIa_TM; compartment*(k91f*IIa*TM - k91r*IIa_TM);
  R92: IIa_TM + PC -> IIa_TM_PC; compartment*(k92f*IIa_TM*PC - k92r*IIa_TM_PC);
  R93: IIa_TM_PC => IIa_TM + APC; compartment*k93c*IIa_TM_PC;

  // Unit definitions:
  unit volume = 1e-3 litre;
  unit substance = 1e-9 mole;
end
