// SBML level 3 version 1
// dcterms:bibliographicCitation: Tosha T, Hasan MR, Theil EC. The ferritin Fe2 site at the diiron catalytic center controls the reaction with O2 in the rapid mineralization pathway. Proc Natl Acad Sci U S A. 2008;105(47):18182-18187 urn:miriam:doi:10.1073/pnas.0805083105

function Constant_flux_irreversible(v)
  v;
end
Constant_flux_irreversible is "Constant flux (irreversible)";

function Hill_modified_for_Fe_oxidation__1(kcat, H, FT, S, n, Km, rO)
  kcat*((H + rO)/(24 + rO))*FT*S^n/(Km^n + S^n);
end
Hill_modified_for_Fe_oxidation__1 is "Hill modified for Fe oxidation [1]";

function Rate_Law_for_nucleation_w__inhibition(k1, S, M, L, rN, ki, n, I)
  k1*S^2*M*((L + rN)/(24 + rN))*(ki^n/(ki^n + I^n));
end
Rate_Law_for_nucleation_w__inhibition is "Rate Law for nucleation w/ inhibition";

function Rate_Law_for_core_formation_no_L(k1, S, M, k2, k3, n, m, x)
  k1*S*M/(k2 + S)*(k3^n/(k3^n + M^n))*((4300^m - x^m)/4300^m);
end

model Cellular_ferritin_iron_storage()
  // Masison2022 - Cellular ferritin iron storage
  // This is a small model of ferritin iron sequestration kinetics. The model’s parameter values were determined from published kinetic and binding experiments and the model was validated against independent data not used in its construction. Beyond its utility to investigate properties of ferritin iron sequestration itself, we propose this model to be used as a building block for larger models of iron metabolism in a variety of specific cell types.
  // GO:0006880
  // hasProperty mamo:MAMO_0000045
  // model units - substance: substance, time: time, volume: volume, area: area, length: length, extent: substance

  // Compartments:
  compartment cell = 1.4e-12 volume;  // CL:0000003

  // Species:
  // LIP stands for "labile iron pool"
  species LIP in cell = 1e-5;  // CHEBI:29033
  species FT_cage in cell = 5e-9; FT_cage is "FT-cage";  // GO:0008043; CHEBI:82594
  species core in cell = atoms_per_cage_initial*FT_cage;  // hasPart CHEBI:192761; hasPart wikipedia.en:Ferrihydrite
  species DFP in cell = 0;  // isDescribedBy doi:10.1073/pnas.0805083105

  // Parameters:
  // Transient number of Fe atoms that are stored inside the core of a ferritin cage
  var atoms_per_cage_transient; atoms_per_cage_transient is "atoms-per-cage_transient";
  // Number of heavy ferritin subunits in a 24-mer cage.
  // (needs to be a number between 0 and 24)
  H = 4;
  // Number of Fe atoms that are stored inside the core of a ferritin cage at the initial time
  atoms_per_cage_initial = 1500; atoms_per_cage_initial is "atoms-per-cage_initial";
  rN = 50;
  rO = 2;
  k_FTlysis = 1.203e-5;
  var degradation_rate_ratio;
  quantity_to_number_factor = 6.022141e23;

  // Assignment rules:
  L := 24 - H;
  degradation_rate_ratio := FT_degradation_core_release/FT_degradation;
  atoms_per_cage_transient := core*quantity_to_number_factor*cell/(FT_cage*quantity_to_number_factor*cell);
  k_core_degradation := k_FTlysis*atoms_per_cage_transient;

  // Reactions:
  Fe_oxidation: 2 LIP => DFP; cell*Hill_modified_for_Fe_oxidation__1(kcat, H, FT_cage, LIP, Fe_oxidation_n, Km, rO);  // modifiers: FT_cage; isDescribedBy doi:10.1073/pnas.0805083105
    kcat = 591; Fe_oxidation_n = 1.3; Km = 0.00035;
  core_formation: DFP => 2 core; cell*Rate_Law_for_core_formation_no_L(core_formation_k1, DFP, core, k2, k3, core_formation_n, m, atoms_per_cage_transient);  // isDescribedBy doi:10.1073/pnas.0805083105
    core_formation_k1 = 0.101564; k2 = 5e-6; k3 = 0.0046458; core_formation_n = 4; m = 8;
  Fe_reduction: DFP => 2 LIP; cell*Fe_reduction_k1*DFP;
    Fe_reduction_k1 = 0.2605;
  nucleation: 2 DFP => 4 core; cell*Rate_Law_for_nucleation_w__inhibition(nucleation_k1, DFP, FT_cage, L, rN, ki, nucleation_n, core);  // modifiers: FT_cage
    nucleation_k1 = 50000000; ki = 0.000461598; nucleation_n = 4;
  FT_degradation: FT_cage => ; cell*k_FTlysis*FT_cage;
  FT_degradation_core_release: core => LIP; cell*k_FTlysis*core;  // modifiers: FT_cage
  FT_expression: => FT_cage; cell*Constant_flux_irreversible(v);
    v = 6.015e-14;

  // Unit definitions:
  unit length = 0.01 metre;
  unit area = (0.01 metre)^2;
  unit volume = litre;
  unit time = second;
  unit substance = mole;
end
