// SBML level 2 version 5
// dcterms:bibliographicCitation: Tosha T, Hasan MR, Theil EC. The ferritin Fe2 site at the diiron catalytic center controls the reaction with O2 in the rapid mineralization pathway. Proc Natl Acad Sci U S A. 2008;105(47):18182-18187 urn:miriam:doi:10.1073/pnas.0805083105

function Rate_Law_for_nucleation_w__inhibition(k1, S, M, L, rN, ki, n, I)
  k1*S^2*M*((L + rN)/(24 + rN))*(ki^n/(ki^n + I^n));
end
Rate_Law_for_nucleation_w__inhibition is "Rate Law for nucleation w/ inhibition";

function Rate_Law_for_reaction(K, S, M)
  K*(S/M)*M;
end

function Hill_Function_w__enzyme(kcat, E, S, K, n)
  kcat*E*((S/K)^n/(1 + (S/K)^n));
end
Hill_Function_w__enzyme is "Hill Function w/ enzyme";

function Rate_Law_for_DMT1_endocytosis_free(k, S)
  k*S;
end

function Hill__(a, I, n, K)
  a*(1 - I^n/(K^n + I^n));
end
Hill__ is "Hill -|";

function function_4_one(kcat, H, rO, FT, S, n, Km)
  kcat*((H + rO)/(24 + rO))*FT*S^n/(Km^n + S^n);
end
function_4_one is "function_4-one";

function Rate_Law_for_1FPN_down(k1, S, M, n, k3)
  k1*S*(M^n/(k3^n + M^n));
end
Rate_Law_for_1FPN_down is "Rate Law for 1FPN-down";

function Rate_Law_for_FT_core_formation(k1, S, M, k2, k3, n, m, x)
  k1*S*M/(k2 + S)*(k3^n/(k3^n + M^n))*((4300^m - x^m)/4300^m);
end

function DMT1_endocytosis_rate(kcat, S, M, K, n)
  kcat*S*((M/K)^n/(1 + (M/K)^n));
end

function function_2(ka, s, m1)
  ka*s*m1;
end

model EnterocyteIronMucosalBlock()
  // Masison2024 - Enterocyte Iron Mucosal Block
  // Enterocyte Iron Mucosal Block
  // This is a model of enterocyte iron absorption, consisting of iron uptake (movement of iron from intestinal lumen into cytplasm), and transfer (transport of iron from cytoplasm to blood/plasma). The model was created by Joseph Masison and Pedro Mendes.
  // Intestinal mucosal block is a cellular phenomenon defined by a transient reduction in iron absorption by intestinal epithelial cells following previous iron exposures. Understanding what controls the mucosal block is central to understanding how intestinal iron absorption contributes to pathological iron states. Three mechanisms implicated in driving mucosal block are the endocytosis of divalent metal transporter 1 (DMT1), sequestration of iron by cytosolic ferritin, and iron regulatory proteins (IRPs) regulation of ferritin expression.
  // Here, we build a model that reproduces the mucosal block phenomena, based on published experimental data, and use it to quantify the contribution of each mechanism to the block. Model analysis shows ferritin and IRPs regulation have the largest quantitative impact on the mucosal block. Lastly, DMT1 endocytosis is shown to play a role in limiting total enterocyte iron uptake, protecting the cell against oxidative stress, but does not contribute to the decrease in total iron transfer seen in mucosal block.
  // CC0 1.0 Universal: To the extent possible under law, all copyright and related or neighbouring rights to this encoded model have been dedicated to the public domain worldwide. You can copy, modify, distribute and perform the work, even for commercial purposes, all without asking permission. Please refer to CC0 Public Domain Dedication for more information.
  // biomodels.db:MODEL2405170001
  // GO:0160179
  // hasProperty CL:1000337 mamo:MAMO_0000046

  // Compartments:
  compartment cell = 1.4e-12;  // isInstanceOf GO:0005737 CL:1000337; hasPart GO:0005737
  compartment apical_mem = 1.5e-5;  // 2-D; isInstanceOf GO:0016324
  compartment lumen = 6.67e-10;
  compartment blood = 8.57e-10;
  compartment BLM = 1.5e-7;  // 2-D; isInstanceOf GO:0016323

  // Species:
  species FT_cage in cell = 2.37519e-9; FT_cage is "FT-cage";  // isInstanceOf GO:0070288
  species core in cell = 3.682217e-6;  // hasPart CHEBI:192761; hasPart wikipedia.en:Ferrihydrite
  species DFP in cell = 1.344769e-10;  // isDescribedBy doi:10.1073/pnas.0805083105
  species LIP in cell = 1.223885e-7;  // SBO:0000327; CHEBI:18248; kegg.compound:C00023
  species DMT1 in apical_mem = 3.12308e-12;  // isInstanceOf uniprot:P49281
  species DMT1_vesicular in apical_mem = 1.876958e-12;  // isInstanceOf uniprot:P49281
  species Fe_blood in blood = 4.958456e-9;  // hasPart CHEBI:18248; hasPart kegg.compound:C00023
  species IRPs_active in cell = 6.889336e-11;  // isInstanceOf GO:0030350 uniprot:P21399; isInstanceOf uniprot:P48200; hasProperty GO:0030350
  species FPN_internalized in BLM = 2.025035e-16;  // isInstanceOf uniprot:Q9NP59
  species IRPs_inactive in cell = 7.264345e-12;  // isInstanceOf uniprot:P21399
  species Fe_lumen in lumen = 1.25e-8;  // SBO:0000327; kegg.compound:C00023; CHEBI:18248
  species body_fe in blood = 0;  // hasPart CHEBI:18248; hasPart kegg.compound:C00023
  species FPN_active in BLM = 9.97975e-14;  // isInstanceOf uniprot:Q9NP59

  // Parameters:
  var atoms_per_cage_transient; atoms_per_cage_transient is "atoms-per-cage_transient";
  H = 24;
  dose_fe = 1.25e-8; dose_fe is "dose-fe";
  time_delay = 260000;
  _30min_transfer = 0;
  transfer_at_time_test_dose = 0;
  iron_t0_transfer = 0; iron_t0_transfer is "iron_t0-transfer";
  uptake_at_time_test_dose = 0;
  _30min_uptake = 0;
  iron_t0_uptake = 0; iron_t0_uptake is "iron_t0-uptake";
  FT_kdeg = 5.4615e-6; FT_kdeg is "FT-kdeg";
  FT_a = 7.68e-14; FT_a is "FT-a";
  dose_0 = 1.25e-8; dose_0 is "dose-0";
  sim_start = 0;
  quantity_to_number_factor = 6.022141e23;
  Initial_for_sim_start = sim_start;

  // Assignment rules:
  atoms_per_cage_transient := core*quantity_to_number_factor*cell/(FT_cage*quantity_to_number_factor*cell);
  L := 24 - H;
  uptake := core*quantity_to_number_factor*cell + 2*DFP*quantity_to_number_factor*cell + LIP*quantity_to_number_factor*cell + Fe_blood*quantity_to_number_factor*blood + body_fe*quantity_to_number_factor*blood;
  transfer := Fe_blood*quantity_to_number_factor*blood + body_fe*quantity_to_number_factor*blood;
  vuptake := _30min_uptake;
  vtransfer := _30min_transfer;
  transfer_dif := _30min_transfer + transfer_at_time_test_dose;
  uptake_dif := _30min_uptake + uptake_at_time_test_dose;

  // Reactions:
  FT_core_formation: DFP => 2 core; cell*Rate_Law_for_FT_core_formation(FT_core_formation_k1, DFP, core, FT_core_formation_k2, FT_core_formation_k3, FT_core_formation_n, m, atoms_per_cage_transient);  // isDescribedBy doi:10.1073/pnas.0805083105
    FT_core_formation_k1 = 0.101564; FT_core_formation_k2 = 5e-6; FT_core_formation_k3 = 0.0046458; FT_core_formation_n = 4; m = 8;
  FT_Fe_reduction: DFP => 2 LIP; cell*FT_Fe_reduction_k1*DFP;
    FT_Fe_reduction_k1 = 0.2605;
  FT_nucleation: 2 DFP => 4 core; cell*Rate_Law_for_nucleation_w__inhibition(FT_nucleation_k1, DFP, FT_cage, L, rN, ki, FT_nucleation_n, core);  // modifiers: FT_cage
    FT_nucleation_k1 = 50000000; rN = 50; ki = 0.000461598; FT_nucleation_n = 4;
  FT_degradation: FT_cage => ; cell*FT_kdeg*FT_cage;
  FT_degradation_core_release: core => LIP; cell*Rate_Law_for_reaction(FT_kdeg, core, FT_cage);  // modifiers: FT_cage
  FT_expression: => FT_cage; cell*Hill__(FT_a, IRPs_active, FT_expression_n, FT_expression_K);  // modifiers: IRPs_active; isInstanceOf GO:0006412
    FT_expression_n = 1; FT_expression_K = 1.4e-11;
  DMT1_endocytosis_free: DMT1 => DMT1_vesicular; apical_mem*Rate_Law_for_DMT1_endocytosis_free(k, DMT1);  // isInstanceOf GO:0006897
    k = 29.4233;
  DMT1_i_fusion: DMT1_vesicular => DMT1; apical_mem*DMT1_i_fusion_k1*DMT1_vesicular;
    DMT1_i_fusion_k1 = 48.9989;
  DMT1_endocytosis_modified: DMT1 => DMT1_vesicular; DMT1_endocytosis_rate(DMT1_endocytosis_modified_kcat, DMT1, LIP, DMT1_endocytosis_modified_K, DMT1_endocytosis_modified_n);  // modifiers: LIP; isInstanceOf GO:0006897
    DMT1_endocytosis_modified_kcat = 14.5161; DMT1_endocytosis_modified_K = 2.80591; DMT1_endocytosis_modified_n = 1.03128;
  FPN_iron_transport: LIP => Fe_blood; BLM*Hill_Function_w__enzyme(FPN_iron_transport_kcat, FPN_active, LIP, FPN_iron_transport_K, FPN_iron_transport_n);  // modifiers: FPN_active; isInstanceOf GO:1903988
    FPN_iron_transport_kcat = 1.88317; FPN_iron_transport_K = 2.31608e-6; FPN_iron_transport_n = 1;
  IRPs_activation: IRPs_inactive => IRPs_active; cell*IRPs_activation_k1*IRPs_inactive;
    IRPs_activation_k1 = 4.63671e-6;
  IRPs_degradation: IRPs_active => IRPs_inactive; cell*function_2(ka, IRPs_active, LIP);  // modifiers: LIP
    ka = 3.99474;
  FT_Fe_oxidation: 2 LIP => DFP; cell*function_4_one(FT_Fe_oxidation_kcat, H, rO, FT_cage, LIP, FT_Fe_oxidation_n, Km);  // modifiers: FT_cage; isDescribedBy doi:10.1073/pnas.0805083105
    FT_Fe_oxidation_kcat = 591; rO = 2; FT_Fe_oxidation_n = 1.3; Km = 0.00035;
  DMT1_iron_transport: Fe_lumen => LIP; apical_mem*Hill_Function_w__enzyme(DMT1_iron_transport_kcat, DMT1, Fe_lumen, DMT1_iron_transport_K, DMT1_iron_transport_n);  // modifiers: DMT1; isInstanceOf GO:0033212 rhea:29579; hasProperty GO:0033212
    DMT1_iron_transport_kcat = 6844.7; DMT1_iron_transport_K = 2.835; DMT1_iron_transport_n = 1;
  Fe_basal_uptake: Fe_blood => LIP; Fe_basal_uptake_k1*Fe_blood;  // isInstanceOf GO:0033212
    Fe_basal_uptake_k1 = 2.22055e-16;
  paracellular_fe_transport: Fe_lumen -> Fe_blood; paracellular_fe_transport_k1*Fe_lumen - paracellular_fe_transport_k2*Fe_blood;
    paracellular_fe_transport_k1 = 3.87951e-22; paracellular_fe_transport_k2 = 3.1746e-15;
  body_sequestration: Fe_blood => body_fe; blood*body_sequestration_k1*Fe_blood;
    body_sequestration_k1 = 0.000329;
  FPN_inactivation: FPN_active => FPN_internalized; Rate_Law_for_1FPN_down(FPN_inactivation_k1, FPN_active, Fe_blood, FPN_inactivation_n, FPN_inactivation_k3); FPN_inactivation is "FPN-inactivation";  // modifiers: Fe_blood
    FPN_inactivation_k1 = 1.44264e-6; FPN_inactivation_n = 2.71609; FPN_inactivation_k3 = 1.22073e-5;
  FPN_activation: FPN_internalized => FPN_active; FPN_activation_k1*FPN_internalized; FPN_activation is "FPN-activation";
    FPN_activation_k1 = 4.37363e-13;

  // Events:
  dose_first: at (time > Initial_for_sim_start): Fe_lumen = dose_0, iron_t0_transfer = Fe_blood*quantity_to_number_factor*blood + body_fe*quantity_to_number_factor*blood, iron_t0_uptake = core*quantity_to_number_factor*cell + 2*DFP*quantity_to_number_factor*cell + LIP*quantity_to_number_factor*cell + Fe_blood*quantity_to_number_factor*blood + body_fe*quantity_to_number_factor*blood; dose_first is "dose-first";
  dose_test: at (time > Initial_for_sim_start + time_delay): transfer_at_time_test_dose = transfer, uptake_at_time_test_dose = uptake, Fe_lumen = dose_fe; dose_test is "dose-test";
  measure_uptake_transfer: at (time > Initial_for_sim_start + time_delay + 1800): _30min_transfer = transfer - transfer_at_time_test_dose, _30min_uptake = uptake - uptake_at_time_test_dose; measure_uptake_transfer is "measure-uptake-transfer";

  // Unit definitions:
  unit length = 0.01 metre;
  unit area = (0.01 metre)^2;
  unit volume = litre;
  unit time = second;
  unit substance = mole;
end
