// SBML level 2 version 4
// dcterms:bibliographicCitation: urn:miriam:pubmed:23868891

model Mitrophanov2013___Simulation_of_Hockin_Blood_Coagulation_Model_under_reduced_tempterature()
  // Mitrophanov2013 - Simulation of Hockin Blood Coagulation Model under reduced temperature
  // Blood coagulation model using an updated Hockin2002 model. New reactions for factor X and V activation by IXa and mIIa respectively (reactions R28 and R29, parameters k43 and k44). Changes to parameters k32 and k38 (appendix not found for cited reference [Danforth 2009] so parameters from Mitrophanov2011 were used). Model introduces formula for adjusting kinetic rates for reduced temperatures.
  // hasTaxon taxonomy:9606
  // hasPart biomodels.db:BIOMD0000000335
  // isVersionOf GO:0007596
  // occursIn BTO:0000131
  // hasTaxon taxonomy:9606
  // isDescribedBy pubmed:23868891

  // Compartments:
  compartment compartment_1 = 1;

  // Species:
  species TF in compartment_1 = 2.5e-11;  // uniprot:P13726
  species TF_VII in compartment_1 = 0;  // hasPart uniprot:P13726; hasPart uniprot:P08709
  species VII in compartment_1 = 1e-8;  // uniprot:P08709
  species TF_VIIa in compartment_1 = 0;  // hasPart uniprot:P13726; hasPart uniprot:P08709
  species VIIa in compartment_1 = 1e-10;  // isVersionOf uniprot:P08709
  species Xa in compartment_1 = 0;  // isVersionOf uniprot:P00742
  species IIa in compartment_1 = 0;  // isVersionOf uniprot:P00734
  species TF_VIIa_X in compartment_1 = 0;  // hasPart uniprot:P08709; hasPart uniprot:P13726; hasPart uniprot:P00742
  species X in compartment_1 = 1.6e-7;  // uniprot:P00742
  species TF_VIIa_Xa in compartment_1 = 0;  // hasPart uniprot:P13726; hasPart uniprot:P08709; hasPart uniprot:P00742
  species IX in compartment_1 = 9e-8;  // uniprot:P00740
  species TF_VIIa_IX in compartment_1 = 0;  // hasPart uniprot:P13726; hasPart uniprot:P08709; hasPart uniprot:P00740
  species IXa in compartment_1 = 0;  // isVersionOf uniprot:P00740
  species II in compartment_1 = 1.4e-6;  // uniprot:P00734
  species VIII in compartment_1 = 7e-10;  // uniprot:P00451
  species VIIIa in compartment_1 = 0;  // isVersionOf uniprot:P00451
  species IXa_VIIIa in compartment_1 = 0;  // hasPart uniprot:P00451; hasPart uniprot:P00740
  species IXa_VIIIa_X in compartment_1 = 0;  // hasPart uniprot:P00742; hasPart uniprot:P00451; hasPart uniprot:P00740
  species VIIIa1_L in compartment_1 = 0;  // isPartOf uniprot:P00451
  species VIIIa2 in compartment_1 = 0;  // isPartOf uniprot:P00451
  species V in compartment_1 = 2e-8;  // uniprot:P12259
  species Va in compartment_1 = 0;  // isVersionOf uniprot:P12259
  species Xa_Va in compartment_1 = 0;  // hasPart uniprot:P00742; hasPart uniprot:P12259
  species Xa_Va_II in compartment_1 = 0;  // hasPart uniprot:P12259; hasPart uniprot:P00742; hasPart uniprot:P00734
  species mIIa in compartment_1 = 0;  // isVersionOf uniprot:P00734
  species TFPI in compartment_1 = 2.5e-9;  // uniprot:P10646
  species Xa_TFPI in compartment_1 = 0;  // hasPart uniprot:P10646; hasPart uniprot:P00742
  species TF_VIIa_Xa_TFPI in compartment_1 = 0;  // hasPart uniprot:P08709; hasPart uniprot:P00742; hasPart uniprot:P10646; hasPart uniprot:P13726
  species ATIII in compartment_1 = 3.4e-6;  // uniprot:P01008
  species Xa_ATIII in compartment_1 = 0;  // hasPart uniprot:P01008; hasPart uniprot:P00742
  species mIIa_ATIII in compartment_1 = 0;  // hasPart uniprot:P01008; hasPart uniprot:P00734
  species IXa_ATIII in compartment_1 = 0;  // hasPart uniprot:P01008; hasPart uniprot:P00740
  species IIa_ATIII in compartment_1 = 0;  // hasPart uniprot:P00734; hasPart uniprot:P01008
  species TF_VIIa_ATIII in compartment_1 = 0;  // hasPart uniprot:P01008; hasPart uniprot:P13726; hasPart uniprot:P08709

  // Parameters:
  k1 = 0.0031; k1 is "k01";
  k2 = 3200000; k2 is "k02";
  k3 = 0.0031; k3 is "k03";
  k4 = 23000000; k4 is "k04";
  k5 = 440000; k5 is "k05";
  k6 = 13000000; k6 is "k06";
  k7 = 23000; k7 is "k07";
  k8 = 1.05; k8 is "k08";
  k9 = 25000000; k9 is "k09";
  k10 = 6;
  k11 = 19;
  k12 = 22000000;
  k13 = 2.4;
  k14 = 10000000;
  k15 = 1.8;
  k16 = 7500;
  k17 = 20000000;
  k18 = 0.005;
  k19 = 10000000;
  k20 = 0.001;
  k21 = 100000000;
  k22 = 8.2;
  k23 = 22000;
  k24 = 0.006;
  k25 = 0.001;
  k26 = 20000000;
  k27 = 0.2;
  k28 = 400000000;
  k29 = 103;
  k30 = 100000000;
  k31 = 63.5;
  k32 = 230000000;
  k33 = 0.00036;
  k34 = 900000;
  k35 = 0.00011;
  k36 = 320000000;
  k37 = 50000000;
  k38 = 1500;
  k39 = 7100;
  k40 = 490;
  k41 = 7100;
  k42 = 230;
  var IIa_plus_1_2mIIa; IIa_plus_1_2mIIa is "IIa+1.2mIIa";
  k43 = 5700;
  k44 = 3000000;
  var k01; k01 is "k01*";
  var k02; k02 is "k02*";
  var k03; k03 is "k03*";
  var k04; k04 is "k04*";
  var k05; k05 is "k05*";
  var k06; k06 is "k06*";
  var k07; k07 is "k07*";
  var k08; k08 is "k08*";
  var k09; k09 is "k09*";
  var k10_0; k10_0 is "k10*";
  var k11_0; k11_0 is "k11*";
  var k12_0; k12_0 is "k12*";
  var k13_0; k13_0 is "k13*";
  var k14_0; k14_0 is "k14*";
  var k15_0; k15_0 is "k15*";
  var k16_0; k16_0 is "k16*";
  var k17_0; k17_0 is "k17*";
  var k18_0; k18_0 is "k18*";
  var k19_0; k19_0 is "k19*";
  var k20_0; k20_0 is "k20*";
  var k21_0; k21_0 is "k21*";
  var k22_0; k22_0 is "k22*";
  var k23_0; k23_0 is "k23*";
  var k24_0; k24_0 is "k24*";
  var k25_0; k25_0 is "k25*";
  var k26_0; k26_0 is "k26*";
  var k27_0; k27_0 is "k27*";
  var k28_0; k28_0 is "k28*";
  var k29_0; k29_0 is "k29*";
  var k30_0; k30_0 is "k30*";
  var k31_0; k31_0 is "k31*";
  var k32_0; k32_0 is "k32*";
  var k33_0; k33_0 is "k33*";
  var k34_0; k34_0 is "k34*";
  var k35_0; k35_0 is "k35*";
  var k36_0; k36_0 is "k36*";
  var k37_0; k37_0 is "k37*";
  var k38_0; k38_0 is "k38*";
  var k39_0; k39_0 is "k39*";
  var k40_0; k40_0 is "k40*";
  var k41_0; k41_0 is "k41*";
  var k42_0; k42_0 is "k42*";
  var k43_0; k43_0 is "k43*";
  var k44_0; k44_0 is "k44*";
  T1 = 37;
  T2 = 33;
  gamma_TC = 2.5;
  var TAT___mTAT; TAT___mTAT is "TAT + mTAT";

  // Assignment rules:
  IIa_plus_1_2mIIa := IIa + 1.2*mIIa;
  k18_0 := k18*k18;
  conversion := gamma_TC^((T2 - T1)/10);
  k04 := k4*conversion;
  k05 := k5*conversion;
  k06 := k6*conversion;
  k07 := k7*conversion;
  k09 := k9*conversion;
  k08 := k8*conversion;
  k01 := k1*conversion;
  k02 := k2*conversion;
  k03 := k3*conversion;
  k10_0 := k10*conversion;
  k11_0 := k11*conversion;
  k12_0 := k12*conversion;
  k13_0 := k13*conversion;
  k14_0 := k14*conversion;
  k15_0 := k15*conversion;
  k16_0 := k16*conversion;
  k17_0 := k17*conversion;
  k19_0 := k19*conversion;
  k20_0 := k20*conversion;
  k21_0 := k21*conversion;
  k22_0 := k22*conversion;
  k23_0 := k23*conversion;
  k24_0 := k24*conversion;
  k25_0 := k25*conversion;
  k26_0 := k26*conversion;
  k27_0 := k27*conversion;
  k28_0 := k28*conversion;
  k29_0 := k29*conversion;
  k30_0 := k30*conversion;
  k31_0 := k31*conversion;
  k32_0 := k32*conversion;
  k33_0 := k33*conversion;
  k34_0 := k34*conversion;
  k35_0 := k35*conversion;
  k36_0 := k36*conversion;
  k37_0 := k37*conversion;
  k38_0 := k38*conversion;
  k39_0 := k39*conversion;
  k40_0 := k40*conversion;
  k41_0 := k41*conversion;
  k42_0 := k42*conversion;
  k43_0 := k43*conversion;
  k44_0 := k44*conversion;
  time_minutes := time/60;
  TAT___mTAT := IIa_ATIII + mIIa_ATIII;

  // Reactions:
  R01: TF + VII -> TF_VII; compartment_1*(k02*TF*VII - k01*TF_VII);
  R02: TF + VIIa -> TF_VIIa; compartment_1*(k04*TF*VIIa - k03*TF_VIIa);
  R03: TF_VIIa + VII => TF_VIIa + VIIa; compartment_1*k05*TF_VIIa*VII;
  R04: Xa + VII => Xa + VIIa; compartment_1*k06*Xa*VII;
  R05: IIa + VII => IIa + VIIa; compartment_1*k07*IIa*VII;
  R06: TF_VIIa + X -> TF_VIIa_X; compartment_1*(k09*TF_VIIa*X - k08*TF_VIIa_X);
  R07: TF_VIIa + Xa -> TF_VIIa_Xa; compartment_1*(k12_0*TF_VIIa*Xa - k11_0*TF_VIIa_Xa);
  R08: TF_VIIa + IX -> TF_VIIa_IX; compartment_1*(k14_0*TF_VIIa*IX - k13_0*TF_VIIa_IX);
  R09: Xa + II => Xa + IIa; compartment_1*k16_0*Xa*II;
  R10: IIa + VIII => IIa + VIIIa; compartment_1*k17_0*IIa*VIII;
  R11: IXa + VIIIa -> IXa_VIIIa; compartment_1*(k19_0*IXa*VIIIa - k18_0*IXa_VIIIa);
  R12: IXa_VIIIa + X -> IXa_VIIIa_X; compartment_1*(k21_0*IXa_VIIIa*X - k20_0*IXa_VIIIa_X);
  R13: VIIIa -> VIIIa1_L + VIIIa2; compartment_1*(k24_0*VIIIa - k23_0*VIIIa1_L*VIIIa2);
  R14: IXa_VIIIa_X => VIIIa1_L + VIIIa2 + X + IXa; compartment_1*k25_0*IXa_VIIIa_X;
  R15: IXa_VIIIa => VIIIa1_L + VIIIa2 + IXa; compartment_1*k25_0*IXa_VIIIa;
  R16: IIa + V => IIa + Va; compartment_1*k26_0*IIa*V;
  R17: Xa + Va -> Xa_Va; compartment_1*(k28_0*Xa*Va - k27_0*Xa_Va);
  R18: Xa_Va + II -> Xa_Va_II; compartment_1*(k30_0*Xa_Va*II - k29_0*Xa_Va_II);
  R19: mIIa + Xa_Va => IIa + Xa_Va; compartment_1*k32_0*mIIa*Xa_Va;
  R20: Xa + TFPI -> Xa_TFPI; compartment_1*(k34_0*Xa*TFPI - k33_0*Xa_TFPI);
  R21: TF_VIIa_Xa + TFPI -> TF_VIIa_Xa_TFPI; compartment_1*(k36_0*TF_VIIa_Xa*TFPI - k35_0*TF_VIIa_Xa_TFPI);
  R22: TF_VIIa + Xa_TFPI => TF_VIIa_Xa_TFPI; compartment_1*k37_0*TF_VIIa*Xa_TFPI;
  R23: Xa + ATIII => Xa_ATIII; compartment_1*k38_0*Xa*ATIII;
  R24: mIIa + ATIII => mIIa_ATIII; compartment_1*k39_0*mIIa*ATIII;
  R25: IXa + ATIII => IXa_ATIII; compartment_1*k40_0*IXa*ATIII;
  R26: IIa + ATIII => IIa_ATIII; compartment_1*k41_0*IIa*ATIII;
  R27: TF_VIIa + ATIII => TF_VIIa_ATIII; compartment_1*k42_0*TF_VIIa*ATIII;
  R6b: TF_VIIa_X => TF_VIIa_Xa; compartment_1*k10_0*TF_VIIa_X; R6b is "R06b";
  R8b: TF_VIIa_IX => TF_VIIa + IXa; compartment_1*k15_0*TF_VIIa_IX; R8b is "R08b";
  R12b: IXa_VIIIa_X => IXa_VIIIa + Xa; compartment_1*k22_0*IXa_VIIIa_X;
  R18b: Xa_Va_II => Xa_Va + mIIa; compartment_1*k31_0*Xa_Va_II;
  R28: IXa + X => IXa + Xa; compartment_1*k43_0*IXa*X;
  R29: mIIa + V => mIIa + Va; compartment_1*k44_0*mIIa*V;
end
