// SBML level 2 version 4
// dcterms:bibliographicCitation: urn:miriam:pubmed:27541717

model Mitrophanov2016___Extended_Mitrophanov2011_Blood_Coagulation_Model__additional_thrombin_reactions()
  // Mitrophanov2016 - Extended Mitrophanov2011 Blood Coagulation Model (additional thrombin reactions)
  // Mathematical model of blood coagulation. Extended model of Mitrophanov2011 (which is an extension of Hockin2002). Additional reactions added involving thrombin. Modelling the effects of dilution and addition of recombinant factor VIIa, II, VII, IX, X, AT.
  // isVersionOf GO:0007596
  // occursIn BTO:0000131
  // hasTaxon taxonomy:9606
  // isDescribedBy pubmed:27541717
  // hasTaxon taxonomy:9606

  // Compartments:
  compartment compartment_1 = 1;

  // Species:
  species TF in compartment_1 = piecewise(IC_TF_0, Experiment == 0, IC_TF_0/Dilution_factor);  // uniprot:P13726
  species TF_VII in compartment_1 = 0;  // hasPart uniprot:P08709; hasPart uniprot:P13726
  species VII in compartment_1 = piecewise(IC_VII_0, Experiment == 0, piecewise(IC_VII_0/Dilution_factor, (Experiment == 1) || (Experiment == 2), IC_VII_0/Dilution_factor + Additional_VII));  // uniprot:P08709
  species TF_VIIa in compartment_1 = 0;  // hasPart uniprot:P08709; hasPart uniprot:P13726
  species VIIa in compartment_1 = piecewise(IC_VIIa_0, Experiment == 0, piecewise(IC_VIIa_0/Dilution_factor + rVIIa, Experiment == 2, IC_VIIa_0/Dilution_factor));  // isVersionOf uniprot:P08709
  species Xa in compartment_1 = 0;  // isVersionOf uniprot:P00742
  species IIa in compartment_1 = 0;  // isVersionOf uniprot:P00734
  species TF_VIIa_X in compartment_1 = 0;  // hasPart uniprot:P00742; hasPart uniprot:P13726; hasPart uniprot:P08709
  species X in compartment_1 = piecewise(IC_X_0, Experiment == 0, piecewise(IC_X_0/Dilution_factor, (Experiment == 1) || (Experiment == 2), IC_X_0/Dilution_factor + IC_X_0));  // uniprot:P00742
  species TF_VIIa_Xa in compartment_1 = 0;  // hasPart uniprot:P00742; hasPart uniprot:P08709; hasPart uniprot:P13726
  species IX in compartment_1 = piecewise(IC_IX_0, Experiment == 0, piecewise(IC_IX_0/Dilution_factor, (Experiment == 1) || (Experiment == 2), IC_IX_0/Dilution_factor + Additional_IX));  // uniprot:P00740
  species TF_VIIa_IX in compartment_1 = 0;  // hasPart uniprot:P00740; hasPart uniprot:P08709; hasPart uniprot:P13726
  species IXa in compartment_1 = 0;  // isVersionOf uniprot:P00740
  species II in compartment_1 = piecewise(IC_II_0, Experiment == 0, piecewise(IC_II_0/Dilution_factor, (Experiment == 1) || (Experiment == 2), IC_II_0/Dilution_factor + Additional_II));  // uniprot:P00734
  species VIII in compartment_1 = piecewise(IC_VIII_0, Experiment == 0, IC_VIII_0/Dilution_factor);  // uniprot:P00451
  species VIIIa in compartment_1 = 0;  // isVersionOf uniprot:P00451
  species IXa_VIIIa in compartment_1 = 0;  // hasPart uniprot:P00451; hasPart uniprot:P00740
  species IXa_VIIIa_X in compartment_1 = 0;  // hasPart uniprot:P00451; hasPart uniprot:P00742; hasPart uniprot:P00740
  species VIIIa1_L in compartment_1 = 0;  // isPartOf uniprot:P00451
  species VIIIa2 in compartment_1 = 0;  // isPartOf uniprot:P00451
  species V in compartment_1 = piecewise(IC_V_0, Experiment == 0, IC_V_0/Dilution_factor);  // uniprot:P12259
  species Va in compartment_1 = 0;  // isVersionOf uniprot:P12259
  species Xa_Va in compartment_1 = 0;  // hasPart uniprot:P00742; hasPart uniprot:P12259
  species Xa_Va_II in compartment_1 = 0;  // hasPart uniprot:P12259; hasPart uniprot:P00742; hasPart uniprot:P00734
  species mIIa in compartment_1 = 0;  // isVersionOf uniprot:P00734
  species TFPI in compartment_1 = piecewise(IC_TFPI_0, Experiment == 0, IC_TFPI_0/Dilution_factor);  // uniprot:P10646
  species Xa_TFPI in compartment_1 = 0;  // hasPart uniprot:P00742; hasPart uniprot:P10646
  species TF_VIIa_Xa_TFPI in compartment_1 = 0;  // hasPart uniprot:P13726; hasPart uniprot:P08709; hasPart uniprot:P10646; hasPart uniprot:P00742
  species ATIII in compartment_1 = piecewise(IC_ATIII_0, Experiment == 0, piecewise(IC_ATIII_0/Dilution_factor + Additional_ATIII, Experiment == 3, IC_ATIII_0/Dilution_factor));  // uniprot:P01008
  species Xa_ATIII in compartment_1 = 0;  // hasPart uniprot:P01008; hasPart uniprot:P00742
  species mIIa_ATIII in compartment_1 = 0;  // hasPart uniprot:P00734; hasPart uniprot:P01008
  species IXa_ATIII in compartment_1 = 0;  // hasPart uniprot:P01008; hasPart uniprot:P00740
  species IIa_ATIII in compartment_1 = 0;  // hasPart uniprot:P01008; hasPart uniprot:P00734
  species TF_VIIa_ATIII in compartment_1 = 0;  // hasPart uniprot:P01008; hasPart uniprot:P13726; hasPart uniprot:P08709
  species FS in compartment_1 = piecewise(0*IC_FS_0, Experiment == 0, IC_FS_0/Dilution_factor);
  species FS_conv in compartment_1 = 0;
  species IIa_FS in compartment_1 = 0; IIa_FS is "IIa:FS";
  species IIa_alpha_2_M in compartment_1 = 0; IIa_alpha_2_M is "IIa:alpha_2_M";
  species alpha_2_M in compartment_1 = piecewise(0*IC_alpha_2_M_0, Experiment == 0, IC_alpha_2_M_0/Dilution_factor);
  species IIa_alpha_2_M_FS in compartment_1 = 0; IIa_alpha_2_M_FS is "IIa:alpha_2_M:FS";
  species IIa_Serpins in compartment_1 = 0; IIa_Serpins is "IIa:Serpins";
  species $Serpins in compartment_1;
  // Clinical dose: 90 ug/kg
  // Plasma volume: 39ml/kg
  // Clinical dose = 90 / 39 = 2.3077ug/ml
  // Molecular weight: 50 kDa.
  // Concentration: 46.15 nM or 4.615e-8 M
  species rVIIa in compartment_1 = 4.615e-8;

  // Parameters:
  k1 = 0.0031; k1 is "k01";
  k2 = 3200000; k2 is "k02";
  k3 = 0.0031; k3 is "k03";
  k4 = 23000000; k4 is "k04";
  k5 = 440000; k5 is "k05";
  k6 = 13000000; k6 is "k06";
  k7 = 23000; k7 is "k07";
  k8 = 1.05; k8 is "k08";
  k9 = 25000000; k9 is "k09";
  k10 = 6;
  k11 = 19;
  k12 = 22000000;
  k13 = 2.4;
  k14 = 10000000;
  k15 = 1.8;
  k16 = 7500;
  k17 = 20000000;
  k18 = 0.005;
  k19 = 10000000;
  k20 = 0.001;
  k21 = 100000000;
  k22 = 8.2;
  k23 = 22000;
  k24 = 0.006;
  k25 = 0.001;
  k26 = 20000000;
  k27 = 0.2;
  k28 = 400000000;
  k29 = 103;
  k30 = 100000000;
  k31 = 63.5;
  k32 = 230000000;
  k33 = 0.00036;
  k34 = 900000;
  k35 = 0.00011;
  k36 = 320000000;
  k37 = 50000000;
  k38 = 4200;
  k39 = 7100;
  k40 = 490;
  k41 = 7100;
  k42 = 230;
  var IIa_plus_1_2mIIa; IIa_plus_1_2mIIa is "IIa+1.2mIIa";
  k43 = 5700;
  k44 = 3000000;
  ER01_k = 100000000;
  ER02_k = 35798;
  ER03_k = 2;
  ER04_k = 736;
  ER05_k = 100000000;
  ER06_k = 35798;
  ER07_k = 2;
  ER08_k = 1000;
  IC_ATIII_0 = 3.4e-6;
  IC_II_0 = 1.4e-6;
  IC_X_0 = 1.6e-7;
  IC_IX_0 = 9e-8;
  IC_V_0 = 2e-8;
  IC_VII_0 = 1e-8;
  IC_TFPI_0 = 2.5e-9;
  IC_VIII_0 = 7e-10;
  IC_VIIa_0 = 1e-10;
  IC_TF_0 = 5e-12;
  Dilution_factor = 3;
  // Original Model == 0,
  // Diluted Group == 1,
  // +rFIIa Group == 2,
  // +CCF-AT Group == 3,
  // +CCF-FVII Group == 4
  // Parameter scan
  // Intervals: 4
  // Range: 0 to 4
  Experiment = 4;
  // Concentration of stock solution: 8.5 mg/ml.
  // Molecular weight: 72 kDa.
  // Concentration of stock solution: 1.1806e-4 M.
  // Activity of stock solution: 60.4 units/ml.
  // Corresponding clinical dose: 24.2 units/kg.
  // Plasma volume: 39 ml/kg.
  // Corresponding clinical dose: 24.2 / 39 = 0.6205 units/ml.
  // Concentration * Clinical dose / activity of stock solution = 1.1806e-4 * (0.6205/60.4) = 1.21285e-6 M.
  Additional_II = 1.21285e-6;
  // Concentration of stock solution: 5.3 mg/ml.
  // Molecular weight: 55 kDa.
  // Concentration of stock solution: 9.636e-5 M.
  // Activity of stock solution: 945 units/ml.
  // Corresponding clinical dose: 30.8 units/kg.
  // Plasma volume: 39 ml/kg.
  // Corresponding clinical dose: 30.8 / 39 = 0.7897 units/ml.
  // Concentration * Clinical dose / activity of stock solution = 9.636e-5 * (0.7897/945) = 8.052433e-8 M.
  Additional_IX = 8.052433e-8;
  // Concentration of stock solution: 5 mg/ml.
  // Molecular weight: 58.9 kDa.
  // Concentration of stock solution: 8.489e-5 M.
  // Activity of stock solution: 660 units/ml.
  // Corresponding clinical dose: 28.1 units/kg.
  // Plasma volume: 39 ml/kg.
  // Corresponding clinical dose: 28.1 / 39 = 0.7205 units/ml.
  // Concentration * Clinical dose / activity of stock solution = 8.489e-5 * (0.7205/660) = 9.267158e-8 M.
  Additional_X = 9.267158e-8;
  // Concentration of stock solution: 8.4 mg/ml.
  // Molecular weight: 58 kDa.
  // Concentration of stock solution: 1.4483e-4 M.
  // Activity of stock solution: 60.5 units/ml.
  // Corresponding clinical dose: 28.8 units/kg.
  // Plasma volume: 39 ml/kg.
  // Corresponding clinical dose: 28.8 / 39 = 0.7385 units/ml.
  // Concentration * Clinical dose / activity of stock solution = 1.4483e-4 * (0.7385/60.5) = 1.76788e-6 M.
  Additional_ATIII = 1.76788e-6;
  // Concentration of stock solution: 1.2 mg/ml.
  // Molecular weight: 50 kDa.
  // Concentration of stock solution: 2.4e-5 M.
  // Activity of stock solution: 2584.8 units/ml.
  // Corresponding clinical dose: 28.7 units/kg.
  // Plasma volume: 39 ml/kg.
  // Corresponding clinical dose: 28.7 / 39 = 0.7359 units/ml.
  // Concentration * Clinical dose / activity of stock solution = 2.4e-5 * (0.7359/2584.8) = 6.83287e-9 M.
  Additional_VII = 6.83287e-9;
  IC_FS_0 = 0.000417;
  IC_Serpins_0 = 1e-5;
  IC_alpha_2_M_0 = 3.03e-6;

  // Assignment rules:
  IIa_plus_1_2mIIa := IIa + 1.2*mIIa;
  minutes := time/60;
  Serpins := piecewise(0*IC_Serpins_0, Experiment == 0, IC_Serpins_0/Dilution_factor);

  // Reactions:
  R01: TF + VII -> TF_VII; compartment_1*(k2*TF*VII - k1*TF_VII);
  R02: TF + VIIa -> TF_VIIa; compartment_1*(k4*TF*VIIa - k3*TF_VIIa);
  R03: TF_VIIa + VII => TF_VIIa + VIIa; compartment_1*k5*TF_VIIa*VII;
  R04: Xa + VII => Xa + VIIa; compartment_1*k6*Xa*VII;
  R05: IIa + VII => IIa + VIIa; compartment_1*k7*IIa*VII;
  R06: TF_VIIa + X -> TF_VIIa_X; compartment_1*(k9*TF_VIIa*X - k8*TF_VIIa_X);
  R07: TF_VIIa + Xa -> TF_VIIa_Xa; compartment_1*(k12*TF_VIIa*Xa - k11*TF_VIIa_Xa);
  R08: TF_VIIa + IX -> TF_VIIa_IX; compartment_1*(k14*TF_VIIa*IX - k13*TF_VIIa_IX);
  R09: Xa + II => Xa + IIa; compartment_1*k16*Xa*II;
  R10: IIa + VIII => IIa + VIIIa; compartment_1*k17*IIa*VIII;
  R11: IXa + VIIIa -> IXa_VIIIa; compartment_1*(k19*IXa*VIIIa - k18*IXa_VIIIa);
  R12: IXa_VIIIa + X -> IXa_VIIIa_X; compartment_1*(k21*IXa_VIIIa*X - k20*IXa_VIIIa_X);
  R13: VIIIa -> VIIIa1_L + VIIIa2; compartment_1*(k24*VIIIa - k23*VIIIa1_L*VIIIa2);
  R14: IXa_VIIIa_X => VIIIa1_L + VIIIa2 + X + IXa; compartment_1*k25*IXa_VIIIa_X;
  R15: IXa_VIIIa => VIIIa1_L + VIIIa2 + IXa; compartment_1*k25*IXa_VIIIa;
  R16: IIa + V => IIa + Va; compartment_1*k26*IIa*V;
  R17: Xa + Va -> Xa_Va; compartment_1*(k28*Xa*Va - k27*Xa_Va);
  R18: Xa_Va + II -> Xa_Va_II; compartment_1*(k30*Xa_Va*II - k29*Xa_Va_II);
  R19: mIIa + Xa_Va => IIa + Xa_Va; compartment_1*k32*mIIa*Xa_Va;
  R20: Xa + TFPI -> Xa_TFPI; compartment_1*(k34*Xa*TFPI - k33*Xa_TFPI);
  R21: TF_VIIa_Xa + TFPI -> TF_VIIa_Xa_TFPI; compartment_1*(k36*TF_VIIa_Xa*TFPI - k35*TF_VIIa_Xa_TFPI);
  R22: TF_VIIa + Xa_TFPI => TF_VIIa_Xa_TFPI; compartment_1*k37*TF_VIIa*Xa_TFPI;
  R23: Xa + ATIII => Xa_ATIII; compartment_1*k38*Xa*ATIII;
  R24: mIIa + ATIII => mIIa_ATIII; compartment_1*k39*mIIa*ATIII;
  R25: IXa + ATIII => IXa_ATIII; compartment_1*k40*IXa*ATIII;
  R26: IIa + ATIII => IIa_ATIII; compartment_1*k41*IIa*ATIII;
  R27: TF_VIIa + ATIII => TF_VIIa_ATIII; compartment_1*k42*TF_VIIa*ATIII;
  R6b: TF_VIIa_X => TF_VIIa_Xa; compartment_1*k10*TF_VIIa_X; R6b is "R06b";
  R8b: TF_VIIa_IX => TF_VIIa + IXa; compartment_1*k15*TF_VIIa_IX; R8b is "R08b";
  R12b: IXa_VIIIa_X => IXa_VIIIa + Xa; compartment_1*k22*IXa_VIIIa_X;
  R18b: Xa_Va_II => Xa_Va + mIIa; compartment_1*k31*Xa_Va_II;
  R28: IXa + X => IXa + Xa; compartment_1*k43*IXa*X;
  R29: mIIa + V => mIIa + Va; compartment_1*k44*mIIa*V;
  ER01: IIa + FS => IIa_FS; compartment_1*ER01_k*IIa*FS;
  ER02: IIa_FS => IIa + FS; compartment_1*ER02_k*IIa_FS;
  ER03: IIa_FS => IIa + FS_conv; compartment_1*ER03_k*IIa_FS;
  ER04: IIa + alpha_2_M => IIa_alpha_2_M; compartment_1*ER04_k*IIa*alpha_2_M;
  ER05: IIa_alpha_2_M + FS => IIa_alpha_2_M_FS; compartment_1*ER05_k*IIa_alpha_2_M*FS;
  ER06: IIa_alpha_2_M_FS => IIa_alpha_2_M + FS; compartment_1*ER06_k*IIa_alpha_2_M_FS;
  ER07: IIa_alpha_2_M_FS => IIa_alpha_2_M + FS_conv; compartment_1*ER07_k*IIa_alpha_2_M_FS;
  ER08: IIa + $Serpins => IIa_Serpins; compartment_1*ER08_k*IIa*Serpins;
end
