// SBML level 2 version 4
// dcterms:bibliographicCitation: urn:miriam:pubmed:2071587

function rateOf(a)
  NaN;
end

model Naski1991___alpha_Thrombin_catalyzed_conversion_of_Fibrinogen()
  // Naski1991 - alpha-Thrombin-catalyzed conversion of Fibrinogen
  // Mathematical model of blood coagulation factor alpha-thrombin and conversion of fibrinogen to fibrin with ATIII inhibition.
  // isPartOf GO:0007596
  // isDescribedBy pubmed:2071587

  // Compartments:
  compartment compartment = 1;

  // Species:
  species $A_alpha_B_Beta_gamma in compartment = 5; A_alpha_B_Beta_gamma is "A-alpha-B-Beta-gamma";
  species $alpha_B_Beta_gamma in compartment = 5; alpha_B_Beta_gamma is "alpha-B-Beta-gamma";
  species $alpha_B_Beta_gamma_2 in compartment = 5; alpha_B_Beta_gamma_2 is "alpha-B-Beta_gamma_2";
  species $alpha_Beta_gamma in compartment = 5; alpha_Beta_gamma is "alpha-Beta-gamma";
  species $E_0 in compartment = 1;
  species $FPA in compartment = 0;
  species $FPB in compartment = 0;
  species $AT in compartment = 1;
  species $E in compartment;
  species $E_A_alpha_B_Beta_gamma in compartment = 0; E_A_alpha_B_Beta_gamma is "E:A-alpha-B-Beta-gamma";
  species $E_alpha_B_Beta_gamma in compartment = 0; E_alpha_B_Beta_gamma is "E:alpha-B-Beta-gamma";
  species $E_alpha_B_Beta_gamma_2 in compartment = 0; E_alpha_B_Beta_gamma_2 is "E:alpha-B-Beta-gamma_2";
  species $E_alpha_Beta_gamma in compartment = 0; E_alpha_Beta_gamma is "E:alpha-Beta-gamma";

  // Parameters:
  K_m_A = 7.2; K_m_A is "K_m^A";
  k_cat_A = 84; k_cat_A is "k_cat^A";
  K_m_Bm = 7.5; K_m_Bm is "K_m^Bm";
  k_cat_Bm = 7.4; k_cat_Bm is "k_cat^Bm";
  k_p = 0.01;
  k__p = 0.064; k__p is "k_-p";
  K_m_b = 7.5; K_m_b is "K_m^b";
  k_cat_b = 49; k_cat_b is "k_cat^b";
  K_d = 10;
  k_1 = 0.00016;
  k_2 = 0.00016;
  k_3 = 0.0001;

  // Assignment rules:
  E := E_0 - (E_A_alpha_B_Beta_gamma + E_alpha_B_Beta_gamma_2 + E_alpha_B_Beta_gamma + E_alpha_Beta_gamma);

  // Rate rules:
  A_alpha_B_Beta_gamma' = -k_cat_A*E_0*A_alpha_B_Beta_gamma/(A_alpha_B_Beta_gamma + K_m_A*(1 + alpha_B_Beta_gamma/K_m_Bm + 2*alpha_B_Beta_gamma_2/K_m_b + alpha_Beta_gamma/K_d));
  alpha_B_Beta_gamma' = -rateOf(A_alpha_B_Beta_gamma) - 2*k_p*alpha_B_Beta_gamma^2 + 2*k__p*alpha_B_Beta_gamma_2 - k_cat_Bm*E_0*alpha_B_Beta_gamma/(alpha_B_Beta_gamma + K_m_Bm*(1 + A_alpha_B_Beta_gamma/K_m_A + 2*alpha_B_Beta_gamma_2/K_m_b + alpha_Beta_gamma/K_d));
  alpha_B_Beta_gamma_2' = k_p*alpha_B_Beta_gamma^2 - k__p*alpha_B_Beta_gamma_2 - k_cat_b*E_0*alpha_B_Beta_gamma_2/(2*alpha_B_Beta_gamma_2 + K_m_b*(1 + A_alpha_B_Beta_gamma/K_m_A + alpha_B_Beta_gamma/K_m_Bm + alpha_Beta_gamma/K_d));
  alpha_Beta_gamma' = k_cat_Bm*E_0*alpha_B_Beta_gamma/(alpha_B_Beta_gamma + K_m_Bm*(1 + A_alpha_B_Beta_gamma/K_m_A + 2*alpha_B_Beta_gamma_2/K_m_b + alpha_Beta_gamma/K_d)) + 2*k_cat_b*E_0*alpha_B_Beta_gamma_2/(2*alpha_B_Beta_gamma_2 + K_m_b*(1 + A_alpha_B_Beta_gamma/K_m_A + alpha_B_Beta_gamma/K_m_Bm + alpha_Beta_gamma/K_d));
  E_0' = -AT*E*(k_1 + k_2*(alpha_B_Beta_gamma/K_m_Bm + 2*alpha_B_Beta_gamma_2/K_m_b) + k_3*alpha_Beta_gamma/K_d)/(1 + A_alpha_B_Beta_gamma/K_m_A + alpha_B_Beta_gamma/K_m_Bm + 2*alpha_B_Beta_gamma_2/K_m_b + alpha_Beta_gamma/K_d);
  FPA' = -rateOf(A_alpha_B_Beta_gamma);
  FPB' = rateOf(alpha_Beta_gamma);
  AT' = rateOf(E_0);
  E_A_alpha_B_Beta_gamma' = -1*rateOf(A_alpha_B_Beta_gamma) - k_cat_A*E_A_alpha_B_Beta_gamma;
  E_alpha_B_Beta_gamma' = k_cat_Bm*E_0*alpha_B_Beta_gamma/(alpha_B_Beta_gamma + K_m_Bm*(1 + A_alpha_B_Beta_gamma/k_cat_A + 2*alpha_B_Beta_gamma_2/K_m_b + alpha_Beta_gamma/K_d)) - k_cat_Bm*E_alpha_B_Beta_gamma;
  E_alpha_B_Beta_gamma_2' = k_cat_b*E_0*alpha_B_Beta_gamma_2/(2*alpha_B_Beta_gamma_2 + K_m_b*(1 + A_alpha_B_Beta_gamma/K_m_A + alpha_B_Beta_gamma/alpha_B_Beta_gamma/K_m_Bm + alpha_Beta_gamma/K_d)) - k_cat_b*E_alpha_B_Beta_gamma_2;
  E_alpha_Beta_gamma' = -1*rateOf(alpha_Beta_gamma);

  // Unit definitions:
  unit volume = 1e-3 litre;
  unit substance = 1e-6 mole;
end
