// SBML level 2 version 4
// dcterms:bibliographicCitation: urn:miriam:pubmed:23390316

function Constant_flux__irreversible(v)
  v;
end
Constant_flux__irreversible is "Constant flux (irreversible)";

function function_fro_SMM(kcat, enz, S, Km)
  kcat*enz*(S/(Km + S));
end

function function_for_Catalysis(k, Enzyme, O2, Km, S, Km1)
  k*Enzyme*(O2/(Km + O2))*(S/(Km1 + S));
end

model Nguyen2013___Dynamic_model_of_HIF_regulation_in_hypoxia()
  // Nguyen2013 - Dynamic model of HIF regulation in hypoxia
  // Its a mathematcial model explaining regulation of HIF via FIH and oxygen. Model is further validated by Experimental data and various hypothesis has been tested on the same.
  // hasProperty GO:0097411
  // hasProperty GO:0018126
  // hasProperty MAMO:0000046
  // hasTaxon taxonomy:9606
  // isDescribedBy pubmed:23390316

  // Compartments:
  compartment Cytosol = 1;
  compartment Nucleus = 1;

  // Species:
  species HIFalpha in Cytosol = 5;
  species HIFalpha_pOH in Cytosol = 0; HIFalpha_pOH is "HIFalpha-pOH";
  species VHL in Cytosol = 50;
  species FIH in Cytosol = 110;
  species HIFalpha_aOH in Cytosol = 0; HIFalpha_aOH is "HIFalpha-aOH";
  species PHD in Cytosol = 100;
  species HIFalpha_aOHpOH in Cytosol = 0; HIFalpha_aOHpOH is "HIFalpha-aOHpOH";
  species O2 in Cytosol = 100;
  species HIFalpha_n in Nucleus = 0;
  species PHD_n in Nucleus = 0;
  species HIFalpha_n_pOH in Nucleus = 0; HIFalpha_n_pOH is "HIFalpha_n-pOH";
  species VHL_n in Nucleus = 50;
  species HIFalpha_n_aOH in Nucleus = 0; HIFalpha_n_aOH is "HIFalpha_n-aOH";
  species HIFalpha_n_aOHpOH in Nucleus = 0; HIFalpha_n_aOHpOH is "HIFalpha_n-aOHpOH";
  species HIFB in Nucleus = 170;
  species HIFd in Nucleus = 0;
  species HIFd_HRE in Nucleus = 0;
  species HRE in Nucleus = 50;
  species mRNA in Cytosol = 0;
  species Protein in Cytosol = 0;
  species Luciferase in Cytosol = 0;
  species FIH_n in Nucleus = 40;

  // Parameters:
  HIF_tot = 0;
  x = 0;

  // Reactions:
  R1_HIF1alpha_synthesis: => HIFalpha; Cytosol*Constant_flux__irreversible(v); R1_HIF1alpha_synthesis is "R1-HIF1alpha synthesis";
    v = 0.005;
  R2_HIFalpha_cons_degradation: HIFalpha => ; Cytosol*R2_HIFalpha_cons_degradation_k1*HIFalpha; R2_HIFalpha_cons_degradation is "R2-HIFalpha cons degradation";
    R2_HIFalpha_cons_degradation_k1 = 0.0002;
  R10_HIFalpha_n_nuclear_export: HIFalpha_n => HIFalpha; R10_HIFalpha_n_nuclear_export_k1*HIFalpha_n; R10_HIFalpha_n_nuclear_export is "R10-HIFalpha_n_nuclear_export";
    R10_HIFalpha_n_nuclear_export_k1 = 0.001;
  R25_PHD_degradation: PHD => ; Cytosol*R25_PHD_degradation_k1*PHD; R25_PHD_degradation is "R25-PHD degradation";
    R25_PHD_degradation_k1 = 1e-5;
  R13_HIFalpha_aOH_nuclear_import: HIFalpha_aOH => HIFalpha_n_aOH; R13_HIFalpha_aOH_nuclear_import_k1*HIFalpha_aOH; R13_HIFalpha_aOH_nuclear_import is "R13-HIFalpha-aOH_nuclear_import";
    R13_HIFalpha_aOH_nuclear_import_k1 = 0.0002;
  R14_HIFalpha_aOH_n_nuclear_export: HIFalpha_n_aOH => HIFalpha_aOH; R14_HIFalpha_aOH_n_nuclear_export_k1*HIFalpha_n_aOH; R14_HIFalpha_aOH_n_nuclear_export is "R14-HIFalpha-aOH_n_nuclear_export";
    R14_HIFalpha_aOH_n_nuclear_export_k1 = 0.0001;
  R15_HIFalpha_n_hydroxylation_PHD_n: HIFalpha_n => HIFalpha_n_pOH; function_for_Catalysis(R15_HIFalpha_n_hydroxylation_PHD_n_k, PHD_n, O2, R15_HIFalpha_n_hydroxylation_PHD_n_Km, HIFalpha_n, R15_HIFalpha_n_hydroxylation_PHD_n_Km1); R15_HIFalpha_n_hydroxylation_PHD_n is "R15-HIFalpha_n_hydroxylation_PHD_n";  // modifiers: PHD_n, O2
    R15_HIFalpha_n_hydroxylation_PHD_n_k = 0.045; R15_HIFalpha_n_hydroxylation_PHD_n_Km = 250; R15_HIFalpha_n_hydroxylation_PHD_n_Km1 = 100;
  R16_HIFalpha_n_pOH_degradation: HIFalpha_n_pOH => ; Nucleus*function_fro_SMM(R16_HIFalpha_n_pOH_degradation_kcat, VHL_n, HIFalpha_n_pOH, R16_HIFalpha_n_pOH_degradation_Km); R16_HIFalpha_n_pOH_degradation is "R16-HIFalpha_n-pOH degradation";  // modifiers: VHL_n
    R16_HIFalpha_n_pOH_degradation_kcat = 0.1; R16_HIFalpha_n_pOH_degradation_Km = 150;
  R17_HIFalpha_n_hydroxylation_FIH_n: HIFalpha_n => HIFalpha_n_aOH; function_for_Catalysis(R17_HIFalpha_n_hydroxylation_FIH_n_k, FIH_n, O2, R17_HIFalpha_n_hydroxylation_FIH_n_Km, HIFalpha_n, R17_HIFalpha_n_hydroxylation_FIH_n_Km1); R17_HIFalpha_n_hydroxylation_FIH_n is "R17-HIFalpha_n_hydroxylation_FIH_n";  // modifiers: FIH_n, O2
    R17_HIFalpha_n_hydroxylation_FIH_n_k = 0.4; R17_HIFalpha_n_hydroxylation_FIH_n_Km = 90; R17_HIFalpha_n_hydroxylation_FIH_n_Km1 = 20;
  R3_HIFalpha_hydroxylation_PHD: HIFalpha => HIFalpha_pOH; Cytosol*function_for_Catalysis(R3_HIFalpha_hydroxylation_PHD_k, PHD, O2, R3_HIFalpha_hydroxylation_PHD_Km, HIFalpha, R3_HIFalpha_hydroxylation_PHD_Km1); R3_HIFalpha_hydroxylation_PHD is "R3-HIFalpha_hydroxylation_PHD";  // modifiers: PHD, O2
    R3_HIFalpha_hydroxylation_PHD_k = 0.045; R3_HIFalpha_hydroxylation_PHD_Km = 250; R3_HIFalpha_hydroxylation_PHD_Km1 = 100;
  R4_HIFalpha_pOH_degradation: HIFalpha_pOH => ; Cytosol*function_fro_SMM(R4_HIFalpha_pOH_degradation_kcat, VHL, HIFalpha_pOH, R4_HIFalpha_pOH_degradation_Km); R4_HIFalpha_pOH_degradation is "R4-HIFalpha-pOH degradation";  // modifiers: VHL
    R4_HIFalpha_pOH_degradation_kcat = 0.1; R4_HIFalpha_pOH_degradation_Km = 150;
  R5_HIFalpha_hydroxylation_FIH: HIFalpha => HIFalpha_aOH; Cytosol*function_for_Catalysis(R5_HIFalpha_hydroxylation_FIH_k, FIH, O2, R5_HIFalpha_hydroxylation_FIH_Km, HIFalpha, R5_HIFalpha_hydroxylation_FIH_Km1); R5_HIFalpha_hydroxylation_FIH is "R5-HIFalpha_hydroxylation_FIH";  // modifiers: FIH, O2
    R5_HIFalpha_hydroxylation_FIH_k = 0.4; R5_HIFalpha_hydroxylation_FIH_Km = 90; R5_HIFalpha_hydroxylation_FIH_Km1 = 20;
  R6_HIFalpha_aOH_dehydroxylation: HIFalpha_aOH => HIFalpha; Cytosol*R6_HIFalpha_aOH_dehydroxylation_k1*HIFalpha_aOH; R6_HIFalpha_aOH_dehydroxylation is "R6-HIFalpha-aOH_dehydroxylation";
    R6_HIFalpha_aOH_dehydroxylation_k1 = 0.001;
  R7_HIFalpha_aOH_hydroxylation_PHD: HIFalpha_aOH => HIFalpha_aOHpOH; Cytosol*function_for_Catalysis(R7_HIFalpha_aOH_hydroxylation_PHD_k, PHD, O2, R7_HIFalpha_aOH_hydroxylation_PHD_Km, HIFalpha_aOH, R7_HIFalpha_aOH_hydroxylation_PHD_Km1); R7_HIFalpha_aOH_hydroxylation_PHD is "R7-HIFalpha-aOH_hydroxylation_PHD";  // modifiers: PHD, O2
    R7_HIFalpha_aOH_hydroxylation_PHD_k = 0.003; R7_HIFalpha_aOH_hydroxylation_PHD_Km = 250; R7_HIFalpha_aOH_hydroxylation_PHD_Km1 = 100;
  R8_HIFalpha_aOHpOH_degradation: HIFalpha_aOHpOH => ; Cytosol*function_fro_SMM(R8_HIFalpha_aOHpOH_degradation_kcat, VHL, HIFalpha_aOHpOH, R8_HIFalpha_aOHpOH_degradation_Km); R8_HIFalpha_aOHpOH_degradation is "R8-HIFalpha-aOHpOH degradation";  // modifiers: VHL
    R8_HIFalpha_aOHpOH_degradation_kcat = 0.01; R8_HIFalpha_aOHpOH_degradation_Km = 150;
  R9_HIF1alpha_nuclear_import: HIFalpha => HIFalpha_n; R9_HIF1alpha_nuclear_import_k1*HIFalpha; R9_HIF1alpha_nuclear_import is "R9-HIF1alpha_nuclear_import";
    R9_HIF1alpha_nuclear_import_k1 = 0.001;
  R18_HIFalpha_n_aOH_degradation: HIFalpha_n_aOH => HIFalpha_n; Nucleus*R18_HIFalpha_n_aOH_degradation_k1*HIFalpha_n_aOH; R18_HIFalpha_n_aOH_degradation is "R18-HIFalpha_n-aOH degradation";
    R18_HIFalpha_n_aOH_degradation_k1 = 0.001;
  R19_HIFalpha_n_aOH_hydroxylation_PHD_n: HIFalpha_n_aOH => HIFalpha_n_aOHpOH; function_for_Catalysis(R19_HIFalpha_n_aOH_hydroxylation_PHD_n_k, PHD_n, O2, R19_HIFalpha_n_aOH_hydroxylation_PHD_n_Km, HIFalpha_n_aOH, R19_HIFalpha_n_aOH_hydroxylation_PHD_n_Km1); R19_HIFalpha_n_aOH_hydroxylation_PHD_n is "R19-HIFalpha_n-aOH_hydroxylation_PHD_n";  // modifiers: PHD_n, O2
    R19_HIFalpha_n_aOH_hydroxylation_PHD_n_k = 0.003; R19_HIFalpha_n_aOH_hydroxylation_PHD_n_Km = 250; R19_HIFalpha_n_aOH_hydroxylation_PHD_n_Km1 = 100;
  R20_HIFalpha_n_aOHpOH_degradation: HIFalpha_n_aOHpOH => ; function_fro_SMM(R20_HIFalpha_n_aOHpOH_degradation_kcat, VHL, HIFalpha_n_aOHpOH, R20_HIFalpha_n_aOHpOH_degradation_Km); R20_HIFalpha_n_aOHpOH_degradation is "R20-HIFalpha_n-aOHpOH degradation";  // modifiers: VHL
    R20_HIFalpha_n_aOHpOH_degradation_kcat = 0.01; R20_HIFalpha_n_aOHpOH_degradation_Km = 150;
  R21_HIF1alphan_HIF1B_binding: HIFalpha_n + HIFB -> HIFd; Nucleus*(R21_HIF1alphan_HIF1B_binding_k1*HIFalpha_n*HIFB - R21_HIF1alphan_HIF1B_binding_k2*HIFd); R21_HIF1alphan_HIF1B_binding is "R21-HIF1alphan_HIF1B binding";
    R21_HIF1alphan_HIF1B_binding_k1 = 0.0005; R21_HIF1alphan_HIF1B_binding_k2 = 0.01;
  R22_HIFd_HRE_binding: HIFd + HRE -> HIFd_HRE; Nucleus*(R22_HIFd_HRE_binding_k1*HIFd*HRE - R22_HIFd_HRE_binding_k2*HIFd_HRE); R22_HIFd_HRE_binding is "R22-HIFd-HRE_binding";
    R22_HIFd_HRE_binding_k1 = 0.001; R22_HIFd_HRE_binding_k2 = 0.01;
  R23_mRNA_transcription: HIFd_HRE => mRNA; R23_mRNA_transcription_k1*HIFd_HRE; R23_mRNA_transcription is "R23-mRNA transcription";
    R23_mRNA_transcription_k1 = 0.0016;
  R24_PHD_synthesis: HIFd_HRE => PHD; R24_PHD_synthesis_k1*HIFd_HRE; R24_PHD_synthesis is "R24-PHD synthesis";
    R24_PHD_synthesis_k1 = 0.002;
  R26_mRNA_degradation: mRNA => ; Cytosol*R26_mRNA_degradation_k1*mRNA; R26_mRNA_degradation is "R26-mRNA degradation";
    R26_mRNA_degradation_k1 = 0.00038;
  R27_mRNA_translation: mRNA => Protein; Cytosol*R27_mRNA_translation_k1*mRNA; R27_mRNA_translation is "R27-mRNA_translation";
    R27_mRNA_translation_k1 = 0.009;
  R28_Protein_degradation: Protein => ; Cytosol*R28_Protein_degradation_k1*Protein; R28_Protein_degradation is "R28-Protein degradation";
    R28_Protein_degradation_k1 = 0.0001;
  R29_Protein_Luciferase_activity: Protein => Luciferase; Cytosol*R29_Protein_Luciferase_activity_k1*Protein; R29_Protein_Luciferase_activity is "R29-Protein Luciferase activity";
    R29_Protein_Luciferase_activity_k1 = 0.02;
  R11_PHD_nuclear_import: PHD => PHD_n; R11_PHD_nuclear_import_k1*PHD; R11_PHD_nuclear_import is "R11-PHD nuclear import";
    R11_PHD_nuclear_import_k1 = 0.0001;
  R12_PHD_n_nuclear_export: PHD_n => PHD; R12_PHD_n_nuclear_export_k1*PHD_n; R12_PHD_n_nuclear_export is "R12-PHD_n nuclear export";
    R12_PHD_n_nuclear_export_k1 = 0.0001;

  // Events:
  hypoxia: at (time > 0): O2 = O2*(1 - x/21);

  // Unit definitions:
  unit substance = 1e-9 mole;
end
