// SBML level 2 version 4
// dcterms:bibliographicCitation: urn:miriam:pubmed:23390316

function Constant_flux__irreversible(v)
  v;
end
Constant_flux__irreversible is "Constant flux (irreversible)";

function function_for_Catalysis(k, Enzyme, O2, Km, S, Km1)
  k*Enzyme*(O2/(Km + O2))*(S/(Km1 + S));
end

model Nguyen2013___Dynamic_model_of_HIF_regulation_in_hypoxia()
  // Nguyen2013 - Dynamic model of HIF regulation in hypoxia (reduced model)
  // Its a mathematcial model explaining regulation of HIF via FIH and oxygen. Model is further validated by Experimental data and various hypothesis has been tested on the same.
  // isDescribedBy pubmed:23390316
  // hasProperty GO:0018126
  // hasProperty MAMO:0000046
  // hasProperty GO:0097411
  // hasTaxon taxonomy:9606

  // Compartments:
  compartment Cytosol = 1;
  compartment Nucleus = 1;

  // Species:
  species HIFalpha in Cytosol = 5;
  species FIH in Cytosol = 110;
  species HIFalpha_aOH in Cytosol = 0; HIFalpha_aOH is "HIFalpha-aOH";
  species O2 in Cytosol = 100;
  species HIFalpha_n in Nucleus = 0;
  species HIFalpha_aOH_n in Nucleus = 0; HIFalpha_aOH_n is "HIFalpha-aOH_n";
  species FIH_n in Nucleus = 40;

  // Parameters:
  HIF_tot = 0;
  x = 0;

  // Reactions:
  R1_HIF1alpha_synthesis: => HIFalpha; Cytosol*Constant_flux__irreversible(v); R1_HIF1alpha_synthesis is "R1-HIF1alpha synthesis";
    v = 0.005;
  R2_HIFalpha_cons_degradation: HIFalpha => ; Cytosol*R2_HIFalpha_cons_degradation_k1*HIFalpha; R2_HIFalpha_cons_degradation is "R2-HIFalpha cons degradation";
    R2_HIFalpha_cons_degradation_k1 = 0.0002;
  R10_HIFalpha_n_nuclear_export: HIFalpha_n => HIFalpha; R10_HIFalpha_n_nuclear_export_k1*HIFalpha_n; R10_HIFalpha_n_nuclear_export is "R10-HIFalpha_n_nuclear_export";
    R10_HIFalpha_n_nuclear_export_k1 = 0.001;
  R13_HIFalpha_aOH_nuclear_import: HIFalpha_aOH => HIFalpha_aOH_n; R13_HIFalpha_aOH_nuclear_import_k1*HIFalpha_aOH; R13_HIFalpha_aOH_nuclear_import is "R13-HIFalpha-aOH_nuclear_import";
    R13_HIFalpha_aOH_nuclear_import_k1 = 0.0002;
  R14_HIFalpha_aOH_n_nuclear_export: HIFalpha_aOH_n => HIFalpha_aOH; R14_HIFalpha_aOH_n_nuclear_export_k1*HIFalpha_aOH_n; R14_HIFalpha_aOH_n_nuclear_export is "R14-HIFalpha-aOH_n_nuclear_export";
    R14_HIFalpha_aOH_n_nuclear_export_k1 = 0.0001;
  R17_HIFalpha_n_hydroxylation_FIH_n: HIFalpha_n => HIFalpha_aOH_n; function_for_Catalysis(R17_HIFalpha_n_hydroxylation_FIH_n_k, FIH_n, O2, R17_HIFalpha_n_hydroxylation_FIH_n_Km, HIFalpha_n, R17_HIFalpha_n_hydroxylation_FIH_n_Km1); R17_HIFalpha_n_hydroxylation_FIH_n is "R17-HIFalpha_n_hydroxylation_FIH_n";  // modifiers: FIH_n, O2
    R17_HIFalpha_n_hydroxylation_FIH_n_k = 0.4; R17_HIFalpha_n_hydroxylation_FIH_n_Km = 90; R17_HIFalpha_n_hydroxylation_FIH_n_Km1 = 20;
  R5_HIFalpha_hydroxylation_FIH: HIFalpha => HIFalpha_aOH; Cytosol*function_for_Catalysis(R5_HIFalpha_hydroxylation_FIH_k, FIH, O2, R5_HIFalpha_hydroxylation_FIH_Km, HIFalpha, R5_HIFalpha_hydroxylation_FIH_Km1); R5_HIFalpha_hydroxylation_FIH is "R5-HIFalpha_hydroxylation_FIH";  // modifiers: FIH, O2
    R5_HIFalpha_hydroxylation_FIH_k = 0.4; R5_HIFalpha_hydroxylation_FIH_Km = 90; R5_HIFalpha_hydroxylation_FIH_Km1 = 20;
  R6_HIFalpha_aOH_dehydroxylation: HIFalpha_aOH => HIFalpha; Cytosol*R6_HIFalpha_aOH_dehydroxylation_k1*HIFalpha_aOH; R6_HIFalpha_aOH_dehydroxylation is "R6-HIFalpha-aOH_dehydroxylation";
    R6_HIFalpha_aOH_dehydroxylation_k1 = 0.001;
  R9_HIF1alpha_nuclear_import: HIFalpha => HIFalpha_n; R9_HIF1alpha_nuclear_import_k1*HIFalpha; R9_HIF1alpha_nuclear_import is "R9-HIF1alpha_nuclear_import";
    R9_HIF1alpha_nuclear_import_k1 = 0.001;
  R18_HIFalpha_n_aOH_degradation: HIFalpha_aOH_n => HIFalpha_n; Nucleus*R18_HIFalpha_n_aOH_degradation_k1*HIFalpha_aOH_n; R18_HIFalpha_n_aOH_degradation is "R18-HIFalpha_n-aOH degradation";
    R18_HIFalpha_n_aOH_degradation_k1 = 0.001;
  R2c_HIFalpha_aOH_degradation: HIFalpha_aOH => ; Cytosol*R2c_HIFalpha_aOH_degradation_k1*HIFalpha_aOH; R2c_HIFalpha_aOH_degradation is "R2c-HIFalpha-aOH degradation";
    R2c_HIFalpha_aOH_degradation_k1 = 0.1;
  R2d_HIFalpha_aOH_n_degradation: HIFalpha_aOH_n => ; Nucleus*R2d_HIFalpha_aOH_n_degradation_k1*HIFalpha_aOH_n; R2d_HIFalpha_aOH_n_degradation is "R2d-HIFalpha_aOH_n degradation";
    R2d_HIFalpha_aOH_n_degradation_k1 = 0.1;
  R2b_HIFalpha_n_degradation: HIFalpha_n => ; Nucleus*R2b_HIFalpha_n_degradation_k1*HIFalpha_n; R2b_HIFalpha_n_degradation is "R2b-HIFalpha_n degradation";
    R2b_HIFalpha_n_degradation_k1 = 0.1;

  // Events:
  hypoxia: at (time > 0): O2 = O2*(1 - x/21);

  // Unit definitions:
  unit substance = 1e-9 mole;
end
