// SBML level 3 version 1

model stseranidou2024()
  // Nucleus Pulposus Regulatory Network
  // We have added and new protein
  // isDescribedBy doi:10.1101/2024.09.18.613636
  // hasProperty mamo:MAMO_0000186
  // biomodels.db:MODEL2411040001

  // Compartments:
  compartment cell = 1 liter; cell is "Nucleus Pulposus Cell";

  // Species:
  species ACAN in cell = 0.3745401;  // substance in molar
  species COL1A in cell = 0.9507143;  // substance in molar
  species COL2A in cell = 0.7319939;  // substance in molar
  species COL10A1 in cell = 0.5986585;  // substance in molar
  species IFN_gamma in cell = 0.1560186; IFN_gamma is "IFN-γ";  // substance in molar
  species TNF in cell = 0.1559945;  // substance in molar
  species IL_1alpha in cell = 0.05808361; IL_1alpha is "IL-1α";  // substance in molar
  species IL_1beta in cell = 0.8661761; IL_1beta is "IL-1β";  // substance in molar
  species IL_6 in cell = 0.601115; IL_6 is "IL-6";  // substance in molar
  species IL_8 in cell = 0.7080726; IL_8 is "IL-8";  // substance in molar
  species IL_12A in cell = 0.02058449; IL_12A is "IL-12A";  // substance in molar
  species IL_17A in cell = 0.9699099; IL_17A is "IL-17A";  // substance in molar
  species IL_18 in cell = 0.8324426; IL_18 is "IL-18";  // substance in molar
  species IL_1RA in cell = 0.2123391; IL_1RA is "IL-1RA";  // substance in molar
  species IL_4 in cell = 0.181825; IL_4 is "IL-4";  // substance in molar
  species IL_10 in cell = 0.1834045; IL_10 is "IL-10";  // substance in molar
  species CCL in cell = 0.3042422;  // substance in molar
  species CCL22 in cell = 0.5247564;  // substance in molar
  species TGF_beta in cell = 0.431945; TGF_beta is "TGF-β";  // substance in molar
  species CCN2 in cell = 0.2912291;  // substance in molar
  species IGF1 in cell = 0.6118529;  // substance in molar
  species CSF2 in cell = 0.1394939;  // substance in molar
  species GDF5 in cell = 0.2921446;  // substance in molar
  species PGRN in cell = 0.3663618;  // substance in molar
  species MMP1 in cell = 0.45607;  // substance in molar
  species MMP2 in cell = 0.785176;  // substance in molar
  species MMP3 in cell = 0.1996738;  // substance in molar
  species MMP9 in cell = 0.5142344;  // substance in molar
  species MMP13 in cell = 0.5924146;  // substance in molar
  species ADAMTS4_5 in cell = 0.04645041; ADAMTS4_5 is "ADAMTS4/5";  // substance in molar
  species TIMP1_2 in cell = 0.6075449; TIMP1_2 is "TIMP1/2";  // substance in molar
  species TIMP3 in cell = 0.1705241;  // substance in molar
  species VEGF in cell = 0.06505159;  // substance in molar

  // Parameters:
  gamma = 1 second_custom;
  h = 10 dimensionless;

  // Rate rules:
  ACAN' = (-exp(0.5*h) + exp(-h*((1 + 5)/5*((IL_4 + IL_10 + TGF_beta + IGF1 + GDF5)/(1 + IL_4 + IL_10 + TGF_beta + IGF1 + GDF5))*(1 - (1 + 6)/6*((TNF + IL_1beta + IL_6 + IL_17A + IL_18 + MMP2)/(1 + TNF + IL_1beta + IL_6 + IL_17A + IL_18 + MMP2))) - 0.5)))/((1 - exp(0.5*h))*(1 + exp(-h*((1 + 5)/5*((IL_4 + IL_10 + TGF_beta + IGF1 + GDF5)/(1 + IL_4 + IL_10 + TGF_beta + IGF1 + GDF5))*(1 - (1 + 6)/6*((TNF + IL_1beta + IL_6 + IL_17A + IL_18 + MMP2)/(1 + TNF + IL_1beta + IL_6 + IL_17A + IL_18 + MMP2))) - 0.5)))) - gamma*ACAN;
  COL1A' = (-exp(0.5*h) + exp(-h*((1 + 1)/1*(IL_1beta/(1 + IL_1beta))*(1 - (1 + 1)/1*(TNF/(1 + TNF))) - 0.5)))/((1 - exp(0.5*h))*(1 + exp(-h*((1 + 1)/1*(IL_1beta/(1 + IL_1beta))*(1 - (1 + 1)/1*(TNF/(1 + TNF))) - 0.5)))) - gamma*COL1A;
  COL2A' = (-exp(0.5*h) + exp(-h*((1 + 5)/5*((IL_4 + IL_10 + TGF_beta + IGF1 + GDF5)/(1 + IL_4 + IL_10 + TGF_beta + IGF1 + GDF5))*(1 - (1 + 5)/5*((TNF + IL_1beta + IL_6 + IL_17A + IL_18)/(1 + TNF + IL_1beta + IL_6 + IL_17A + IL_18))) - 0.5)))/((1 - exp(0.5*h))*(1 + exp(-h*((1 + 5)/5*((IL_4 + IL_10 + TGF_beta + IGF1 + GDF5)/(1 + IL_4 + IL_10 + TGF_beta + IGF1 + GDF5))*(1 - (1 + 5)/5*((TNF + IL_1beta + IL_6 + IL_17A + IL_18)/(1 + TNF + IL_1beta + IL_6 + IL_17A + IL_18))) - 0.5)))) - gamma*COL2A;
  COL10A1' = (-exp(0.5*h) + exp(-h*((1 + 1)/1*(IL_1beta/(1 + IL_1beta))*(1 - (1 + 1)/1*(IL_10/(1 + IL_10))) - 0.5)))/((1 - exp(0.5*h))*(1 + exp(-h*((1 + 1)/1*(IL_1beta/(1 + IL_1beta))*(1 - (1 + 1)/1*(IL_10/(1 + IL_10))) - 0.5)))) - gamma*COL10A1;
  IFN_gamma' = (-exp(0.5*h) + exp(-h*((1 + 1)/1*(IL_1beta/(1 + IL_1beta))*(1 - (1 + 1)/1*(IL_4/(1 + IL_4))) - 0.5)))/((1 - exp(0.5*h))*(1 + exp(-h*((1 + 1)/1*(IL_1beta/(1 + IL_1beta))*(1 - (1 + 1)/1*(IL_4/(1 + IL_4))) - 0.5)))) - gamma*IFN_gamma;
  TNF' = (-exp(0.5*h) + exp(-h*((1 + 3)/3*((IL_1beta + IL_6 + IL_17A)/(1 + IL_1beta + IL_6 + IL_17A))*(1 - (1 + 5)/5*((IL_4 + IL_10 + TGF_beta + GDF5 + TIMP3)/(1 + IL_4 + IL_10 + TGF_beta + GDF5 + TIMP3))) - 0.5)))/((1 - exp(0.5*h))*(1 + exp(-h*((1 + 3)/3*((IL_1beta + IL_6 + IL_17A)/(1 + IL_1beta + IL_6 + IL_17A))*(1 - (1 + 5)/5*((IL_4 + IL_10 + TGF_beta + GDF5 + TIMP3)/(1 + IL_4 + IL_10 + TGF_beta + GDF5 + TIMP3))) - 0.5)))) - gamma*TNF;
  IL_1alpha' = (-exp(0.5*h) + exp(-h*((1 + 1)/1*(IL_1beta/(1 + IL_1beta))*(1 - (1 + 2)/2*((IL_4 + IL_10)/(1 + IL_4 + IL_10))) - 0.5)))/((1 - exp(0.5*h))*(1 + exp(-h*((1 + 1)/1*(IL_1beta/(1 + IL_1beta))*(1 - (1 + 2)/2*((IL_4 + IL_10)/(1 + IL_4 + IL_10))) - 0.5)))) - gamma*IL_1alpha;
  IL_1beta' = (-exp(0.5*h) + exp(-h*((1 + 3)/3*((TNF + IL_1beta + IL_17A)/(1 + TNF + IL_1beta + IL_17A))*(1 - (1 + 4)/4*((IL_4 + IL_10 + TGF_beta + GDF5)/(1 + IL_4 + IL_10 + TGF_beta + GDF5))) - 0.5)))/((1 - exp(0.5*h))*(1 + exp(-h*((1 + 3)/3*((TNF + IL_1beta + IL_17A)/(1 + TNF + IL_1beta + IL_17A))*(1 - (1 + 4)/4*((IL_4 + IL_10 + TGF_beta + GDF5)/(1 + IL_4 + IL_10 + TGF_beta + GDF5))) - 0.5)))) - gamma*IL_1beta;
  IL_6' = (-exp(0.5*h) + exp(-h*((1 + 7)/7*((TNF + IL_1beta + IL_6 + IL_8 + IL_17A + IL_18 + IL_4)/(1 + TNF + IL_1beta + IL_6 + IL_8 + IL_17A + IL_18 + IL_4))*(1 - (1 + 1)/1*(IL_10/(1 + IL_10))) - 0.5)))/((1 - exp(0.5*h))*(1 + exp(-h*((1 + 7)/7*((TNF + IL_1beta + IL_6 + IL_8 + IL_17A + IL_18 + IL_4)/(1 + TNF + IL_1beta + IL_6 + IL_8 + IL_17A + IL_18 + IL_4))*(1 - (1 + 1)/1*(IL_10/(1 + IL_10))) - 0.5)))) - gamma*IL_6;
  IL_8' = (-exp(0.5*h) + exp(-h*((1 + 4)/4*((TNF + IL_1beta + IL_6 + IL_17A)/(1 + TNF + IL_1beta + IL_6 + IL_17A))*(1 - (1 + 3)/3*((IL_6 + IL_4 + IL_10)/(1 + IL_6 + IL_4 + IL_10))) - 0.5)))/((1 - exp(0.5*h))*(1 + exp(-h*((1 + 4)/4*((TNF + IL_1beta + IL_6 + IL_17A)/(1 + TNF + IL_1beta + IL_6 + IL_17A))*(1 - (1 + 3)/3*((IL_6 + IL_4 + IL_10)/(1 + IL_6 + IL_4 + IL_10))) - 0.5)))) - gamma*IL_8;
  IL_12A' = (-exp(0.5*h) + exp(-h*((1 + 1)/1*(IL_17A/(1 + IL_17A))*(1 - (1 + 3)/3*((IL_1beta + IL_4 + IL_10)/(1 + IL_1beta + IL_4 + IL_10))) - 0.5)))/((1 - exp(0.5*h))*(1 + exp(-h*((1 + 1)/1*(IL_17A/(1 + IL_17A))*(1 - (1 + 3)/3*((IL_1beta + IL_4 + IL_10)/(1 + IL_1beta + IL_4 + IL_10))) - 0.5)))) - gamma*IL_12A;
  IL_17A' = (-exp(0.5*h) + exp(-h*((1 + 1)/1*(TNF/(1 + TNF))*(1 - (1 + 4)/4*((IL_1beta + IL_4 + IL_10 + PGRN)/(1 + IL_1beta + IL_4 + IL_10 + PGRN))) - 0.5)))/((1 - exp(0.5*h))*(1 + exp(-h*((1 + 1)/1*(TNF/(1 + TNF))*(1 - (1 + 4)/4*((IL_1beta + IL_4 + IL_10 + PGRN)/(1 + IL_1beta + IL_4 + IL_10 + PGRN))) - 0.5)))) - gamma*IL_17A;
  IL_18' = (-exp(0.5*h) + exp(-h*((1 + 1)/1*(IL_1beta/(1 + IL_1beta))*(1 - (1 + 2)/2*((IL_4 + IL_10)/(1 + IL_4 + IL_10))) - 0.5)))/((1 - exp(0.5*h))*(1 + exp(-h*((1 + 1)/1*(IL_1beta/(1 + IL_1beta))*(1 - (1 + 2)/2*((IL_4 + IL_10)/(1 + IL_4 + IL_10))) - 0.5)))) - gamma*IL_18;
  IL_1RA' = (-exp(0.5*h) + exp(-h*((1 + 1)/1*(IL_1beta/(1 + IL_1beta)) - 0.5)))/((1 - exp(0.5*h))*(1 + exp(-h*((1 + 1)/1*(IL_1beta/(1 + IL_1beta)) - 0.5)))) - gamma*IL_1RA;
  IL_4' = (-exp(0.5*h) + exp(-h*((1 + 2)/2*((IL_1beta + TGF_beta)/(1 + IL_1beta + TGF_beta))*(1 - (1 + 1)/1*(IL_17A/(1 + IL_17A))) - 0.5)))/((1 - exp(0.5*h))*(1 + exp(-h*((1 + 2)/2*((IL_1beta + TGF_beta)/(1 + IL_1beta + TGF_beta))*(1 - (1 + 1)/1*(IL_17A/(1 + IL_17A))) - 0.5)))) - gamma*IL_4;
  IL_10' = (-exp(0.5*h) + exp(-h*((1 + 4)/4*((IL_1beta + IL_17A + IL_4 + PGRN)/(1 + IL_1beta + IL_17A + IL_4 + PGRN)) - 0.5)))/((1 - exp(0.5*h))*(1 + exp(-h*((1 + 4)/4*((IL_1beta + IL_17A + IL_4 + PGRN)/(1 + IL_1beta + IL_17A + IL_4 + PGRN)) - 0.5)))) - gamma*IL_10;
  CCL' = (-exp(0.5*h) + exp(-h*((1 + 3)/3*((TNF + IL_1beta + IL_17A)/(1 + TNF + IL_1beta + IL_17A))*(1 - (1 + 3)/3*((IL_4 + IL_10 + TGF_beta)/(1 + IL_4 + IL_10 + TGF_beta))) - 0.5)))/((1 - exp(0.5*h))*(1 + exp(-h*((1 + 3)/3*((TNF + IL_1beta + IL_17A)/(1 + TNF + IL_1beta + IL_17A))*(1 - (1 + 3)/3*((IL_4 + IL_10 + TGF_beta)/(1 + IL_4 + IL_10 + TGF_beta))) - 0.5)))) - gamma*CCL;
  CCL22' = (-exp(0.5*h) + exp(-h*((1 + 1)/1*(IL_4/(1 + IL_4))*(1 - (1 + 2)/2*((IL_1beta + IL_10)/(1 + IL_1beta + IL_10))) - 0.5)))/((1 - exp(0.5*h))*(1 + exp(-h*((1 + 1)/1*(IL_4/(1 + IL_4))*(1 - (1 + 2)/2*((IL_1beta + IL_10)/(1 + IL_1beta + IL_10))) - 0.5)))) - gamma*CCL22;
  TGF_beta' = (-exp(0.5*h) + exp(-h*(1 - (1 + 2)/2*((TNF + IL_1beta)/(1 + TNF + IL_1beta)) - 0.5)))/((1 - exp(0.5*h))*(1 + exp(-h*(1 - (1 + 2)/2*((TNF + IL_1beta)/(1 + TNF + IL_1beta)) - 0.5)))) - gamma*TGF_beta;
  CCN2' = (-exp(0.5*h) + exp(-h*((1 + 1)/1*(TGF_beta/(1 + TGF_beta)) - 0.5)))/((1 - exp(0.5*h))*(1 + exp(-h*((1 + 1)/1*(TGF_beta/(1 + TGF_beta)) - 0.5)))) - gamma*CCN2;
  IGF1' = (-exp(0.5*h) + exp(-h*((1 + 1)/1*(IL_4/(1 + IL_4))*(1 - (1 + 2)/2*((IL_1beta + IL_6)/(1 + IL_1beta + IL_6))) - 0.5)))/((1 - exp(0.5*h))*(1 + exp(-h*((1 + 1)/1*(IL_4/(1 + IL_4))*(1 - (1 + 2)/2*((IL_1beta + IL_6)/(1 + IL_1beta + IL_6))) - 0.5)))) - gamma*IGF1;
  CSF2' = (-exp(0.5*h) + exp(-h*((1 + 1)/1*(IL_1beta/(1 + IL_1beta))*(1 - (1 + 1)/1*(IL_10/(1 + IL_10))) - 0.5)))/((1 - exp(0.5*h))*(1 + exp(-h*((1 + 1)/1*(IL_1beta/(1 + IL_1beta))*(1 - (1 + 1)/1*(IL_10/(1 + IL_10))) - 0.5)))) - gamma*CSF2;
  GDF5' = (-exp(0.5*h) + exp(-h*(1 - (1 + 1)/1*(IL_1beta/(1 + IL_1beta)) - 0.5)))/((1 - exp(0.5*h))*(1 + exp(-h*(1 - (1 + 1)/1*(IL_1beta/(1 + IL_1beta)) - 0.5)))) - gamma*GDF5;
  PGRN' = (-exp(0.5*h) + exp(-h*(0 - 0.5)))/((1 - exp(0.5*h))*(1 + exp(-h*(0 - 0.5)))) - gamma*PGRN;
  MMP1' = (-exp(0.5*h) + exp(-h*((1 + 5)/5*((TNF + IL_1beta + IL_17A + IL_18 + MMP3)/(1 + TNF + IL_1beta + IL_17A + IL_18 + MMP3))*(1 - (1 + 2)/2*((TGF_beta + TIMP1_2)/(1 + TGF_beta + TIMP1_2))) - 0.5)))/((1 - exp(0.5*h))*(1 + exp(-h*((1 + 5)/5*((TNF + IL_1beta + IL_17A + IL_18 + MMP3)/(1 + TNF + IL_1beta + IL_17A + IL_18 + MMP3))*(1 - (1 + 2)/2*((TGF_beta + TIMP1_2)/(1 + TGF_beta + TIMP1_2))) - 0.5)))) - gamma*MMP1;
  MMP2' = (-exp(0.5*h) + exp(-h*((1 + 2)/2*((IL_1beta + TIMP1_2)/(1 + IL_1beta + TIMP1_2))*(1 - (1 + 2)/2*((TGF_beta + IGF1)/(1 + TGF_beta + IGF1))) - 0.5)))/((1 - exp(0.5*h))*(1 + exp(-h*((1 + 2)/2*((IL_1beta + TIMP1_2)/(1 + IL_1beta + TIMP1_2))*(1 - (1 + 2)/2*((TGF_beta + IGF1)/(1 + TGF_beta + IGF1))) - 0.5)))) - gamma*MMP2;
  MMP3' = (-exp(0.5*h) + exp(-h*((1 + 5)/5*((TNF + IL_1beta + IL_6 + IL_17A + IL_18)/(1 + TNF + IL_1beta + IL_6 + IL_17A + IL_18))*(1 - (1 + 8)/8*((IL_1RA + IL_4 + TGF_beta + CCN2 + IGF1 + GDF5 + TIMP1_2 + TIMP3)/(1 + IL_1RA + IL_4 + TGF_beta + CCN2 + IGF1 + GDF5 + TIMP1_2 + TIMP3))) - 0.5)))/((1 - exp(0.5*h))*(1 + exp(-h*((1 + 5)/5*((TNF + IL_1beta + IL_6 + IL_17A + IL_18)/(1 + TNF + IL_1beta + IL_6 + IL_17A + IL_18))*(1 - (1 + 8)/8*((IL_1RA + IL_4 + TGF_beta + CCN2 + IGF1 + GDF5 + TIMP1_2 + TIMP3)/(1 + IL_1RA + IL_4 + TGF_beta + CCN2 + IGF1 + GDF5 + TIMP1_2 + TIMP3))) - 0.5)))) - gamma*MMP3;
  MMP9' = (-exp(0.5*h) + exp(-h*((1 + 3)/3*((TNF + MMP1 + MMP2)/(1 + TNF + MMP1 + MMP2))*(1 - (1 + 1)/1*(TGF_beta/(1 + TGF_beta))) - 0.5)))/((1 - exp(0.5*h))*(1 + exp(-h*((1 + 3)/3*((TNF + MMP1 + MMP2)/(1 + TNF + MMP1 + MMP2))*(1 - (1 + 1)/1*(TGF_beta/(1 + TGF_beta))) - 0.5)))) - gamma*MMP9;
  MMP13' = (-exp(0.5*h) + exp(-h*((1 + 6)/6*((IFN_gamma + TNF + IL_1beta + IL_6 + IL_8 + IL_18)/(1 + IFN_gamma + TNF + IL_1beta + IL_6 + IL_8 + IL_18))*(1 - (1 + 4)/4*((IL_1RA + TGF_beta + CCN2 + TIMP1_2)/(1 + IL_1RA + TGF_beta + CCN2 + TIMP1_2))) - 0.5)))/((1 - exp(0.5*h))*(1 + exp(-h*((1 + 6)/6*((IFN_gamma + TNF + IL_1beta + IL_6 + IL_8 + IL_18)/(1 + IFN_gamma + TNF + IL_1beta + IL_6 + IL_8 + IL_18))*(1 - (1 + 4)/4*((IL_1RA + TGF_beta + CCN2 + TIMP1_2)/(1 + IL_1RA + TGF_beta + CCN2 + TIMP1_2))) - 0.5)))) - gamma*MMP13;
  ADAMTS4_5' = (-exp(0.5*h) + exp(-h*((1 + 4)/4*((TNF + IL_1beta + IL_6 + VEGF)/(1 + TNF + IL_1beta + IL_6 + VEGF))*(1 - (1 + 3)/3*((IL_1RA + TGF_beta + TIMP3)/(1 + IL_1RA + TGF_beta + TIMP3))) - 0.5)))/((1 - exp(0.5*h))*(1 + exp(-h*((1 + 4)/4*((TNF + IL_1beta + IL_6 + VEGF)/(1 + TNF + IL_1beta + IL_6 + VEGF))*(1 - (1 + 3)/3*((IL_1RA + TGF_beta + TIMP3)/(1 + IL_1RA + TGF_beta + TIMP3))) - 0.5)))) - gamma*ADAMTS4_5;
  TIMP1_2' = (-exp(0.5*h) + exp(-h*((1 + 4)/4*((IL_6 + IL_10 + TGF_beta + IGF1)/(1 + IL_6 + IL_10 + TGF_beta + IGF1))*(1 - (1 + 1)/1*(TNF/(1 + TNF))) - 0.5)))/((1 - exp(0.5*h))*(1 + exp(-h*((1 + 4)/4*((IL_6 + IL_10 + TGF_beta + IGF1)/(1 + IL_6 + IL_10 + TGF_beta + IGF1))*(1 - (1 + 1)/1*(TNF/(1 + TNF))) - 0.5)))) - gamma*TIMP1_2;
  TIMP3' = (-exp(0.5*h) + exp(-h*((1 + 1)/1*(TGF_beta/(1 + TGF_beta))*(1 - (1 + 1)/1*(IL_17A/(1 + IL_17A))) - 0.5)))/((1 - exp(0.5*h))*(1 + exp(-h*((1 + 1)/1*(TGF_beta/(1 + TGF_beta))*(1 - (1 + 1)/1*(IL_17A/(1 + IL_17A))) - 0.5)))) - gamma*TIMP3;
  VEGF' = (-exp(0.5*h) + exp(-h*((1 + 6)/6*((IL_1beta + IL_6 + IL_17A + MMP3 + MMP13 + ADAMTS4_5)/(1 + IL_1beta + IL_6 + IL_17A + MMP3 + MMP13 + ADAMTS4_5))*(1 - (1 + 1)/1*(TIMP3/(1 + TIMP3))) - 0.5)))/((1 - exp(0.5*h))*(1 + exp(-h*((1 + 6)/6*((IL_1beta + IL_6 + IL_17A + MMP3 + MMP13 + ADAMTS4_5)/(1 + IL_1beta + IL_6 + IL_17A + MMP3 + MMP13 + ADAMTS4_5))*(1 - (1 + 1)/1*(TIMP3/(1 + TIMP3))) - 0.5)))) - gamma*VEGF;

  // Unit definitions:
  unit mole_custom = mole;
  unit liter = litre;
  unit second_custom = second;
  unit molar = mole / litre;
end
