// SBML level 2 version 4
// dcterms:bibliographicCitation: urn:miriam:pubmed:20492473

model Orfeo2010___Simulating_the_effects_of_fondaparinux_and_Rivaroxaban_on_thrombin_generation()
  // Orfeo2010 - Simulating the effects of fondaparinux and Rivaroxaban on thrombin generation
  // Reused mathematical model (Hockin et al., 2002) of blood coagulation simulating the effects of coagulation factor inhibitors, fondaparinux (synthetic heparin) and Rivaroxaban. Fondaparinux (Fpx) simulated to reversibly bind with ATIII before irreversibly binding to Xa, IXa, mIIa, TF:VIIa, Xa:Va and IIa. Rivaroxaban simulated to bind reversibly to Xa and Xa:Va.
  // hasPart kegg.compound:D07086
  // hasPart kegg.drug:D01844
  // hasPart CHEBI:61033
  // hasPart CHEBI:68579
  // isVersionOf biomodels.db:BIOMD0000000335
  // isVersionOf GO:0007596

  // Compartments:
  compartment compartment_1 = 1;

  // Species:
  species TF in compartment_1 = 2.5e-11;  // uniprot:P13726
  species TF_VII in compartment_1 = 0;  // hasPart uniprot:P08709; hasPart uniprot:P13726
  species VII in compartment_1 = 1e-8;  // uniprot:P08709
  species TF_VIIa in compartment_1 = 0;  // hasPart uniprot:P13726; hasPart uniprot:P08709
  species VIIa in compartment_1 = 1e-10;  // isVersionOf uniprot:P08709
  species Xa in compartment_1 = 0;  // isVersionOf uniprot:P00742
  species IIa in compartment_1 = 0;  // isVersionOf uniprot:P00734
  species TF_VIIa_X in compartment_1 = 0;  // hasPart uniprot:P00742; hasPart uniprot:P13726; hasPart uniprot:P08709
  species X in compartment_1 = 1.6e-7;  // uniprot:P00742
  species TF_VIIa_Xa in compartment_1 = 0;  // hasPart uniprot:P00742; hasPart uniprot:P08709; hasPart uniprot:P13726
  species IX in compartment_1 = 9e-8;  // uniprot:P00740
  species TF_VIIa_IX in compartment_1 = 0;  // hasPart uniprot:P00740; hasPart uniprot:P13726; hasPart uniprot:P08709
  species IXa in compartment_1 = 0;  // isVersionOf uniprot:P00740
  species II in compartment_1 = 1.4e-6;  // uniprot:P00734
  species VIII in compartment_1 = 7e-10;  // uniprot:P00451
  species VIIIa in compartment_1 = 0;  // isVersionOf uniprot:P00451
  species IXa_VIIIa in compartment_1 = 0;  // hasPart uniprot:P00451; hasPart uniprot:P00740
  species IXa_VIIIa_X in compartment_1 = 0;  // hasPart uniprot:P00742; hasPart uniprot:P00740; hasPart uniprot:P00451
  species VIIIa1_L in compartment_1 = 0;  // isPartOf uniprot:P00451
  species VIIIa2 in compartment_1 = 0;  // isPartOf uniprot:P00451
  species V in compartment_1 = 2e-8;  // uniprot:P12259
  species Va in compartment_1 = 0;  // isVersionOf uniprot:P12259
  species Xa_Va in compartment_1 = 0;  // hasPart uniprot:P12259; hasPart uniprot:P00742
  species Xa_Va_II in compartment_1 = 0;  // hasPart uniprot:P00734; hasPart uniprot:P00742; hasPart uniprot:P12259
  species mIIa in compartment_1 = 0;  // isVersionOf uniprot:P00734
  species TFPI in compartment_1 = 2.5e-9;  // uniprot:P10646
  species Xa_TFPI in compartment_1 = 0;  // hasPart uniprot:P10646; hasPart uniprot:P00742
  species TF_VIIa_Xa_TFPI in compartment_1 = 0;  // hasPart uniprot:P00742; hasPart uniprot:P13726; hasPart uniprot:P10646; hasPart uniprot:P08709
  species ATIII in compartment_1 = 3.4e-6;  // uniprot:P01008
  species Xa_ATIII in compartment_1 = 0;  // hasPart uniprot:P00742; hasPart uniprot:P01008
  species mIIa_ATIII in compartment_1 = 0;  // hasPart uniprot:P01008; hasPart uniprot:P00734
  species IXa_ATIII in compartment_1 = 0;  // hasPart uniprot:P00740; hasPart uniprot:P01008
  species IIa_ATIII in compartment_1 = 0;  // hasPart uniprot:P00734; hasPart uniprot:P01008
  species TF_VIIa_ATIII in compartment_1 = 0;  // hasPart uniprot:P08709; hasPart uniprot:P01008; hasPart uniprot:P13726
  species Fpx in compartment_1 = 0;
  species Riva in compartment_1 = 0;
  species Riva_Xa in compartment_1 = 0; Riva_Xa is "Riva:Xa";
  species Riva_Xa_Va in compartment_1 = 0; Riva_Xa_Va is "Riva:Xa_Va";
  species Fpx_ATIII in compartment_1 = 0; Fpx_ATIII is "Fpx:ATIII";
  species Fpx_ATIII_Xa in compartment_1 = 0; Fpx_ATIII_Xa is "Fpx:ATIII:Xa";
  species Fpx_ATIII_IXa in compartment_1 = 0; Fpx_ATIII_IXa is "Fpx:ATIII:IXa";
  species Fpx_ATIII_mIIa in compartment_1 = 0; Fpx_ATIII_mIIa is "Fpx:ATIII:mIIa";
  species Fpx_ATIII_TF_VIIa in compartment_1 = 0; Fpx_ATIII_TF_VIIa is "Fpx:ATIII:TF_VIIa";
  species Fpx_ATIII_Xa_Va in compartment_1 = 0; Fpx_ATIII_Xa_Va is "Fpx:ATIII:Xa_Va";
  species Fpx_ATIII_IIa in compartment_1 = 0; Fpx_ATIII_IIa is "Fpx:ATIII:IIa";

  // Parameters:
  k1 = 0.0031;
  k2 = 3200000;
  k3 = 0.0031;
  k4 = 23000000;
  k5 = 440000;
  k6 = 13000000;
  k7 = 23000;
  k8 = 1.05;
  k9 = 25000000;
  k10 = 6;
  k11 = 19;
  k12 = 22000000;
  k13 = 2.4;
  k14 = 10000000;
  k15 = 1.8;
  k16 = 7500;
  k17 = 20000000;
  k18 = 0.005;
  k19 = 10000000;
  k20 = 0.001;
  k21 = 100000000;
  k22 = 8.2;
  k23 = 22000;
  k24 = 0.006;
  k25 = 0.001;
  k26 = 20000000;
  k27 = 0.2;
  k28 = 400000000;
  k29 = 103;
  k30 = 100000000;
  k31 = 63.5;
  k32 = 15000000;
  k33 = 0.00036;
  k34 = 900000;
  k35 = 0.00011;
  k36 = 320000000;
  k37 = 50000000;
  k38 = 1500;
  k39 = 7100;
  k40 = 490;
  k41 = 7100;
  k42 = 230;
  Inhib_01_kon = 710000;
  Inhib_02_kon = 31000;
  Inhib_03_kon = 7100;
  Inhib_04_kon = 230;
  Inhib_05_kon = 8600;
  Inhib_06_kon = 14000;
  Inhib_07_kon = 100000000;
  Inhib_07_koff = 0.04;
  Inhib_08_kon = 100000000;
  Inhib_08_koff = 0.21;
  Inhib_00_kon = 100000000;
  Inhib_00_koff = 3.6;

  // Assignment rules:
  time_minutes := time/60;

  // Reactions:
  R1: TF + VII -> TF_VII; compartment_1*(k2*TF*VII - k1*TF_VII);
  R2: TF + VIIa -> TF_VIIa; compartment_1*(k4*TF*VIIa - k3*TF_VIIa);
  R3: TF_VIIa + VII => TF_VIIa + VIIa; compartment_1*k5*TF_VIIa*VII;
  R4: Xa + VII => Xa + VIIa; compartment_1*k6*Xa*VII;
  R5: IIa + VII => IIa + VIIa; compartment_1*k7*IIa*VII;
  R6: TF_VIIa + X -> TF_VIIa_X; compartment_1*(k9*TF_VIIa*X - k8*TF_VIIa_X);
  R7: TF_VIIa + Xa -> TF_VIIa_Xa; compartment_1*(k12*TF_VIIa*Xa - k11*TF_VIIa_Xa);
  R8: TF_VIIa + IX -> TF_VIIa_IX; compartment_1*(k14*TF_VIIa*IX - k13*TF_VIIa_IX);
  R9: Xa + II => Xa + IIa; compartment_1*k16*Xa*II;
  R10: IIa + VIII => IIa + VIIIa; compartment_1*k17*IIa*VIII;
  R11: IXa + VIIIa -> IXa_VIIIa; compartment_1*(k19*IXa*VIIIa - k18*IXa_VIIIa);
  R12: IXa_VIIIa + X -> IXa_VIIIa_X; compartment_1*(k21*IXa_VIIIa*X - k20*IXa_VIIIa_X);
  R13: VIIIa -> VIIIa1_L + VIIIa2; compartment_1*(k24*VIIIa - k23*VIIIa1_L*VIIIa2);
  R14: IXa_VIIIa_X => VIIIa1_L + VIIIa2 + X + IXa; compartment_1*k25*IXa_VIIIa_X;
  R15: IXa_VIIIa => VIIIa1_L + VIIIa2 + IXa; compartment_1*k25*IXa_VIIIa;
  R16: IIa + V => IIa + Va; compartment_1*k26*IIa*V;
  R17: Xa + Va -> Xa_Va; compartment_1*(k28*Xa*Va - k27*Xa_Va);
  R18: Xa_Va + II -> Xa_Va_II; compartment_1*(k30*Xa_Va*II - k29*Xa_Va_II);
  R19: mIIa + Xa_Va => IIa + Xa_Va; compartment_1*k32*mIIa*Xa_Va;
  R20: Xa + TFPI -> Xa_TFPI; compartment_1*(k34*Xa*TFPI - k33*Xa_TFPI);
  R21: TF_VIIa_Xa + TFPI -> TF_VIIa_Xa_TFPI; compartment_1*(k36*TF_VIIa_Xa*TFPI - k35*TF_VIIa_Xa_TFPI);
  R22: TF_VIIa + Xa_TFPI => TF_VIIa_Xa_TFPI; compartment_1*k37*TF_VIIa*Xa_TFPI;
  R23: Xa + ATIII => Xa_ATIII; compartment_1*k38*Xa*ATIII;
  R24: mIIa + ATIII => mIIa_ATIII; compartment_1*k39*mIIa*ATIII;
  R25: IXa + ATIII => IXa_ATIII; compartment_1*k40*IXa*ATIII;
  R26: IIa + ATIII => IIa_ATIII; compartment_1*k41*IIa*ATIII;
  R27: TF_VIIa + ATIII => TF_VIIa_ATIII; compartment_1*k42*TF_VIIa*ATIII;
  R6b: TF_VIIa_X => TF_VIIa_Xa; compartment_1*k10*TF_VIIa_X;
  R8b: TF_VIIa_IX => TF_VIIa + IXa; compartment_1*k15*TF_VIIa_IX;
  R12b: IXa_VIIIa_X => IXa_VIIIa + Xa; compartment_1*k22*IXa_VIIIa_X;
  R18b: Xa_Va_II => Xa_Va + mIIa; compartment_1*k31*Xa_Va_II;
  Inhib_01: Fpx_ATIII + Xa => Fpx_ATIII_Xa; compartment_1*Inhib_01_kon*Fpx_ATIII*Xa;
  Inhib_02: Fpx_ATIII + IXa => Fpx_ATIII_IXa; compartment_1*Inhib_02_kon*Fpx_ATIII*IXa;
  Inhib_03: Fpx_ATIII + mIIa => Fpx_ATIII_mIIa; compartment_1*Inhib_03_kon*Fpx_ATIII*mIIa;
  Inhib_04: Fpx_ATIII + TF_VIIa => Fpx_ATIII_TF_VIIa; compartment_1*Inhib_04_kon*Fpx_ATIII*TF_VIIa;
  Inhib_05: Fpx_ATIII + Xa_Va => Fpx_ATIII_Xa_Va; compartment_1*Inhib_05_kon*Fpx_ATIII*Xa_Va;
  Inhib_06: Fpx_ATIII + IIa => Fpx_ATIII_IIa; compartment_1*Inhib_06_kon*Fpx_ATIII*IIa;
  Inhib_07: Riva + Xa -> Riva_Xa; compartment_1*(Inhib_07_kon*Riva*Xa - Inhib_07_koff*Riva_Xa);
  Inhib_08: Riva + Xa_Va -> Riva_Xa_Va; compartment_1*(Inhib_08_kon*Riva*Xa_Va - Inhib_08_koff*Riva_Xa_Va);
  Inhib_00: Fpx + ATIII -> Fpx_ATIII; compartment_1*(Inhib_00_kon*Fpx*ATIII - Inhib_00_koff*Fpx_ATIII);
end
