// SBML level 2 version 4

function Constant_flux__irreversible(v)
  v;
end
Constant_flux__irreversible is "Constant flux (irreversible)";

function Mass_action__dif_compartments__explicit_volume(k, Volume_S, Substrate)
  k*Substrate*Volume_S;
end
Mass_action__dif_compartments__explicit_volume is "Mass action (dif compartments, explicit volume)";

function Mass_action_transport_with_linear_activator(k, Activator, S, Volume_S)
  k*Activator*S*Volume_S;
end

function Linear_activator_and_hyperbolic_inhibitor(ks, M1, Ki, h, M2)
  ks*M1*Ki^h/(Ki^h + M2^h);
end

function MM_w__competitive_and_noncompetitive_inhibition_2(v, volume, substrate, Km, noncompet_inhib, Ki)
  v*volume*substrate/((Km + substrate)*(1 + noncompet_inhib/Ki));
end
MM_w__competitive_and_noncompetitive_inhibition_2 is "MM w/ competitive and noncompetitive inhibition 2";

function Uptake_with_substrate_activation_and_competing_substrate_2(Vmax, Volume_S, S1, Km, Ka)
  Vmax*Volume_S*(S1/(Km + S1))*(S1/(Ka + S1));
end

function Basal_flux_with_Hill_type_inhibition(V, Ki, h, M1)
  V*Ki^h/(Ki^h + M1^h);
end
Basal_flux_with_Hill_type_inhibition is "Basal flux with Hill-type inhibition";

model Iron_Mouse_PV3()
  // Parmar2019 - Iron Mouse PV3
  // Iron Mouse PV3
  // "A computational model to understand mouse iron physiology and diseases"
  // By Jignesh Parmar and Pedro Mendes
  // Base model
  // This is a dynamic model of iron distribution in mice, covering seven compartments: plasma, bone marrow, red blood cells (RBC), spleen, duodenum, liver, and the rest of the body . This is mostly a physiological model with regulation by hepcidin and erythropoietin, including only a minimal amount of molecular details.
  // This version of the model does not include the radioactive-labelled tracer iron species that were used for parameter estimation (that is included in a separate file). This model has all parameter values already set to the best estimates obtained with the model with radioactive tracer. This model is useful to study the steady state properties of the system and as a basis for various types of simulation.
  // Model validation was carried out with other model files that were derived from this one and where certain parameters were altered or new interventions added.
  // GO:0055072
  // taxonomy:10090
  // hasProperty mamo:MAMO_0000046

  // Compartments:
  compartment Duodenum = 3.84615e-5;  // FMA:7206
  compartment RBC = 0.00079;  // FMA:263005
  compartment Spleen = 6.73077e-5;  // FMA:7196
  compartment Liver = 0.001161905;  // FMA:7197
  compartment Plasma = 0.0013;  // FMA:62970
  compartment RestOfBody = 0.019694766;
  compartment BoneMarrow = 0.000214286;  // FMA:9608

  // Species:
  species FeDuo in Duodenum = 0.0100222;  // hasPart CHEBI:24875
  species FeRBC in RBC = 0.023;  // hasPart CHEBI:24875
  species FeSpleen in Spleen = 0.00226838;  // hasPart CHEBI:24875
  species FeLiver in Liver = 0.0013;  // hasPart CHEBI:24875
  species Tf in Plasma = 1.16103e-5;  // uniprot:Q921I1
  species Hepcidin in Plasma = 2.30092e-8;  // uniprot:Q9EQ21; hasProperty GO:0097690
  species Fe2Tf in Plasma = 1.89625e-5;  // hasPart CHEBI:29034; hasPart uniprot:Q921I1
  species Fe1Tf in Plasma = 8.12714e-6;  // hasPart CHEBI:29034; hasPart uniprot:Q921I1
  species NTBI in Plasma = 4e-8;  // hasPart CHEBI:24875
  species EPO in Plasma = 2.4267e-12;  // uniprot:P07321
  species FeRest in RestOfBody = 0.00040176;  // hasPart CHEBI:24875
  species $FeOutside in RestOfBody = 0;  // hasPart CHEBI:24875
  species FeBM in BoneMarrow = 0.00208051;  // hasPart CHEBI:24875

  // Parameters:
  kNTBI_Fe1Tf = 1004000000;
  kInDuo = 0.0405971;
  kInLiver = 2.11666;
  kInRBC = 5.038445e11;
  kInRest = 4.781209;
  KmFeFPN = 0.112511;
  KiHepcidinFPN = 6.3e-9;
  kFe1Tf_Fe2Tf = 1004000000;
  vDuoNTBI = 0.200907;
  vLiverNTBI = 0.04447949;
  vSpleenNTBI = 2.06738;
  vRestNTBI = 0.0101453;
  kDuoLoss = 6.80738e-5;
  kRBCSpleen = 0.03;
  Total_Fe_concentration has unit_0;
  kInBM = 4.068782e12;
  kBMSpleen = 0.1032184;
  Total_Fe__g has unit_1; Total_Fe__g is "Total_Fe_(g)";
  Total_Tf_conc has unit_0;
  Total_Tf_mg_ml has unit_2; Total_Tf_mg_ml is "Total_Tf_mg/ml";
  vDiet_basal = 0.003469655;
  FePlasma_conc has unit_0; FePlasma_conc is "FePlasma(conc)";
  KaNTBI = 0.0002550162;
  KmNTBI = 0.0006792908;
  vNTBILiver = 14.15111;
  fDiet = 1;
  // original value is 0.01026651919
  ksHepcidin = 0.0003987658;
  vEPO = 2.626748e-9;
  kdEPO = 4.8;
  hEPO = 6.5;
  KiEPORBC = 0.01;
  KEPOHepcidin = 5e-12;
  hEPOHepcidin = 4;
  hNTBI = 1;
  kRestLoss = 0.0168620188;
  vTf = 1.5479976e-5;
  kdTf = 0.4;
  kdHepcidin = 0.75616;
  var rel__EPO_; rel__EPO_ is "rel([EPO])";
  var rel__FeBM_; rel__FeBM_ is "rel([FeBM])";
  var rel__FeDuo_; rel__FeDuo_ is "rel([FeDuo])";
  var rel__FeLiver_; rel__FeLiver_ is "rel([FeLiver])";
  var rel__FeRBC_; rel__FeRBC_ is "rel([FeRBC])";
  var rel__FeRest_; rel__FeRest_ is "rel([FeRest])";
  var rel__FeSpleen_; rel__FeSpleen_ is "rel([FeSpleen])";
  var rel__Hepcidin_; rel__Hepcidin_ is "rel([Hepcidin])";
  var rel__NTBI_; rel__NTBI_ is "rel([NTBI])";
  var rel__FeTotal_; rel__FeTotal_ is "rel([FeTotal])";
  quantity_to_number_factor = 6.02214179e23;
  Initial_for_FeBM = FeBM;
  Initial_for_FeDuo = FeDuo;
  Initial_for_FeLiver = FeLiver;
  Initial_for_EPO = EPO;
  Initial_for_Hepcidin = Hepcidin;
  Initial_for_NTBI = NTBI;
  Initial_for_FeRBC = FeRBC;
  Initial_for_FeRest = FeRest;
  Initial_for_FeSpleen = FeSpleen;
  Initial_for_Total_Fe = Total_Fe;
  Initial_for_fDiet = fDiet;
  Initial_for_vDiet_basal = vDiet_basal;

  // Assignment rules:
  TfSaturation := 100*(2*Fe2Tf*quantity_to_number_factor*Plasma + Fe1Tf*quantity_to_number_factor*Plasma)/(2*(Tf*quantity_to_number_factor*Plasma + Fe2Tf*quantity_to_number_factor*Plasma + Fe1Tf*quantity_to_number_factor*Plasma));
  Total_Fe := FeDuo*quantity_to_number_factor*Duodenum + FeLiver*quantity_to_number_factor*Liver + FeSpleen*quantity_to_number_factor*Spleen + FeRBC*quantity_to_number_factor*RBC + FeRest*quantity_to_number_factor*RestOfBody + 2*Fe2Tf*quantity_to_number_factor*Plasma + Fe1Tf*quantity_to_number_factor*Plasma + NTBI*quantity_to_number_factor*Plasma + FeBM*quantity_to_number_factor*BoneMarrow;
  Total_Fe_concentration := (FeDuo*quantity_to_number_factor*Duodenum + FeLiver*quantity_to_number_factor*Liver + FeSpleen*quantity_to_number_factor*Spleen + FeRBC*quantity_to_number_factor*RBC + FeRest*quantity_to_number_factor*RestOfBody + 2*Fe2Tf*quantity_to_number_factor*Plasma + Fe1Tf*quantity_to_number_factor*Plasma + NTBI*quantity_to_number_factor*Plasma + FeBM*quantity_to_number_factor*BoneMarrow)/(6.02214179e23*(Duodenum + Liver + Plasma + RBC + RestOfBody + Spleen));
  FePlasma := 2*Fe2Tf*quantity_to_number_factor*Plasma + Fe1Tf*quantity_to_number_factor*Plasma + NTBI*quantity_to_number_factor*Plasma;
  Total_Fe__g := Total_Fe*55.845/6.02214179e23;
  Total_Tf := Tf*quantity_to_number_factor*Plasma + Fe1Tf*quantity_to_number_factor*Plasma + Fe2Tf*quantity_to_number_factor*Plasma;
  Total_Tf_conc := Total_Tf/(6.02214179e23*Plasma);
  Total_Tf_mg_ml := Total_Tf_conc*76000;
  FePlasma_conc := FePlasma/(Plasma*6.02214179e23);
  FeTftotal := 2*Fe2Tf + Fe1Tf;
  vDiet := Initial_for_fDiet*Initial_for_vDiet_basal;
  rel__EPO_ := EPO/Initial_for_EPO;
  rel__FeBM_ := FeBM/Initial_for_FeBM;
  rel__FeDuo_ := FeDuo/Initial_for_FeDuo;
  rel__FeLiver_ := FeLiver/Initial_for_FeLiver;
  rel__FeRBC_ := FeRBC/Initial_for_FeRBC;
  rel__FeRest_ := FeRest/Initial_for_FeRest;
  rel__FeSpleen_ := FeSpleen/Initial_for_FeSpleen;
  rel__Hepcidin_ := Hepcidin/Initial_for_Hepcidin;
  rel__NTBI_ := NTBI/Initial_for_NTBI;
  rel__FeTotal_ := Total_Fe/Initial_for_Total_Fe;

  // Reactions:
  Diet: => FeDuo; Duodenum*Constant_flux__irreversible(vDiet);
  HepcidinSynthesis: => Hepcidin; Plasma*Linear_activator_and_hyperbolic_inhibitor(ksHepcidin, FeTftotal, KEPOHepcidin, hEPOHepcidin, EPO);  // modifiers: EPO; isInstanceOf GO:0036017 GO:0030072; hasProperty GO:0036017
  HepcidinDecay: Hepcidin => ; Plasma*kdHepcidin*Hepcidin;  // isInstanceOf GO:0030163
  Duo_NTBI: FeDuo => NTBI; MM_w__competitive_and_noncompetitive_inhibition_2(vDuoNTBI, Duodenum, FeDuo, KmFeFPN, Hepcidin, KiHepcidinFPN);  // modifiers: Hepcidin; GO:1903414; GO:1903988
  Fe2Tf_BM: Fe2Tf => 2 FeBM + Tf; Mass_action_transport_with_linear_activator(kInBM, EPO, Fe2Tf, Plasma);  // modifiers: EPO; GO:0033572; GO:0097286; hasProperty GO:0036017
  RBC_Spleen: FeRBC => FeSpleen; Mass_action__dif_compartments__explicit_volume(kRBCSpleen, RBC, FeRBC);  // GO:0006909
  Spleen_NTBI: FeSpleen => NTBI; MM_w__competitive_and_noncompetitive_inhibition_2(vSpleenNTBI, Spleen, FeSpleen, KmFeFPN, Hepcidin, KiHepcidinFPN);  // modifiers: Hepcidin; GO:1903988; GO:1903414
  Liver_NTBI: FeLiver => NTBI; MM_w__competitive_and_noncompetitive_inhibition_2(vLiverNTBI, Liver, FeLiver, KmFeFPN, Hepcidin, KiHepcidinFPN);  // modifiers: Hepcidin; GO:1903988; GO:1903414
  NTBI_Fe1Tf: NTBI + Tf => Fe1Tf; Plasma*kNTBI_Fe1Tf*NTBI*Tf;
  DuoLoss: FeDuo => $FeOutside; Mass_action__dif_compartments__explicit_volume(kDuoLoss, Duodenum, FeDuo);
  Fe2Tf_Liver: Fe2Tf => 2 FeLiver + Tf; Mass_action__dif_compartments__explicit_volume(kInLiver, Plasma, Fe2Tf);  // GO:0097286; GO:0033572
  Fe2Tf_Rest: Fe2Tf => 2 FeRest + Tf; Mass_action__dif_compartments__explicit_volume(kInRest, Plasma, Fe2Tf);  // GO:0033572; GO:0097286
  Fe2Tf_Duo: Fe2Tf => 2 FeDuo + Tf; Mass_action__dif_compartments__explicit_volume(kInDuo, Plasma, Fe2Tf);  // GO:0033572; GO:0097286
  Rest_NTBI: FeRest => NTBI; MM_w__competitive_and_noncompetitive_inhibition_2(vRestNTBI, RestOfBody, FeRest, KmFeFPN, Hepcidin, KiHepcidinFPN);  // modifiers: Hepcidin; GO:1903414; GO:1903988
  Fe1Tf_Fe2Tf: Fe1Tf + NTBI => Fe2Tf; Plasma*kFe1Tf_Fe2Tf*Fe1Tf*NTBI;
  Fe1Tf_Liver: Fe1Tf => FeLiver + Tf; Mass_action__dif_compartments__explicit_volume(kInLiver, Plasma, Fe1Tf);  // GO:0097286; GO:0033572
  Fe1Tf_BM: Fe1Tf => FeBM + Tf; Mass_action_transport_with_linear_activator(kInBM, EPO, Fe1Tf, Plasma);  // modifiers: EPO; GO:0097286; GO:0033572; hasProperty GO:0036017
  Fe1Tf_Rest: Fe1Tf => FeRest + Tf; Mass_action__dif_compartments__explicit_volume(kInRest, Plasma, Fe1Tf);  // GO:0097286; GO:0033572
  Fe1Tf_Duo: Fe1Tf => FeDuo + Tf; Mass_action__dif_compartments__explicit_volume(kInDuo, Plasma, Fe1Tf);  // GO:0033572; GO:0097286
  BM_RBC: FeBM => FeRBC; Mass_action_transport_with_linear_activator(kInRBC, EPO, FeBM, BoneMarrow);  // modifiers: EPO; GO:0043249; hasProperty GO:0036017
  BM_Spleen: FeBM => FeSpleen; Mass_action__dif_compartments__explicit_volume(kBMSpleen, BoneMarrow, FeBM);
  NTBI_Liver: NTBI => FeLiver; Uptake_with_substrate_activation_and_competing_substrate_2(vNTBILiver, Plasma, NTBI, KmNTBI, KaNTBI);  // GO:0097286; isPropertyOf uniprot:Q75N73
  EPO_synthesis: => EPO; Plasma*Basal_flux_with_Hill_type_inhibition(vEPO, KiEPORBC, hEPO, FeRBC);  // modifiers: FeRBC; isInstanceOf GO:0030072
  EPO_degradation: EPO => ; Plasma*kdEPO*EPO;  // isInstanceOf GO:0030163
  RestLoss: FeRest => $FeOutside; RestOfBody*kRestLoss*FeRest;
  Tf_degradation: Tf => ; Plasma*kdTf*Tf;  // isInstanceOf GO:0030163
  Tf_synthesis: => Tf; Plasma*Constant_flux__irreversible(vTf);  // isInstanceOf GO:0009306
  Fe2Tf_degradation: Fe2Tf => 2 NTBI; Plasma*kdTf*Fe2Tf;  // isInstanceOf GO:0030163
  Fe1Tf_degradation: Fe1Tf => NTBI; Plasma*kdTf*Fe1Tf;  // isInstanceOf GO:0030163

  // Unit definitions:
  unit time = 86400 second;
  unit unit_0 = mole / litre; unit_0 is "mol / l";
  unit unit_1 = gram; unit_1 is "g";
  unit unit_2 = 1e-3 gram / (1e-3 litre); unit_2 is "mg / ml";
end
