// SBML level 2 version 1

function Constant_flux__irreversible(v)
  v;
end
Constant_flux__irreversible is "Constant flux (irreversible)";

function Mixed_activation__irrev(substrate, Activator, Kms, V, Kas, Kac)
  V*substrate*Activator/(Kms*(Kas + Activator) + substrate*(Kac + Activator));
end
Mixed_activation__irrev is "Mixed activation (irrev)";

function Sox9mRNA_Output_Cav1_0(k1, M, S)
  S*k1*M;
end
Sox9mRNA_Output_Cav1_0 is "Sox9mRNA.Output.Cav1";

function MIR199b_5p_Output_HPCON(k1, M, S, k2)
  k1*S/k2*M;
end
MIR199b_5p_Output_HPCON is "MIR199b-5p.Output.HP199b";

function CAV1_Input_test2(V, k1, Activator, Kms, Kas, Kac)
  V*k1*Activator/(Kms*(Kas + Activator) + k1*(Kac + Activator));
end
CAV1_Input_test2 is "CAV1.Input_test2";

function Acan_Input3(V, M, k1)
  V*M/(1 + k1/M);
end

function SRC_Input_0(M, k1)
  M/100*k1;
end
SRC_Input_0 is "SRC.Input";

function miRNA140_455(M, k1)
  k1*M;
end

function CAV1_miRNA_output(V, S, Km, M, Ki)
  V*S/(Km + S + Km*(M/Ki))*M;
end

function Sox9_Input(k1, M)
  k1*M;
end
Sox9_Input is "Sox9.Input";

model Patel2023_0_miRNA_199a_b_5p_regionation_of_chondrogenesis___enchanced()
  // Patel2023 - miRNA-199a/b-5p regionation of chondrogenesis - enchanced
  // From a previous microarray study we developed a small chondrogenesis model. We performed qPCR and measured how knockdown of miR-199a-5p or miR-199b-5p could modulate chondrogenesis. Several experiments were used to determine the parameters of this model. We utilised parameter scan and manual sliding to refine the model. Within are two models - an initial model which only comprises of genes which we have data for, and an enhanced model which expands of the initial model to make more predictions - e.g. how miR-140-5p is indirectly regulated by miR-199a-5p and miR-199b-5p.
  // hasProperty mamo:OTHER

  // Compartments:
  compartment Chondrocyte = 1;
  compartment ECM = 1;

  // Species:
  species SRC in Chondrocyte = 1000;
  species MIR199b_5p in Chondrocyte = 5.423464;
  species Cav1 in Chondrocyte = 13.21139; Cav1 is "CAV1";
  species TGFB3 in Chondrocyte = 10000;
  species HP199b in Chondrocyte = 0;
  species Sox9mRNA in Chondrocyte = 8.76039807; Sox9mRNA is "SOX9mRNA";
  species Acan in Chondrocyte = 6.257097; Acan is "ACAN";
  species Col2a1 in Chondrocyte = 6.40998058; Col2a1 is "COL2A1";
  species MIR199a_5p in Chondrocyte = 10.5401385;
  species MIR140_5p in Chondrocyte = 6.5582925;
  species HP199a in Chondrocyte = 0;
  species SOX9Protein in Chondrocyte = 1;
  species SOX9PhosphoProtein in Chondrocyte = 0;
  species GAG in ECM = 1;
  species FZD6 in Chondrocyte = 8.692679;
  species ITGA3 in Chondrocyte = 8.92588;
  species OtherTargets in Chondrocyte = 25;
  species OtherTargetsRegulators in Chondrocyte = 1000;

  // Parameters:
  miR199a_amount = 1 unit_0;
  miR199b_amount = 1 unit_0;

  // Reactions:
  MIR199b_5p_Input: => MIR199b_5p; Chondrocyte*Constant_flux__irreversible(MIR199b_5p_Input_v);
    MIR199b_5p_Input_v = 3.58883;
  MIR199b_5p_Output: MIR199b_5p => ; Chondrocyte*MIR199b_5p_Output_k1*MIR199b_5p;
    MIR199b_5p_Output_k1 = 0.390537;
  Cav1_Input_SRC: => Cav1; Chondrocyte*CAV1_Input_test2(Cav1_Input_SRC_V, Cav1_Input_SRC_k1, SRC, Cav1_Input_SRC_Kms, Cav1_Input_SRC_Kas, Cav1_Input_SRC_Kac); Cav1_Input_SRC is "CAV1_Input_SRC";  // modifiers: SRC
    Cav1_Input_SRC_V = 45.8499; Cav1_Input_SRC_k1 = 9804.52; Cav1_Input_SRC_Kms = 30.8405; Cav1_Input_SRC_Kas = 4.13602; Cav1_Input_SRC_Kac = 0.0001;
  Cav1_Output: Cav1 => ; Chondrocyte*Cav1_Output_k1*Cav1; Cav1_Output is "CAV1_Output";
    Cav1_Output_k1 = 0.205764;
  Cav1_Output_MIR199b_5p: Cav1 => ; Chondrocyte*CAV1_miRNA_output(Cav1_Output_MIR199b_5p_V, Cav1, Cav1_Output_MIR199b_5p_Km, MIR199b_5p, Cav1_Output_MIR199b_5p_Ki); Cav1_Output_MIR199b_5p is "CAV1_Output_MIR199b_5p";  // modifiers: MIR199b_5p
    Cav1_Output_MIR199b_5p_V = 6.03811; Cav1_Output_MIR199b_5p_Km = 0.0995802; Cav1_Output_MIR199b_5p_Ki = 0.0570318;
  SRC_Output: SRC => ; Chondrocyte*SRC_Output_k1*SRC;
    SRC_Output_k1 = 1.40703;
  SRC_Input: => SRC; Chondrocyte*SRC_Input_0(TGFB3, SRC_Input_k1);  // modifiers: TGFB3
    SRC_Input_k1 = 0.993119;
  MIR199b_5p_Output_HP199b: MIR199b_5p => ; Chondrocyte*MIR199b_5p_Output_HPCON(MIR199b_5p_Output_HP199b_k1, HP199b, MIR199b_5p, MIR199b_5p_Output_HP199b_k2);  // modifiers: HP199b
    MIR199b_5p_Output_HP199b_k1 = 1.0042; MIR199b_5p_Output_HP199b_k2 = 0.123659;
  Sox9mRNA_Output_Cav1: Sox9mRNA => ; Chondrocyte*Sox9mRNA_Output_Cav1_0(Sox9mRNA_Output_Cav1_k1, Cav1, Sox9mRNA); Sox9mRNA_Output_Cav1 is "SOX9mRNA_Output_Cav1";  // modifiers: Cav1
    Sox9mRNA_Output_Cav1_k1 = 189.53;
  Acan_Input_SOX9PhosphoProtein: => Acan; Chondrocyte*Acan_Input3(Acan_Input_SOX9PhosphoProtein_V, SOX9PhosphoProtein, Acan_Input_SOX9PhosphoProtein_k1); Acan_Input_SOX9PhosphoProtein is "ACAN_Input_SOX9PhosphoProtein";  // modifiers: SOX9PhosphoProtein
    Acan_Input_SOX9PhosphoProtein_V = 92.045; Acan_Input_SOX9PhosphoProtein_k1 = 1.19124;
  Acan_Output: Acan => ; Chondrocyte*Acan_Output_k1*Acan; Acan_Output is "ACAN_Output";
    Acan_Output_k1 = 3.61152;
  Col2a1_Input_SOX9PhosphoProtein: => Col2a1; Chondrocyte*Acan_Input3(Col2a1_Input_SOX9PhosphoProtein_V, SOX9PhosphoProtein, Col2a1_Input_SOX9PhosphoProtein_k1); Col2a1_Input_SOX9PhosphoProtein is "COL2A1_Input_SOX9PhosphoProtein";  // modifiers: SOX9PhosphoProtein
    Col2a1_Input_SOX9PhosphoProtein_V = 94.6237; Col2a1_Input_SOX9PhosphoProtein_k1 = 1;
  Col2a1_Output: Col2a1 => ; Chondrocyte*Col2a1_Output_k1*Col2a1; Col2a1_Output is "COL2A1_Output";
    Col2a1_Output_k1 = 3.00524;
  MIR199a_5p_Input: => MIR199a_5p; Chondrocyte*Constant_flux__irreversible(MIR199a_5p_Input_v);
    MIR199a_5p_Input_v = 13.306;
  MIR199a_5p_Output: MIR199a_5p => ; Chondrocyte*MIR199a_5p_Output_k1*MIR199a_5p;
    MIR199a_5p_Output_k1 = 1.14091;
  Cav1_Output_MIR199a_5p: Cav1 => ; Chondrocyte*CAV1_miRNA_output(Cav1_Output_MIR199a_5p_V, Cav1, Cav1_Output_MIR199a_5p_Km, MIR199a_5p, Cav1_Output_MIR199a_5p_Ki); Cav1_Output_MIR199a_5p is "CAV1_Output_MIR199a_5p";  // modifiers: MIR199a_5p
    Cav1_Output_MIR199a_5p_V = 3.28337; Cav1_Output_MIR199a_5p_Km = 0.0972183; Cav1_Output_MIR199a_5p_Ki = 0.135178;
  Sox9mRNA_Output: Sox9mRNA => ; Chondrocyte*Sox9mRNA_Output_k1*Sox9mRNA; Sox9mRNA_Output is "SOX9mRNA_Output";
    Sox9mRNA_Output_k1 = 2;
  Sox9mRNA_Input_Cav1: => Sox9mRNA; Chondrocyte*Sox9_Input(Sox9mRNA_Input_Cav1_k1, Cav1); Sox9mRNA_Input_Cav1 is "SOX9mRNA_Input_CAV1";  // modifiers: Cav1
    Sox9mRNA_Input_Cav1_k1 = 55.8509;
  Sox9mRNA_Input_TGFB3: => Sox9mRNA; Chondrocyte*Sox9_Input(Sox9mRNA_Input_TGFB3_k1, TGFB3); Sox9mRNA_Input_TGFB3 is "SOX9mRNA_Input_TGFB3";  // modifiers: TGFB3
    Sox9mRNA_Input_TGFB3_k1 = 7.05686;
  MIR140_5P_Input: => MIR140_5p; Chondrocyte*miRNA140_455(SOX9PhosphoProtein, MIR140_5P_Input_k1);  // modifiers: SOX9PhosphoProtein
    MIR140_5P_Input_k1 = 6.08453;
  MIR140_5P_Output: MIR140_5p => ; Chondrocyte*MIR140_5P_Output_k1*MIR140_5p;
    MIR140_5P_Output_k1 = 0.375819;
  TGFB3_Input: => TGFB3; Chondrocyte*Constant_flux__irreversible(TGFB3_Input_v);
    TGFB3_Input_v = 1.84759;
  TGFB3_Output: TGFB3 => ; Chondrocyte*TGFB3_Output_k1*TGFB3;
    TGFB3_Output_k1 = 0.00474858;
  MIR199a_5p_Output_HP199a: MIR199a_5p => ; Chondrocyte*MIR199b_5p_Output_HPCON(MIR199a_5p_Output_HP199a_k1, HP199a, MIR199a_5p, MIR199a_5p_Output_HP199a_k2);  // modifiers: HP199a
    MIR199a_5p_Output_HP199a_k1 = 5.75575; MIR199a_5p_Output_HP199a_k2 = 0.141442;
  Sox9mRNA_Input_MIR140_5p: => Sox9mRNA; Chondrocyte*Sox9_Input(Sox9mRNA_Input_MIR140_5p_k1, MIR140_5p); Sox9mRNA_Input_MIR140_5p is "SOX9mRNA_Input_MIR140_5p";  // modifiers: MIR140_5p
    Sox9mRNA_Input_MIR140_5p_k1 = 49.9254;
  SOX9Protein_Input_Sox9mRNA: => SOX9Protein; Chondrocyte*Sox9_Input(SOX9Protein_Input_Sox9mRNA_k1, Sox9mRNA);  // modifiers: Sox9mRNA
    SOX9Protein_Input_Sox9mRNA_k1 = 1885.8;
  SOX9Protein_Output: SOX9Protein => ; Chondrocyte*SOX9Protein_Output_k1*SOX9Protein;
    SOX9Protein_Output_k1 = 198;
  SOX9PhosphoProtein_Output: SOX9PhosphoProtein => ; Chondrocyte*SOX9PhosphoProtein_Output_k1*SOX9PhosphoProtein;
    SOX9PhosphoProtein_Output_k1 = 134.104;
  GAG_Output: GAG => ; ECM*GAG_Output_k1*GAG;
    GAG_Output_k1 = 0.179862;
  GAG_Input_Col2a1: => GAG; Acan_Input3(GAG_Input_Col2a1_V, Col2a1, GAG_Input_Col2a1_k1); GAG_Input_Col2a1 is "GAG_Input_COL2A1";  // modifiers: Col2a1
    GAG_Input_Col2a1_V = 0.179155; GAG_Input_Col2a1_k1 = 89.3244;
  GAG_Input_Acan: => GAG; Acan_Input3(GAG_Input_Acan_V, Acan, GAG_Input_Acan_k1); GAG_Input_Acan is "GAG_Input_ACAN";  // modifiers: Acan
    GAG_Input_Acan_V = 4.70977; GAG_Input_Acan_k1 = 1;
  GAG_Input_MIR140_5p: => GAG; Acan_Input3(GAG_Input_MIR140_5p_V, MIR140_5p, GAG_Input_MIR140_5p_k1);  // modifiers: MIR140_5p
    GAG_Input_MIR140_5p_V = 3.96991; GAG_Input_MIR140_5p_k1 = 5;
  SOX9PhosphoProtein_Input_SOX9Protein: SOX9Protein => SOX9PhosphoProtein; Chondrocyte*SOX9PhosphoProtein_Input_SOX9Protein_k1*SOX9Protein;
    SOX9PhosphoProtein_Input_SOX9Protein_k1 = 0.984725;
  SOX9Protein_Input_SOX9PhosphoProtein: SOX9PhosphoProtein => SOX9Protein; Chondrocyte*SOX9Protein_Input_SOX9PhosphoProtein_k1*SOX9PhosphoProtein;
    SOX9Protein_Input_SOX9PhosphoProtein_k1 = 0.0787612;
  SOX9PhosphoProtein_Input_SOX9Protein_Cav1: SOX9Protein => SOX9PhosphoProtein; Chondrocyte*Mixed_activation__irrev(SOX9Protein, Cav1, SOX9PhosphoProtein_Input_SOX9Protein_Cav1_Kms, SOX9PhosphoProtein_Input_SOX9Protein_Cav1_V, SOX9PhosphoProtein_Input_SOX9Protein_Cav1_Kas, SOX9PhosphoProtein_Input_SOX9Protein_Cav1_Kac);  // modifiers: Cav1
    SOX9PhosphoProtein_Input_SOX9Protein_Cav1_Kms = 0.442916; SOX9PhosphoProtein_Input_SOX9Protein_Cav1_V = 9.9; SOX9PhosphoProtein_Input_SOX9Protein_Cav1_Kas = 0.310444; SOX9PhosphoProtein_Input_SOX9Protein_Cav1_Kac = 0.188935;
  FZD6_input: => FZD6; Chondrocyte*Constant_flux__irreversible(FZD6_input_v);
    FZD6_input_v = 133.465;
  FZD6_Output: FZD6 => ; Chondrocyte*FZD6_Output_k1*FZD6;
    FZD6_Output_k1 = 1.00688;
  FZD6_Output_MIR199a_5p: FZD6 => ; Chondrocyte*CAV1_miRNA_output(FZD6_Output_MIR199a_5p_V, FZD6, FZD6_Output_MIR199a_5p_Km, MIR199a_5p, FZD6_Output_MIR199a_5p_Ki);  // modifiers: MIR199a_5p
    FZD6_Output_MIR199a_5p_V = 8.96765; FZD6_Output_MIR199a_5p_Km = 0.088308; FZD6_Output_MIR199a_5p_Ki = 0.088308;
  FZD6_Output_MIR199b_5p: FZD6 => ; Chondrocyte*CAV1_miRNA_output(FZD6_Output_MIR199b_5p_V, FZD6, FZD6_Output_MIR199b_5p_Km, MIR199b_5p, FZD6_Output_MIR199b_5p_Ki);  // modifiers: MIR199b_5p
    FZD6_Output_MIR199b_5p_V = 13.9484; FZD6_Output_MIR199b_5p_Km = 0.11324; FZD6_Output_MIR199b_5p_Ki = 0.0933254;
  SOX9mRNA_Output_FZD6: Sox9mRNA => ; Chondrocyte*Sox9mRNA_Output_Cav1_0(SOX9mRNA_Output_FZD6_k1, FZD6, Sox9mRNA);  // modifiers: FZD6
    SOX9mRNA_Output_FZD6_k1 = 321.599;
  FZD6_Output_MIR140_5p: FZD6 => ; Chondrocyte*CAV1_miRNA_output(FZD6_Output_MIR140_5p_V, FZD6, FZD6_Output_MIR140_5p_Km, MIR140_5p, FZD6_Output_MIR140_5p_Ki);  // modifiers: MIR140_5p
    FZD6_Output_MIR140_5p_V = 11.4312; FZD6_Output_MIR140_5p_Km = 0.219786; FZD6_Output_MIR140_5p_Ki = 0.123027;
  ITGA3_Input: => ITGA3; Chondrocyte*Constant_flux__irreversible(ITGA3_Input_v);
    ITGA3_Input_v = 38.634;
  ITGA3_Output: ITGA3 => ; Chondrocyte*ITGA3_Output_k1*ITGA3;
    ITGA3_Output_k1 = 0.981446;
  ITGA3_Output_MIR199a_5p: ITGA3 => ; Chondrocyte*CAV1_miRNA_output(ITGA3_Output_MIR199a_5p_V, ITGA3, ITGA3_Output_MIR199a_5p_Km, MIR199a_5p, ITGA3_Output_MIR199a_5p_Ki);  // modifiers: MIR199a_5p
    ITGA3_Output_MIR199a_5p_V = 3.44153; ITGA3_Output_MIR199a_5p_Km = 0.0933254; ITGA3_Output_MIR199a_5p_Ki = 0.126155;
  ITGA3_Output_MIR199b_5p: ITGA3 => ; Chondrocyte*CAV1_miRNA_output(ITGA3_Output_MIR199b_5p_V, ITGA3, ITGA3_Output_MIR199b_5p_Km, MIR199b_5p, ITGA3_Output_MIR199b_5p_Ki);  // modifiers: MIR199b_5p
    ITGA3_Output_MIR199b_5p_V = 5.80619; ITGA3_Output_MIR199b_5p_Km = 0.106702; ITGA3_Output_MIR199b_5p_Ki = 0.0594452;
  SOX9mRNA_Output_ITGA3: Sox9mRNA => ; Chondrocyte*Sox9mRNA_Output_Cav1_0(SOX9mRNA_Output_ITGA3_k1, ITGA3, Sox9mRNA);  // modifiers: ITGA3
    SOX9mRNA_Output_ITGA3_k1 = 150.335;
  OtherTargets_Input_OtherTargetsRegulators: => OtherTargets; Chondrocyte*CAV1_Input_test2(OtherTargets_Input_OtherTargetsRegulators_V, OtherTargets_Input_OtherTargetsRegulators_k1, OtherTargetsRegulators, OtherTargets_Input_OtherTargetsRegulators_Kms, OtherTargets_Input_OtherTargetsRegulators_Kas, OtherTargets_Input_OtherTargetsRegulators_Kac);  // modifiers: OtherTargetsRegulators
    OtherTargets_Input_OtherTargetsRegulators_V = 300.395; OtherTargets_Input_OtherTargetsRegulators_k1 = 155.429; OtherTargets_Input_OtherTargetsRegulators_Kms = 0.818707; OtherTargets_Input_OtherTargetsRegulators_Kas = 0.0218656; OtherTargets_Input_OtherTargetsRegulators_Kac = 0.00928804;
  OtherTargets_Output: OtherTargets => ; Chondrocyte*OtherTargets_Output_k1*OtherTargets;
    OtherTargets_Output_k1 = 0.931438;
  OtherTargets_Output_MIR199a_5p: OtherTargets => ; Chondrocyte*CAV1_miRNA_output(OtherTargets_Output_MIR199a_5p_V, OtherTargets, OtherTargets_Output_MIR199a_5p_Km, MIR199a_5p, OtherTargets_Output_MIR199a_5p_Ki);  // modifiers: MIR199a_5p
    OtherTargets_Output_MIR199a_5p_V = 18.2453; OtherTargets_Output_MIR199a_5p_Km = 0.0969205; OtherTargets_Output_MIR199a_5p_Ki = 0.10291;
  OtherTargets_Output_MIR199b_5p: OtherTargets => ; Chondrocyte*CAV1_miRNA_output(OtherTargets_Output_MIR199b_5p_V, OtherTargets, OtherTargets_Output_MIR199b_5p_Km, MIR199b_5p, OtherTargets_Output_MIR199b_5p_Ki);  // modifiers: MIR199b_5p
    OtherTargets_Output_MIR199b_5p_V = 32.0764; OtherTargets_Output_MIR199b_5p_Km = 0.0949921; OtherTargets_Output_MIR199b_5p_Ki = 0.104989;
  OtherTargetsRegulators_Input: => OtherTargetsRegulators; Chondrocyte*Constant_flux__irreversible(OtherTargetsRegulators_Input_v);
    OtherTargetsRegulators_Input_v = 0.0983995;
  OtherTargetsRegulators_Output: OtherTargetsRegulators => ; Chondrocyte*OtherTargetsRegulators_Output_k1*OtherTargetsRegulators;
    OtherTargetsRegulators_Output_k1 = 8.65253;
  SOX9mRNA_Output_OtherTargets: Sox9mRNA => ; Chondrocyte*Sox9mRNA_Output_Cav1_0(SOX9mRNA_Output_OtherTargets_k1, OtherTargets, Sox9mRNA);  // modifiers: OtherTargets
    SOX9mRNA_Output_OtherTargets_k1 = 56.7948;

  // Events:
  HP199b_activity: at (time < 4.5): HP199b = 1;
  HP199b_inactivity: at (time == 4.5): HP199b = 0;
  HP199a_activity: at (time < 4.5): HP199a = 1;
  HP199a_inactivity: at (time == 4.5): HP199a = 0;

  // Unit definitions:
  unit length = metre;
  unit area = metre^2;
  unit volume = 1e-3 litre;
  unit time = 86400 second;
  unit substance = 1e-3 mole;
  unit unit_0 = 1e-3 mole / (1e-3 litre); unit_0 is "mmol/ml";
end
