// SBML level 2 version 4
// dcterms:bibliographicCitation: urn:miriam:pubmed:30705757

function DNA_adducts_formation_0(k_add, C_i)
  k_add*C_i;
end

function Activation_of_MTIC_0(k_Ti, T_i)
  k_Ti*T_i;
end

function Degradation_of_Cation_0(k_cat, C_i)
  k_cat*C_i;
end

function Production_of_Caution(k_M, M_i)
  k_M*M_i;
end

function TMZ_transformation_1(P_T2, k_T, T_i, V)
  (P_T2/V + k_T)*T_i;
end

function TMZ_transformation_2(P_T, T_o, V)
  P_T*T_o/V;
end

model New_Model()
  // Stephanou2019 - pH as a potential therapeutic target to improve temozolomide antitumor efficacy
  // Abstract: Despite intensive treatments including temozolomide (TMZ) administration, glioblastoma patient prognosis remains dismal and innovative therapeutic strategies are urgently needed. A systems pharmacology approach was undertaken to investigate TMZ pharmacokinetics‐pharmacodynamics (PK‐PD) incorporating the effect of local pH, tumor spatial configuration and micro‐environment. A hybrid mathematical framework was designed coupling ordinary differential equations describing the intracellular reactions, with a spatial cellular automaton to individualize the cells. A differential drug impact on tumor and healthy cells at constant extracellular pH was computationally demonstrated as TMZ‐induced DNA damage was larger in tumor cells as compared to normal cells due to less acidic intracellular pH in cancer cells. Optimality of TMZ efficacy defined as maximum difference between damage in tumor and healthy cells was reached for extracellular pH between 6.8 and 7.5. Next, TMZ PK‐PD in a solid tumor was demonstrated to highly depend on its spatial configuration as spread cancer cells or fragmented tumors presented higher TMZ‐induced damage as compared to compact tumor spheroid. Simulations highlighted that smaller tumors were less acidic than bigger ones allowing for faster TMZ activation and their closer distance to blood capillaries allowed for better drug penetration. For model parameters corresponding to U87 glioma cells, inter‐cell variability in TMZ uptake play no role regarding the mean drug‐induced damage in the whole cell population whereas this quantity was increased by inter‐cell variability in TMZ efflux which was thus a disadvantage in terms of drug resistance. Overall, this study revealed pH as a new potential target to significantly improve TMZ antitumor efficacy. Change the value of pH for different cases.
  // hasProperty efo:0000311
  // hasProperty mamo:MAMO_0000046
  // hasProperty ncit:C1244
  // hasProperty PATO:0001842
  // hasProperty ncit:C3058
  // isDescribedBy pubmed:30705757

  // Compartments:
  compartment compartment = 1;  // isVersionOf ncit:C13413

  // Species:
  species TMZ_intracellular_dynamics_T_i in compartment = 62;  // isVersionOf ncit:C1244
  species TMZ_extracellular_concentration_T_o in compartment = 0;  // isVersionOf ncit:C1244
  species MTIC_M_i in compartment = 0;  // isVersionOf CHEBI:72568
  species Cation_C_i in compartment = 0;  // isVersionOf CHEBI:36916
  species DNA_adducts in compartment = 0;  // isVersionOf ncit:C1510

  // Parameters:
  P_T = 4.34e-9;
  P_T2 = 9.14e-9;
  V_o = 2.5e-5;
  o_k_T = 1.1e-7;
  lambda_T = 2.09;
  pHe = 7.4741;
  pHi = 5.7822;
  V_i = 8e-12;
  o_k_M = 292;
  lambda_M = 0.31;
  k_cat = 6000;
  k_add = 0.005;

  // Assignment rules:
  k_Ti := o_k_T*exp(lambda_T*pHi);
  k_M := o_k_M*exp(-lambda_M*pHi);
  k_Te := o_k_T*exp(lambda_T*pHe);

  // Reactions:
  TMZ_trasnformation_1_into_To: => TMZ_extracellular_concentration_T_o; compartment*TMZ_transformation_1(P_T2, k_Te, TMZ_intracellular_dynamics_T_i, V_o);  // modifiers: TMZ_intracellular_dynamics_T_i; isVersionOf GO:0006810
  TMZ_transformation1_from_Ti: TMZ_intracellular_dynamics_T_i => ; compartment*TMZ_transformation_1(P_T2, k_Ti, TMZ_intracellular_dynamics_T_i, V_i);  // isVersionOf GO:0006810
  TMZ_transformation2_into_Ti: => TMZ_intracellular_dynamics_T_i; compartment*TMZ_transformation_2(P_T, TMZ_extracellular_concentration_T_o, V_i);  // modifiers: TMZ_extracellular_concentration_T_o; isVersionOf GO:0006810
  TMZ_transformation2_from_To: TMZ_extracellular_concentration_T_o => ; compartment*TMZ_transformation_2(P_T, TMZ_extracellular_concentration_T_o, V_o);  // isVersionOf GO:0006810
  Activation_of_MTIC: => MTIC_M_i; compartment*Activation_of_MTIC_0(k_Ti, TMZ_intracellular_dynamics_T_i);  // modifiers: TMZ_intracellular_dynamics_T_i
  Production_of_Cation: MTIC_M_i => Cation_C_i; compartment*Production_of_Caution(k_M, MTIC_M_i);
  Degradation_of_Cation: Cation_C_i => ; compartment*Degradation_of_Cation_0(k_cat, Cation_C_i);
  DNA_adducts_formation: Cation_C_i => DNA_adducts; compartment*DNA_adducts_formation_0(k_add, Cation_C_i);

  // Unit definitions:
  unit volume = 1e-3 litre;
  unit substance = 1e-3 mole;
end
