// SBML level 2 version 1

model stseranidou2024()
  // stseranidou2024 - Nucleus Pulposus Cell Network Modelling in the Intervertebral Disc
  // ABSTRACT:
  // Intervertebral disc degeneration (IDD) arises from an intricate imbalance between the anabolic and catabolic processes governing the extracellular matrix (ECM) within the disc. Biochemical processes are complex, redundant and feedback-looped, and improved integration of knowledge is needed. To addess this, a literature-based regulatory network model (RNM) for nucleus pulposus cells (NPC) is proposed, representing the normal state of the intervertebral disc (IVD), in which proteins are represented by nodes that interact among each other through activation and/or inhibition edges. This model includes 32 different proteins and 150 edges by incorporating critical biochemical interactions in IVD regulation, tested in vivo or vitro in humans’ and animals’ NPC, alongside non tissue specific protein-protein interactions. We used the network to calculate the dynamic regulation of each node through a semi-quantitative method. The basal steady state successfully represented the activity of a normal NPC, and the model was assessed through the published literature, by replicating two independent experimental studies in human normal NPC. Pro-catabolic or pro-anabolic shifts of the network activated by nodal perturbations could be predicted. Sensitivity analysis underscores the significant influence of transforming growth factor beta (TGF-β) and interleukin-1 receptor antagonist (IL-1Ra) on the regulation of structural proteins and degrading enzymes within the system. Given the ongoing challenge of elucidating the mechanisms driving ECM degradation in IDD, this unique IVD RNM holds promise as a tool for exploring and predicting IDD progression, shedding light on IVD phenotypes and guiding experimental research efforts.
  // biomodels.db:MODEL2407080001
  // hasProperty mamo:MAMO_0000045

  // Compartments:
  compartment default = 1 dimensionless_unit; default is "Default Compartment";

  // Species:
  species ACAN in default = 0.1244745;  // substance in concentration_unit
  species COL2A in default = 0.5776849;  // substance in concentration_unit
  species COL10A1 in default = 0.01991753;  // substance in concentration_unit
  species COL1A in default = 0.756735;  // substance in concentration_unit
  species IFN_gamma in default = 0.385528; IFN_gamma is "IFN-γ";  // substance in concentration_unit
  species TNF in default = 0.2420554;  // substance in concentration_unit
  species IL_12A in default = 0.3640189; IL_12A is "IL-12A";  // substance in concentration_unit
  species IL_17A in default = 0.1038996; IL_17A is "IL-17A";  // substance in concentration_unit
  species IL_18 in default = 0.1963923; IL_18 is "IL-18";  // substance in concentration_unit
  species IL_1alpha in default = 0.02135878; IL_1alpha is "IL-1α";  // substance in concentration_unit
  species IL_1beta in default = 0.8647638; IL_1beta is "IL-1β";  // substance in concentration_unit
  species IL_6 in default = 0.6753854; IL_6 is "IL-6";  // substance in concentration_unit
  species IL_8 in default = 0.7820469; IL_8 is "IL-8";  // substance in concentration_unit
  species IL_1RA in default = 0.567686; IL_1RA is "IL-1RA";  // substance in concentration_unit
  species IL_4 in default = 0.1067888; IL_4 is "IL-4";  // substance in concentration_unit
  species IL_10 in default = 0.9061702; IL_10 is "IL-10";  // substance in concentration_unit
  species TGF_beta in default = 0.8611115; TGF_beta is "TGF-β";  // substance in concentration_unit
  species IGF1 in default = 0.3736384;  // substance in concentration_unit
  species CSF2 in default = 0.4459626;  // substance in concentration_unit
  species GDF5 in default = 0.9636221;  // substance in concentration_unit
  species PGRN in default = 0.8977386;  // substance in concentration_unit
  species CCL in default = 0.05900387;  // substance in concentration_unit
  species CCL22 in default = 0.8713747;  // substance in concentration_unit
  species MMP1 in default = 0.09061267;  // substance in concentration_unit
  species MMP13 in default = 0.7323499;  // substance in concentration_unit
  species MMP2 in default = 0.09874945;  // substance in concentration_unit
  species MMP3 in default = 0.2269797;  // substance in concentration_unit
  species MMP9 in default = 0.01590476;  // substance in concentration_unit
  species VEGF in default = 0.3060124;  // substance in concentration_unit
  species ADAMTS4_5 in default = 0.4360334; ADAMTS4_5 is "ADAMTS4/5";  // substance in concentration_unit
  species TIMP1_2 in default = 0.3300792; TIMP1_2 is "TIMP1/2";  // substance in concentration_unit
  species TIMP3 in default = 0.746442;  // substance in concentration_unit

  // Parameters:
  gamma = 1 rate_constant_unit; gamma is "Decay Rate";
  h = 10 dimensionless_unit; h is "Steepness";

  // Reactions:
  MMP13_activates_IFN_gamma: MMP13 => IFN_gamma; 1/(1 + exp(-h*(MMP13 - 0.5))) - gamma*IFN_gamma;
  IL_17A_activates_TNF: IL_17A => TNF; 1/(1 + exp(-h*(IL_17A - 0.5))) - gamma*TNF;
  IL_1beta_activates_TNF: IL_1beta => TNF; 1/(1 + exp(-h*(IL_1beta - 0.5))) - gamma*TNF;
  IL_6_activates_TNF: IL_6 => TNF; 1/(1 + exp(-h*(IL_6 - 0.5))) - gamma*TNF;
  IL_8_activates_TNF: IL_8 => TNF; 1/(1 + exp(-h*(IL_8 - 0.5))) - gamma*TNF;
  CCL_activates_TNF: CCL => TNF; 1/(1 + exp(-h*(CCL - 0.5))) - gamma*TNF;
  MMP1_activates_TNF: MMP1 => TNF; 1/(1 + exp(-h*(MMP1 - 0.5))) - gamma*TNF;
  MMP13_activates_TNF: MMP13 => TNF; 1/(1 + exp(-h*(MMP13 - 0.5))) - gamma*TNF;
  MMP3_activates_TNF: MMP3 => TNF; 1/(1 + exp(-h*(MMP3 - 0.5))) - gamma*TNF;
  MMP9_activates_TNF: MMP9 => TNF; 1/(1 + exp(-h*(MMP9 - 0.5))) - gamma*TNF;
  ADAMTS4_5_activates_TNF: ADAMTS4_5 => TNF; 1/(1 + exp(-h*(ADAMTS4_5 - 0.5))) - gamma*TNF;
  ACAN_inhibits_TNF: ACAN => TNF; 1/(1 + exp(-h*(ACAN - 0.5))) - gamma*TNF;
  COL2A_inhibits_TNF: COL2A => TNF; 1/(1 + exp(-h*(COL2A - 0.5))) - gamma*TNF;
  COL1A_inhibits_TNF: COL1A => TNF; 1/(1 + exp(-h*(COL1A - 0.5))) - gamma*TNF;
  TGF_beta_inhibits_TNF: TGF_beta => TNF; 1/(1 + exp(-h*(TGF_beta - 0.5))) - gamma*TNF;
  TIMP1_2_inhibits_TNF: TIMP1_2 => TNF; 1/(1 + exp(-h*(TIMP1_2 - 0.5))) - gamma*TNF;
  TNF_activates_IL_17A: TNF => IL_17A; 1/(1 + exp(-h*(TNF - 0.5))) - gamma*IL_17A;
  IL_12A_activates_IL_17A: IL_12A => IL_17A; 1/(1 + exp(-h*(IL_12A - 0.5))) - gamma*IL_17A;
  IL_1beta_activates_IL_17A: IL_1beta => IL_17A; 1/(1 + exp(-h*(IL_1beta - 0.5))) - gamma*IL_17A;
  IL_6_activates_IL_17A: IL_6 => IL_17A; 1/(1 + exp(-h*(IL_6 - 0.5))) - gamma*IL_17A;
  IL_8_activates_IL_17A: IL_8 => IL_17A; 1/(1 + exp(-h*(IL_8 - 0.5))) - gamma*IL_17A;
  IL_10_activates_IL_17A: IL_10 => IL_17A; 1/(1 + exp(-h*(IL_10 - 0.5))) - gamma*IL_17A;
  CCL_activates_IL_17A: CCL => IL_17A; 1/(1 + exp(-h*(CCL - 0.5))) - gamma*IL_17A;
  MMP1_activates_IL_17A: MMP1 => IL_17A; 1/(1 + exp(-h*(MMP1 - 0.5))) - gamma*IL_17A;
  MMP3_activates_IL_17A: MMP3 => IL_17A; 1/(1 + exp(-h*(MMP3 - 0.5))) - gamma*IL_17A;
  VEGF_activates_IL_17A: VEGF => IL_17A; 1/(1 + exp(-h*(VEGF - 0.5))) - gamma*IL_17A;
  ACAN_inhibits_IL_17A: ACAN => IL_17A; 1/(1 + exp(-h*(ACAN - 0.5))) - gamma*IL_17A;
  COL2A_inhibits_IL_17A: COL2A => IL_17A; 1/(1 + exp(-h*(COL2A - 0.5))) - gamma*IL_17A;
  IL_4_inhibits_IL_17A: IL_4 => IL_17A; 1/(1 + exp(-h*(IL_4 - 0.5))) - gamma*IL_17A;
  TIMP3_inhibits_IL_17A: TIMP3 => IL_17A; 1/(1 + exp(-h*(TIMP3 - 0.5))) - gamma*IL_17A;
  IL_6_activates_IL_18: IL_6 => IL_18; 1/(1 + exp(-h*(IL_6 - 0.5))) - gamma*IL_18;
  MMP1_activates_IL_18: MMP1 => IL_18; 1/(1 + exp(-h*(MMP1 - 0.5))) - gamma*IL_18;
  MMP13_activates_IL_18: MMP13 => IL_18; 1/(1 + exp(-h*(MMP13 - 0.5))) - gamma*IL_18;
  MMP3_activates_IL_18: MMP3 => IL_18; 1/(1 + exp(-h*(MMP3 - 0.5))) - gamma*IL_18;
  ACAN_inhibits_IL_18: ACAN => IL_18; 1/(1 + exp(-h*(ACAN - 0.5))) - gamma*IL_18;
  COL2A_inhibits_IL_18: COL2A => IL_18; 1/(1 + exp(-h*(COL2A - 0.5))) - gamma*IL_18;
  COL10A1_activates_IL_1beta: COL10A1 => IL_1beta; 1/(1 + exp(-h*(COL10A1 - 0.5))) - gamma*IL_1beta;
  COL1A_activates_IL_1beta: COL1A => IL_1beta; 1/(1 + exp(-h*(COL1A - 0.5))) - gamma*IL_1beta;
  IFN_gamma_activates_IL_1beta: IFN_gamma => IL_1beta; 1/(1 + exp(-h*(IFN_gamma - 0.5))) - gamma*IL_1beta;
  TNF_activates_IL_1beta: TNF => IL_1beta; 1/(1 + exp(-h*(TNF - 0.5))) - gamma*IL_1beta;
  IL_18_activates_IL_1beta: IL_18 => IL_1beta; 1/(1 + exp(-h*(IL_18 - 0.5))) - gamma*IL_1beta;
  IL_1alpha_activates_IL_1beta: IL_1alpha => IL_1beta; 1/(1 + exp(-h*(IL_1alpha - 0.5))) - gamma*IL_1beta;
  IL_1beta_activates_IL_1beta: IL_1beta => IL_1beta; 1/(1 + exp(-h*(IL_1beta - 0.5))) - gamma*IL_1beta;
  IL_6_activates_IL_1beta: IL_6 => IL_1beta; 1/(1 + exp(-h*(IL_6 - 0.5))) - gamma*IL_1beta;
  IL_8_activates_IL_1beta: IL_8 => IL_1beta; 1/(1 + exp(-h*(IL_8 - 0.5))) - gamma*IL_1beta;
  IL_1RA_activates_IL_1beta: IL_1RA => IL_1beta; 1/(1 + exp(-h*(IL_1RA - 0.5))) - gamma*IL_1beta;
  IL_4_activates_IL_1beta: IL_4 => IL_1beta; 1/(1 + exp(-h*(IL_4 - 0.5))) - gamma*IL_1beta;
  IL_10_activates_IL_1beta: IL_10 => IL_1beta; 1/(1 + exp(-h*(IL_10 - 0.5))) - gamma*IL_1beta;
  CSF2_activates_IL_1beta: CSF2 => IL_1beta; 1/(1 + exp(-h*(CSF2 - 0.5))) - gamma*IL_1beta;
  CCL_activates_IL_1beta: CCL => IL_1beta; 1/(1 + exp(-h*(CCL - 0.5))) - gamma*IL_1beta;
  MMP1_activates_IL_1beta: MMP1 => IL_1beta; 1/(1 + exp(-h*(MMP1 - 0.5))) - gamma*IL_1beta;
  MMP13_activates_IL_1beta: MMP13 => IL_1beta; 1/(1 + exp(-h*(MMP13 - 0.5))) - gamma*IL_1beta;
  MMP2_activates_IL_1beta: MMP2 => IL_1beta; 1/(1 + exp(-h*(MMP2 - 0.5))) - gamma*IL_1beta;
  MMP3_activates_IL_1beta: MMP3 => IL_1beta; 1/(1 + exp(-h*(MMP3 - 0.5))) - gamma*IL_1beta;
  VEGF_activates_IL_1beta: VEGF => IL_1beta; 1/(1 + exp(-h*(VEGF - 0.5))) - gamma*IL_1beta;
  ADAMTS4_5_activates_IL_1beta: ADAMTS4_5 => IL_1beta; 1/(1 + exp(-h*(ADAMTS4_5 - 0.5))) - gamma*IL_1beta;
  ACAN_inhibits_IL_1beta: ACAN => IL_1beta; 1/(1 + exp(-h*(ACAN - 0.5))) - gamma*IL_1beta;
  COL2A_inhibits_IL_1beta: COL2A => IL_1beta; 1/(1 + exp(-h*(COL2A - 0.5))) - gamma*IL_1beta;
  IL_12A_inhibits_IL_1beta: IL_12A => IL_1beta; 1/(1 + exp(-h*(IL_12A - 0.5))) - gamma*IL_1beta;
  IL_17A_inhibits_IL_1beta: IL_17A => IL_1beta; 1/(1 + exp(-h*(IL_17A - 0.5))) - gamma*IL_1beta;
  TGF_beta_inhibits_IL_1beta: TGF_beta => IL_1beta; 1/(1 + exp(-h*(TGF_beta - 0.5))) - gamma*IL_1beta;
  IGF1_inhibits_IL_1beta: IGF1 => IL_1beta; 1/(1 + exp(-h*(IGF1 - 0.5))) - gamma*IL_1beta;
  GDF5_inhibits_IL_1beta: GDF5 => IL_1beta; 1/(1 + exp(-h*(GDF5 - 0.5))) - gamma*IL_1beta;
  CCL22_inhibits_IL_1beta: CCL22 => IL_1beta; 1/(1 + exp(-h*(CCL22 - 0.5))) - gamma*IL_1beta;
  TNF_activates_IL_6: TNF => IL_6; 1/(1 + exp(-h*(TNF - 0.5))) - gamma*IL_6;
  IL_6_activates_IL_6: IL_6 => IL_6; 1/(1 + exp(-h*(IL_6 - 0.5))) - gamma*IL_6;
  IL_8_activates_IL_6: IL_8 => IL_6; 1/(1 + exp(-h*(IL_8 - 0.5))) - gamma*IL_6;
  MMP13_activates_IL_6: MMP13 => IL_6; 1/(1 + exp(-h*(MMP13 - 0.5))) - gamma*IL_6;
  MMP3_activates_IL_6: MMP3 => IL_6; 1/(1 + exp(-h*(MMP3 - 0.5))) - gamma*IL_6;
  VEGF_activates_IL_6: VEGF => IL_6; 1/(1 + exp(-h*(VEGF - 0.5))) - gamma*IL_6;
  ADAMTS4_5_activates_IL_6: ADAMTS4_5 => IL_6; 1/(1 + exp(-h*(ADAMTS4_5 - 0.5))) - gamma*IL_6;
  TIMP1_2_activates_IL_6: TIMP1_2 => IL_6; 1/(1 + exp(-h*(TIMP1_2 - 0.5))) - gamma*IL_6;
  ACAN_inhibits_IL_6: ACAN => IL_6; 1/(1 + exp(-h*(ACAN - 0.5))) - gamma*IL_6;
  COL2A_inhibits_IL_6: COL2A => IL_6; 1/(1 + exp(-h*(COL2A - 0.5))) - gamma*IL_6;
  IL_8_inhibits_IL_6: IL_8 => IL_6; 1/(1 + exp(-h*(IL_8 - 0.5))) - gamma*IL_6;
  IGF1_inhibits_IL_6: IGF1 => IL_6; 1/(1 + exp(-h*(IGF1 - 0.5))) - gamma*IL_6;
  IL_6_activates_IL_8: IL_6 => IL_8; 1/(1 + exp(-h*(IL_6 - 0.5))) - gamma*IL_8;
  MMP13_activates_IL_8: MMP13 => IL_8; 1/(1 + exp(-h*(MMP13 - 0.5))) - gamma*IL_8;
  MMP13_inhibits_IL_1RA: MMP13 => IL_1RA; 1/(1 + exp(-h*(MMP13 - 0.5))) - gamma*IL_1RA;
  MMP3_inhibits_IL_1RA: MMP3 => IL_1RA; 1/(1 + exp(-h*(MMP3 - 0.5))) - gamma*IL_1RA;
  ADAMTS4_5_inhibits_IL_1RA: ADAMTS4_5 => IL_1RA; 1/(1 + exp(-h*(ADAMTS4_5 - 0.5))) - gamma*IL_1RA;
  ACAN_activates_IL_4: ACAN => IL_4; 1/(1 + exp(-h*(ACAN - 0.5))) - gamma*IL_4;
  COL2A_activates_IL_4: COL2A => IL_4; 1/(1 + exp(-h*(COL2A - 0.5))) - gamma*IL_4;
  IL_6_activates_IL_4: IL_6 => IL_4; 1/(1 + exp(-h*(IL_6 - 0.5))) - gamma*IL_4;
  IL_10_activates_IL_4: IL_10 => IL_4; 1/(1 + exp(-h*(IL_10 - 0.5))) - gamma*IL_4;
  IGF1_activates_IL_4: IGF1 => IL_4; 1/(1 + exp(-h*(IGF1 - 0.5))) - gamma*IL_4;
  CCL22_activates_IL_4: CCL22 => IL_4; 1/(1 + exp(-h*(CCL22 - 0.5))) - gamma*IL_4;
  IFN_gamma_inhibits_IL_4: IFN_gamma => IL_4; 1/(1 + exp(-h*(IFN_gamma - 0.5))) - gamma*IL_4;
  TNF_inhibits_IL_4: TNF => IL_4; 1/(1 + exp(-h*(TNF - 0.5))) - gamma*IL_4;
  IL_12A_inhibits_IL_4: IL_12A => IL_4; 1/(1 + exp(-h*(IL_12A - 0.5))) - gamma*IL_4;
  IL_17A_inhibits_IL_4: IL_17A => IL_4; 1/(1 + exp(-h*(IL_17A - 0.5))) - gamma*IL_4;
  IL_18_inhibits_IL_4: IL_18 => IL_4; 1/(1 + exp(-h*(IL_18 - 0.5))) - gamma*IL_4;
  IL_1alpha_inhibits_IL_4: IL_1alpha => IL_4; 1/(1 + exp(-h*(IL_1alpha - 0.5))) - gamma*IL_4;
  IL_1beta_inhibits_IL_4: IL_1beta => IL_4; 1/(1 + exp(-h*(IL_1beta - 0.5))) - gamma*IL_4;
  IL_8_inhibits_IL_4: IL_8 => IL_4; 1/(1 + exp(-h*(IL_8 - 0.5))) - gamma*IL_4;
  CCL_inhibits_IL_4: CCL => IL_4; 1/(1 + exp(-h*(CCL - 0.5))) - gamma*IL_4;
  MMP3_inhibits_IL_4: MMP3 => IL_4; 1/(1 + exp(-h*(MMP3 - 0.5))) - gamma*IL_4;
  ACAN_activates_IL_10: ACAN => IL_10; 1/(1 + exp(-h*(ACAN - 0.5))) - gamma*IL_10;
  COL2A_activates_IL_10: COL2A => IL_10; 1/(1 + exp(-h*(COL2A - 0.5))) - gamma*IL_10;
  TIMP1_2_activates_IL_10: TIMP1_2 => IL_10; 1/(1 + exp(-h*(TIMP1_2 - 0.5))) - gamma*IL_10;
  COL10A1_inhibits_IL_10: COL10A1 => IL_10; 1/(1 + exp(-h*(COL10A1 - 0.5))) - gamma*IL_10;
  TNF_inhibits_IL_10: TNF => IL_10; 1/(1 + exp(-h*(TNF - 0.5))) - gamma*IL_10;
  IL_12A_inhibits_IL_10: IL_12A => IL_10; 1/(1 + exp(-h*(IL_12A - 0.5))) - gamma*IL_10;
  IL_17A_inhibits_IL_10: IL_17A => IL_10; 1/(1 + exp(-h*(IL_17A - 0.5))) - gamma*IL_10;
  IL_18_inhibits_IL_10: IL_18 => IL_10; 1/(1 + exp(-h*(IL_18 - 0.5))) - gamma*IL_10;
  IL_1alpha_inhibits_IL_10: IL_1alpha => IL_10; 1/(1 + exp(-h*(IL_1alpha - 0.5))) - gamma*IL_10;
  IL_1beta_inhibits_IL_10: IL_1beta => IL_10; 1/(1 + exp(-h*(IL_1beta - 0.5))) - gamma*IL_10;
  IL_6_inhibits_IL_10: IL_6 => IL_10; 1/(1 + exp(-h*(IL_6 - 0.5))) - gamma*IL_10;
  IL_8_inhibits_IL_10: IL_8 => IL_10; 1/(1 + exp(-h*(IL_8 - 0.5))) - gamma*IL_10;
  CSF2_inhibits_IL_10: CSF2 => IL_10; 1/(1 + exp(-h*(CSF2 - 0.5))) - gamma*IL_10;
  CCL_inhibits_IL_10: CCL => IL_10; 1/(1 + exp(-h*(CCL - 0.5))) - gamma*IL_10;
  CCL22_inhibits_IL_10: CCL22 => IL_10; 1/(1 + exp(-h*(CCL22 - 0.5))) - gamma*IL_10;
  ACAN_activates_TGF_beta: ACAN => TGF_beta; 1/(1 + exp(-h*(ACAN - 0.5))) - gamma*TGF_beta;
  COL2A_activates_TGF_beta: COL2A => TGF_beta; 1/(1 + exp(-h*(COL2A - 0.5))) - gamma*TGF_beta;
  IL_4_activates_TGF_beta: IL_4 => TGF_beta; 1/(1 + exp(-h*(IL_4 - 0.5))) - gamma*TGF_beta;
  TIMP1_2_activates_TGF_beta: TIMP1_2 => TGF_beta; 1/(1 + exp(-h*(TIMP1_2 - 0.5))) - gamma*TGF_beta;
  TIMP3_activates_TGF_beta: TIMP3 => TGF_beta; 1/(1 + exp(-h*(TIMP3 - 0.5))) - gamma*TGF_beta;
  TNF_inhibits_TGF_beta: TNF => TGF_beta; 1/(1 + exp(-h*(TNF - 0.5))) - gamma*TGF_beta;
  IL_1beta_inhibits_TGF_beta: IL_1beta => TGF_beta; 1/(1 + exp(-h*(IL_1beta - 0.5))) - gamma*TGF_beta;
  CCL_inhibits_TGF_beta: CCL => TGF_beta; 1/(1 + exp(-h*(CCL - 0.5))) - gamma*TGF_beta;
  MMP1_inhibits_TGF_beta: MMP1 => TGF_beta; 1/(1 + exp(-h*(MMP1 - 0.5))) - gamma*TGF_beta;
  MMP13_inhibits_TGF_beta: MMP13 => TGF_beta; 1/(1 + exp(-h*(MMP13 - 0.5))) - gamma*TGF_beta;
  MMP2_inhibits_TGF_beta: MMP2 => TGF_beta; 1/(1 + exp(-h*(MMP2 - 0.5))) - gamma*TGF_beta;
  MMP3_inhibits_TGF_beta: MMP3 => TGF_beta; 1/(1 + exp(-h*(MMP3 - 0.5))) - gamma*TGF_beta;
  MMP9_inhibits_TGF_beta: MMP9 => TGF_beta; 1/(1 + exp(-h*(MMP9 - 0.5))) - gamma*TGF_beta;
  ADAMTS4_5_inhibits_TGF_beta: ADAMTS4_5 => TGF_beta; 1/(1 + exp(-h*(ADAMTS4_5 - 0.5))) - gamma*TGF_beta;
  ACAN_activates_IGF1: ACAN => IGF1; 1/(1 + exp(-h*(ACAN - 0.5))) - gamma*IGF1;
  COL2A_activates_IGF1: COL2A => IGF1; 1/(1 + exp(-h*(COL2A - 0.5))) - gamma*IGF1;
  TIMP1_2_activates_IGF1: TIMP1_2 => IGF1; 1/(1 + exp(-h*(TIMP1_2 - 0.5))) - gamma*IGF1;
  MMP3_inhibits_IGF1: MMP3 => IGF1; 1/(1 + exp(-h*(MMP3 - 0.5))) - gamma*IGF1;
  ACAN_activates_GDF5: ACAN => GDF5; 1/(1 + exp(-h*(ACAN - 0.5))) - gamma*GDF5;
  COL2A_activates_GDF5: COL2A => GDF5; 1/(1 + exp(-h*(COL2A - 0.5))) - gamma*GDF5;
  TNF_inhibits_GDF5: TNF => GDF5; 1/(1 + exp(-h*(TNF - 0.5))) - gamma*GDF5;
  IL_1beta_inhibits_GDF5: IL_1beta => GDF5; 1/(1 + exp(-h*(IL_1beta - 0.5))) - gamma*GDF5;
  MMP3_inhibits_GDF5: MMP3 => GDF5; 1/(1 + exp(-h*(MMP3 - 0.5))) - gamma*GDF5;
  IL_10_activates_PGRN: IL_10 => PGRN; 1/(1 + exp(-h*(IL_10 - 0.5))) - gamma*PGRN;
  IL_17A_inhibits_PGRN: IL_17A => PGRN; 1/(1 + exp(-h*(IL_17A - 0.5))) - gamma*PGRN;
  MMP9_inhibits_MMP1: MMP9 => MMP1; 1/(1 + exp(-h*(MMP9 - 0.5))) - gamma*MMP1;
  VEGF_activates_MMP13: VEGF => MMP13; 1/(1 + exp(-h*(VEGF - 0.5))) - gamma*MMP13;
  ACAN_inhibits_MMP2: ACAN => MMP2; 1/(1 + exp(-h*(ACAN - 0.5))) - gamma*MMP2;
  MMP1_activates_MMP3: MMP1 => MMP3; 1/(1 + exp(-h*(MMP1 - 0.5))) - gamma*MMP3;
  VEGF_activates_MMP3: VEGF => MMP3; 1/(1 + exp(-h*(VEGF - 0.5))) - gamma*MMP3;
  ADAMTS4_5_activates_VEGF: ADAMTS4_5 => VEGF; 1/(1 + exp(-h*(ADAMTS4_5 - 0.5))) - gamma*VEGF;
  VEGF_activates_ADAMTS4_5: VEGF => ADAMTS4_5; 1/(1 + exp(-h*(VEGF - 0.5))) - gamma*ADAMTS4_5;
  MMP1_inhibits_TIMP1_2: MMP1 => TIMP1_2; 1/(1 + exp(-h*(MMP1 - 0.5))) - gamma*TIMP1_2;
  MMP13_inhibits_TIMP1_2: MMP13 => TIMP1_2; 1/(1 + exp(-h*(MMP13 - 0.5))) - gamma*TIMP1_2;
  MMP3_inhibits_TIMP1_2: MMP3 => TIMP1_2; 1/(1 + exp(-h*(MMP3 - 0.5))) - gamma*TIMP1_2;
  TNF_inhibits_TIMP3: TNF => TIMP3; 1/(1 + exp(-h*(TNF - 0.5))) - gamma*TIMP3;
  MMP3_inhibits_TIMP3: MMP3 => TIMP3; 1/(1 + exp(-h*(MMP3 - 0.5))) - gamma*TIMP3;
  VEGF_inhibits_TIMP3: VEGF => TIMP3; 1/(1 + exp(-h*(VEGF - 0.5))) - gamma*TIMP3;
  ADAMTS4_5_inhibits_TIMP3: ADAMTS4_5 => TIMP3; 1/(1 + exp(-h*(ADAMTS4_5 - 0.5))) - gamma*TIMP3;

  // Unit definitions:
  unit concentration_unit = 1e-3 mole;
  unit time_unit = second;
  unit rate_constant_unit = 1 / second;
  unit dimensionless_unit = dimensionless;
end
