// SBML level 2 version 4
// dcterms:bibliographicCitation: urn:miriam:pubmed:29782929

model Susree2018___Effect_of_coated_platelets_on_thrombin_generation()
  // Susree2018 - Effect of coated platelets on thrombin generation
  // Mathematical model of blood coagulation that simulates the effect of coated platelets on thrombin generation.
  // isVersionOf GO:0007596
  // isDescribedBy pubmed:29782929

  // Compartments:
  compartment compartment = 1;

  // Species:
  species $TF in compartment = 0.025;
  species $VII in compartment = 10;
  species $TF_VII in compartment = 0; TF_VII is "TF:VII";
  species $VIIa in compartment = 0.1;
  species $TF_VIIa in compartment = 0; TF_VIIa is "TF:VIIa";
  species $XI in compartment = 30;
  species $XIa in compartment = 0.003;
  species $IX in compartment = 90;
  species $IXa in compartment = 0.009;
  species $X in compartment = 170;
  species $Xa in compartment = 0.017;
  species $II in compartment = 1400;
  species $IIa in compartment = 0.14;
  species $RP in compartment = 10;
  species $AP in compartment = 0.001;
  species $VIII in compartment = 0.7;
  species $VIIIa in compartment = 7e-5;
  species $V in compartment = 20;
  species $Va in compartment = 0.002;
  species $I in compartment = 7000;
  species $Ia in compartment = 0.7;
  species $TFPI in compartment = 2.5;
  species $Xa_TFPI in compartment = 0; Xa_TFPI is "Xa:TFPI";
  species $ATIII in compartment = 3400;
  species $a1AT in compartment = 45000;
  species $CP in compartment;
  species $PS in compartment = 346;
  species $IXa_m in compartment;
  species $VIIIa_m in compartment;
  species $Xa_Va_m in compartment;
  species $X_m in compartment;
  species $II_m in compartment;
  species $Va_m in compartment;

  // Parameters:
  K_i = 200;
  K_D9 = 12;
  K_D10 = 113.8;
  K_D2 = 590;
  K_D8 = 0.57;
  K_D5 = 2.98;
  kp = 0.09;
  K_pM = 2.4;
  k_T7 = 0.0032; k_T7 is "k_T7+";
  k_T7_0 = 0.0031; k_T7_0 is "k_T7-";
  k_T7a = 0.023; k_T7a is "k_T7a+";
  k_T7a_0 = 0.0031; k_T7a_0 is "k_T7a-";
  k_TF7 = 0.00044;
  k_10_T7 = 0.006667; k_10_T7 is "k_10,T7";
  k_2_7 = 0.061; k_2_7 is "k_2,7";
  k_M_2_7 = 2700; k_M_2_7 is "k_M_2,7";
  h_7_AT = 4.5e-7;
  h_7_TFPI = 0.05;
  var k_eff_7_9; k_eff_7_9 is "k_eff_7,9";
  h_11_A3 = 2.667e-5;
  h_11_L1 = 2.167e-7;
  k_9 = 0.1833;
  K_9M = 160;
  h_9 = 0.0002223;
  var k_eff_7_10; k_eff_7_10 is "k_eff_7,10";
  K_D_TEN = 0.56;
  k_10 = 8.334;
  k_10M = 63;
  h_10_AT = 3.05e-6;
  h_10_TP = 0.0008667; h_10_TP is "h_10_TP+";
  h_10_TP_0 = 0.000333;
  k_2t = 7.5e-6;
  k_2_K_2M = 4.63e-5; k_2_K_2M is "k_2/K_2M";
  h_2 = 4.816e-6;
  k_8 = 0.9;
  K_8M = 147;
  h_8 = 0.0037;
  k_5 = 0.233;
  K_5M = 71.7;
  K_D_PRO = 0.118; K_D_PRO is "K_D,PRO";
  h_5 = 0.0028;
  k_f = 59;
  K_fM = 3160;
  Dummy_variable = 2;

  // Assignment rules:
  delta := piecewise(1, Dummy_variable == 0, piecewise(0.12, Dummy_variable == 1, 0.00106*IIa + 0.00021));
  CP := delta*AP;
  Va_m := 3000*CP*Va/(K_D5 + Va);
  Xa_Va_m := Xa*Va_m/(K_D_PRO*(1 + PS/K_i + Xa/K_D_PRO) + Va_m);
  k_eff_7_9 := 3.333e-6/delta;
  k_eff := 0.0005/delta;
  k_eff_7_10 := 0.0001667/delta;
  Quantity1 := 25000*CP/(1 + (IX + IXa)/K_D9 + (X + Xa)/K_D10 + II/K_D2 + (VIII + VIIIa)/K_D8);
  IXa_m := Quantity1*(IXa/K_D9);
  VIIIa_m := Quantity1*(VIIIa/K_D8);
  X_m := Quantity1*(X/K_D10);
  II_m := Quantity1*(II/K_D2);
  time_scaled := time/4.5;

  // Rate rules:
  TF' = -k_T7*TF*VII + k_T7_0*TF_VII - k_T7a*TF*VIIa + k_T7a_0*TF_VIIa;
  VII' = -k_TF7*TF_VIIa*VII - k_2_7*IIa*VIII/(k_M_2_7 + VII) - 0*k_T7*TF*VII + 0*k_T7_0*TF_VII;
  TF_VII' = k_T7*TF*VII - k_T7_0*TF_VII - k_10_T7*Xa*TF_VII - k_2_7*IIa*TF_VII/(k_M_2_7 + TF_VII);
  VIIa' = k_TF7*TF_VIIa*VII + k_2_7*IIa*VII/(k_M_2_7 + VII) - 0*k_T7a*TF*VIIa + 0*k_T7a_0*TF_VIIa;
  TF_VIIa' = k_T7a*TF*VIIa - k_T7a_0*TF_VIIa + k_10_T7*Xa*TF_VII + k_2_7*IIa*TF_VII/(k_M_2_7 + TF_VII) - h_7_AT*ATIII*TF_VIIa - h_7_TFPI*Xa_TFPI*TF_VII;
  XI' = -k_eff*1500*CP*XI*IIa;
  XIa' = k_eff*250*CP*XI*IIa - h_11_A3*XIa*ATIII - h_11_L1*XIa*a1AT;
  IX' = -k_eff_7_9*CP*VIIa*IX - k_9*XIa*IX/(K_9M + IX);
  IXa' = k_eff_7_9*CP*VIIa*IX + k_9*XIa*IX/(K_9M + IX) - h_9*IXa*ATIII;
  X' = -k_eff_7_10*CP*VIIa*X - k_10*IXa_m*VIIIa_m*X_m/(K_D_TEN*(k_10M + X_m));
  Xa' = k_eff_7_10*CP*VIIa*X + k_10*IXa_m*VIIIa_m*X_m/(K_D_TEN*(k_10M + X_m)) - h_10_TP*TFPI*Xa + h_10_TP_0*Xa_TFPI - h_10_AT*ATIII*Xa;
  II' = -k_2t*Xa*II - k_2_K_2M*delta*Xa_Va_m*II_m/CP;
  IIa' = k_2t*Xa*II - h_2*ATIII*IIa + k_2_K_2M*delta*Xa_Va_m*II_m/CP;
  RP' = -(kp*RP*IIa)/(K_pM + 0*RP + 1*IIa);
  AP' = kp*RP*IIa/(K_pM + 0*RP + 1*IIa);
  VIII' = -k_8*IIa*VIII/(K_8M + VIII);
  VIIIa' = k_8*IIa*VIII/(K_8M + VIII) - h_8*VIIIa;
  V' = -k_5*IIa*V/(K_5M + V);
  Va' = k_5*IIa*V/(K_5M + V) - h_5*Va;
  I' = -k_f*IIa*I/(K_fM + 0*I);
  Ia' = k_f*IIa*I/(K_fM + 0*I);
  TFPI' = -h_10_TP*Xa*TFPI + h_10_TP_0*Xa_TFPI;
  Xa_TFPI' = h_10_TP*Xa*TFPI - h_10_TP_0*Xa_TFPI - h_7_TFPI*TF_VIIa*Xa_TFPI;
  ATIII' = -ATIII*(h_10_AT*Xa + h_9*IXa + h_2*IIa + k_TF7*TF_VIIa + h_11_A3*XIa);
  a1AT' = -h_11_L1*XIa*a1AT;

  // Unit definitions:
  unit volume = 1e-3 litre;
  unit substance = 1e-9 mole;
end
