// SBML level 2 version 4
// dcterms:bibliographicCitation: urn:miriam:pubmed:18831981

model Tanos2008___Blood_coagulation_and_Snake_Venom()
  // Tanos2008 - Blood coagulation and Snake Venom
  // Mathematical model of the blood coagulation cascade including interaction of snake venom and antivenom.
  // isVersionOf GO:0007596
  // isDescribedBy pubmed:18831981

  // Compartments:
  compartment compartment = 1;

  // Species:
  species $II in compartment = 1394.4;
  species $IIa in compartment = 0;
  species $V in compartment = 26.7;
  species $Va in compartment = 0;
  species $VII in compartment = 10;
  species $VIIa in compartment = 0;
  species $VIII in compartment = 0.7;
  species $VIIIa in compartment = 0;
  species $IX in compartment = 89.6;
  species $IXa in compartment = 0;
  species $X in compartment = 174.3;
  species $Xa in compartment = 0;
  species $XI in compartment = 30.6;
  species $XIa in compartment = 0;
  species $XIIa in compartment = 0;
  species $XIII in compartment = 70.3;
  species $XIIIa in compartment = 0;
  species $Pg in compartment = 2154.3;
  species $P in compartment = 0;
  species $PC in compartment = 60;
  species $APC in compartment = 0;
  species $Tmod in compartment = 50;
  species $TAT in compartment = 0;
  species $IXa_VIIIa in compartment = 0; IXa_VIIIa is "IXa:VIIIa";
  species $Va_Xa in compartment = 0; Va_Xa is "Va:Xa";
  species $IIa_Tmod in compartment = 0; IIa_Tmod is "IIa:Tmod";
  species $Taipan in compartment = 0.2;
  species $Fg in compartment = 8945.5;
  species $F in compartment = 0;
  species $XF in compartment = 0;
  species $DP in compartment = 0;
  species $C1 in compartment = 0;
  species $C2 in compartment = 0;
  species $Antivenom in compartment;

  // Parameters:
  V_a = 70;
  k_a = 10;
  V_b = 50;
  k_b = 1;
  V_c = 7;
  k_c = 10;
  V_d = 70;
  k_d = 1;
  V_e = 10;
  k_e = 10;
  V_f = 1;
  k_f = 10;
  V_g = 3;
  k_g = 890;
  V_h = 74;
  k_h = 10;
  V_i = 0.001;
  k_i = 10;
  V_j = 70;
  k_j = 10;
  V_k = 50;
  k_k = 1;
  V_l = 70;
  k_l = 10;
  V_m = 7e-5;
  k_m = 10;
  V_n = 7;
  k_n = 10;
  V_o = 7;
  k_o = 100;
  V_p = 7;
  k_p = 10;
  V_q = 7;
  k_q = 10;
  V_r = 7;
  k_r = 1;
  V_s = 1;
  k_s = 1;
  V_t = 7;
  k_t = 1;
  V_u = 7;
  k_u = 1;
  V_v = 70;
  k_v = 1;
  V_w = 2;
  k_w = 1;
  V_x = 7;
  k_x = 7;
  V_y = 2;
  k_y = 1;
  V_taipan2 = 70;
  k_taipan2 = 10;
  d_II = 0.01;
  d_IIa = 67.4;
  d_V = 0.043;
  d_Va = 20;
  d_VII = 0.12;
  d_VIIa = 20;
  d_VIII = 0.058;
  d_VIIIa = 20;
  d_IX = 0.029;
  d_IXa = 20;
  d_X = 0.018;
  d_Xa = 20;
  d_XI = 0.1;
  d_XIa = 20;
  d_XIIa = 20;
  d_XIII = 0.05;
  d_XIIIa = 0.69;
  d_Pg = 0.05;
  d_P = 20;
  d_PC = 0.05;
  d_APC = 20.4;
  d_Tmod = 0.05;
  d_TAT = 0.2;
  d_IXa_VIIIa = 20; d_IXa_VIIIa is "d_IXa:VIIIa";
  d_Va_Xa = 20; d_Va_Xa is "d_Va:Xa";
  d_IIa_Tmod = 20; d_IIa_Tmod is "d_IIa:Tmod";
  d_Brown = 3.5;
  d_Tapian = 3.5;
  d_Fg = 0.032;
  d_F = 0.05;
  d_XF = 0.05;
  d_DP = 3.5;
  d_C = 0.99;
  c_a = 1;
  c_b = 1;
  c_c = 1;
  time_of_antivenom = 9999;
  Initial_for_Fg = Fg;
  Initial_for_II = II;
  Initial_for_IX = IX;
  Initial_for_PC = PC;
  Initial_for_Pg = Pg;
  Initial_for_Tmod = Tmod;
  Initial_for_VIII = VIII;
  Initial_for_VII = VII;
  Initial_for_V = V;
  Initial_for_XIII = XIII;
  Initial_for_XI = XI;
  Initial_for_X = X;

  // Assignment rules:
  Fraction_Pg := Pg/Initial_for_Pg;
  fraction_PC := PC/Initial_for_PC;
  time_log := log10(time);
  fraction_VII := VII/Initial_for_VII;
  fraction_VIII := VIII/Initial_for_VIII;
  fraction_IX := IX/Initial_for_IX;
  fraction_X := X/Initial_for_X;
  fraction_II := II/Initial_for_II;
  fraction_XIII := XIII/Initial_for_XIII;
  fraction_V := V/Initial_for_V;
  fraction_Fg := Fg/Initial_for_Fg;
  Antivenom := piecewise(1, time < time_of_antivenom, 100);
  p_VIII := d_VIII*Initial_for_VIII;
  p_IX := d_IX*Initial_for_IX;
  p_XI := d_XI*Initial_for_XI;
  p_VII := d_VII*Initial_for_VII;
  p_X := d_X*Initial_for_X;
  p_V := d_V*Initial_for_V;
  p_II := d_II*Initial_for_II;
  p_Fg := d_Fg*Initial_for_Fg;
  p_XIII := d_XIII*Initial_for_XIII;
  p_Pg := d_Pg*Initial_for_Pg;
  p_PC := d_PC*PC;
  p_Tmod := d_Tmod*Initial_for_Tmod;
  Reaction_A := V_a*IIa*VIII/(k_a + IIa);
  Reaction_B := V_b*APC*VIIIa/(k_b + APC);
  Reaction_C := V_c*XIa*IX/(k_c + XIa);
  Reaction_D := V_d*XIIa*XI/(k_d + XIIa);
  Reaction_E := V_e*IIa*XI/(k_e + IIa);
  Reaction_F := V_f*IIa*VII/(k_f + IIa);
  Reaction_G := V_g*IXa*X/(k_g + IXa);
  Reaction_H := V_h*IXa_VIIIa*X/(k_h + IXa_VIIIa);
  Reaction_I := V_i*VIIa*X/(k_i + VIIa);
  Reaction_J := V_j*IIa*V/(k_j + IIa);
  Reaction_K := V_k*APC*Va/(k_k + APC);
  Reaction_L := V_l*Va_Xa*II/(k_l + Va_Xa);
  Reaction_M := V_m*Xa*II/(k_m + Xa);
  Reaction_N := V_n*IIa*Fg/(k_n + IIa);
  Reaction_O := V_o*P*Fg/(k_o + P);
  Reaction_P := V_p*XIIIa*F/(k_p + XIIIa);
  Reaction_Q := V_q*P*F/(k_q + P);
  Reaction_R := V_r*P*XF/(k_r + P);
  Reaction_S := V_s*APC*XF/(k_s + APC);
  Reaction_T := V_t*IIa*XIII/(k_t + IIa);
  Reaction_U := V_u*IIa*Pg/(k_u + IIa);
  Reaction_V := V_v*F*Pg/(k_v + F);
  Reaction_W := V_w*APC*Pg/(k_w + APC);
  Reaction_X := V_x*IIa_Tmod*PC/(k_x + IIa_Tmod);
  Reaction_Y := V_y*Va_Xa*APC/(k_y + APC);
  Reaction_taipan1 := V_l*Taipan*II/(k_l + Taipan);
  Reaction_taipan2 := V_taipan2*C2*VII/(k_taipan2 + C2);

  // Rate rules:
  II' = p_II - Reaction_L - Reaction_M - Reaction_taipan1 - d_II*II;
  IIa' = Reaction_L + Reaction_M + Reaction_taipan1 - IIa*Tmod/c_c - d_IIa*IIa;
  V' = p_V - Reaction_J - d_V*V;
  Va' = Reaction_J - Xa*Va/c_b - Reaction_K - d_Va*Va;
  VII' = p_VII - Reaction_F - Reaction_taipan2 - d_VII*VII;
  VIIa' = Reaction_F + Reaction_taipan2 - d_VIIa*VIIa;
  VIII' = p_VIII - Reaction_A - d_VIII*VIII;
  VIIIa' = Reaction_A - IXa*VIIIa/c_a - Reaction_B - d_VIIIa*VIIIa;
  IX' = p_IX - Reaction_C - d_IX*IX;
  IXa' = Reaction_C - IXa*VIIIa/c_a - d_IXa*IXa;
  X' = p_X - Reaction_G - Reaction_H - Reaction_I - d_X*X;
  Xa' = Reaction_G + Reaction_H + Reaction_I - Xa*Va/c_b - d_Xa*Xa;
  XI' = p_XI - Reaction_D - Reaction_E - d_XI*XI;
  XIa' = Reaction_D + Reaction_E - d_XIa*XIa;
  XIIa' = -d_XIIa*XIIa;
  XIII' = p_XIII - Reaction_T - d_XIII*XIII;
  XIIIa' = Reaction_T - d_XIIIa*XIIIa;
  Pg' = p_Pg - Reaction_U - Reaction_V - Reaction_W - d_Pg*Pg;
  P' = Reaction_U + Reaction_V + Reaction_W - d_P*P;
  PC' = p_PC - Reaction_X - d_PC*PC;
  APC' = Reaction_X - d_APC*APC;
  Tmod' = p_Tmod - IIa*Tmod/c_c - d_Tmod*Tmod;
  TAT' = d_IIa*IIa - d_TAT*TAT;
  IXa_VIIIa' = IXa*VIIIa/c_a - d_IXa_VIIIa*IXa_VIIIa;
  Va_Xa' = Xa*Va/c_b - Reaction_Y - d_Va_Xa*Va_Xa;
  IIa_Tmod' = IIa*Tmod/c_c - d_IIa_Tmod*IIa_Tmod;
  Taipan' = -d_Tapian*Taipan*Antivenom;
  Fg' = p_Fg - Reaction_N - Reaction_O - d_Fg*Fg;
  F' = Reaction_N - Reaction_P - Reaction_Q - d_F*F;
  XF' = Reaction_P - Reaction_R - Reaction_S - d_XF*XF;
  DP' = Reaction_O + d_Fg*Fg + Reaction_R + d_F*F + Reaction_R + Reaction_S + d_XF*XF - d_DP*DP;
  C1' = d_Tapian*Taipan*Antivenom - d_C*C1;
  C2' = d_C*C1 - d_C*C2;

  // Unit definitions:
  unit volume = 1e-3 litre;
  unit time = 3600 second;
  unit substance = 1e-9 mole;
end
