// SBML level 2 version 4
// dcterms:bibliographicCitation: urn:miriam:pubmed:26783501

function function_1(V_max, modifier, substrate, Km)
  V_max*modifier*substrate/(Km + modifier);
end

function function_2(substrate1, substrate2, c)
  substrate1*substrate2/c;
end

model Zhou2015___Blood_coagulation_model_predicting_effects_of_factor_Xa_inhibitors()
  // Zhou2015 - Blood coagulation model predicting effects of factor Xa inhibitors
  // Blood coagulation model investigating effects of Xa-inhibitors (Rivaroxaban and Apixaban). Model is an extension of Pohl1994 and reduced from Wajima2009. Encoding the model from the supplementary files results in 43 species, 82 reactions and 111 parameters. Including the drug (Xa-inhibitor) and drug-Xa complexes results in 46 species, 84 reactions and 115 parameters (+1 dummy variable to change inhibitory kinetic parameters depending on which drug is simulated). The publication lists there being 45 species, 84 reactions and 116 parameters. Publication figure 2 has 45 species present however the complex VIIa:Xa (reaction 51 involving Xa and VIIa) is not shown. This figure also has numerous small errors such as listing IXa:ATIII complex twice (instead of one being XIa:ATIII), not showing XIa:ATIII, typo ('Va' -> Va), typo (IXa + VIIIa -> IXA:'VIIa'). Rate laws for Xa-drug interactions were assumed to be mass action.
  // hasPart kegg.drug:D07086
  // hasPart biomodels.db:BIOMD0000000340
  // hasPart kegg.drug:D03213
  // isVersionOf GO:0007596
  // isDescribedBy pubmed:26783501

  // Compartments:
  compartment compartment = 1;

  // Species:
  species VIII in compartment = 0.7;
  species VIIIa in compartment = 0;
  species IIa in compartment = 0;
  species IX in compartment = 89.6;
  species IXa in compartment = 0;
  species XIa in compartment = 0;
  species XI in compartment = 30.6;
  species XIIa in compartment = 0;
  species VII in compartment = 10;
  species VIIa in compartment = 0;
  species X in compartment = 174.3;
  species Xa in compartment = 0;
  species V in compartment = 26.7;
  species Va in compartment = 0;
  species II in compartment = 1394.4;
  species Xa_Va in compartment = 0; Xa_Va is "Xa:Va";
  species F in compartment = 0;
  species Fg in compartment = 8945.5;
  species DP in compartment = 0;
  species P in compartment = 0;
  species XF in compartment = 0;
  species XIIIa in compartment = 0;
  species XIII in compartment = 70.3;
  species Pg in compartment = 2154.3;
  species TF in compartment = 70;
  species VIIa_TF in compartment = 0; VIIa_TF is "VIIa:TF";
  species VII_TF in compartment = 0; VII_TF is "VII:TF";
  species VIIa_TF_Xa_TFPI in compartment = 0; VIIa_TF_Xa_TFPI is "VIIa:TF:Xa:TFPI";
  species Xa_TFPI in compartment = 0; Xa_TFPI is "Xa:TFPI";
  species TFPI in compartment = 2.5;
  species CA in compartment = 0;
  species XII in compartment = 375;
  species K in compartment = 0;
  species PK in compartment = 450;
  species ATIII in compartment = 3400;
  species Xa_ATIII in compartment = 0; Xa_ATIII is "Xa:ATIII";
  species IXa_ATIII in compartment = 0; IXa_ATIII is "IXa:ATIII";
  species IIa_ATIII in compartment = 0; IIa_ATIII is "IIa:ATIII";
  species VIIa_TF_ATIII in compartment = 0; VIIa_TF_ATIII is "VIIa:TF:ATIII";
  species XIIa_ATIII in compartment = 0; XIIa_ATIII is "XIIa:ATIII";
  species XIa_ATIII in compartment = 0; XIa_ATIII is "XIa:ATIII";
  species IXa_VIIIa in compartment = 0; IXa_VIIIa is "IXa:VIIIa";
  species VIIa_Xa in compartment = 0; VIIa_Xa is "VIIa:Xa";
  species Xa_Inhibitor in compartment = 0;
  species Xa_Xa_Inhibitor in compartment = 1; Xa_Xa_Inhibitor is "Xa:Xa_Inhibitor";
  species Xa_Va_Xa_Inhibitor in compartment = 1; Xa_Va_Xa_Inhibitor is "Xa:Va:Xa_Inhibitor";

  // Parameters:
  V_max1 = 70;
  K_m1 = 10;
  V_max2 = 7;
  K_m2 = 10;
  V_max3 = 70;
  K_m3 = 1;
  V_max4 = 10;
  K_m4 = 10;
  V_max5 = 1;
  K_m5 = 10;
  V_max6 = 3;
  K_m6 = 178;
  V_max7 = 74;
  K_m7 = 10;
  V_max8 = 0.001;
  K_m8 = 10;
  V_max9 = 70;
  K_m9 = 10;
  V_max10 = 70;
  K_m10 = 10;
  V_max11 = 7;
  K_m11 = 10;
  K_m12 = 10;
  V_max13 = 7;
  K_m13 = 100;
  V_max14 = 7;
  K_m14 = 10;
  V_max15 = 7;
  K_m15 = 10;
  V_max16 = 7;
  K_m16 = 1;
  V_max17 = 7;
  K_m17 = 1;
  V_max18 = 7;
  K_m18 = 1;
  V_max19 = 70;
  K_m19 = 1;
  c20 = 0.01;
  c21 = 0.5;
  c22 = 0.5;
  c23 = 0.1;
  c24 = 0.5;
  c25 = 0.5;
  V_max26 = 70;
  K_m26 = 1;
  V_max27 = 900;
  K_m27 = 200;
  V_max28 = 70;
  K_m28 = 1;
  V_max29 = 1000;
  K_m29 = 1;
  V_max30 = 1;
  K_m30 = 10;
  V_max31 = 1;
  K_m31 = 10;
  V_max32 = 0.2;
  K_m32 = 10;
  V_max33 = 7;
  K_m33 = 1;
  V_max34 = 70;
  K_m34 = 1;
  V_max35 = 7;
  K_m35 = 1;
  c36 = 0.0054;
  c37 = 0.00176;
  c38 = 0.0256;
  c39 = 0.000828;
  c40 = 7.78e-5;
  c41 = 0.00115;
  k42 = 0.012;
  k43 = 20;
  k44 = 0.0099;
  k45 = 20;
  k46 = 0.058;
  k47 = 20;
  k48 = 0.029;
  k49 = 20;
  k50 = 20;
  c51 = 0.5;
  k52 = 0.12;
  k53 = 20;
  k54 = 0.05;
  k55 = 0.7;
  k56 = 20;
  k57 = 20;
  k58 = 20;
  k59 = 0.018;
  k60 = 20;
  k61 = 0.043;
  k62 = 20;
  k63 = 20;
  k64 = 20;
  k65 = 0.01;
  k66 = 67.4;
  k67 = 0.0036;
  k68 = 0.69;
  k69 = 0.05;
  k70 = 20;
  k71 = 0.05;
  k72 = 20;
  k73 = 0.0064;
  k74 = 0.05;
  k75 = 0.05;
  k76 = 3.5;
  k77 = 0.01;
  k78 = 8.3;
  k79 = 1.4;
  k80 = 1;
  k81 = 1;
  k82 = 0.2;
  // Rivaroxaban == 0, 5-S-Rivaroxaban == 1, 5-R-Rivaroxaban == 2, Apixaban == 3. Parameter affects inhibitor kinetic constants.
  Drug = 0;
  var Inhibitor_Xa_Va_kon; Inhibitor_Xa_Va_kon is "Inhibitor_Xa:Va_kon";
  var Inhibitor_Xa_Va_koff; Inhibitor_Xa_Va_koff is "Inhibitor_Xa:Va_koff";

  // Assignment rules:
  V_max12 := piecewise(3000, (time - floor(time/24)*24 > 0.5) && (time - floor(time/24)*24 < 10), 7);
  Inhibitor_Xa_kon := piecewise(360, Drug == 0, piecewise(0, Drug == 1, piecewise(0.0774, Drug == 2, piecewise(162.72, Drug == 3, 0))));
  Inhibitor_Xa_koff := piecewise(144, Drug == 0, piecewise(0, Drug == 1, piecewise(12.6, Drug == 2, piecewise(40.68, Drug == 3, 0))));
  Inhibitor_Xa_Va_kon := piecewise(0, Drug == 0, piecewise(360, Drug == 1, piecewise(0, Drug == 2, piecewise(55.89, Drug == 3, 0))));
  Inhibitor_Xa_Va_koff := piecewise(0, Drug == 0, piecewise(756, Drug == 1, piecewise(0, Drug == 2, piecewise(34.65, Drug == 3, 0))));

  // Reactions:
  r01: VIII => VIIIa; compartment*function_1(V_max1, IIa, VIII, K_m1);  // modifiers: IIa
  r02: IX => IXa; compartment*function_1(V_max2, XIa, IX, K_m2);  // modifiers: XIa
  r03: XI => XIa; compartment*function_1(V_max3, XIIa, XI, K_m3);  // modifiers: XIIa
  r04: XI => XIa; compartment*function_1(V_max4, IIa, XI, K_m4);  // modifiers: IIa
  r05: VII => VIIa; compartment*function_1(V_max5, IIa, VII, K_m5);  // modifiers: IIa
  r06: X => Xa; compartment*function_1(V_max6, IXa, X, K_m6);  // modifiers: IXa
  r07: X => Xa; compartment*function_1(V_max7, IXa_VIIIa, X, K_m7);  // modifiers: IXa_VIIIa
  r08: X => Xa; compartment*function_1(V_max8, VIIa, X, K_m8);  // modifiers: VIIa
  r09: V => Va; compartment*function_1(V_max9, IIa, V, K_m9);  // modifiers: IIa
  r10: II => IIa; compartment*function_1(V_max10, Xa_Va, II, K_m10);  // modifiers: Xa_Va
  r11: II => IIa; compartment*function_1(V_max11, Xa, II, K_m11);  // modifiers: Xa
  r12: Fg => F; compartment*function_1(V_max12, IIa, Fg, K_m12);  // modifiers: IIa
  r13: Fg => DP; compartment*function_1(V_max13, P, Fg, K_m13);  // modifiers: P
  r14: F => XF; compartment*function_1(V_max14, XIIIa, F, K_m14);  // modifiers: XIIIa
  r15: F => DP; compartment*function_1(V_max15, P, F, K_m15);  // modifiers: P
  r16: XF => DP; compartment*function_1(V_max16, P, XF, K_m16);  // modifiers: P
  r17: XIII => XIIIa; compartment*function_1(V_max17, IIa, XIII, K_m17);  // modifiers: IIa
  r18: Pg => P; compartment*function_1(V_max18, IIa, Pg, K_m18);  // modifiers: IIa
  r19: Pg => P; compartment*function_1(V_max19, F, Pg, K_m19);  // modifiers: F
  r20: VIIIa + IXa => IXa_VIIIa; compartment*function_2(VIIIa, IXa, c20);
  r21: Xa + Va => Xa_Va; compartment*function_2(Xa, Va, c21);
  r22: VIIa + TF => VIIa_TF; compartment*function_2(VIIa, TF, c22);
  r23: VII + TF => VII_TF; compartment*function_2(VII, TF, c23);
  r24: Xa_TFPI + VIIa_TF => VIIa_TF_Xa_TFPI; compartment*function_2(Xa_TFPI, VIIa_TF, c24);
  r25: Xa + TFPI => Xa_TFPI; compartment*function_2(Xa, TFPI, c25);
  r26: VII_TF => VIIa_TF; compartment*function_1(V_max26, Xa, VII_TF, K_m26);  // modifiers: Xa
  r27: X => Xa; compartment*function_1(V_max27, VIIa_TF, X, K_m27);  // modifiers: VIIa_TF
  r28: IX => IXa; compartment*function_1(V_max28, VIIa_TF, IX, K_m28);  // modifiers: VIIa_TF
  r29: VII_TF => VIIa_TF; compartment*function_1(V_max29, TF, VII_TF, K_m29);  // modifiers: TF
  r30: VII => VIIa; compartment*function_1(V_max30, Xa, VII, K_m30);  // modifiers: Xa
  r31: VII => VIIa; compartment*function_1(V_max31, VIIa_TF, VII, K_m31);  // modifiers: VIIa_TF
  r32: VII => VIIa; compartment*function_1(V_max32, IXa, VII, K_m32);  // modifiers: IXa
  r33: XII => XIIa; compartment*function_1(V_max33, CA, XII, K_m33);  // modifiers: CA
  r34: XII => XIIa; compartment*function_1(V_max34, K, XII, K_m34);  // modifiers: K
  r35: PK => K; compartment*function_1(V_max35, XIIa, PK, K_m35);  // modifiers: XIIa
  r36: ATIII + Xa => Xa_ATIII; compartment*function_2(ATIII, Xa, c36);
  r37: IXa + ATIII => IXa_ATIII; compartment*function_2(IXa, ATIII, c37);
  r38: ATIII + IIa => IIa_ATIII; compartment*function_2(ATIII, IIa, c38);
  r39: VIIa_TF + ATIII => VIIa_TF_ATIII; compartment*function_2(VIIa_TF, ATIII, c39);
  r40: XIIa + ATIII => XIIa_ATIII; compartment*function_2(XIIa, ATIII, c40);
  r41: XIa + ATIII => XIa_ATIII; compartment*function_2(XIa, ATIII, c41);
  r42: XII => ; compartment*k42*XII;
  r43: XIIa => ; compartment*k43*XIIa;
  r44: XI => ; compartment*k44*XI;
  r45: XIa => ; compartment*k45*XIa;
  r46: VIII => ; compartment*k46*VIII;
  r47: VIIIa => ; compartment*k47*VIIIa;
  r48: IX => ; compartment*k48*IX;
  r49: IXa => ; compartment*k49*IXa;
  r50: IXa_VIIIa => ; compartment*k50*IXa_VIIIa;
  r51: VIIa + Xa => VIIa_Xa; compartment*function_2(VIIa, Xa, c51);
  r52: VII => ; compartment*k52*VII;
  r53: VIIa => ; compartment*k53*VIIa;
  r54: TF => ; compartment*k54*TF;
  r55: VII_TF => ; compartment*k55*VII_TF;
  r56: VIIa_TF => ; compartment*k56*VIIa_TF;
  r57: Xa_TFPI => ; compartment*k57*Xa_TFPI;
  r58: VIIa_TF_Xa_TFPI => ; compartment*k58*VIIa_TF_Xa_TFPI;
  r59: X => ; compartment*k59*X;
  r60: Xa => ; compartment*k60*Xa;
  r61: V => ; compartment*k61*V;
  r62: Va => ; compartment*k62*Va;
  r63: Xa_Va => ; compartment*k63*Xa_Va;
  r64: TFPI => ; compartment*k64*TFPI;
  r65: II => ; compartment*k65*II;
  r66: IIa => ; compartment*k66*IIa;
  r67: XIII => ; compartment*k67*XIII;
  r68: XIIIa => ; compartment*k68*XIIIa;
  r69: Pg => ; compartment*k69*Pg;
  r70: P => ; compartment*k70*P;
  r71: PK => ; compartment*k71*PK;
  r72: K => ; compartment*k72*K;
  r73: Fg => ; compartment*k73*Fg;
  r74: F => ; compartment*k74*F;
  r75: XF => ; compartment*k75*XF;
  r76: DP => ; compartment*k76*DP;
  r77: ATIII => ; compartment*k77*ATIII;
  r78: Xa_ATIII => ; compartment*k78*Xa_ATIII;
  r79: IXa_ATIII => ; compartment*k79*IXa_ATIII;
  r80: XIa_ATIII => ; compartment*k80*XIa_ATIII;
  r81: XIIa_ATIII => ; compartment*k81*XIIa_ATIII;
  r82: IIa_ATIII => ; compartment*k82*IIa_ATIII;
  Xa_Inhibition: Xa + Xa_Inhibitor -> Xa_Xa_Inhibitor; compartment*(Inhibitor_Xa_kon*Xa*Xa_Inhibitor - Inhibitor_Xa_koff*Xa_Xa_Inhibitor);
  Xa_Va_Inhibition: Xa_Va + Xa_Inhibitor -> Xa_Va_Xa_Inhibitor; compartment*(Inhibitor_Xa_Va_kon*Xa_Va*Xa_Inhibitor - Inhibitor_Xa_Va_koff*Xa_Va_Xa_Inhibitor); Xa_Va_Inhibition is "Xa:Va Inhibition";

  // Unit definitions:
  unit time = 3600 second;
  unit substance = 1e-9 mole;
end
